# 水泥生产;水泥, 复合硅酸盐水泥;新型干法;混合固废

Dataset: ILCD process, Unit process, black box
Geography: CN
Reference year: 2013
Classification: Unit processes / Materials production / Other mineralic materials
Generated by: #REF!, ysqsophia@gmail.com
Owner: 天工LCI数据工作小组
Review: Dependent internal review by 天工LCI数据工作小组
Amounts: no units in this file; such an amount is in the reference unit of its flow, which a separate flow dataset defines
copyright: false
licenseType: Free of charge for all users and uses

## General comment
以新型干法水泥生产技术作为技术对象。复合硅酸盐水泥生产需要的主要原材料包括石灰石、粘土、铁粉、石膏、粒化高炉矿渣和粉煤灰在生产过程中，粒化高炉矿渣和粉煤灰代替熟料添加到水泥中。

## Technology and included processes
复合硅酸盐水泥生产需要的主要原材料包括石灰石、粘土、铁粉、石膏、粒化高炉矿渣和粉煤灰在生产过程中，粒化高炉矿渣和粉煤灰代替熟料添加到水泥中.取 GB-175-2007 通用硅酸盐水泥标准值的平均值作为原材料数据，其中，石膏添加比例为水泥质量的 5%，熟料添加比例为水泥质量的60%.熟料是由石灰石、粘土及铁粉作为原料配合而成，并经假烧制成.

## Technical purpose
采用新型干法生产的复合硅酸盐水泥主要用于建筑业。该水泥在一般建筑如结构建设、铺设路面、打基础等方面特别适用，并可用于钢筋混凝土和预应力混凝土结构。粒化高炉矿渣和粉煤灰部分替代熟料不仅优化了来自其他工业过程的副产品的应用，而且有助于减少水泥工业的二氧化碳排放和能源消耗。

## Model description
LCA功能单位为1t复合硅酸盐水泥。系统边界包括：粒化高炉矿渣与粉煤灰的运输和粉磨过程，不包括其生产过程；石灰石、铁矿、粘土、石膏和煤炭的开采与运输；水泥生产和电力生产。水泥系统边界考虑的水泥主要生产过程包括：①原材料的开采及运输、工业矿渣的运输；②原材料的加工处理和预均化；③原材料的配合；④生料粉磨；⑤生料均化；⑥熟料煅烧；⑦熟料、石膏、工业废渣的粉磨处理；⑧水泥粉磨。

## Reference product
- cement, portland-composite cement: 1000
  复合硅酸盐水泥（PC）

## Inputs
- limestone, crushed, for mill: 848.37
  石灰石。取GB-175-2007通用硅酸盐水泥标准值的平均值作为原材料数据，其中，石膏添加比例为水泥质量的5%，熟料添加比例为水泥质量的60%。熟料是由石灰石、粘土及铁粉作为原料配合而成，并经煅烧制成。根据水泥生产工艺中物料平衡公式得出原材料消耗量，物料平衡公式为:M生料=M料+M分解+M水+M尘-M煤灰，式中，M生料为喂入系统的生料量，M熟料为熟料量，M分解为从生料中分解出的CO2及H2O的质量，M水为生料中含水量，M尘为废气的排尘量，M煤灰为煤灰量。
- clay: 143.55
  粘土。取GB-175-2007通用硅酸盐水泥标准值的平均值作为原材料数据，其中，石膏添加比例为水泥质量的5%，熟料添加比例为水泥质量的60%。熟料是由石灰石、粘土及铁粉作为原料配合而成，并经煅烧制成。根据水泥生产工艺中物料平衡公式得出原材料消耗量，物料平衡公式为:M生料=M料+M分解+M水+M尘-M煤灰，式中，M生料为喂入系统的生料量，M熟料为熟料量，M分解为从生料中分解出的CO2及H2O的质量，M水为生料中含水量，M尘为废气的排尘量，M煤灰为煤灰量。
- iron, powder: 26.04
  铁粉。取GB-175-2007通用硅酸盐水泥标准值的平均值作为原材料数据，其中，石膏添加比例为水泥质量的5%，熟料添加比例为水泥质量的60%。熟料是由石灰石、粘土及铁粉作为原料配合而成，并经煅烧制成。根据水泥生产工艺中物料平衡公式得出原材料消耗量，物料平衡公式为:M生料=M料+M分解+M水+M尘-M煤灰，式中，M生料为喂入系统的生料量，M熟料为熟料量，M分解为从生料中分解出的CO2及H2O的质量，M水为生料中含水量，M尘为废气的排尘量，M煤灰为煤灰量。
- gypsum stone (CaSO4-dihydrate): 50
  石膏。取GB-175-2007通用硅酸盐水泥标准值的平均值作为原材料数据，其中，石膏添加比例为水泥质量的5%，熟料添加比例为水泥质量的60%。熟料是由石灰石、粘土及铁粉作为原料配合而成，并经煅烧制成。根据水泥生产工艺中物料平衡公式得出原材料消耗量，物料平衡公式为:M生料=M料+M分解+M水+M尘-M煤灰，式中，M生料为喂入系统的生料量，M熟料为熟料量，M分解为从生料中分解出的CO2及H2O的质量，M水为生料中含水量，M尘为废气的排尘量，M煤灰为煤灰量。
- granulated blast furnace slag: 100
  粒化高炉矿渣。取GB-175-2007通用硅酸盐水泥标准值的平均值作为原材料数据，其中，石膏添加比例为水泥质量的5%，熟料添加比例为水泥质量的60%。熟料是由石灰石、粘土及铁粉作为原料配合而成，并经煅烧制成。根据水泥生产工艺中物料平衡公式得出原材料消耗量，物料平衡公式为:M生料=M料+M分解+M水+M尘-M煤灰，式中，M生料为喂入系统的生料量，M熟料为熟料量，M分解为从生料中分解出的CO2及H2O的质量，M水为生料中含水量，M尘为废气的排尘量，M煤灰为煤灰量。
- ash: 200
  粉煤灰。取GB-175-2007通用硅酸盐水泥标准值的平均值作为原材料数据，其中，石膏添加比例为水泥质量的5%，熟料添加比例为水泥质量的60%。熟料是由石灰石、粘土及铁粉作为原料配合而成，并经煅烧制成。根据水泥生产工艺中物料平衡公式得出原材料消耗量，物料平衡公式为:M生料=M料+M分解+M水+M尘-M煤灰，式中，M生料为喂入系统的生料量，M熟料为熟料量，M分解为从生料中分解出的CO2及H2O的质量，M水为生料中含水量，M尘为废气的排尘量，M煤灰为煤灰量。
- hard coal; 26.3 MJ/kg: 68.4
  煤。采用中国生产线统计的大中型预分解窑的标煤耗和热值，进行煤消耗量的计算。
- Electricity: 354.06
  电耗。由于电力消耗数据有限，根据中国国内电力消耗平均水平对复合硅酸盐水泥各个生产阶段的电力消耗进行简化处理。

## Outputs
- carbon dioxide (fossil): 604
  CO2。石灰石、石膏开采中污染物排放数据，以及运输、电力生产（采用全国平均电网电力混合与传输数据）和煤炭开采的数据均来自中国生命周期参考数据库（CLCD）。水泥生产阶段CO2排放来自两个部分，一部分为煅烧时原料中碳酸钙和碳酸镁的分解释放，另一部分为燃料煤燃烧释放。
- sulfur dioxide: 0.372
  SO2。SO2排放量来自第一次中国水泥制造业污染源普查结果。
- Nitrogen oxides: 1.92
  NOx。NOx排放量来自第一次中国水泥制造业污染源普查结果。
- particles (> PM10): 0.341
  粉尘。水泥生产过程中粉尘的排放数据采用中国水泥工业大气污染物排放标准的上限值。未标明粒径，按PM>10处理。
- chemical oxygen demand: 0.0102
  COD。COD排放量来自第一次中国水泥制造业污染源普查结果。
- Oils, unspecified: 0.261
  油。石灰石、石膏开采中污染物排放数据，以及运输、电力生产（采用全国平均电网电力混合与传输数据）和煤炭开采的数据均来自中国生命周期参考数据库（CLCD）。
- methane (fossil): 0.733
  甲烷。石灰石、石膏开采中污染物排放数据，以及运输、电力生产（采用全国平均电网电力混合与传输数据）和煤炭开采的数据均来自中国生命周期参考数据库（CLCD）。
- mercury: 0.0079
  汞。石灰石、石膏开采中污染物排放数据，以及运输、电力生产（采用全国平均电网电力混合与传输数据）和煤炭开采的数据均来自中国生命周期参考数据库（CLCD）。

## Use advice
在使用此数据集进行复合硅酸盐水泥的生命周期评估时，必须遵循定义的系统边界，包括粒化高炉矿渣和粉煤灰的运输和粉磨，以及石灰石、铁矿、粘土、石膏和煤炭的开采与运输。在评估中应考虑制造过程中的电力生产等过程。在应用材料数据时应排除对回收利用和能源回收的考虑，并确保根据GB-175-2007标准，熟料和石膏的添加比例分别是水泥质量的60%和5%，以确保准确性和一致性。

## Review details
清单： 内部审查通过几个迭代步骤完成，涉及原始数据验证、原始数据记录、代表性、完整性、与 ISO 14040 和 14044 有关的建模的一致性。

## Data sources
- 徐小宁, 陈郁, 张树深, 张芸, & 宋国宝. (2013). 复合硅酸盐水泥的生命周期评价. 环境科学学报, 33(9), 2632–2638.
