# Treatment of waste reverse osmosis module | mix of incineration and landfilling, CN

Dataset: ILCD process, Unit process, single operation
Classification: Materials production / Other mineralic materials
Generated by: Jiaqi Lu, wilsherelu@foxmail.com
Amounts: no units in this file; such an amount is in the reference unit of its flow, which a separate flow dataset defines

## Reference product
- waste incineration of plastics (unspecified) fraction in municipal solid waste (MSW): 1; input; measured
  1 waste RO module

## Outputs
All rows: measured
- waste incineration of plastics (unspecified) fraction in municipal solid waste (MSW): 0.052
  废弃PVC
- waste incineration of plastics (unspecified) fraction in municipal solid waste (MSW): 0.088
  废弃PVDF膜
- waste incineration of plastics (unspecified) fraction in municipal solid waste (MSW): 0.129
  废弃PP膜
- waste incineration of plastics (unspecified) fraction in municipal solid waste (MSW): 1.643
  废弃胶带（缠绕外壳）
- waste incineration of plastics (unspecified) fraction in municipal solid waste (MSW): 0.016
  废弃挤压塑料管
- waste incineration of plastics (unspecified) fraction in municipal solid waste (MSW): 0.012
  废弃注塑塑料
- waste incineration of plastics (unspecified) fraction in municipal solid waste (MSW): 0.032
  废弃PU填充剂
