# 炼钢;粗钢;转炉炼钢;铁水/废钢

Dataset: ILCD process, Unit process, single operation
Geography: CN
Reference year: 2006
Classification: Unit processes / Materials production / Metals and semimetals
Generated by: 王环宇, wanghuanyu00@126.com
Owner: 天工LCI数据工作小组
Review: Dependent internal review by 天工LCI数据工作小组
Amounts: no units in this file; such an amount is in the reference unit of its flow, which a separate flow dataset defines
copyright: false
licenseType: Free of charge for all users and uses

## General comment
所描述的工艺技术用途指的是转炉炼钢用于生产粗钢。该过程主要使用来源于铁矿石和废钢的铁水作为原料。数据集与钢铁厂的特定单元过程相关，标识为Z1。该工艺适用于从建筑材料到汽车和机械组件等一系列钢铁产品的制造。通过该工艺生产的钢材符合工业级规格，可以在各种制造业领域中使用。

## Geography
Z1工厂同一名称的工艺过程

## Reference product
- Steel sections: 1.8926; measured

## Inputs
- iron: 1084; measured
- Alloy steel: 11.8; measured
  合金钢

## Outputs
- Flue dust: 0.039; measured
- municipal solid waste deposition: 120; measured
  钢坯

## Use advice
在使用这个生命周期评估数据集来模拟钢铁生产影响时，用户应关注该过程的技术范围和对Z1设施的具体性。例如铁水和废钢使用比例、能源类型、排放控制等假设，需要与该设施的实际情况保持一致。数据集可能没有考虑钢材的使用终端回收或使用阶段；因此，如果相关，这些阶段应单独建模。用户还应考虑在数据汇编后可能发生的工艺技术演变和潜在改进。在进行比较研究时，确保不同数据集之间的方法论一致性是至关重要的。

## Review details
清单： 内部审查通过几个迭代步骤完成，涉及原始数据验证、原始数据记录、代表性、完整性、与 ISO 14040 和 14044 有关的建模的一致性。

## Data sources
- 刘微. LCI数据质量体系中的分析方法研究. (北京工业大学, 2006).
