# 市政污泥处理与处置;干污泥;填埋

Dataset: ILCD process, Unit process, single operation
Geography: CN
Classification: Unit processes / End-of-life treatment / Waste water treatment
Functional unit: The functional unit used for GHGs in this LCA is one dry ton (DT) of sludge.
Generated by: 金思甜, 2331276@tongji.edu.cn
Owner: 天工LCI数据工作小组
Review: Dependent internal review by 天工LCI数据工作小组
Amounts: no units in this file; such an amount is in the reference unit of its flow, which a separate flow dataset defines
copyright: ['opt4ROkqig']
licenseType: Free of charge for all users and uses

## General comment
本文研究的主要数据来源如下:1)能源消耗和物质投入来源于对太湖流域的调查;2)能源利用排放因子来源于我们自己的计算、IPCC和文献。3)填埋过程中的CH4排放由文献获得，填埋、焚烧和堆肥过程中的无组织排放主要由文献研究中给出的模型和IPCC因子(2006)决定。4)理论计算数据(焚烧部分)。

## Geography
太湖流域

## Technology and included processes
经压滤后的污泥含水量低于60%，可用于卫生填埋场。

## Technical purpose
本市政污泥处理与处置过程代表太湖流域内干污泥处理和填埋时所需的活动。其主要功能在于环境管理，用于通过将湿污泥转化为干污泥再安全填埋，从而管理和减少市政废物的生态足迹。

## Reference product
- Sludge: 1000; input; estimated
  一干吨 （DT） 污泥

## Inputs
- Polymer: 5.65; measured
- Electricity: 252; measured
- Diesel: 0.0031; measured

## Use advice
使用此 LCA 数据集时，必须确保其范围仅限于太湖流域内以干污泥形式的市政污泥的处理和处置及其随后的填埋。用户应注意用于衡量温室气体影响的功能单位是一干吨（DT）污泥。该数据集不适用于填埋以外的场景，如污泥的焚烧或回收，未考虑此类过程。必须与生命周期评价中污泥扮演角色的其他部分保持方法论上的一致性。

## Review details
清单： 内部审查通过几个迭代步骤完成，涉及原始数据验证、原始数据记录、代表性、完整性、与 ISO 14040 和 14044 有关的建模的一致性。

## Data sources
- Liu, B., Wei, Q., Zhang, B. & Bi, J. Life cycle GHG emissions of sewage sludge treatment and disposal options in Tai Lake Watershed, China. Science of The Total Environment 447, 361–369 (2013).
