# 超滤组件生产;中空纤维膜

Dataset: ILCD process, Unit process, single operation
Geography: CN
Reference year: 2022
Classification: Unit processes / Materials production / Other materials
Functional unit: 1 item of ultrafiltration module
Generated by: 陆嘉麒, wilsherelu@foxmail.com
Owner: 天工LCI数据工作小组
Review: Dependent internal review by 天工LCI数据工作小组
Amounts: no units in this file; such an amount is in the reference unit of its flow, which a separate flow dataset defines
copyright: false
licenseType: Free of charge for all users and uses

## General comment
具有中空纤维膜的超滤模块通常用于水和废水处理过程中去除悬浮固体、细菌和病毒，确保高水平的水净化。这个组件也可以用于食品和饮料行业中果汁和葡萄酒的澄清，以及在奶酪制作和牛奶浓缩的乳品行业中使用。

## Reference product
- Ultrafiltration Component; measured
  1Ultrafiltration module

## Inputs
All rows: measured
- plastic pipes: 11.75
  挤压塑料管
- Plastic (unspecified): 4.27
  注塑塑料
- Polyurethane (PU) Filler: 2.42
  聚氨酯（PU）填充剂
- Polyvinylidene fluoride: 21.97
  聚偏二氟乙烯（PVDF）膜
- polyvinylchloride resin (E-PVC): 29.28
  聚氯乙烯(PVC)外壳
- Electricity: 12.06
  过程电耗
- natural gas,natural gas: 0.166
  过程消耗天然气

## Outputs
- waste water - treated: 0.143; measured
  废水处理
- municipal solid waste deposition: 0.287; measured
  固体废物

## Use advice
在将这个数据集纳入生命周期评估时，用户应考虑超滤模块的整个生命周期，包括制造、使用、维护和处置阶段。应特别注意生产中空纤维膜过程中消耗的能源和资源以及涉及的任何化学投入。用户还必须在模拟超滤模块的使用阶段时考虑终生阶段的情景，如回收、焚烧或填埋及其相关的环境影响。

## Review details
清单： 内部审查通过几个迭代步骤完成，涉及原始数据验证、原始数据记录、代表性、完整性、与 ISO 14040 和 14044 有关的建模的一致性。

## Data sources
- Ultrafiltration product manual
