# 养猪生产 ; 集约化饲养 ; 饲料原料生产

Dataset: ILCD process, Unit process, single operation
Geography: SC-CN
Reference year: 2006
Classification: Unit processes / Materials production / Agricultural production means
Functional unit: In this study, the functional unit (FU) was defined as "1kg pig carcass", which included skin, bone and fat. Foreign studies generally only considered lean meat, but in China's consumption mode, skin and viscera were also fully utilized as edible foods. The concept of carcass was adopted in this study. Although the bone included in this study is an inedible part, it can play a certain compensative role because it does not contain internal organs. In addition, the current data can be easily converted into carcass weight, so it is more in line with the actual situation.
Generated by: 杨瑞, 1632707028@qq.com
Owner: 天工LCI数据工作小组
Review: Dependent internal review by 天工LCI数据工作小组
Amounts: no units in this file; such an amount is in the reference unit of its flow, which a separate flow dataset defines
copyright: false
licenseType: Free of charge for all users and uses

## General comment
丘陵区和平原区规模化集约化饲养。提供了四川大约1.5%的商品猪， 在四川养猪业中起着主要的现代养猪示范作用。这种养猪情景的主要情景状态和设定参数为： ①能量饲料以玉米等谷物为主，全部饲料原料从系统外购买，饲养期170d左右，出栏平均为95kg；②出栏数量平均为每年5000头，品种多数为洋三元杂交猪（如DLY，少数为PIC商品猪），屠宰率76%，全程料肉比3.0：1；③饲养管理上比较先进，采用了大量现代养猪技术，一般自繁自养，采用限位栏和高床饲养。④粪便处理及利用：粪便和污水进行厌氧发酵处理。70%运出还田（目前未达到这一水平，假设未来5年内由于环保法规的严厉执行可实现这一目标）长期存贮量占45%，30%经厌氧发酵处理后排放到周边环境排出水COD为 200mg/L。

## Geography
由于本文按占用土地进行农资消耗分配，情景A中不再考虑具体的作物产量，各种情景下的浓缩饲料和全价饲料均按设定的两种情况按相应的全国或四川省内主要谷物平均产量折算成相当的土地面积。

## Time period
饲料原料生产的能量消耗和化肥、农药、地膜等使用量按《中国统计年鉴2006》计算四川平均水平。

## Technology and included processes
浓缩料中分析豆粕（70%）、菜籽粕（10%），其余成分没有考虑。全价饲料的成分主要是玉米为主的谷物（70%）和豆粕（25%），其余成分没有考虑。没有包括矿物质、消毒剂和各种小型设备设施。

## Technical purpose
该数据集代表四川省山丘和平原地区的大规模集约化养猪生产。它用于示范现代养猪实践，并提供商品猪的参考产量，占四川生产的约1.5%。采用集约养殖方法，使用高床饲养和限位栏。主要养殖的是洋三元杂交猪，目的是生产肉类，市场上平均每头猪重95公斤，年产5000头。饲料主要是以谷物为基础的，包括玉米，所有饲料原材料均从外部购买。环境管理实践包括粪便和污水的先进厌氧发酵处理。该信息适用于农业部门内养猪业务、饲料生产、环境管理的企业和研究人员，以及设计可持续农业实践的政策制定者。

## Reference product
- pig: 1; estimated
  作为参考定量，非实际输出

## Inputs
- hard coal: 1.5198; calculated
  情景C
- Gasoline (regular): 0.149674; calculated
  情景C
- nitrogen: 0.07; measured
  情景C
- phosphorus: 0.0162; measured
  情景C
- potassium: 0.0055; measured
  情景C
- polyvinylchloride resin (E-PVC): 0.0051; measured
  情景C
- Diesel: 1.20633; calculated
  情景C
- Electricity: 0.0706899; calculated
  情景C

## Deviations from the LCI method approaches
本研究采用LCA方法学和情景分析法相结合的方式对四川三种典型的养猪生产 情景进行系统的环境影响评估，探索这种分析方法应用于当前养猪生产环境影响评估 时的具体算法，并揭示各种养猪生产系统中的环境友好和不利方面以及其不可更新能 源利用效率。研究结果有助于对养猪业环境影响态势的认识，并为养猪可持续发展模 式的建立提供参考。

## Data selection and combination
1）本研究中四川养猪业的基本情况和各种情景的设定，一方面征求了四川省多位养猪专家的意见，另一方面进行了实地调查。2）作物生产中的相关数据主要来自年年鉴中给出的2005年统计数据。四川的饲料原料生产数据和全国的平均数据用于区分原料来自省内和省外两种情况。

## Data treatment and extrapolations
四川的饲料原料生产数据和全国的平均数据用于区分原料来自省内和省外两种情况。农资消耗量按相应的原料消耗量和全国或四川省内主要谷物平均产量折算成相当的土地面积，再按面积求得。由于三种情景中所用的饲料配方差异大，故进行了主要原料消耗比例的假设，然后根据抽样调查资料进行了调整。

## Use advice
在使用该数据集进行养猪生产生命周期评估（LCA）时，应考虑以下事项：1) 将功能单元（FU）定义为“1kg猪胴体”，其中包括皮肤、骨骼和脂肪。在与可能只考虑瘦肉的其他地区LCA研究相关联时，调整比较和分析以适应本FU。2) 应基于2006年统计年鉴数据考虑地区间饲料原料生产、能源消耗和农业投入（如化肥和农药）的差异。3) 与废物管理相关的环境影响应包括目前的情景和由于环保法规更加严格而在未来五年内预计的改进，重点是废物的厌氧发酵。4) 应根据所提供的情景详细信息，谨慎应用用于计算农业资源消耗的作物产量数据。始终考虑技术适用性，考虑当地环保养猪实践的标准和规定。

## Review details
清单： 内部审查通过几个迭代步骤完成，涉及原始数据验证、原始数据记录、代表性、完整性、与 ISO 14040 和 14044 有关的建模的一致性。

## Data sources
- 白林. 四川养猪业清洁生产系统LCA及猪粪资源化利用关键技术研究. (四川农业大学, 2007).
