# 稀土元素;稀土元素;基线;含稀土矿石的溶剂萃取

Dataset: ILCD process, Unit process, single operation
Geography: NMG-CN
Reference year: 2012
Classification: Unit processes / Materials production / Non-energetic raw materials
Functional unit: Not Mentationed
LCI method principle: Attributional
LCI method approaches: Allocation - market value
Generated by: 汪涛, twang@iue.ac.cn
Owner: 天工LCI数据工作小组
Review: Dependent internal review by 天工LCI数据工作小组
Amounts: no units in this file; such an amount is in the reference unit of its flow, which a separate flow dataset defines
copyright: false
licenseType: Free of charge for all users and uses

## General comment
该数据集涉及使用传统的露天采矿技术（例如钻孔和爆破）从含有稀土元素（REE）的矿石中溶剂提取REE。来源矿为露天矿，储量为7.5亿吨，稀土氧化物（REO）浓度为4.1%。这种原材料提取过程通常用于生产各种高强度永磁体，例如由钕铁硼（NdFeB）制成的磁体。这些磁铁常用于电动机、风力涡轮和硬盘驱动器等广泛的应用中。

## Technology and included processes
使用传统的露天采矿技术（例如钻孔和爆破）从露天矿中回收矿石。该矿蕴藏矿石 7.5 亿吨，稀土品位 4.1%

## Reference product
- Rare Earth Oxides: 3.87; software or database
  Other 99.99% REO's, at solvent extraction, primary, baseline

## Inputs
All rows: software or database
- Chemicals organic,Chemicals, organic: 0.317
  Chemicals, organic
- transport in t*km,transport in t*km: 1.43
  lorry >16t
- transport in t*km,transport in t*km: 25.7
  freight, rail
- Hydrochloric acid: 0.72
- sodium hydroxide: 1.86
- Ammonium bicarbonate: 1.1
- heavy fuel oil: 3.9
- Hazardous organic waste for disposal (unspecific): 0.2
- Kerosene: 5.31
- Electricity: 3.348
- Rare Earth Oxides: 4.91
  REO

## Outputs
All rows: software or database
- Neodymium oxide: 1
- waste heat: 3.35
- chloride: 0.0163
- carbon dioxide (fossil): 2.27
  原文未区分bio和fossil，根据专家判断此处为fossil
- hydrogen fluoride: 0.0143
- Suspended solids, unspecified,Suspended solids, unspecified: 0.0107
- thorium-232: 0.271
- antimony-122: 1

## Deviations from the LCI method approaches
In this section, we discuss the life cycle inventory (LCI) in detail. Each subsection discusses one process of the LCA. Section 3.1 describes the conventional method of rare earths in China from mineral sources. Section 3.2 describes the production process used to transform neodymium oxide into an NdFeB magnet. Finally, section 3.3 describes two alternative recycling processes that could be used. Detailed information on the LCI, assumptions, and allocation choices can be found in the Supporting Information.

## Use advice
使用本数据集的用户应考虑与传统露天采矿技术相关的具体环境影响。建议在生命周期清单（LCI）中考虑提取过程的所有阶段，包括采矿后所需的任何环境修复。此外，用户应注意采矿和溶剂提取的技术进步可能会改变本数据的环境特征。在进行比较研究时，确保通过对所有被评估替代方案应用相同的技术范围和假设来保持一致性。

## Review details
清单： 内部审查通过几个迭代步骤完成，涉及原始数据验证、原始数据记录、代表性、完整性、与 ISO 14040 和 14044 有关的建模的一致性。

## Data sources
- Sprecher, B. et al. Life Cycle Inventory of the Production of Rare Earths and the Subsequent Production of NdFeB Rare Earth Permanent Magnets. Environ. Sci. Technol. 48, 3951–3958 (2014).
