# 市政污泥处理与处置;湿污泥 含水率80.94%;焚烧

Dataset: ILCD process, Unit process, single operation
Geography: HF-AH-CN
Classification: Unit processes / End-of-life treatment / Waste water treatment
Functional unit: The residual sludge moisture content of Hefei Wangtang Sewage Treatment Plant is 80.94%, and the functional unit is 1t of residual sludge.
Generated by: 金思甜, 2331276@tongji.edu.cn
Owner: 天工LCI数据工作小组
Review: Dependent internal review by 天工LCI数据工作小组
Amounts: no units in this file; such an amount is in the reference unit of its flow, which a separate flow dataset defines
copyright: ['opt4ROkqig']
licenseType: Free of charge for all users and uses

## General comment
选择常见热泵除湿干燥机（型号为DBDMB36000）作为热源对污水处理 厂剩余污泥干燥的实际情况作简单分析。剩余污泥焚烧发电的分析计算采用 25 MW 直接燃烧发电系统。该过程能耗由发电系统自身提供。

## Geography
合肥望塘污水处理厂

## Technology and included processes
对于 1 t 含水率 80.94%的污泥，先将其干化为含水率 36%的污泥。

## Technical purpose
市政污泥处理与处置工序，湿污泥含水率为80.94%，用于湿污泥焚烧。该工序专门用于合肥望塘污水处理厂，并适用于市政废物管理。它用于管理和处理从污水处理过程中获得的剩余湿污泥。

## Reference product
- Sludge: 1000; input; estimated
  1t含水率为80.94%的剩余污泥

## Outputs
All rows: calculated
- carbon dioxide (biogenic): 209.127
  原文未区分biogenic和fossil，根据专家判断此处为biogenic。
- sulfur dioxide: 1.182
- mineral waste (ash): 98.185
- methane (biogenic),methane (biogenic): 0.009827
  原文未区分biogenic和fossil，根据专家判断此处为biogenic。
- Nitrogen oxides: 2.204
- carbon monoxide (biogenic): 0.8288
  原文未区分biogenic和fossil，根据专家判断此处为biogenic。
- nitrous oxide: 0.008636
- volatile organic compound: 0.00953
- Flue dust: 1.885
- cadmium: 3.375e-5
- zinc: 0.059835
- copper: 0.02677
- lead: 0.002443
- nickel: 0.001146
- chromium: 0.00203

## Use advice
使用此数据集时应注意到高含水量的污泥，因为它会影响焚烧过程的效率和环境影响。此数据集的功能单元定义为1吨剩余污泥。用户必须考虑焚烧前必需的任何预处理或干燥。应用此数据于生命周期评估模型时，还应考虑工艺条件的技术适用性和区域特异性。

## Review details
清单： 内部审查通过几个迭代步骤完成，涉及原始数据验证、原始数据记录、代表性、完整性、与 ISO 14040 和 14044 有关的建模的一致性。

## Data sources
- 齐星昊. 基于生命周期评价的典型剩余污泥处理方法的环境影响比较研究[D].河南师范大学,2020.
