# 炼焦;焦炭;焦化

Dataset: ILCD process, Unit process, single operation
Geography: CN
Reference year: 2014
Classification: Unit processes / Energy carriers and technologies / Energetic raw materials
Generated by: 付翔, 1162850692@qq.com
Owner: 天工LCI数据工作小组
Review: Dependent internal review by 天工LCI数据工作小组
Amounts: no units in this file; such an amount is in the reference unit of its flow, which a separate flow dataset defines
copyright: false
licenseType: Free of charge for all users and uses

## General comment
本过程生产的焦炭旨在用于钢铁行业高炉作业。它作为还原剂，能量载体，以及在铁熔炼过程中原料的支撑结构。

## Time period
基于 A 钢厂 2014 年的生产数据进行计算和分析对比。

## Reference product
- coke,Coke: 367.5; measured
  焦炭

## Inputs
All rows: measured
- process steam: 150
- oxygen: 3.32
- Electricity: 58.68
- Cleaned coal: 512.6
  洗精煤
- Coke oven gas: 21
  焦炉煤气
- Blast furnace gas: 384
  高炉煤气

## Outputs
All rows: measured
- process steam: 630
- benzene: 3.6
- Coal tar: 16.1
  煤焦油
- Electricity: 167.328
  干熄焦发电
- Coke oven gas: 165
  焦炉煤气
- carbon dioxide (fossil): 394300
  原文未区分bio和fossil，根据专家判断此处为fossil
- methane: 10
- nitrous oxide: 8

## Use advice
在使用此数据集进行生命周期评估时，用户应该考虑这些数据是基于 2014 年某钢厂的单元过程（单一操作）计算和分析得出的。建议检查 2014 年之后工业过程和能源效率方面的改进。将数据外推到其他地点或时间段应谨慎进行，同时考虑技术进步和区域生产实践。

## Review details
清单： 内部审查通过几个迭代步骤完成，涉及原始数据验证、原始数据记录、代表性、完整性、与 ISO 14040 和 14044 有关的建模的一致性。

## Data sources
- 刘宏强, 付建勋, 刘思雨, 谢欣悦, & 杨笑楹. 钢铁生产过程二氧化碳排放计算方法与实践. 钢铁 51, 74–82 (2016).
