# Naphthafraction,fueloildieselfraction,bitumen,gasolinefraction,coke|Coaltar,hydrogen|Whole distillate fixed bed hydrotreating process|All sizes / /|石脑油组分、燃料油柴油组分、沥青、汽油组分、焦炭|煤焦油、氢气|全馏分固定床加氢工艺|所有规模

Dataset: ILCD process, Partly terminated system
Geography: CN
Reference year: 2019
Classification: Materials production / Other mineralic materials
Generated by: The data was created by the Office of the Second National Pollution Source Census of the Ministry of Ecology and Environment, and the data was organized by the TianGong Plan team for ILCD format / 生态环境部第二次全国污染源普查工作办公室创建数据，天工计划团队常慧敏整理数据为ILCD格式
Amounts: no units in this file; such an amount is in the reference unit of its flow, which a separate flow dataset defines
copyright: false

## Technology and included processes
the Technical of end-of-pipe management technology for pollution Coal taris/
污染物指标工业废气量的末端治理技术是/，末端治理设施实际运行率（k值）计算公式为/

## Reference product
- Coal tar: 1000; input; calculated
  原文件中描述污染物类别为Product，污染物指标为煤焦油、氢气，此处对其进行了匹配工作，将其匹配到LCAflow库里面相最符合的流，污染物指标备注为工业废气量

## Outputs
All rows: calculated
- Exhaust gas: 1217
  原文件中描述污染物类别为废气，污染物指标为工业废气量，此处对其进行了匹配工作，将其匹配到LCAflow库里面相最符合的流，污染物指标备注为工业废气量
- particles (PM2.5 - PM10): 0.0113
  原文件中描述污染物类别为废气，污染物指标为颗粒物，此处对其进行了匹配工作，将其匹配到LCAflow库里面相最符合的流，污染物指标备注为颗粒物
- Nitrogen oxides: 0.0426
  原文件中描述污染物类别为废气，污染物指标为氮氧化物，此处对其进行了匹配工作，将其匹配到LCAflow库里面相最符合的流，污染物指标备注为氮氧化物
- sulfur dioxide: 0.0183
  原文件中描述污染物类别为废气，污染物指标为二氧化硫，此处对其进行了匹配工作，将其匹配到LCAflow库里面相最符合的流，污染物指标备注为二氧化硫
- ammonia: 0.0544608, 0.0558 (2 entries)
  原文件中描述污染物类别为废气，污染物指标为氨，此处对其进行了匹配工作，将其匹配到LCAflow库里面相最符合的流，污染物指标备注为氨
- volatile organic compound: 0.00042
  原文件中描述污染物类别为废气，污染物指标为挥发性有机物，此处对其进行了匹配工作，将其匹配到LCAflow库里面相最符合的流，污染物指标备注为挥发性有机物

## Data sources
- 第二次全国污染源普查产排污核算系数手册（试用版）,二级代码25,四级代码2519文件，在完整版文件中第4111页
