# 阴极铜生产;阴极铜;火法冶金;铜矿石

Dataset: ILCD process, Unit process, single operation
Geography: CN
Reference year: 2009
Valid until: 2013
Classification: Unit processes / Materials production / Metals and semimetals
Functional unit: the functional unit was defined as the production of 1 ton of cathode copper.
LCI method principle: Attributional
LCI method approaches: Allocation - mass
Generated by: 王鹏, 2867919560@qq.com
Owner: 天工LCI数据工作小组
Review: Dependent internal review by 天工LCI数据工作小组
Amounts: no units in this file; such an amount is in the reference unit of its flow, which a separate flow dataset defines
copyright: false
licenseType: Free of charge for all users and uses

## General comment
通过该工业过程获得的阴极铜主要用于电线电缆、屋面装饰、管道系统和工业机械。阴极铜在电气工程、建筑业、交通制造及其他重工业中是关键原材料，受到其高电导率和耐用性的青睐。鉴于铜是通过2009至2013年中国平均矿石水平的火法冶金和湿法冶金获得的，此阴极铜非常适合对高纯度和质量有严格要求的大规模应用。

## Geography
华中地区

## Time period
火法精炼工艺矿石品位为2009年至2013年中国地下和露天开采的平均水平，

## Technology and included processes
堆浸系统从矿石开采阶段，经过破碎、堆浸、提取，到电解提取阶段生产阴极铜（图1）。经过露天采矿过程后，开采出的铜矿石被卡车运至细矿仓，破碎成大小均匀的颗粒，然后进行筛分过程。将经直径40mm筛过滤后的矿石用皮带输送至堆浸场进行酸浸。然后浸出液泵入溶剂萃取罐进行萃取反萃，萃余液泵回堆浸阶段循环利用。铜通过电积最终沉积在阴极上。采矿选矿-运输-闪速熔炼-转炉-火法精炼-电解精炼

## Reference product
- Refined copper: 1000; software or database

## Inputs
All rows: software or database
- hard coal,hard coal,hard coal: 1280
  Coal
- crude oil; 42.3 MJ/kg: 354
  Crude oil
- natural gas; 44.1 MJ/kg: 105
  Natural gas
- Active carbon: 23.9
  Active carbon需要补充
- Anode Plate: 0
  Anode Plate需要补充
- bauxite: 0
  Bauxite
- Bone glue: 0.1
  Bone glue需要补充
- calcium carbonate: 130
- Casein: 0.025
  Casein需要补充
- clay: 79
  Clay
- Copper ore: 181000
- Copper sulphate: 95.5
  Copper sulphate 需要补充
- dolomite: 0.912
  Dolomite
- water: 98.2
  Fresh water
- gravel: 204
  Gravel
- Iron ore powder: 87.5
  Iron ore powder需要补充
- Limestone: 495
- magnesite: 5
  Magnesite brick
- oxygen: 735
  Oxygen
- Pine camphor oil: 4.48
  Pine oil
- Sodium silicate: 2.99
  Sodium silicate需要补充
- sodium sulfate: 11.9
  Sodium sulfate
- Thiourea: 0.035
  需要补充
- Xanthate: 13.7
  Xanthate需要补充

## Deviations from the LCI method approaches
与污染排放相关的特征因子源自 CML 方法

## Data selection and combination
火法精炼工艺的矿石品位是2009-2013年中国地下和露天开采的平均水平，并且考虑了湿法冶金方法矿石品位的真实情况[14]。其他无法从实际工厂获得的数据来自已发表的文献或通过质量平衡计算，例如，

## Data treatment and extrapolations
本文选取11个指标来评价阴极铜生产对环境的影响，并通过Simapro7.0进行计算。

## Use advice
使用此LCA数据集的用户应确保将数据应用于与火法精炼阴极铜相关的过程和产品。数据反映了2009至2013年的平均矿石品级，可能需要更新以反映当前的采矿状况。当将这些数据整合到更广泛的环境影响评估中时，应特别注意方法论的一致性。具体来说，用户应考虑技术适应性和区域采矿实践的潜在差异，以及密切遵守CML方法论以描述污染排放。数据集对应于生产1吨阴极铜的功能单位，必须根据不同应用适当地进行缩放。

## Review details
清单： 内部审查通过几个迭代步骤完成，涉及原始数据验证、原始数据记录、代表性、完整性、与 ISO 14040 和 14044 有关的建模的一致性。

## Data sources
- Li, H., Gong, X. Z., Wang, Z. H. & Li, Y. Life Cycle Assessment of Cathode Copper Production. MSF 898, 2422–2431 (2017).
