# 市政污泥处理与处置;干污泥;厌氧消化

Dataset: ILCD process, Unit process, single operation
Geography: QD-SD-CN
Classification: Unit processes / End-of-life treatment / Waste water treatment
Functional unit: The functional unit is the base for the treatment comparison in the life-cycle inventory. The management of one tone of dry sludge (DS) is selected.
Generated by: 金思甜, 2331276@tongji.edu.cn
Owner: 天工LCI数据工作小组
Review: Dependent internal review by 天工LCI数据工作小组
Amounts: no units in this file; such an amount is in the reference unit of its flow, which a separate flow dataset defines
copyright: ['opt4ROkqig']
licenseType: Free of charge for all users and uses

## General comment
本研究采用国内最典型的采用厌氧消化技术处理污泥的污水处理厂——山东省青岛市麦岛污水处理厂厌氧消化和脱水过程的年平均监测数据。

## Geography
麦岛污水处理厂

## Technology and included processes
污泥处理处置步骤为重力浓缩、厌氧消化、脱水、农业利用。

## Technical purpose
该数据集描述了麦岛污水处理厂用于处理和处置市政污泥的过程。干污泥的厌氧消化旨在减少废物的体积和质量，生产沼气，并可能用于能源回收和土壤改良应用。该过程可以通过将可生物降解的污泥转化为稳定产品，服务于市政废物管理系统，并用于各个部门。

## Reference product
- Sludge: 1000; input; estimated
  1吨干污泥(DS)

## Inputs
- Electricity: 553.86; measured

## Outputs
All rows: measured
- electricity from landfill gas utilisation: 2215.37
- waste water - untreated: 3.56
- methane (biogenic),methane (biogenic): 250
  原文未区分biogenic和fossil，根据专家判断此处为biogenic。
- dinitrogen: 10.08
  氮气,排放到大气中
- hydrogen: 0.71
- hydrogen sulfide: 0.43

## Use advice
在使用此数据集进行生命周期评估时，选定的功能单位是管理一吨干污泥（DS）。确保生命周期清单中比较的处理过程在功能单位方面是等价的。在建模时，应明确计算所有输出，包括厌氧消化过程中产生的任何沼气，并考虑消化后污泥的最终处置。此外，评估本地技术实践中的潜在数据变异性。

## Review details
清单： 内部审查通过几个迭代步骤完成，涉及原始数据验证、原始数据记录、代表性、完整性、与 ISO 14040 和 14044 有关的建模的一致性。

## Data sources
- Xu, C., Chen, W. & Hong, J. Life-cycle environmental and economic assessment of sewage sludge treatment in China. Journal of Cleaner Production 67, 79–87 (2014).
