# 熟料生产;熟料;新型干法, 5000 t/d;混合固废

Dataset: ILCD process, Unit process, black box
Geography: HAIN-CN
Classification: Unit processes / Materials production / Inorganic chemicals
Generated by: #REF!, ysqsophia@gmail.com
Owner: 天工LCI数据工作小组
Review: Dependent internal review by 天工LCI数据工作小组
Amounts: no units in this file; such an amount is in the reference unit of its flow, which a separate flow dataset defines
copyright: false
licenseType: Free of charge for all users and uses

## General comment
造纸渣，也称为造纸绿渣，是制浆造纸厂碱回收过程中产生的固体废弃物。这些渣来自中国海南省的一家制浆造纸厂。混合固废包括粉煤灰和造纸渣。

## Technical purpose
该熟料生产过程是使用新型干法在5000吨/每日生产线上制造水泥熟料的方法。该过程涉及利用混合固废（包括粉煤灰和造纸渣）作为原料投入的共处理。所述熟料适用于各种建筑应用，主要用作混凝土产品中的粘合剂。

## Model description
功能单元定义：将1吨水泥熟料定义为功能单元。系统边界设置：该工厂的原材料被设定为生命周期的起点，而熟料水泥的产出被设定为终点。

## Reference product
- clinker: 1000
  熟料

## Inputs
- limestone, crushed, for mill: 1344
  石灰石
- clay: 93
  粘土
- ash: 63
  粉煤灰
- iron ore: 32
  铁石
- Waste, solid, from paper production: 25
  造纸废渣
- hard coal; 26.3 MJ/kg: 106
  煤炭
- Electricity: 288
  电力的平均消耗

## Outputs
- carbon dioxide (fossil): 264
  m-CO2。煤炭燃烧的二氧化碳排放量（mc）用热碳当量法计算。mc=标准煤x2.93x10^7×8.494x10^-8=标准煤×2.489，其中1J热量释放相当于8.494×10^-8kg的CO2。1kg标准煤相当于2.93 × 10^7 J的热量（热值）。
- carbon dioxide (fossil): 532
  n-CO2。石灰石分解产生的CO2排放量（nc）采用公式计算。nc=石灰石消耗量x90%x44%=石灰石消耗量x0.396，其中石灰石中CaCO3的百分比为90%。CaCO3中CO2的百分比为44%。
- sulfur dioxide: 0.86
  SO2。SO2的排放数据主要来自工厂的在线监测系统。
- Nitrogen oxides: 1.71
  NOx。NOx的排放数据主要来自工厂的在线监测系统。
- particles (> PM10): 0.05
  粉尘，未标明粒径，按PM>10处理。。粉尘的排放数据主要来自工厂的在线监测系统。

## Data selection and combination
造纸渣来自海南某纸浆和造纸厂。水泥生产的其他原料来自于海南某矿山。

## Sampling procedure
在海南省某市选取一家5000吨/天新型干法水泥生产线的水泥厂并对其进行试验。将造纸渣被混入石灰石中，与其他原料一起放入水泥窑中。处理了150吨/日的造纸渣。

## Use advice
使用此数据集时，用户应考虑水泥生产线共处理混合固废的特定性质。这包括考虑由于使用造纸渣和粉煤灰产生的独特排放特征。此外，如果用于比较目的，重要的是确保考虑了关于起始材料和最终产出的类似系统边界。用户应注意，此数据集反映了与1吨熟料定义的功能单元相关的环境负担，并应据此调整模型，以便在不同的生产规模或功能单元中集成此数据。

## Review details
清单： 内部审查通过几个迭代步骤完成，涉及原始数据验证、原始数据记录、代表性、完整性、与 ISO 14040 和 14044 有关的建模的一致性。

## Data sources
- Kan Fu, Xiao Yu Ren, Jin Quan Lin, & Ping Yue. (2013). Comparative Analysis of Environmental Impacts between Dregs Disposal and Conventional Cement Production by Life Cycle Assessment (LCA). Advanced Materials Research 777, 461–466.
