# 精炼铜生产;电解铜（1吨，99.9%）;双面吹浴冶炼技术;铜精矿

Dataset: ILCD process, Unit process, single operation
Geography: CN
Reference year: 2018
Classification: Unit processes / Materials production / Metals and semimetals
Functional unit: the production of 1 ton of copper (i.e., refined or reclaimed copper) was selected as the functional unit.
LCI method principle: Attributional
LCI method approaches: Allocation - mass
Generated by: 王鹏, 2867919560@qq.com
Owner: 天工LCI数据工作小组
Review: Dependent internal review by 天工LCI数据工作小组
Amounts: no units in this file; such an amount is in the reference unit of its flow, which a separate flow dataset defines
copyright: false
licenseType: Free of charge for all users and uses

## General comment
该数据集涉及使用双面吹浴冶炼技术，主要来源于铜精矿生产99.9%高纯度的电解铜。精炼铜常用于电气工程中的布线、电子产品和制造高导电性组件，并且在生产各种合金中也至关重要。

## Geography
中国有两个精炼铜和再生铜生产基地。

## Reference product
- Refined copper: 1000; software or database
  copper

## Inputs
- unspecified: 0.06; measured
  Land occupation
- water: 14340; measured
  Water
- Electricity: 4307.72; software or database
- Oils, unspecified: 0; software or database
  Oil
- hard coal,hard coal,hard coal: 0.08; software or database
  Coal
- Copper concentrates: 4410; measured
  Copper concentrate需要补充
- calcium carbonate: 110; software or database
- coke: 160; software or database
  Coke需要补充
- Diesel: 1; software or database
- Silica sand,silica sand: 400; software or database
  Silica sand
- Chemicals inorganic,Chemicals, inorganic: 3.64; software or database
  Chemicals inorganic需要补充
- Chemicals organic,Chemicals, organic: 0; software or database
  Chemicals organic需要补充
- natural gas,natural gas,natural gas: 48.58; software or database
  Natural gas
- Sulfuric acid(98%): 12270; software or database
  Sulfuric acid需要补充resourse
- hydrogen chloride: 1660; software or database
- freshwater,freshwater: 2330; software or database
  Soft water需要补充

## Outputs
- carbon dioxide (fossil): 398.19; software or database
  Carbon dioxide
- mercury: 5.75e-5, 4.46e-8 (2 entries); software or database
  Mercury
- particles (PM2.5 - PM10): 0.16709; software or database
- sulfur oxides: 0.56605; software or database
  Sulfur dioxide
- arsenic: 0.00034, 1.68e-5 (2 entries); software or database
  Arsenic
- Phosphorus: 2.56e-5; software or database
- chemical oxygen demand: 0.01956; software or database
  COD需要补充
- nitrogen, total (excluding N2): 0.00193; software or database
- copper: 2.34e-5; software or database
  Copper
- sulfide: 2.13e-6; software or database
  Sulfide
- lead-210: 2.23e-5; software or database
  Lead
- cadmium: 1.25e-5; software or database
  Cadmium
- fluoride: 0.0003; software or database
  Fluoride
- chromium VI: 1.7e-6; software or database
  Chromium VI
- Petroleum: 1.7e-5; measured
  Petroleum oil需要补充
- Drilling waste: 14720; measured
  Drilling waste需要补充
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
## Deviations from the LCI method approaches
采用 ReCiPe 方法在中点水平进行生命周期影响评估 (LCIA)，该方法是 LCA 分析中最常用的指标方法之一（Goedkoop 等人，2009 年；Schryveretal.2009）。

## Data selection and combination
本研究中提供的生命周期清单数据是从中国的两个精炼和再生铜生产基地收集的。

## Data treatment and extrapolations
LCA 使用 SimaPro 8.2 软件进行。

## Use advice
使用此LCI数据时，用户应考虑数据的地理特定性，因为它是从中国的两个生产基地收集的。确保在LCIA中使用ReCiPe方法在中点水平上进行方法论一致性，如在原始LCA中使用SimaPro 8.2软件所做的那样。对比的功能单位是生产1吨铜。在相关的情况下，应考虑下游使用阶段和产品寿命终止的回收过程，特别注意区域回收率和实践。

## Review details
清单： 内部审查通过几个迭代步骤完成，涉及原始数据验证、原始数据记录、代表性、完整性、与 ISO 14040 和 14044 有关的建模的一致性。

## Data sources
- Hong, J. et al. Life cycle assessment of copper production: a case study in China. Int J Life Cycle Assess 23, 1814–1824 (2018).
