# 硅片切片 ; 多晶硅片 ; 多线锯

Dataset: ILCD process, Unit process, single operation
Geography: CN
Reference year: 2014
Classification: Unit processes / Materials production / Metals and semimetals
Functional unit: The functional unit of the LCA study was 1 kWh based on a multi-Si PV module
LCI method principle: Attributional
LCI method approaches: Allocation
Generated by: 杨锦锋, yjfzfshn@163.com
Owner: 天工LCI数据工作小组
Review: Dependent internal review by 天工LCI数据工作小组
Amounts: no units in this file; such an amount is in the reference unit of its flow, which a separate flow dataset defines
copyright: false
licenseType: Free of charge for all users and uses

## General comment
多晶硅

## Geography
本研究对中国采用多晶硅组件的光伏系统进行了生命周期评估

## Time period
文章发表

## Technical purpose
多丝锯切割多晶硅片的工艺旨在生产用于光伏系统的太阳能级硅片。这些硅片是创建多晶硅锭、电池和模块的基础 ，这些建组件是组装旨在将太阳光转换成电能的光伏板的关键组成部分。这项技术主要用于中国光伏产业多晶硅光伏组件的制造，有助于其可持续发展。

## Reference product
- Multi-Si wafer,Multi-Si wafer,Multi-Si wafer: 3.34; measured
  Multi-Si Wafer

## Inputs
All rows: measured
- Multi-Si ingot: 5.47
- Glass: 2.47
- Silicon carbide,Silicon carbide: 0.17578
  Silicon carbide
- Steel Wire,Cable: 17.11
  Steel wire
- Acetic acid: 0.6
- Detergent: 2.23
- Compressed air: 29.05
- freshwater: 528.63
  Water
- Electricity: 24.01

## Outputs
All rows: measured
- acetic acid: 0.6
  Acetic acid
- Glass for recovery (shards): 2.47
  Glass
- Glue residues: 0.24328
  Glue residues for disposal
- Silicon scrap: 2.07
  Silicon scrap for recovery
- waste water - untreated: 336.94
  Waste water

## Deviations from the LCI method approaches
本研究旨在定量评估中国光伏系统的生命周期对环境的影响，为中国光伏产业的可持续发展政策制定提供科学依据。

## Data selection and combination
库存数据，包括太阳能级产品生产过程中的材料消耗和 太阳能级硅、硅片、硅锭、电池和组件生产过程中的材料消耗和环境排放 硅、硅片、硅锭、电池和组件生产过程中涉及的材料消耗和环境排放。主要从代表中国目前多晶硅光伏技术领域的企业收集。技术的企业。能耗数据参考了 能耗数据参考了《中国太阳能光伏清洁生产报告》（Li 和 Chang，2012 年）。多晶硅生产数据来自有关中国多晶硅生产的文献。的文献资料。

## Use advice
在使用此生命周期评估数据集评估光伏系统环境影响时，关键是要应用基于多晶硅光伏组件的1千瓦时功能单元。应确保评估范围包括多晶硅光伏组件生命周期的所有相关阶段，包括生产、使用和生命周期终端管理。数据使用者还应考虑中国光伏产业的技术特性，如同《中国太阳能光伏清洁生产报告》中描述，并参考来自当代中国文献的多晶硅生产数据。

## Review details
清单： 内部审查通过几个迭代步骤完成，涉及原始数据验证、原始数据记录、代表性、完整性、与 ISO 14040 和 14044 有关的建模的一致性。

## Data sources
- Fu, Y., Liu, X. & Yuan, Z. Life-cycle assessment of multi-crystalline photovoltaic (PV) systems in China. Journal of Cleaner Production 86, 180–190 (2015).
