# 再生铜生产;阴极铜;TSA工艺;废电线

Dataset: ILCD process, Unit process, single operation
Geography: CN
Reference year: 2014
Classification: Materials production / Metals and semimetals
Functional unit: functional unit was defined as the production of 1 t of refined copper (i.e., cathode copper).
LCI method principle: Attributional
LCI method approaches: Allocation - market value
Generated by: 王鹏, 2867919560@qq.com
Owner: 天工LCI数据工作小组
Review: Dependent internal review by 天工LCI数据工作小组
Amounts: no units in this file; such an amount is in the reference unit of its flow, which a separate flow dataset defines
copyright: false
licenseType: Free of charge for all users and uses

## General comment
采用TSA工艺生产的再生铜主要用于从废旧资源中回收铜。这包括从废弃的电子设备、报废车辆、工业电气设备废料、城市固体废物以及建筑和拆除废料中提取铜。这种回收的铜可用于电线、管道、屋面材料和其他需要铜的各种应用。

## Geography
铜生产库存数据主要来源于两个采用不同设备和工艺的工厂

## Technology and included processes
再生铜生产从收集废铜开始，然后进行拆卸、分离、运输，最后进入冶炼厂或精炼厂回收铜。废铜主要存在于废弃电器电子设备、报废车辆、工业电气设备废料、城市生活垃圾、建筑和拆除废料中。

## Reference product
- copper ore/(0.81%): 0; input; missing unimportant
  copper ore/(0.81%)需要补充

## Inputs
All rows: missing unimportant
- copper ore/(1.02%): 0
  copper ore/(1.02%)需要补充
- waste wire: 4302
  waste wire需要补充
- Limestone: 51.8
  imestone
- quartz sand: 45.53
- oxygen: 0
- Sulfuric acid(98%): 3
  sulfuric acid需要补充resourse
- steam: 1000
  steam需要补充
- Alternating Current Electricity: 925.2
  AC electricity需要补充
- Direct Current Electricity: 972
  DC electricity需要补充
- hard coal: 0
  coal
- coke: 13781
  coke需要补充
- diesel oil: 0
  diesel oil需要补充
- Heavy fuel oil (1.0 wt.% S): 5983.5
  heavy fuel oil

## Outputs
All rows: missing unimportant
- carbon dioxide: 724.15
  CO2
- sulfur oxides: 6.45
  SO2
- chemical oxygen demand: 2.03
  COD需要补充
- particles (PM2.5 - PM10): 0.67
  dust需要补充
- Slag: 681.83
  slag

## Deviations from the LCI method approaches
Eco-Indicator 99（EI99）是生命周期影响评估中广泛使用的一种以损害为导向的影响评估方法[22]。影响评估采用 EI99 方法（层级论视角）进行。

## Data selection and combination
出版文献

## Data treatment and extrapolations
本研究中使用 GaBi 4 软件对铜生产过程进行建模并确定环境负担。

## Use advice
在使用所提供的LCA研究数据时，请确保功能单元与您自己的应用一致，在本案例中即为生产1吨精铜（即阴极铜）。如果应用涉及与研究中的两个工厂类似的设备和工艺，可以直接参考这些数据。但是，如果涉及不同工艺或设备，可能需要进行调整。在模拟使用阶段行为时应格外小心，特别是如果回收实践与评估场景差异显著。如果与您研究的要求一致，请应用生命周期评估中广泛使用的Eco-Indicator 99（EI99，层级论视角）方法进行比较生命周期影响评估。

## Review details
清单： 内部审查通过几个迭代步骤完成，涉及原始数据验证、原始数据记录、代表性、完整性、与 ISO 14040 和 14044 有关的建模的一致性。

## Data sources
- Song, X., Yang, J., Lu, B., Li, B. & Zeng, G. Identification and assessment of environmental burdens of Chinese copper production from a life cycle perspective. Front. Environ. Sci. Eng. 8, 580–588 (2014).
