# 地下水异位修复;地下水抽出处理;施工;处理设施

Dataset: ILCD process, Unit process, single operation
Geography: DK
Reference year: 2021
Classification: Unit processes / Other Services / Repair and maintenance
Generated by: 王宁, wang_ning@caep.org.cn
Owner: 天工LCI数据工作小组
Review: Dependent internal review by 天工LCI数据工作小组
Amounts: no units in this file; such an amount is in the reference unit of its flow, which a separate flow dataset defines
copyright: false
licenseType: Free of charge for all users and uses

## General comment
使用活性炭、高密度聚乙烯、铁建造废水处置设施

## Technology and included processes
使用电力、石英砂、高密度聚乙烯、钢铁、活性炭建造处理设施

## Technical purpose
所描述的过程涉及地下水异位修复的废水处理设施建设。这些设施用于处理被抽出的地下水，并通过使用活性炭过滤器、高密度聚乙烯和铁质部件的系统进行处理。这种类型的修复设施通常用于环境工程项目，以清理受污染的地下水场地。

## Reference product
- Treatment facilities: 1; estimated

## Inputs
All rows: estimated
- polyethylene high density granulate (PE-HD): 410
- Steel sections: 50
- Activated Carbon: 180
- Electricity: 38000
- quartz sand: 300000

## Use advice
在使用该生命周期评价数据构建地下水处理设施时，用户应根据提供的数据集确保核算具体的输入物资（电力、石英砂、高密度聚乙烯、钢铁、活性炭）。确保这些材料被包含在LCA清单中，以准确评估影响。用户应考虑所建设设施的技术生命周期，包括潜在的生命终点场景，如材料的拆解回收或处置。在将此数据应用于特定项目时，还应考虑资源提取和建设过程的地理特定性。

## Review details
清单： 内部审查通过几个迭代步骤完成，涉及原始数据验证、原始数据记录、代表性、完整性、与 ISO 14040 和 14044 有关的建模的一致性。

## Data sources
- Sustainable remediation assessment of a chlorinated ethene plume: method evelopment, application, and assessment
