# 钢铁产品;钢铁;再生钢铁生产

Dataset: ILCD process, Unit process, single operation
Geography: JL-CN
Reference year: 2016
Classification: Unit processes / Materials production / Metals and semimetals
Generated by: 王环宇, wanghuanyu00@126.com
Owner: 天工LCI数据工作小组
Review: Dependent internal review by 天工LCI数据工作小组
Amounts: no units in this file; such an amount is in the reference unit of its flow, which a separate flow dataset defines
copyright: false
licenseType: Free of charge for all users and uses

## General comment
再生钢铁生产用于制造钢铁产品，随后这些产品在建筑、汽车和耐用消费品制造等各种行业中使用。该过程涉及熔化废钢并加工，使其重新获得与原生钢铁相当的性能。

## Reference product
- iron: 1000; measured
  钢材

## Inputs
- Energy, geothermal, converted: 3244.94; measured
  标煤

## Outputs
- phenol,Sulphur oxides (as SO2): 0.102; measured
- nitrogen monoxide: 0.345; measured

## Use advice
在将此数据纳入生命周期评估时，用户应考虑与收集、分类和熔化废钢相关的能耗和排放。还必须认真考虑与废料运输相关的影响。如果回收过程产生共产品，则应应用适当的分配方法。评估还应反映输入废钢的质量和加工中使用的技术。

## Review details
清单： 内部审查通过几个迭代步骤完成，涉及原始数据验证、原始数据记录、代表性、完整性、与 ISO 14040 和 14044 有关的建模的一致性。

## Data sources
- 王宪恩, 栾天阳, 陈英姿, & 段海燕. 基于LCA的废旧资源循环利用节能减排效果评估模式与方法研究——以吉林省某钢铁企业为例. 中国人口·资源与环境 26, 69–77 (2016).
