# 光伏电池生产 ; 光伏电池 ; 使用混合酸清洗晶片，然后添加 p-n 结并覆盖沉积膜

Dataset: ILCD process, Unit process, single operation
Geography: CN
Reference year: 2016
Classification: Unit processes / Materials production / Inorganic chemicals
Functional unit: Grid-connected electricity generation from a 1 MWp multi-Si PV system, whose lifespan is 30 years of a 10 MWp power station has been taken as the research object and the functional unit
LCI method principle: Attributional
LCI method approaches: Allocation
Generated by: 杨锦锋, yjfzfshn@163.com
Owner: 天工LCI数据工作小组
Review: Dependent internal review by 天工LCI数据工作小组
Amounts: no units in this file; such an amount is in the reference unit of its flow, which a separate flow dataset defines
copyright: false
licenseType: Free of charge for all users and uses

## General comment
多晶硅

## Geography
该电站位于宁夏中部地区，年平均太阳辐射量约为5955.80 MJ m2 a-1，年平均日照高峰时数为1718h

## Time period
文章发表

## Technical purpose
该工艺生产的光伏电池用于将太阳能转换为电能的中型电站。具体而言，生产过程包括用混合酸清洗硅片，添加p-n结，并覆盖沉积膜。所产生的多晶硅光伏电池被设计用于并网发电系统，并可用于中国宁夏中部地区的太阳能电站，该电站受益于高太阳辐射量和峰值日照时数。

## Reference product
- Multi-Si solar cell,Multi-Si solar cell,Multi-Si solar cell: 1; measured
  PV cell

## Inputs
All rows: measured
- Electricity: 1.98
- Multi-Si wafer,Multi-Si wafer,Multi-Si wafer: 1
  SoG-Si wafer
- freshwater: 1.1
  Fresh water
- silver: 0.00043
  Silver paste
- aluminium: 0.00139
  Aluminum paste
- Ammonia: 0.00137
- Silane: 0.00053
- Phosphorus Oxychloride: 4e-5
  Phosphorus oxychloride
- Potassium hydroxide: 0.00137
  Potassium hydroxide (21%)
- Sodium hydroxide: 0.00099
  Caustic soda (30%)
- Hydrochloric acid: 0.00141
  Hydrochloric acid (37%)
- Hydrofluoric acid: 0.00191
  Hydrofluoric acid (40%)
- Nitric acid: 0.00495
  Nitric acid (70%)
- Sulfuric acid: 1e-5
  Sulfuric acid (98%)
- phosphoric acid: 4e-6
  Phosphoric acid (85%)
- oxygen: 0.00062
  Oxygen
- nitrogen: 0.0433
  Nitrogen
- Ethanol: 0.0001
- Carbon tetrafluoride: 0.00016
- Terpineol: 2e-7

## Outputs
All rows: measured
- chlorine: 8e-5
  Chlorine
- Nitrogen oxides: 0.00012
- ammonia: 4e-5
  Ammonia
- volatile organic compound: 7e-5
  Volatile organic compound
- hydrogen chloride: 1e-5
  Hydrogen chloride
- chloride: 0.00017
  Chloride
- fluoride: 0.00204
  Fluoride
- nitrogen, total (excluding N2): 5e-5
  TN
- hydrogen fluoride: 4e-6
  Hydrogen fluoride
- Carbon tetrafluoride: 2e-5
- chemical oxygen demand: 0.00012
  Chemical oxygen demand(COD)
- waste water - untreated: 0.67
  Waste water
- Sludge: 0.12
- municipal solid waste deposition: 0.00026
  Solid waste
- hazardous waste (unspecified),hazardous waste (unspecified): 1e-6
  Solid waste (Hazardouswaste)

## Deviations from the LCI method approaches
对中国冶金路线多晶硅光伏并网发电系统进行了生命周期评估

## Data selection and combination
调查云南、宁夏工厂

## Use advice
在使用此数据集进行多晶硅光伏系统的生命周期评估（LCA）时，考虑宁夏地区的具体环境条件，以准确估算能源产量。考虑10 MWp电站预期30年的使用寿命以及在太阳辐射和峰值日照时数方面的地理特异性。当将LCA数据应用于其他地点时，确保包含环境影响的区域差异。考虑光伏电池生产过程的技术特性，特别是混合酸的使用和沉积膜的应用。

## Review details
清单： 内部审查通过几个迭代步骤完成，涉及原始数据验证、原始数据记录、代表性、完整性、与 ISO 14040 和 14044 有关的建模的一致性。

## Data sources
- Yu, Z. et al. Life cycle assessment of grid-connected power generation from metallurgical route multi-crystalline silicon photovoltaic system in China. Applied Energy 185, 68–81 (2017).
