# 氧气生产 ; 氧气 ; 空分路线 ; 空气

Dataset: ILCD process, Unit process, black box
Geography: ZJ-GD-CN
Reference year: 2018
Classification: Unit processes / Materials production / Inorganic chemicals
Functional unit: A functional unit is defined as 4.69 ton of oxygen product
LCI method principle: Attributional
LCI method approaches: Allocation - mass
Generated by: 任亚楠, renyn15@tsinghua.org.cn
Owner: 天工LCI数据工作小组
Review: Dependent internal review by 天工LCI数据工作小组
Amounts: no units in this file; such an amount is in the reference unit of its flow, which a separate flow dataset defines
copyright: false
licenseType: Free of charge for all users and uses

## General comment
ID11丙烯生产;丙烯;煤制烯烃路线;煤;下属过程1

## Geography
催化裂化路线的案例工厂来自中国石化湛江东兴石油化工有限公司。企业位于广东省湛江市，其催化裂化制烯烃工艺建于2018年，丙烯年产能11.6万吨。

## Time period
工艺建于2018年

## Technical purpose
通过空分路线生产的氧气通常用于炼钢、污水处理和医疗等各种工业流程。通过煤制烯烃路线生产的丙烯主要用于生产各种塑料制品，并作为生产其他化学品的中间体。案例工厂通过催化裂化生产丙烯的能力，对商品化工行业来说是一个重要的贡献。

## Model description
考虑了各个子阶段涉及的所有相关投入原材料、能源、电力、蒸汽、水和辅助化学品的消耗，产出考虑了丙烯和副产品(如丙烷脱氢工艺生产的C4产品。采用质量分配法量化产品丙烯和副产品之间的环境负荷。此外，本模型还考虑了各工艺的废物排放。本研究注重于不同丙烯生产工艺的环境影响分析，因此，丙烯烃利用及其产品的报废处理以及、基础设施建设和以及设备维护不在本次评价边界范围之内。

## Reference product
- oxygen: 4690; measured
  氧气

## Inputs
- air: 21450; measured
  空气
- process steam: 590; measured
  低压蒸汽
- Cooling water: 230; measured
  循环冷却水
- Electricity: 4342.39; measured
  电

## Outputs
- nitrogen: 6040; measured
  污氮气

## Data selection and combination
丙烯生产工艺详细的投入产出数据来自企业公开的环境影响评价报告，包括原料和辅料投入、能源和资源消耗，以及废气、废水和固体废物的排放。

## Use advice
在使用数据集进行生命周期评估时，确保系统边界与所提供数据的范围一致，该数据仅包括原材料和辅助投入、能源和资源消耗以及废物排放。模型中不包括产品末生命周期环节、基础结构建设和设备维护的环境影响。用户应准确使用质量分配法在丙烯及其副产品之间分配环境负荷，考虑数据集中概述的所有相关子阶段的消耗和废物排放。

## Review details
清单： 内部审查通过几个迭代步骤完成，涉及原始数据验证、原始数据记录、代表性、完整性、与 ISO 14040 和 14044 有关的建模的一致性。

## Data sources
- 吕琳. 丙烯产品环境负荷及温室气体减排的碳税政策. (大连理工大学, 2022).
