# 砖生产;烧结砖;烧结工艺

Dataset: ILCD process, Unit process, single operation
Geography: ZG-SC-CN
Reference year: 2020
Classification: Unit processes / Materials production / Other mineralic materials
Functional unit: 1t WDC were chosen as the functional unit
Generated by: 王湘锦, r99rt4@163.com
Owner: 天工LCI数据工作小组
Review: Dependent internal review by 天工LCI数据工作小组
Amounts: no units in this file; such an amount is in the reference unit of its flow, which a separate flow dataset defines
copyright: false
licenseType: Free of charge for all users and uses

## General comment
以页岩矿石、煤以及水基钻屑为原材料

## Technology and included processes
WDC（水基钻屑） 用于替代天然粘土制备烧结砖。通过压滤机预处理，WDC 的含水量可从 80% 降至 20%，从而满足对外交付的循环利用要求。WDC 中剩余的水可直接用于制砖（240 毫米 × 115 毫米 × 53 毫米），以减少水资源的消耗。整个生产过程包括原料制备、混合、压制、干燥和烧结（温度为 800-1000 ℃；时间为 1-4 h）。

## Technical purpose
所描述的工业过程用于生产烧结砖，采用水基钻屑（WDC）替代天然粘土。所生产的烧结砖适用于建筑用途，通过循环利用工业废弃物并减少自然粘土资源和水资源的消耗，提供了一种环保替代品。

## Reference product
- green brick: 5123; input; measured

## Inputs
- freshwater: 4160; measured
- Electricity: 752.94; measured

## Outputs
All rows: measured
- sintered brick: 4600
  烧结砖成品
- sulfur dioxide: 0.11117
- nitrogen monoxide: 0.1015
  原文中为NOX
- hydrogen fluoride: 0.00204
- particles (> PM10): 0.0686
  Monitoring analysis
- carbon dioxide (fossil): 89.2

## Deviations from the LCI method approaches
作为生命周期评估的一部分，亿科环境技术有限公司开发的 eFootprint 在线分析平台用于对整个生命周期过程进行定量分析。

## Data selection and combination
原材料、能源投入和废气排放的原始数据来自自贡（中国四川）的一家案例研究企业--创奇环保建材有限公司，该公司承担了烧结砖原材料 WDC 的利用项目，年产 3000 万块烧结砖。

## Sampling procedure
此外，选择 1t WDC 作为功能单位，并按照功能单位计算所有原材料、辅助材料、能耗、运输和直接排放的输入参数。

## Use advice
在使用数据集进行生命周期评估（LCA）时，采用 1 吨 WDC 作为功能单位，根据此单位量化原材料、辅助材料、能耗、运输和排放等输入参数。按照 Zhao 等人，2020年的规定应用截断规则，从清单中忽略重量不足最终产品 1% 的上游材料，如粉煤灰。将这些数据整合到 eFootprint 平台中，对砖石生命周期环境影响进行全面分析。

## Review details
清单： 内部审查通过几个迭代步骤完成，涉及原始数据验证、原始数据记录、代表性、完整性、与 ISO 14040 和 14044 有关的建模的一致性。

## Data sources
- Liu, W. et al. Comparative life cycle assessment of cement, sintered bricks and non-sintered bricks manufacturing using water-based drilling cuttings from shale gas production in the Sichuan Basin, China. J. Environ. Manage. 314, 115135 (2022).
