# 生产透辉石光伏组件;二氧化钛组件 1m2;旋转涂层法;二氧化钛

Dataset: ILCD process, Unit process, single operation
Geography: US
Classification: Unit processes / Energy carriers and technologies / Electricity
Functional unit: 1 square meter perovskite photovoltaic module
Generated by: 姚玺婧, 15898832265@163.com
Owner: 天工LCI数据工作小组
Review: Dependent internal review by 天工LCI数据工作小组
Amounts: no units in this file; such an amount is in the reference unit of its flow, which a separate flow dataset defines
copyright: false
licenseType: Free of charge for all users and uses

## General comment
The main process steps include substrate glass production, deposition of perovskite layers, deposition of electron transport layers, and packaging.

## Technology and included processes
Spin-coating method: The spin-coating process is relatively simple, and it is the mainstream preparation method of perovskite light-absorbing layer. Firstly, PbX2 was dissolved in solvent and spun on the substrate to form a film; Then PbX2 is soaked in solution or spun on the substrate again to react with PbX2 film to produce perovskite.

## Technical purpose
TiO2模块指的是1平方米的钙钛矿光伏模块，用于将太阳能转换为电能。它主要用于各种应用的太阳能板，包括住宅、商业和工业发电系统。

## Reference product
- Solar Module,Solar Module,Solar Module: 1; log-normal

## Inputs
All rows: log-normal
- ethanol: 0.0271579, 0.0271579 (2 entries)
  基板清洗溶剂
- Water: 0.0327
  基板清洗溶剂
- silver: 0.00881
  金属面具
- hydrogen chloride: 0.00695
  金属口罩清洗溶剂
- Titanium dioxide, chloride and sulphate processes, >80% TiO2, production mix, at plant: 0.0183; calculated
  层厚度100nm
- water: 0.0327
  基板清洗溶剂
- Titanium dioxide, chloride and sulphate processes, >80% TiO2, production mix, at plant: 0.00494; calculated
  层厚度250 nm
- dimethyl formamide: 0.00283; calculated
  PbI2的溶剂
- isopropanol: 0.0112; calculated
  CH3NH3I溶剂
- chlorobenzene: 0.0118; calculated
  Spiro OMeTAD溶剂
- gold: 0.00165
  层厚度100nm
- polyethylene terephthalate fibres (PET): 0.0617
  应用于两侧
- Adhesives: 0.0202
  3米467英里/平方英尺
- Electricity: 28.008; calculated
- Fluorine Doped Tin Oxide Coated Glass: 5.04; calculated
  基底
- Lead iodide: 0.00138; calculated
  层厚度96 nm
- methylammounium iodide: 0.000143; calculated
  层厚度204 nm
- Spiro-OMeTAD: 0.00085; calculated
  层厚度200 nm

## Outputs
All rows: log-normal
- ethanol: 0.0681
  基板清洗溶剂
- silver: 0.00617
  银浆
- hydrogen chloride: 0.00264
  银浆稀释剂
- hydrogen chloride: 0.00208
  金属口罩清洗溶剂
- isopropanol: 0.0123; calculated
  BL-TiO2油墨和CH3NH3I的溶剂
- acetone: 0.000538
  BL-TiO2油墨的溶剂
- dimethyl formamide: 0.00283; calculated
  PbI2的溶剂
- chlorobenzene: 0.0118; calculated
  Spiro OMeTAD溶剂
- gold: 0.000297
- acetic anhydride: 0.000946
  BL-TiO2油墨的溶剂
- landfill of glas/inert waste: 5.13
  垃圾填埋
- Titanium tetrachloride: 0.000176; calculated
  废浓缩BL-TiO2油墨
- Terpineol: 0.0042; calculated
  nc-TiO2油墨的溶剂
- Lead iodide: 0.000966; calculated
  废弃PbI2
- Spiro-OMeTAD: 0.000595; calculated
  废弃Spiro OMeTAD

## Use advice
使用此TiO2模块数据集时，请确保考虑钙钛矿光伏技术的特定效率和退化率。在您的生命周期评估中，注意包括生产过程中使用的能源和生命周期终点的处理。此外，请考虑区域太阳辐射数据，以更准确地预测模块在预定位置的性能。

## Review details
清单： 内部审查通过几个迭代步骤完成，涉及原始数据验证、原始数据记录、代表性、完整性、与 ISO 14040 和 14044 有关的建模的一致性。
