# 土壤修复;异位修复;水泥窑协同处置;准备阶段;原料开采运输;二氧化碳

Dataset: ILCD process, Unit process, single operation
Geography: CN
Reference year: 2015
Classification: Unit processes / Other Services / Repair and maintenance
Generated by: 曹嘉萌, 2979480760@qq.com
Owner: 天工LCI数据工作小组
Review: Dependent internal review by 天工LCI数据工作小组
Amounts: no units in this file; such an amount is in the reference unit of its flow, which a separate flow dataset defines
copyright: false
licenseType: Free of charge for all users and uses

## General comment
水泥厂拥有一条4000t/d规模的现代化干法生产线，年生产水泥190万t，熟料150万t．公司自有矿山面积0.448km2，年生产石灰石能力200万t.生产工艺采用具有先进水平的RSP五级窑外分解技术．危险废物均采用汽车运输方式，配置危险品专用车辆，行车路线为货车专用线.矿山至厂区的运输距离约1.5km，废弃物的运输距离约50km．常规水泥的生产过程主要包括原辅材料的幵采及运输、生料制备、煤粉制备、熟料煅烧和水泥粉磨等阶段， 添加废弃物处置环节后， 废弃物（污染土壤、消化污泥、废油泥等）可以用作替代原料和替代燃料，以节省石灰石和煤炭等原材料。水泥窑协同处置，准备阶段，原料开采运输，主要开采和运输原料为石灰石、页岩、粉煤灰等，运输距离1.5km。以及工业废物（污染土壤、废油泥、废催化剂等），运输距离50km。工业废物不计算开采投入，只统计运输消耗。

## Technical purpose
此生命周期评估（LCA）数据集详细介绍了水泥窑协同处置工艺，特别是土壤修复部门中的异位技术。 它描述了包括石灰石、页岩和粉煤灰的原料开采与运输在内的准备阶段，并包括污染土壤、废油泥和废催化剂等工业废物的运输。 这些物料可以在水泥行业中用作生产和燃料的替代资源，从而节省传统原材料如石灰石和煤炭。 该过程对于希望将废物管理融入水泥生产生命周期以减少环境影响和资源消耗的现代干法生产线水泥厂至关重要。

## Reference product
- carbon dioxide (fossil): 37.88; measured

## Inputs
- Diesel: 4.18; measured
- Electricity: 47.664; measured

## Outputs
All rows: measured
- calcium carbonate: 1125.43
- shale: 1.23
- diatomite: 17.75
- Iron powder: 27.25
- gypsum: 52.15
- Fly ash,Fly ash: 124.24
- Slag: 203.78
- clay: 1.05
- Coating residue: 0.16
- oil sludge: 5.26
- Spent catalyst: 2.11
- contaminated soil: 5.26
- Digested Sludge,Digester sludge: 15.79
- Coal,Coal,Coal: 98.28

## Use advice
使用此生命周期评估（LCA）数据集时，用户必须考虑这些特定过程对于他们评估的系统的相关性。 如果原材料和工业废物的运输距离与所描述的1.5公里和50公里不同，则应调整它们。 还要注意的是，工业废物管理的原材料消耗不包括在采矿输入中，仅专注于运输能源和排放。 另外，用户应该从评估中排除极少量的废气、废水或固体废物，因为这些在本数据集的输入和输出流中未被计算。

## Review details
清单： 内部审查通过几个迭代步骤完成，涉及原始数据验证、原始数据记录、代表性、完整性、与 ISO 14040 和 14044 有关的建模的一致性。

## Data sources
- 侯星宇,张芸,戚昱等.水泥窑协同处置工业废弃物的生命周期评价[J].环境科学学报,2015,35(12):4112-4119.
