# 焚烧城市固体废物;上海平均

Dataset: ILCD process
Geography: SH-CN
Classification: Unit processes / End-of-life treatment / Energy recycling
Generated by: 陆嘉麒, wilsherelu@foxmail.com
Owner: 天工LCI数据工作小组
Review: Dependent internal review by 天工LCI数据工作小组
Amounts: no units in this file; such an amount is in the reference unit of its flow, which a separate flow dataset defines
copyright: true
licenseType: Free of charge for all users and uses

## General comment
该数据集描述了在中国上海进行的城市固体废物焚烧过程，这是一种减少废物处理量和回收能源的废物管理方法。该过程适用于评估通过焚烧处理城市废物的废物处理设施的环境影响。

## Reference product
- waste incineration of municipal solid waste (MSW): 1000; input; measured
  焚烧1t城市生活垃圾

## Inputs
All rows: measured
- waste paper (unspecified): 420
  纸张/纸板
- Plastic (unspecified): 289
  塑料
- Wood: 8.4
  木材
- Textile: 35
  纺织品
- Food Debris: 170
  食物残渣
- Metal: 5.7
  金属
- Glass (formed & finished): 61
  玻璃
- Inert waste: 8.7
  其他，惰性废弃物
- Electricity: 10.512
  预处理电耗
- Leachate: 0.117
  渗滤液量
- Diesel: 0.24
  柴油（助燃剂）
- natural gas,natural gas: 0.14
  天然气（助燃剂）
- Electricity: 185.904
  耗电量
- water: 0.59
  耗水量
- Electricity: 0.936
  一年应急检修电网电量
- Urea: 0.16
  尿素
- Quicklime: 3.3
  生石灰
- hydrated lime dry slaked: 1.03
  熟石灰
- Active carbon: 0.11
  活性炭
- Sodium bicarbonate: 0.21
  碳酸氢钠
- Fume Treatment Chelating Agent: 53.85
  烟气处理螯合剂
- Fly ash treatment chelating agent: 35.3
  飞灰处理螯合剂
- cement, unspecified: 26
  水泥

## Outputs
- Slag: 1.18719e8; measured
  炉渣（年产生量）
- Fly ash solidification body: 9.14556e7; measured
  飞灰固化体（年产生量）
- waste incineration of municipal solid waste (MSW): 835.2; measured
  垃圾焚烧
- electricity from waste incineration: 893.7; measured
  上网电量

## Use advice
在使用该数据集进行生命周期评估时，重要的是：1. 考虑上海特定的废物组成特性，以准确表征焚烧过程。2. 评估上海废物转能源设施特有的能源回收效率。3. 在生命周期影响评估中包括排放处理和灰烬处理。4. 计入固体废物运输至焚烧设施的任何环节。请注意，所描述的技术和操作实践可能特定于上海，可能不代表其他地区或国家。

## Review details
清单： 内部审查通过几个迭代步骤完成，涉及原始数据验证、原始数据记录、代表性、完整性、与 ISO 14040 和 14044 有关的建模的一致性。

## Data sources
- 上海市市政固废调研结果
