# 热轧钢生产;热轧钢;热轧（煤基直接还原）

Dataset: ILCD process, Unit process, single operation
Geography: CN
Classification: Unit processes / Materials production / Metals and semimetals
Generated by: 付翔, 1162850692@qq.com
Owner: 天工LCI数据工作小组
Review: Dependent internal review by 天工LCI数据工作小组
Amounts: no units in this file; such an amount is in the reference unit of its flow, which a separate flow dataset defines
copyright: false
licenseType: Free of charge for all users and uses

## General comment
采用基于煤的直接还原（煤基直接还原）工艺生产的热轧钢主要用于建筑行业的结构构件，在汽车工业中用于车辆框架，以及生产各种钢铁制品，如铁轨、棒材和梁。

## Geography
The LCI of Coal-DR is obtained, as shown in Table 9, based on the statistics of the demonstration project in China.

## Reference product
- Hot rolled steel: 986.5; calculated

## Inputs
All rows: calculated
- Crude Steel: 1000
  Crude steel
- freshwater,freshwater: 600
- Circulating water: 10000
- Baling wire: 2.1
- Raw gas: 42.4
- Reducing gas: 72.8
- Top gas: 25.8
- Electricity: 316.8

## Data treatment and extrapolations
LCI of COG-DR and H-DR routes, which is not scaled-up in China are estimated based on Coal-DR routes combined with literature data from simulations, laboratory tests, and process modeling in Table 9 [49,50]. The LCI of Coal-DR is obtai

## Use advice
应谨慎应用煤基直接还原（煤基DR）途径生产热轧钢的生命周期清单（LCI）数据，考虑到中国示范项目统计数据的具体情况。在将数据集应用于中国以外的场景或其他直接还原方法时，需要基于模拟、实验室测试和过程建模数据进行适当的调整。应注意可能需要扩展数据并调整技术和方法学差异。

## Review details
清单： 内部审查通过几个迭代步骤完成，涉及原始数据验证、原始数据记录、代表性、完整性、与 ISO 14040 和 14044 有关的建模的一致性。

## Data sources
- The carbon reduction potential of hydrogen in the low carbon transition of the iron and steel industry: The case of China
