# 土壤修复;原位修复;热脱附;施工准备

Dataset: ILCD process, Unit process, single operation
Geography: HEN-CN
Classification: Other Services / Repair and maintenance
Generated by: Zhang Jinying, zhangjy@caep.org.cn
Owner: Tiangong LCI Data Working Group
Review: Dependent internal review by Tiangong LCI Data Working Group
Amounts: no units in this file; such an amount is in the reference unit of its flow, which a separate flow dataset defines
licenseType: Free of charge for all users and uses

## General comment
The industrial process described is soil remediation through in-situ thermal desorption specifically tailored for a coking plant located in the mid-latitudes of northern China. This process targets high-risk areas where the concentration of benzene exceeds 40 mg/kg, and benzo[a]pyrene is over 15 mg/kg. It is applicable for large scale environmental restoration projects, especially in the treatment of contaminated soil within the defined area of 7567 square meters with a total soil volume of 30413 cubic meters.

## Reference product
- materials: 30413; article inperiodical

## Inputs
All rows: article inperiodical
- Electricity: 172800
- Diesel: 9.629
- water: 640
- iron: 27868
- Concrete: 2097
- cement: 300
- HDPE: 35
- heavy fuel oil: 4

## Use advice
When employing this data set for LCA studies, users should note the geographic specificity of the data (northern China, mid-latitude region) and the unique conditions of the coking plant site. The defined high-risk areas are based on specific contaminant thresholds, and this should be taken into account for proper context. The construction preparation phase duration of approximately 50 days, including preparation of personnel and materials, site clearing, and temporary facility construction, should be considered in project scheduling. Methodological advice: Model a scenario reflecting these specific conditions for more accurate impact assessment.

## Review details
Inventory: The internal review was done by several iteration steps concerning raw data validation, raw data documentation, representativity, completeness and consistency of modelling with regard to ISO 14040 and 14044.
