# 电力生产 ; 火电 ; 黑龙江

Dataset: ILCD process, Unit process, single operation
Geography: HLJ-CN
Reference year: 2019
Classification: Unit processes / Energy carriers and technologies / Electricity
Generated by: 熊若熙, xiongrx0126@163.com
Owner: 天工LCI数据工作小组
Review: Dependent internal review by 天工LCI数据工作小组
Amounts: no units in this file; such an amount is in the reference unit of its flow, which a separate flow dataset defines
copyright: false
licenseType: Free of charge for all users and uses

## General comment
火电发电包括原煤、洗煤、石油、天然气等十七种化石燃料。该过程只考虑直接发电过程，不考虑上游原材料开采加工和下游消费

## Time period
根据2019年能源统计年鉴数据计算

## Technical purpose
所描述的热电发电过程用于从黑龙江省的十七种不同化石燃料（包括原煤、洗煤、油和天然气）中产生电力。这里产生的电力通常用于该地区的居民、商业和工业应用。

## Reference product
- electricity for thermal power: 3.6; calculated

## Inputs
All rows: calculated
- Raw coal: 0.324397
- Coke oven gas: 0.000887
- blast furnace gas: 0.106057
- Converter gas: 0.003103
- Diesel: 0.00035344
- Petroleum Coke: 0.00207507
- refinery gas: 1.847e-5
- natural gas: 0.031994

## Outputs
- carbon dioxide (fossil): 0.943597; calculated
- sulfur dioxide: 0.000173428; calculated
- Nitrogen oxides: 0.000272165; calculated
- particles (> PM10): 3.33236e-5; calculated

## Data treatment and extrapolations
核算方法参考《企业温室气体排放核算方法与报告指南 发电设施》。不同形式发电量及燃料用量来自于《中国能源统计年鉴 2020》中的第三章（能源生产） 和第六章（地区能源平衡表）。用于计算二氧化碳排放因子的低位发热量、单位热值含碳量等燃料参数来自于《2019 年度中国区域电网二氧化碳基准线排放因子 OM 计算说明》、《企业温室气体排放核算方法与报告指南 发电设施》

## Use advice
该LCA数据的用户应注意，只考虑直接发电阶段。排除了上游原材料提取和加工以及下游电力消费等过程。数据是根据2019年能源统计年鉴计算的，用户在使用这些数据时应参考电力发电设施的温室气体核算指南。还应考虑《中国能源统计年鉴2020》第3章和第6章中详细描述的能源生产和燃料消费的区域差异。用于计算的参数，包括低位发热量和单位热值含碳量，来自2019年中国区域电网二氧化碳基准线排放因子OM和电力发电设施温室气体报告指南。

## Review details
清单： 内部审查通过几个迭代步骤完成，涉及原始数据验证、原始数据记录、代表性、完整性、与 ISO 14040 和 14044 有关的建模的一致性。

## Data sources
- 熊若熙. 中国电力生产和消费二氧化碳与污染物排放因子核算. (清华大学, 2023).
