# 止水帷幕;喷射灌浆;地下水异位修复;抽出处理

Dataset: ILCD process, Unit process, single operation
Geography: JS-CN
Reference year: 2022
Classification: Unit processes / Other Services / Repair and maintenance
Generated by: 王宁, wang_ning@caep.org.cn
Owner: 天工LCI数据工作小组
Review: Dependent internal review by 天工LCI数据工作小组
Amounts: no units in this file; such an amount is in the reference unit of its flow, which a separate flow dataset defines
copyright: false
licenseType: Free of charge for all users and uses

## General comment
使用水泥、自来水和钢铁建造一个有90个桩的灌浆帷幕

## Geography
a closed pesticide manufacturing plant located in Jiangsu Province, China.

## Technical purpose
使用水泥、自来水和钢铁建造的90桩灌浆帷幕主要用于地下结构的止水和修复工程。它常用于修建隔离层以防止水渗透，特别是位于中国江苏省已关闭的农药制造厂附近。该结构特别适用于包含喷射灌浆的土壤稳定和地下水异位修复项目，包括抽水和处理技术。

## Reference product
- Grout curtains: 25; measured
  A is the cross-sectional area of 0.5 m2 for a pile, L is the pile length of 25 m (Φ850@600 mm), C is the cement content of 325 kg cement per m3 soil, and N is the pile numbers of 90.

## Inputs
- Electricity: 212616; measured
  使用电力建造灌浆帷幕
- Steel: 500; measured
  使用混凝土建造灌浆帷幕
- cement, unspecified: 365630; measured
  使用水建造灌浆帷幕
- Tap Water: 548440; measured
  使用碎石建造灌浆帷幕
- transport in t*km: 36613; calculated

## Use advice
在使用灌浆帷幕施工的数据集时，必须考虑现场的地质特性，以确保在生命周期评估数据中正确应用喷射灌浆和抽水治理技术。为了准确的环境影响分析，用户应当包括所有输入物，如水泥、自来水、混凝土和钢铁，并在计算资源使用和排放量时考虑到灌浆帷幕的实际产出。方法学上的考虑还必须包括特定使用阶段行为，特别是对于类似江苏省已关闭的农药厂的场所。技术适用性领域应指导使用情境，确保与修复目标正确对齐。

## Review details
清单： 内部审查通过几个迭代步骤完成，涉及原始数据验证、原始数据记录、代表性、完整性、与 ISO 14040 和 14044 有关的建模的一致性。

## Data sources
- Ding, D. et al. Assessing the environmental impacts and costs of biochar and monitored natural attenuation for groundwater heavily contaminated with volatile organic compounds. Science of The Total Environment 846, 157316 (2022).
