# 底泥修复;原位覆盖;生物炭;覆盖

Dataset: ILCD process, Unit process, black box
Geography: NO
Reference year: 2011
Classification: Other Services / Repair and maintenance
Generated by: 桑春晖, sangch@mail.bnu.edu.cn
Owner: 天工LCI数据工作小组
Review: Dependent internal review by 天工LCI数据工作小组
Amounts: no units in this file; such an amount is in the reference unit of its flow, which a separate flow dataset defines
licenseType: Free of charge for all users and uses

## General comment
使用疏浚船完成覆盖材料的覆盖。

## Geography
经查询，暂未找到国内有相关研究文献

## Time period
文献中没有明确数据收集的开始时间，以文献发表时间为有效期的开始时间

## Technology and included processes
覆盖材料的使用量为2 kg /m2，密度为0.5 吨/m3。

## Technical purpose
该工业过程描述了使用原位覆盖技术和生物炭进行底泥修复。这个过程是为环境修复活动而设计的，特别是对受污染沉积物的原位处理。使用活性炭对沉积物中的污染物进行覆盖和隔离，有效减少了它们的生物可用性和环境影响。此方法适用于沉积物污染对生态或健康风险构成威胁的水体，并适合于中国南方水域的大规模应用。

## Reference product
- materials,rhamnolipid,air,seedling,soil sample,Affected area: 2.38e7
  这里指的是采用活性炭覆盖的底泥沉积物影响区域，用面积表示

## Inputs
- (unnamed flow): 46700

## Data selection and combination
Process inventory data是根据ISO 14040关于LCA.35的规定获得的。基本数据来自特定场地的盆栽实验、中试和供应商处获取，这些数据代表了中国南方的情况。二级数据来自Ecoinvent数据库v2.3，从中选择了地理来源和技术因素最相似的过程。

## Use advice
在使用此LCA数据集进行底泥修复项目时，重要的是确保方法论框架与ISO 14040标准一致。主要数据来自盆栽实验、中试研究和供应商信息，代表中国南方的情况。二级数据来源于Ecoinvent数据库2.3版本，选择基于地理和技术相似性进行了筛选。使用者应当验证数据的时间相关性，考虑到有效期的起始时间是源文献的发表时间。在将数据外推到不同环境时，要小心地理和技术的适用性。覆盖材料的使用定量为2 kg/m2，密度为0.5吨/m3，应根据具体场地条件和覆盖要求将其计入清单计算。

## Review details
清单： 内部审查通过几个迭代步骤完成，涉及原始数据验证、原始数据记录、代表性、完整性、与 ISO 14040 和 14044 有关的建模的一致性。

## Data sources
- Sparrevik et al. Use of Life Cycle Assessments To Evaluate the Environmental Footprint of Contaminated Sediment Remediation. Environ. Sci. Technol. 2011, 45, 10, 4235–4241
