# 电力生产 ; 火电 ; 内蒙古自治区

Dataset: ILCD process, Unit process, single operation
Geography: NMG-CN
Reference year: 2019
Classification: Unit processes / Energy carriers and technologies / Electricity
Generated by: 熊若熙, xiongrx0126@163.com
Owner: 天工LCI数据工作小组
Review: Dependent internal review by 天工LCI数据工作小组
Amounts: no units in this file; such an amount is in the reference unit of its flow, which a separate flow dataset defines
copyright: false
licenseType: Free of charge for all users and uses

## General comment
火电发电包括原煤、洗煤、石油、天然气等十七种化石燃料。该过程只考虑直接发电过程，不考虑上游原材料开采加工和下游消费

## Time period
根据2019年能源统计年鉴数据计算

## Technical purpose
该数据集描述了内蒙古自治区热电厂在电力生产过程中使用多种化石燃料（如原煤、洗煤、石油和天然气）的情况。该热电发电设施旨在向区域电网生产和供电。数据专注于直接发电，不包括上游原材料的提取和加工，也不包括下游的电力消费。

## Reference product
- electricity for thermal power: 3.6; calculated

## Inputs
All rows: calculated
- Raw coal: 0.576436
- Gangue, in ground: 0.00859646
- Coke oven gas: 0.001165
- blast furnace gas: 0.019443
- Converter gas: 0.001133
- Diesel: 2.365e-5
- fuel oil, unspecified: 2.17e-6
- natural gas: 4.34e-6
- Natural gas, liquefied: 4.34e-7

## Outputs
- carbon dioxide (fossil): 1.08583; calculated
- sulfur dioxide: 0.000188211; calculated
- Nitrogen oxides: 0.000296868; calculated
- particles (> PM10): 3.60223e-5; calculated

## Data treatment and extrapolations
核算方法参考《企业温室气体排放核算方法与报告指南 发电设施》。不同形式发电量及燃料用量来自于《中国能源统计年鉴 2020》中的第三章（能源生产） 和第六章（地区能源平衡表）。用于计算二氧化碳排放因子的低位发热量、单位热值含碳量等燃料参数来自于《2019 年度中国区域电网二氧化碳基准线排放因子 OM 计算说明》、《企业温室气体排放核算方法与报告指南 发电设施》

## Use advice
将此数据集用于生命周期评估时，请注意，其范围限于直接发电，仅考虑工厂内的发电过程。上游和下游活动，如原材料的提取、加工和电力的最终使用消费不在考虑范围内。用户在应用数据时，应参考《企业温室气体排放核算方法与报告指南 发电设施》和《2019年度中国区域电网二氧化碳基准线排放因子OM计算说明》中概述的方法。此外，燃料消耗数据和二氧化碳排放因子应来自《中国能源统计年鉴2020》相关章节的数据。该数据集基于2019年的能源统计数据，使用时应相应考虑。

## Review details
清单： 内部审查通过几个迭代步骤完成，涉及原始数据验证、原始数据记录、代表性、完整性、与 ISO 14040 和 14044 有关的建模的一致性。

## Data sources
- 熊若熙. 中国电力生产和消费二氧化碳与污染物排放因子核算. (清华大学, 2023).
