# 注入井回填;Din=0.15m,L=50m;地下水原位修复;生物强化修复

Dataset: ILCD process, Unit process, single operation
Geography: SH-CN
Reference year: 2020
Classification: Unit processes / Other Services / Repair and maintenance
Generated by: 肖萌, xiaomeng@mail
Owner: 天工LCI数据工作小组
Review: Dependent internal review by 天工LCI数据工作小组
Amounts: no units in this file; such an amount is in the reference unit of its flow, which a separate flow dataset defines
copyright: false
licenseType: Free of charge for all users and uses

## General comment
将修复过程中新建的注入井，在修复项目结束后进行回填。

## Geography
The aquifer in a certain area in Shanghai, China, is uniformly contaminated with chlorinated volatile organic compounds (CVOCs), with a surface area of 20,000 m2 and a depth of 50 m, with the water table located at a depth of 30 m.

## Technical purpose
该工业过程涉及在土壤原位修复过程中创建的注入井的回填工作。具体用于通过增强生物修复方式处理一致性受氯代挥发性有机化合物（CVOCs）污染的含水层。根据Din=0.15m和L=50m的尺寸规格，确定了需要回填的井的大小和深度。该过程适用于需要清洁被污染地下水储层的情况，特别是在描述的中国上海地区，该区域有一个20000 m2的表面区域和50 m的深度受到CVOCs的显著污染。这一过程的技术应用对于旨在减少地下水污染的环境和健康影响的土壤和含水层恢复项目至关重要。

## Reference product
- Well backfilling: 272
  文中仅给出监测井和注入井一共544口，没有给出单独的监测井和注入井数量，这里填报人简单估计两种监测井数量各半。

## Inputs
- injection well: 272
  文中仅给出监测井和注入井一共544口，没有给出单独的监测井和注入井数量，这里填报人简单估计两种监测井数量各半。
- Concrete: 4069.88; calculated
- Gravel Sand: 38155.1; calculated
- clay: 18047.4; calculated
- Tap Water: 6865.28; calculated

## Use advice
在将此数据集用于生命周期评估（LCA）的目的时，请确保环境影响评估的范围包括注入井回填的具体过程。核算用于回填的材料及其环境影响。请注意，地理特定性（中国上海）可能需要根据当地的环境条件和法规调整影响因素。考虑包括修复后的长期监测影响以及潜在的地下水流和质量的变化。评估对于具有可比类型和污染物分布的场景的技术适用性。确保所使用的数据反映了土壤现场修复通过增强生物修复的最新技术和方法。

## Review details
清单： 内部审查通过几个迭代步骤完成，涉及原始数据验证、原始数据记录、代表性、完整性、与 ISO 14040 和 14044 有关的建模的一致性。

## Data sources
- Ni, Z. et al. Comparative Life-Cycle Assessment of Aquifer Thermal Energy Storage Integrated with in Situ Bioremediation of Chlorinated Volatile Organic Compounds. Environ. Sci. Technol. 54, 3039–3049 (2020).
