# 回填基坑;土壤异位修复;热脱附;最终处置;基坑回填

Dataset: ILCD process, Unit process, single operation
Geography: CN
Reference year: 2022
Classification: Unit processes / Other Services / Repair and maintenance
Generated by: 王枫, wangfeng@caep.org.cn
Owner: 天工LCI数据工作小组
Review: Dependent internal review by 天工LCI数据工作小组
Amounts: no units in this file; such an amount is in the reference unit of its flow, which a separate flow dataset defines
copyright: false
licenseType: Free of charge for all users and uses

## General comment
异位热脱附修复1立方米污染土，热脱附后的土壤，会暂存在修复场地内等待效果评估单位的验收，验收合格后 回填到场地内或运输到场地外处置

## Geography
我国华东区域5 个污染土壤异位热脱附修复工程案例

## Technology and included processes
热脱附后的土壤，会暂存在修复场地内等待效果评估单位的验收，验收合格后回填到场地内或运输到场地外处置

## Technical purpose
所描述的工业过程用于通过热脱附方法修复受污染的土壤。该过程适用于土壤被污染且在安全重新使用前需要清洁的情况。经过处理的土壤用于回填基坑，可以是同一地点，或者在通过质量评估后运输到场地外，确保其符合环境安全标准。

## Reference product
- Backfilled foundation pit: 1; measured

## Inputs
- Diesel: 0.00021; measured
- Remediated soil: 1; missing unimportant

## Use advice
在使用此数据集进行生命周期评估时，请确保LCA研究的边界包括热脱附过程和土壤运输（如果适用）。考虑到修复过程及后续处理经过处理土壤的环境影响。重要的是要验证经修复土壤的质量评估是否符合当地法规和回填区域的预期用途。该数据集不应用于未经此处理过程就处置的土壤，或其他形式的土壤修复。

## Review details
清单： 内部审查通过几个迭代步骤完成，涉及原始数据验证、原始数据记录、代表性、完整性、与 ISO 14040 和 14044 有关的建模的一致性。

## Data sources
- 刘爽,陈盼,宋慧敏等.我国华东地区污染土壤异位热脱附修复碳排放及减排策略[J].环境工程学报,2022,16(08):2663-2671.
