# 水泥生产;水泥, 普通硅酸盐水泥, 32.5MPa;立窑;混合固废

Dataset: ILCD process, Unit process, black box
Geography: GD-CN
Classification: Materials production / Other mineralic materials
Generated by: 杨思琪, ysqsophia@gmail.com
Owner: 天工LCI数据工作小组
Review: Dependent internal review by 天工LCI数据工作小组
Amounts: no units in this file; such an amount is in the reference unit of its flow, which a separate flow dataset defines
copyright: false
licenseType: Free of charge for all users and uses

## General comment
混合固废：矿渣、粉煤灰、磷石膏、陶瓷抛光废料。

## Geography
广州石井水泥厂

## Technical purpose
该工艺生产的普通硅酸盐水泥（32.5 MPa）用于一般建筑目的。它可以用于需要中等机械强度的建筑项目。包括混合固废如矿渣、粉煤灰、磷石膏和陶瓷抛光废料，这表明该水泥工艺在环境可持续性方面在水泥工业内得到了增强。

## Model description
以 1kg P·O 32.5 普通硅酸盐水泥作为评价的功能单位。研究范围从水泥原料开采、能源生产、生料制备、熟料煅烧及水泥粉磨到水泥储存。

## Reference product
- cement, ordinary portland cement, 32.5MPa: 1000
  P.O32.5普通硅酸盐水泥

## Inputs
- calcium carbonate: 1110
  石灰石。初级资源消耗采用狄向华计算的我国资源、能源生产的生命周期排放数据。
- clay: 110
  粘土
- iron, powder: 37
  铁粉
- gypsum stone (CaSO4-dihydrate): 25
  石膏
- fluorspar: 6
  莹石
- blast furnace slag: 89
  矿渣
- phosphogypsum: 29
  磷石膏。实验数据。
- ash: 50
  粉煤灰。实验数据。
- waste building wood, chrome preserved: 40
  陶瓷抛光废料。实验数据。
- hard coal: 199.115
  标煤。原始数据为0.185kg标准煤，这里换算为硬煤，换算公式为1kg硬煤=0.929kg标准煤。
- electricity, medium voltage: 352.8
  电

## Outputs
- carbon dioxide: 988
  CO2。CO2排放量计算：CO2的生成主要产生于煤等化石能源的燃烧和水泥熟料生产原料中石灰石的分解。
- sulfur dioxide: 4.205
  SO2。SO2排放量：根据文献资料和试验情况取熟料质量的0.25％。
- Nitrogen oxides: 2.77
  NOx。NO的排放量估算公式为：E=0.001Fa(1-rf)。式中：E为NOx的排放量，kg；F为燃料的消耗量，kg；a为燃料燃烧时NOx排放因子；r为脱氮设备的覆盖率；f为平均脱氮效率。目前国内脱氮设备较少，不考虑脱氮问题。原煤和原油的排放因子分别为9.95kg/t和0.24kg/t，天然气为4.10g/m³。
- particles (> PM10): 7.89
  颗粒物。颗粒物排放量：按2004年中国环境年鉴和中国建筑材料工业年鉴的统计数据，每生产一吨水泥粉尘和烟尘的排放总量约5.84kg。未标明粒径，按PM>10处理。
- hydrogen fluoride: 0.01474
  HF。HF排放量：根据文献资料和试验情况取熟料质量的0.03％。

## Data selection and combination
以试验厂家广州石井水泥厂立窑生产工艺的资源、能源消耗数据作为依据。初级资源消耗采用狄向华计算的我国资源、能源生产的生命周期排放数据。

## Use advice
在使用这个数据集进行生命周期评价时，必须确保功能单位一致地应用为1kg P·O 32.5普通硅酸盐水泥。研究范围必须覆盖从水泥原料开采到水泥储存的过程，包括立窑的能源生产和使用。因为它们不被考虑为主要资源消耗，所以在排放计算中不需要将作为原料的工业废渣纳入。为了方法论的一致性，请参考狄向华提供的主要资源消耗的生命周期排放数据。

## Review details
清单： 内部审查通过几个迭代步骤完成，涉及原始数据验证、原始数据记录、代表性、完整性、与 ISO 14040 和 14044 有关的建模的一致性。

## Data sources
- 吴清仁, 孙创奇, & 陈光. (2010). 磷石膏和陶瓷抛光废料配料制备普通水泥对环境负荷的影响. 水泥技术, 2, 28–32.
