# 隔水漏斗;原位地下水修复PRB;漏斗-导水门式PRB

Dataset: ILCD process, Unit process, single operation
Geography: US
Reference year: 2011
Classification: Unit processes / Other Services / Repair and maintenance
Generated by: 张建宾, zhangjb@caep.org.cn
Owner: 天工LCI数据工作小组
Review: Dependent internal review by 天工LCI数据工作小组
Amounts: no units in this file; such an amount is in the reference unit of its flow, which a separate flow dataset defines
copyright: false
licenseType: Free of charge for all users and uses

## General comment
建设隔水漏斗，隔水漏斗由封闭的片桩或泥浆墙组成，并嵌入到隔水层中，引导或汇集地下水流进入导水门，通过活性材料进行处理。

## Geography
假设的污染场地

## Technical purpose
该工业过程旨在进行原位地下水修复。隔水漏斗由封闭片桩或泥墙构建，并嵌入水障层中。其主要用途是将受污染的地下水流通过渗透性反应屏障(PRB)，在那里利用活性材料对污染物进行移除或中和处理。

## Reference product
- Impermeable funnel: 1; estimated

## Inputs
- Steel: 1306; estimated
  Funnel (sheet pile) steel 1306 kg/m length of funnel
- cement, unspecified: 281.4; estimated
  Funnel cement 281.4 kg/m length of funnel
- transport in t*km: 253.984; estimated
  Transport distance of the materials to the site is assumed to be 160 km (100 mile)
- Electricity: 6585; estimated
  Funnel construction energy 6.585 GJ/m length of funnel

## Use advice
使用此地下水修复中的隔水漏斗和PRB系统的LCA数据集时，确保评估包括所有主要原材料和必要的能耗。用户需针对特定场地的污染情况考虑系统的技术适用性。准确地包括系统边界和操作数据，例如活性材料的寿命、更换频率及具体场地条件。在进行环境影响分析时，应根据特定背景的协议，对反应屏障内的材料回收进行建模。

## Review details
清单： 内部审查通过几个迭代步骤完成，涉及原始数据验证、原始数据记录、代表性、完整性、与 ISO 14040 和 14044 有关的建模的一致性。

## Data sources
- Mark S. H. Mak and Irene M. C. Lo.Environmental Life Cycle Assessment of Permeable Reactive Barriers: Effects of Construction Methods, Reactive Materials and Groundwater Constituents[J].Environmental Science & Technology 2011, 45, 23, 10148-10154
