# 本地品牌纯牛奶生产 ; 生奶生产

Dataset: ILCD process, Unit process, single operation
Geography: MS-SC-CN
Reference year: 2017
Classification: Unit processes / Materials production / Agricultural production means
Functional unit: The Tetra Pak 1litre pure liquid milk is selected to assess its lifecycle based carbon footprint.
Generated by: 杨瑞, 1632707028@qq.com
Owner: 天工LCI数据工作小组
Review: Dependent internal review by 天工LCI数据工作小组
Amounts: no units in this file; such an amount is in the reference unit of its flow, which a separate flow dataset defines
copyright: false
licenseType: Free of charge for all users and uses

## General comment
原料奶生产的地点是奶牛场，主要消耗饲料、电力和柴油。

## Geography
奶源基地位于中国四川省西南部洪崖县，距离省会成都市约147公里。乳品加工厂位于成都郊区郫县，距离奶源基地约175公里。品牌牛奶主要分布在距离乳制品加工厂约40公里的成都市中心。牛奶包装废弃物被运送到距离市中心约30公里的市政垃圾填埋场进行最终处理。

## Technology and included processes
本研究仅关注对纯牛奶生产有直接贡献的过程，即仅关注能源和材料投入以及碳排放的影响，如图1所示。从而简化了牛奶生命周期的系统边界，将其划分为原料奶生产、乳制品加工、产品运输和包装废弃物处理四个阶段。

## Technical purpose
该数据集描述了本地品牌纯牛奶生产的完整生命周期，包括奶牛场的原材料牛奶生产和随后的加工过程。生产的牛奶旨在作为营养和食品产品供消费者消费。这个生命周期评估（LCA）数据集对乳品行业、食品产品制造商和希望定量评估牛奶生产环境影响的环境分析师特别有用，内容包括从乳品养殖到分销。

## Reference product
- milk: 0.001; measured
  pure liquid milk

## Inputs
All rows: measured
- Electricity: 0.1692
- Diesel: 3.68e-6
- feed: 1.29
  Fodder
- disinfectant: 1.59e-6
  Disinfectant
- water: 0.00266

## Outputs
- carbon dioxide (biogenic): 0.5691; measured

## Deviations from the LCI method approaches
与传统的LCA相比，本研究简化了生命周期影响评估的过程，主要使用不同类别的指标来阐述生命周期清单的结果(Nigri et al.， 2014)。

## Data selection and combination
表1显示了原料奶生产阶段的库存数据，这些数据是通过类比Hospido et al.(2003)对牛奶LCA的研究得出的。原料奶生产的地点是奶牛场，主要消耗饲料、电力和柴油。将Hospido et al.(2003)关于农场饲料和设备消毒剂的温室气体排放系数的结果进行换算，得到相应的CO2排放系数用于计算。电力排放因子基于国家发改委发布的《2014年中国区域电网基线排放因子》，本研究使用中部电网排放因子。运行边际排放系数为0.972 t CO2/MWh，建设边际排放系数为0.47 t CO2/MWh(国家发改委，2014)。经换算，电网排放系数为0.723 kg/kW·h。

## Use advice
使用此LCA数据时，用户必须考虑特定区域环境（如中国四川），因为环境影响可能因地点而异。数据集依赖于简化版的生命周期影响评估，使用特定指标。建议更新排放因子和方法学途径以保证数据的相关性和准确性。此外，用户应该注意生产阶段饲料、电力和柴油的消耗，并应用相应的CO2排放系数和电力排放因子，这些数据源自Hospido等人（2003）和国家发展和改革委员会（2014）。需注意最终废弃处理（如牛奶包装）的特定处理方式，因为它们被运送到垃圾填埋场处置。

## Review details
清单： 内部审查通过几个迭代步骤完成，涉及原始数据验证、原始数据记录、代表性、完整性、与 ISO 14040 和 14044 有关的建模的一致性。

## Data sources
- Zhao, R., Xu, Y., Wen, X., Zhang, N. & Cai, J. Carbon footprint assessment for a local branded pure milk product: a lifecycle based approach. Food Sci. Technol 38, 98–105 (2017).
