# 阴极铜生产;阴极铜;湿法冶金;铜矿石

Dataset: ILCD process, Unit process, single operation
Geography: CN
Reference year: 2009
Valid until: 2013
Classification: Unit processes / Materials production / Metals and semimetals
Functional unit: the functional unit was defined as the production of 1 ton of cathode copper.
LCI method principle: Attributional
LCI method approaches: Allocation - mass
Generated by: 王鹏, 2867919560@qq.com
Owner: 天工LCI数据工作小组
Review: Dependent internal review by 天工LCI数据工作小组
Amounts: no units in this file; such an amount is in the reference unit of its flow, which a separate flow dataset defines
copyright: false
licenseType: Free of charge for all users and uses

## General comment
通过湿法冶金过程生产的阴极铜由于其高纯度和电导率在各种工业应用中得到广泛使用。它作为电子产品、电线、管道材料生产的基本组成部分。特别是，它可用于电路板、电机制造以及太阳能板和风力涡轮机等可再生能源系统中。

## Geography
中国南方

## Time period
火法精炼工艺矿石品位为2009年至2013年中国地下和露天开采的平均水平，

## Technology and included processes
采矿-运输-堆浸-萃取-电解精炼

## Reference product
- Refined copper: 1000; software or database

## Inputs
All rows: software or database
- hard coal,hard coal,hard coal: 1790
  Coal
- crude oil; 42.3 MJ/kg: 91.2
  Crude oil
- natural gas; 44.1 MJ/kg: 12
  Natural gas
- Anode Plate: 15
  Anode Plate需要补充
- bauxite: 0.00596
  Bauxite
- Copper ore: 307000
- Extraction agent: 0.277
  Extraction agent需要补充
- water: 295
  Fresh water
- gravel: 0.784
  Gravel
- Limestone: 51.6
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
## Deviations from the LCI method approaches
与污染排放相关的特征因子源自 CML 方法

## Data selection and combination
火法精炼工艺的矿石品位是2009-2013年中国地下和露天开采的平均水平，并且考虑了湿法冶金方法矿石品位的真实情况[14]。其他无法从实际工厂获得的数据来自已发表的文献或通过质量平衡计算，例如，

## Data treatment and extrapolations
本文选取11个指标来评价阴极铜生产对环境的影响，并通过Simapro7.0进行计算。

## Use advice
该数据集基于在中国南方使用湿法冶金从铜矿石中生产阴极铜的过程，反映了2009年至2013年的平均矿石品位。用户在正确应用这些数据时，必须考虑包含采矿、运输、堆浸、提取和电解精炼在内的系统边界。数据应仅在与数据集的技术和时间范围一致的情境中应用。对于环境影响评估，功能单位被定义为生产1吨阴极铜，应使用通过SimaPro7.0与CML方法论选择和评估的适当指标。

## Review details
清单： 内部审查通过几个迭代步骤完成，涉及原始数据验证、原始数据记录、代表性、完整性、与 ISO 14040 和 14044 有关的建模的一致性。

## Data sources
- Li, H., Gong, X. Z., Wang, Z. H. & Li, Y. Life Cycle Assessment of Cathode Copper Production. MSF 898, 2422–2431 (2017).
