# 钢水生产;钢水;电弧炉

Dataset: ILCD process, Unit process, single operation
Geography: CN
Classification: Unit processes / Materials production / Metals and semimetals
Generated by: 付翔, 1162850692@qq.com
Owner: 天工LCI数据工作小组
Review: Dependent internal review by 天工LCI数据工作小组
Amounts: no units in this file; such an amount is in the reference unit of its flow, which a separate flow dataset defines
copyright: false
licenseType: Free of charge for all users and uses

## General comment
该数据集代表了通过电弧炉（EAF）方法生产钢水的生命周期清单（LCI）信息。它适用于评估建筑行业、汽车制造、基础设施项目以及其他需要高强度结构材料的工业应用中钢水材料的环境影响。

## Geography
The LCI of Coal-DR is obtained, as shown in Table 9, based on the statistics of the demonstration project in China.

## Reference product
- Molten steel: 1023.4; calculated

## Inputs
All rows: calculated
- Coke breeze: 13.8
- Direct Reduced Iron: 1027.1
  DRI
- Iron scrap: 112.6
  Scrap steel/iron
- dolomite: 3.7
- quicklime: 44.9
  Quicklime
- Circulating water: 50600
- electrode: 2
  Electrode
- Electricity: 1764.36

## Outputs
- Slag: 187.5; calculated
- EAF Dust: 0.5; calculated

## Data treatment and extrapolations
LCI of COG-DR and H-DR routes, which is not scaled-up in China are estimated based on Coal-DR routes combined with literature data from simulations, laboratory tests, and process modeling in Table 9 [49,50]. The LCI of Coal-DR is obtai

## Use advice
使用此数据集的用户应考虑到钢水生产的LCI数据特定于电弧炉过程，并且是根据中国的示范项目获得的。在将数据外推至焦炉气直接还原（COG-DR）和氢直接还原（H-DR）路线以获得LCI时，用户应谨慎，并考虑将此数据集与文献中的额外数据、仿真、实验室测试和过程建模（如表9所示）结合使用。由于潜在的地区技术和实践差异，将此数据应用于中国以外的背景时也应格外小心。

## Review details
清单： 内部审查通过几个迭代步骤完成，涉及原始数据验证、原始数据记录、代表性、完整性、与 ISO 14040 和 14044 有关的建模的一致性。

## Data sources
- The carbon reduction potential of hydrogen in the low carbon transition of the iron and steel industry: The case of China
