# 电力生产 ; 火电 ; 湖北

Dataset: ILCD process, Unit process, single operation
Geography: HUB-CN
Reference year: 2019
Classification: Unit processes / Energy carriers and technologies / Electricity
Generated by: 熊若熙, xiongrx0126@163.com
Owner: 天工LCI数据工作小组
Review: Dependent internal review by 天工LCI数据工作小组
Amounts: no units in this file; such an amount is in the reference unit of its flow, which a separate flow dataset defines
copyright: false
licenseType: Free of charge for all users and uses

## General comment
火电发电包括原煤、洗煤、石油、天然气等十七种化石燃料。该过程只考虑直接发电过程，不考虑上游原材料开采加工和下游消费

## Time period
根据2019年能源统计年鉴数据计算

## Technical purpose
该热电发电过程使用包括原煤、洗煤、石油和天然气等在内的十七种化石燃料发电。 它旨在直接在湖北地区电网内产生电力。 这个过程主要适用于需要连继且高需求能源生成的电力行业。

## Reference product
- electricity for thermal power: 3.6; calculated

## Inputs
All rows: calculated
- Raw coal: 0.364364
- Coke oven gas: 0.00015
- blast furnace gas: 0.073057
- Diesel: 5.306e-5
- fuel oil, unspecified: 6.8e-6
- Petroleum Coke: 7.687e-5
- refinery gas: 1.565e-5
- natural gas: 0.004551

## Outputs
- carbon dioxide (fossil): 0.742687; calculated
- sulfur dioxide: 0.000123665; calculated
- Nitrogen oxides: 0.000197861; calculated
- particles (> PM10): 2.50717e-5; calculated

## Data treatment and extrapolations
核算方法参考《企业温室气体排放核算方法与报告指南 发电设施》。不同形式发电量及燃料用量来自于《中国能源统计年鉴 2020》中的第三章（能源生产） 和第六章（地区能源平衡表）。用于计算二氧化碳排放因子的低位发热量、单位热值含碳量等燃料参数来自于《2019 年度中国区域电网二氧化碳基准线排放因子 OM 计算说明》、《企业温室气体排放核算方法与报告指南 发电设施》

## Use advice
使用此数据集时，必须考虑其范围，该范围仅包括使用化石燃料的直接电力生产。 此数据排除了上游的原材料提取和加工，以及下游的电力消费。 用户应根据“企业温室气体排放核算方法与报告指南 发电设施”的方法进行准确的生命周期评估和碳足迹计算。 用户应基于“2019年中国区域电网二氧化碳基准线排放因子OM计算说明”中的值以及“中国能源统计年鉴 2020”中的能源生产数据，在2019年的背景下进行能源消耗和碳排放分析。

## Review details
清单： 内部审查通过几个迭代步骤完成，涉及原始数据验证、原始数据记录、代表性、完整性、与 ISO 14040 和 14044 有关的建模的一致性。

## Data sources
- 熊若熙. 中国电力生产和消费二氧化碳与污染物排放因子核算. (清华大学, 2023).
