# 经处理的钻孔弃土;地下水原位修复;生物强化修复;建井

Dataset: ILCD process, Unit process, single operation
Geography: SH-CN
Reference year: 2020
Classification: Unit processes / Other Services / Repair and maintenance
Generated by: 肖萌, xiaomeng@mail
Owner: 天工LCI数据工作小组
Review: Dependent internal review by 天工LCI数据工作小组
Amounts: no units in this file; such an amount is in the reference unit of its flow, which a separate flow dataset defines
copyright: false
licenseType: Free of charge for all users and uses

## General comment
CHC+ISB用于现场修复，在施工准备阶段，处理钻井废土。

## Geography
The aquifer in a certain area in Shanghai, China, is uniformly contaminated with chlorinated volatile organic compounds (CVOCs), with a surface area of 20,000 m2 and a depth of 50 m, with the water table located at a depth of 30 m.

## Technical purpose
此工艺涉及钻孔废土处理、地下水原位修复、加强生物修复和建井清理现场。CHC+ISB（结合烃类和原位生物修复）在施工准备阶段用于处理钻井废土。该过程适用于修复受氯代挥发性有机化合物（CVOCs）污染的含水层，特别是在污染范围较大的区域，例如中国上海特定区域的20,000平方米表面积和50米深度。

## Reference product
- Treated borehole waste soil: 490270; calculated
  处理完成的钻井废弃土

## Inputs
- Concrete: 2206.25; software or database
- Steel: 147.08; software or database
- Polyethylene,Polyethylene: 11.28; software or database
- polyvinylchloride resin (B-PVC): 1.47; software or database
- gravel: 10786.1; software or database
- Electricity: 2117.99; software or database
- Diesel: 524.6; software or database
- Waste (solid): 490270; calculated
  544口井产生的钻孔废土

## Use advice
数据集用户应注意收集数据的特定条件，这些条件关于中国上海的受污染区域。适用性依赖于其他地点是否具有类似的污染概况和地球物理特征。在模型使用阶段行为时，考虑水位深度和CVOCs的分布至关重要。方法上，用户必须确保在将此数据应用于其他地点时，现场存在类似的条件。此外，这一过程的范围应考虑到地方规定的钻井废料处置和环境保护标准。

## Review details
清单： 内部审查通过几个迭代步骤完成，涉及原始数据验证、原始数据记录、代表性、完整性、与 ISO 14040 和 14044 有关的建模的一致性。

## Data sources
- Ni, Z. et al. Comparative Life-Cycle Assessment of Aquifer Thermal Energy Storage Integrated with in Situ Bioremediation of Chlorinated Volatile Organic Compounds. Environ. Sci. Technol. 54, 3039–3049 (2020).
