# 电力生产 ; 火电 ; 江苏

Dataset: ILCD process, Unit process, single operation
Geography: JS-CN
Reference year: 2019
Classification: Unit processes / Energy carriers and technologies / Electricity
Generated by: 熊若熙, xiongrx0126@163.com
Owner: 天工LCI数据工作小组
Review: Dependent internal review by 天工LCI数据工作小组
Amounts: no units in this file; such an amount is in the reference unit of its flow, which a separate flow dataset defines
copyright: false
licenseType: Free of charge for all users and uses

## General comment
火电发电包括原煤、洗煤、石油、天然气等十七种化石燃料。该过程只考虑直接发电过程，不考虑上游原材料开采加工和下游消费

## Time period
根据2019年能源统计年鉴数据计算

## Technical purpose
此数据代表江苏省使用火电技术的电力生产过程，该过程涉及来自原煤、洗煤、石油和天然气等十七种不同化石燃料的直接电力产生。在需要区域能源生产基准线的情形中使用此过程，这包括仅考虑电力直接生成阶段的情况，未计入原材料开采加工的生命周期排放或与电力消费相关的排放。

## Reference product
- electricity for thermal power: 3.6; calculated

## Inputs
All rows: calculated
- Raw coal: 0.337569
- Other Washed Coal: 6.677e-5
- Coke oven gas: 0.000156
- blast furnace gas: 0.007469
- Converter gas: 0.002471
- Diesel: 3.479e-5
- fuel oil, unspecified: 2.8e-6
- Petroleum Coke: 0.00153501
- natural gas: 0.011672
- Natural gas, liquefied: 1.6e-6

## Outputs
- carbon dioxide (fossil): 0.784229; calculated
- sulfur dioxide: 0.000122558; calculated
- Nitrogen oxides: 0.000199315; calculated
- particles (> PM10): 2.61889e-5; calculated

## Data treatment and extrapolations
核算方法参考《企业温室气体排放核算方法与报告指南 发电设施》。不同形式发电量及燃料用量来自于《中国能源统计年鉴 2020》中的第三章（能源生产） 和第六章（地区能源平衡表）。用于计算二氧化碳排放因子的低位发热量、单位热值含碳量等燃料参数来自于《2019 年度中国区域电网二氧化碳基准线排放因子 OM 计算说明》、《企业温室气体排放核算方法与报告指南 发电设施》

## Use advice
使用此数据集的用户在考虑排放因子和核算方法时应参考《企业温室气体排放核算方法与报告指南 发电设施》。使用《中国能源统计年鉴 2020》中的第三章（能源生产）和第六章（地区能源平衡表）中的数据，并应用用于CO2排放因子计算的低位发热量、单位热值含碳量等参数。请注意，该数据集不包括与上游原材料开采加工或下游电力消费相关的排放，且不应用于需要这些元素的生命周期评估。

## Review details
清单： 内部审查通过几个迭代步骤完成，涉及原始数据验证、原始数据记录、代表性、完整性、与 ISO 14040 和 14044 有关的建模的一致性。

## Data sources
- 熊若熙. 中国电力生产和消费二氧化碳与污染物排放因子核算. (清华大学, 2023).
