# 市政污泥处理与处置;湿污泥 含水率65%;与稻秸混燃发电

Dataset: ILCD process, Unit process, single operation
Geography: SZ-JS-CN
Classification: Energy carriers and technologies / Other non-renewable fuels
Functional unit: 1 t wet sludge with a moisture content of 65% was used as the functional unit.
Generated by: 金思甜, 2331276@tongji.edu.cn
Owner: 天工LCI数据工作小组
Review: Dependent internal review by 天工LCI数据工作小组
Amounts: no units in this file; such an amount is in the reference unit of its flow, which a separate flow dataset defines
licenseType: Free of charge for all users and uses

## General comment
所述工业过程涉及使用含水率65%的市政污泥与稻秸混合作为共燃料，在发电设施中用于共燃发电。该材料主要用于昆山共燃联合发电厂的能源回收过程中。它主要用于将湿式市政污泥转化为电能，同时促进废物管理和能源生产。

## Geography
昆山某污泥混燃协同发电公司

## Reference product
- Sludge: 1000; input; estimated

## Inputs
- Electricity: 226.656; measured
  该工艺生产上游包括污泥运输及干化、水稻种植、稻秸预处理以及稻秸运输过程。
- Diesel: 10.2; measured
  该工艺生产上游包括污泥运输及干化、水稻种植、稻秸预处理以及稻秸运输过程。
- water: 6223; measured
  生产过程环境影响主要考虑气体污染物、水体污染物以及固体废弃物的直接或间接排放。
- Diesel: 0.11; calculated
  生产下游主要涉及焚烧后可利用固体废弃物。

## Outputs
- carbon dioxide: -1703; calculated
  该工艺生产上游包括污泥运输及干化、水稻种植、稻秸预处理以及稻秸运输过程。
- methane: 8.27; calculated
  该工艺生产上游包括污泥运输及干化、水稻种植、稻秸预处理以及稻秸运输过程。
- nitrous oxide: 0.076; calculated
  该工艺生产上游包括污泥运输及干化、水稻种植、稻秸预处理以及稻秸运输过程。
- Nitrogen oxides: 0.44; calculated
  该工艺生产上游包括污泥运输及干化、水稻种植、稻秸预处理以及稻秸运输过程。
- sulfur dioxide: 0.3; calculated
  该工艺生产上游包括污泥运输及干化、水稻种植、稻秸预处理以及稻秸运输过程。
- carbon monoxide: 0.6; calculated
  该工艺生产上游包括污泥运输及干化、水稻种植、稻秸预处理以及稻秸运输过程。
- hydrocarbons (unspecified): 0.023; calculated
  该工艺生产上游包括污泥运输及干化、水稻种植、稻秸预处理以及稻秸运输过程。
- particles (PM10): 0.05; calculated
  该工艺生产上游包括污泥运输及干化、水稻种植、稻秸预处理以及稻秸运输过程。
- carbon dioxide: 2632; calculated
  生产过程环境影响主要考虑气体污染物、水体污染物以及固体废弃物的直接或间接排放。
- Nitrogen oxides: 1.89; calculated
  生产过程环境影响主要考虑气体污染物、水体污染物以及固体废弃物的直接或间接排放。
- sulfur dioxide: 0.25; calculated
  生产过程环境影响主要考虑气体污染物、水体污染物以及固体废弃物的直接或间接排放。
- carbon monoxide: 0.13; calculated
  生产过程环境影响主要考虑气体污染物、水体污染物以及固体废弃物的直接或间接排放。
- particles (PM10): 0.048; calculated
  生产过程环境影响主要考虑气体污染物、水体污染物以及固体废弃物的直接或间接排放。
- chemical oxygen demand: 0.024; measured
  生产过程环境影响主要考虑气体污染物、水体污染物以及固体废弃物的直接或间接排放。
- ammonia: 0.001; measured
  生产过程环境影响主要考虑气体污染物、水体污染物以及固体废弃物的直接或间接排放。
- Suspended solids, unspecified: 0.011; measured
  生产过程环境影响主要考虑气体污染物、水体污染物以及固体废弃物的直接或间接排放。
- nitrogen, total (excluding N2): 0.002; measured
  生产过程环境影响主要考虑气体污染物、水体污染物以及固体废弃物的直接或间接排放。
- phosphorus, total: 0.0002; measured
  生产过程环境影响主要考虑气体污染物、水体污染物以及固体废弃物的直接或间接排放。
- Waste (solid): 169.5; measured
  生产过程环境影响主要考虑气体污染物、水体污染物以及固体废弃物的直接或间接排放。
- carbon dioxide: 0.34; calculated
  生产下游主要涉及焚烧后可利用固体废弃物。
- methane: 3e-5; calculated
  生产下游主要涉及焚烧后可利用固体废弃物。
- nitrous oxide: 2e-5; calculated
  生产下游主要涉及焚烧后可利用固体废弃物。
- Nitrogen oxides: 0.001; calculated
  生产下游主要涉及焚烧后可利用固体废弃物。
- sulfur dioxide: 0.0004; calculated
  生产下游主要涉及焚烧后可利用固体废弃物。
- carbon monoxide: 0.001; calculated
  生产下游主要涉及焚烧后可利用固体废弃物。
- hydrocarbons (unspecified): 0.0001; calculated
  生产下游主要涉及焚烧后可利用固体废弃物。
- particles (PM10): 0.0002; calculated
  生产下游主要涉及焚烧后可利用固体废弃物。

## Use advice
在使用该数据集进行生命周期评估（LCA）时，用户应考虑所指定的具体含水量，因为这会影响能源含量和燃烧效率。定义的功能单位是含水率为65%的湿污泥1吨；污泥特性或含水量的任何变化都将需要在评估中进行调整。此外，用户必须考虑共燃用稻秸的来源、以及与其生产和运输相关的任何额外环境负荷。使用者应确保在考虑包括上游和下游过程时，系统边界得到一致的应用。

## Review details
清单： 内部审查通过几个迭代步骤完成，涉及原始数据验证、原始数据记录、代表性、完整性、与 ISO 14040 和 14044 有关的建模的一致性。

## Data sources
- 周钢,宋涛,马士伟等.不同污泥混燃发电工艺生命周期评价[J].洁净煤技术,2022,28(11):19-29.DOI:10.13226/j.issn.1006-6772.RE22042401.
