# Soil and groundwater remediation;Ex-situ;groundwater pump and treat;construction;Extraction well

Dataset: ILCD process, Unit process, single operation
Geography: CA
Reference year: 2007
Classification: Other Services / Repair and maintenance
Generated by: Wang Ning, wang_ning@caep.org.cn
Owner: Tiangong LCI Data Working Group
Review: Dependent internal review by Tiangong LCI Data Working Group
Amounts: no units in this file; such an amount is in the reference unit of its flow, which a separate flow dataset defines
copyright: false
licenseType: Free of charge for all users and uses

## General comment
Construction of 3 pumping wells using polyvinyl chloride, quartz sand, bentonite and concrete

## Geography
The contaminated area was located 600 m from a river shore in the northern part of the prov-ince of Quebec， Canada.

## Technology and included processes
Construction of 3 pumping wells using diesel, polyvinyl chloride, quartz sand, bentonite and concrete

## Technical purpose
The industrial process described involves the construction of three extraction wells for the remediation of soil and groundwater. These wells are intended to be used for the pump and treat method in an ex-situ environmental remediation project. This specific application is located in Quebec, Canada, and is designed to address contamination that is 600 meters from a river shore. The materials used in this context are mainly for environmental and construction purposes to manage groundwater contamination.

## Reference product
- Extraction wel: 3; estimated
  在现场建造三个抽提井

## Inputs
All rows: estimated
- Polyvinyl chloride: 459.1
  成井过程消耗的PVC管
- Diesel: 2.5
  钻孔过程钻机所消耗的柴油
- quartz sand: 1036
  成井过程消耗的石英砂
- bentonite: 843.4
  成井过程消耗的石膨润土
- cement: 210.1
  成井过程消耗的水泥

## Use advice
Users of this LCA data set should consider the technological applicability of the construction of pumping wells with materials specified, such as polyvinyl chloride, quartz sand, bentonite, concrete, and diesel fuel. When modeling the use phase, attention should be given to the specific environmental conditions of the site, such as proximity to a water body and the properties of the contaminant. Inclusion or exclusion of downstream recycling processes for these materials should be based on site-specific regulatory requirements and environmental goals.

## Review details
Inventory: The internal review was done by several iteration steps concerning raw data validation, raw data documentation, representativity, completeness and consistency of modelling with regard to ISO 14040 and 14044.
