# 稀土氧化物煅烧;稀土氧化物;稀土氧化物工艺;白云鄂博

Dataset: ILCD process, Unit process, single operation
Geography: NMG-CN
Reference year: 2014
Classification: Unit processes / Materials production / Inorganic chemicals
Functional unit: The scope of the LCA is cradle-to-gate and the functional unit was chosen as 1 kg of REO.
LCI method principle: Attributional
LCI method approaches: Allocation - market value; Allocation - exergetic content
Generated by: 汪涛, twang@iue.ac.cn
Owner: 天工LCI数据工作小组
Review: Dependent internal review by 天工LCI数据工作小组
Amounts: no units in this file; such an amount is in the reference unit of its flow, which a separate flow dataset defines
copyright: false
licenseType: Free of charge for all users and uses

## General comment
通过此过程生产的稀土氧化物（REO）用于电子、可再生能源技术和先进材料制造等各种应用。具体来说，它们是生产用于风力涡轮机和电动汽车中的强大磁铁、催化剂、玻璃添加剂和冶金学的重要组成部分。

## Geography
Bayan Obo (China)

## Technology and included processes
REO 生产的工艺链包括采矿，然后是选矿、煅烧、提取和焙烧阶段，见图 2。REO 生产的第一步是采矿，其中原矿石被爆破并运输以进一步精炼。从白云鄂博矿开采的原矿石由独居石和氟碳铈矿组成。

## Reference product
- Rare Earth Element sulfate: 1; measured

## Inputs
- water: 17.216; calculated
- heat: 6.621; calculated
- sulphuric acid: 3.214; calculated
- Oxidant (FeCl3): 0.906; software or database
- electricity from hydroelectric power plant: 0.012; software or database
- fluoride: 0.003; measured
- Sulphur oxides (as SO2): 0.529; software or database

## Outputs
- carbon dioxide (fossil): 0.083; software or database
  原文未区分bio和fossil，根据专家判断此处为fossil
- hydrogen fluoride: 0.068; software or database
- sulphuric acid: 0.18; software or database
- fluoride: 0.0005; measured
- Suspended solids, unspecified,Suspended solids, unspecified: 0.011; measured

## Deviations from the LCI method approaches
Life cycle data was obtained from the Ecoinvent database, and mass-based-allocation was performed to partition the environmental impacts among crude ore and REO, as well as allocate the environmental impact among light, medium, heavy, and neodymium REOs. Two alternative allocations schemes, (I) market-based and (II) exegetic-based allocation, were considered as a means to partition the environmental impacts among REOs. The results for market- as well as exergetic-based allocation are provided in the Supporting Information. It is important to note that allocation based on market-value is the preferred method of the metals industry.23 When possible, Chinese-specificlifecycledatawas considered in the analysis; otherwise, European life cycle inventory (LCI) databases were used. The LCA results for REO production presented in this study provide a conservative benchmark for the environmental profile of REE. Furthermore, the LCI and LCA results can be extended/applied to evaluate the production of individual REE and REE-based technologies and products.

## Use advice
LCA数据的用户应遵循基于市场价值的分配方法来估算REO生产的环境影响，除非有特定的理由使用其他分配方案。理解该数据代表REE环境概况的保守基准是重要的。另外，当扩展或应用数据来评估个别REE或基于REE的技术和产品的生产时，确保考虑地理相关性，即对中国使用中国特定的数据，适用其他地区时使用欧洲LCI数据。

## Review details
清单： 内部审查通过几个迭代步骤完成，涉及原始数据验证、原始数据记录、代表性、完整性、与 ISO 14040 和 14044 有关的建模的一致性。

## Data sources
- Zaimes, G. G., Hubler, B. J., Wang, S. & Khanna, V. Environmental Life Cycle Perspective on Rare Earth Oxide Production. ACS Sustainable Chem. Eng. 3, 237–244 (2015).
