# 熟料煅烧;熟料, 硅酸盐水泥熟料;新型干法, >4000 t/d;二次固废, 粉尘回收

Dataset: ILCD process, Unit process, single operation
Geography: CN
Reference year: 2020
Classification: Materials production / Inorganic chemicals
Generated by: 杨思琪, ysqsophia@gmail.com
Owner: 天工LCI数据工作小组
Review: Dependent internal review by 天工LCI数据工作小组
Amounts: no units in this file; such an amount is in the reference unit of its flow, which a separate flow dataset defines
copyright: false
licenseType: Free of charge for all users and uses

## General comment
新型干法在水泥工业工艺中市场份额占比较大。二次固废复合水泥熟料。

## Technical purpose
该数据集代表的硅酸盐水泥熟料主要通过日产能超过4000吨的新型干法生产。此熟料是生产P·O 42.5型硅酸盐水泥的基础成分。数据集还包括在熟料生产过程中二次固废和粉尘回收的整合，凸显其在大规模水泥制造中的应用，专注于利用废物和提高材料效率。

## Model description
以 P·O 42.5 型水泥熟料为研究对象，功能单位与基准流为生产 1.00 吨水泥熟料，系统边界为熟料煅烧（包括煤粉制备）单元过程，基准年为 2020 年。

## Reference product
- clinker, portland cement clinker: 1000
  熟料，PO42.5

## Inputs
- raw meal: 1440.64
  生料，含二次固废，即粉尘回收。
- electricity, medium voltage: 108
  电力。电力由电厂输送。
- tap water: 220
  自来水
- coal, powder: 137.03
  煤粉

## Outputs
- Water (groundwater from technosphere, waste water): 5.88
  废水。废水为循环冷却水排水，水质除水温及浑浊度升高外基本无其它污染。
- particles (> PM10): 0.04935
  颗粒物。袋式收尘器收集到的粉尘经返料系统全部返回生料均化阶段，工艺产出固废可有效循环利用。未标明粒径，按PM>10处理。
- sulfur dioxide: 0.07854
  二氧化硫
- Nitrogen oxides: 0.21
  氮氧化物
- mercury: 2.026e-5
  汞
- fluorene: 0.0063
  氟
- ammonia: 0.00251
  氨
- carbon dioxide: 791.59
  二氧化碳。水泥行业通常不监测CO2排放量，CO2主要来源于石灰石分解和煤炭燃烧两个过程，根据化学平衡运用公式计算其产生量。

## Data selection and combination
除CO2外，其他数据来源于高安红狮、江西德安万年青等企业报告、水泥行业清洁生产评价指标体系及水泥熟料研究论文等。

## Use advice
该生命周期数据集由亿科环境科技有限公司开发，并且遵循CLCD取舍原则。用户应注意以下事项：（一）当原料重量小于产品重量的1%以及含稀贵/高纯度物质的重量小于产品重量的0.1%时，可省略原料上游生产数据，省略的原料总重量不得超过产品总重量的5%。（二）废物或低价值废物作为原料时，其上游生产过程无需追溯。（三）生产设备、厂房和生活设施在大多数情况下可忽略，除非它们对生命周期评估有显著影响。（四）已选定环境影响类型范围内的已知排放数据不应忽略。使用此数据集进行生命周期评估(LCA)建模时，要小心谨慎，只有在评估了其相关性和将其更新至基准年（即2020年）的技术和实践情况后，才能将其纳入。

## Review details
清单： 内部审查通过几个迭代步骤完成，涉及原始数据验证、原始数据记录、代表性、完整性、与 ISO 14040 和 14044 有关的建模的一致性。

## Data sources
- 陆柳鲜. (2022). 江西省多源有色冶炼固废资源化过程生命周期评价研究 [硕士, 江西理工大学].
