# 轧钢;粗钢;热轧（D01）

Dataset: ILCD process, Unit process, single operation
Geography: CN
Reference year: 1998
Classification: Materials production / Metals and semimetals
Generated by: 付翔, 1162850692@qq.com
Owner: 天工LCI数据工作小组
Review: Dependent internal review by 天工LCI数据工作小组
Amounts: no units in this file; such an amount is in the reference unit of its flow, which a separate flow dataset defines
copyright: false
licenseType: Free of charge for all users and uses

## General comment
来自表 4-17 D01 钢厂生产吨材环境负荷编目表

## Time period
论文提到钢铁企业环境总体数据为1998年的吨钢环境基础数据。

## Technical purpose
该工艺生产的热轧钢通常用于建筑和制造业，包括但不限于基础设施项目、建筑框架、汽车车身、铁路轨道以及各种机械和工具。

## Reference product
- Steel sections: 1000; measured

## Inputs
- Energy, geothermal, converted: 2858.66; measured
- water: 28360; measured
- Crude Steel: 1078; measured
  粗钢

## Outputs
All rows: measured
- Dust (unspecified, from stack): 0.028
  烟尘
- Dust (unspecified, from stack): 0.262
- sulfur dioxide: 0.564
- Hydrocarbons, aliphatic, alkanes, unspecified: 0.024793
  石油类
- Suspended solids, unspecified: 0.29681
- chemical oxygen demand: 0.1759
- Dust (unspecified, from stack): 25.7
  集尘
- Spoil (deposited, hibernating in ground, non elementary flow): 14

## Use advice
提供的热轧钢生产环境负荷数据应在理解其反映1998年技术和能源消耗标准的基础上使用。这可能不代表当前钢铁生产的技术和效率。用户在将这些数据应用于当前生命周期评估时需要注意钢铁制造技术的进步。另外，在使用阶段建模时，也应考虑产品寿命终端的回收以及可能的环境减缓措施。

## Review details
清单： 内部审查通过几个迭代步骤完成，涉及原始数据验证、原始数据记录、代表性、完整性、与 ISO 14040 和 14044 有关的建模的一致性。

## Data sources
- 周和敏. 钢铁材料生产过程环境协调性评价研究. (北京工业大学, 2001).
