# Buildingboards(roughboards,roughglossyboards,specificationboards)|Barrenmaterial(marble,etc.)|Sawing, gluing, grinding and polishing, cutting (with gluing)|greater than or equal to0.4 million m2/a / /|建筑板材（毛板、毛光板、规格板）|荒料（大理石等）|锯解、涂胶、磨抛、裁切（有涂胶）|大于等于40万平方米/年

Dataset: ILCD process, Partly terminated system
Geography: CN
Reference year: 2019
Classification: Materials production / Other mineralic materials
Generated by: The data was created by the Office of the Second National Pollution Source Census of the Ministry of Ecology and Environment, and the data was organized by the TianGong Plan team for ILCD format / 生态环境部第二次全国污染源普查工作办公室创建数据，天工计划团队常慧敏整理数据为ILCD格式
Amounts: no units in this file; such an amount is in the reference unit of its flow, which a separate flow dataset defines
copyright: false

## Technology and included processes
the Technical of end-of-pipe management technology for pollution waste incineration of wood products (OSB, particle board)is/
污染物指标工业废气量（有涂胶工艺）的末端治理技术是/

## Reference product
- waste incineration of wood products (OSB, particle board): 1; calculated
  原文件中描述污染物类别为Product，污染物指标为建筑板材（毛板、毛光板、规格板），此处对其进行了匹配工作，将其匹配到LCAflow库里面相最符合的流，污染物指标备注为工业废气量（有涂胶工艺）

## Outputs
All rows: calculated
- Exhaust gas: nan
  原文件中描述污染物类别为废气，污染物指标为工业废气量（有涂胶工艺），此处对其进行了匹配工作，将其匹配到LCAflow库里面相最符合的流，污染物指标备注为工业废气量（有涂胶工艺）
- particles (PM2.5 - PM10): 0.0026, 0.0052, 0.026 (3 entries)
  原文件中描述污染物类别为废气，污染物指标为颗粒物（有涂胶工艺），此处对其进行了匹配工作，将其匹配到LCAflow库里面相最符合的流，污染物指标备注为颗粒物（有涂胶工艺）
- volatile organic compound: 3.2e-5, 0.00032, 0.00048, 0.00064, 0.0032 (5 entries)
  原文件中描述污染物类别为废气，污染物指标为挥发性有机物（有涂胶工艺），此处对其进行了匹配工作，将其匹配到LCAflow库里面相最符合的流，污染物指标备注为挥发性有机物（有涂胶工艺）
- Water (river water from technosphere, waste water): nan
  原文件中描述污染物类别为废气，污染物指标为工业废水量，此处对其进行了匹配工作，将其匹配到LCAflow库里面相最符合的流，污染物指标备注为工业废水量
- Chemical Oxygen Demand: 0.01855
  原文件中描述污染物类别为废气，污染物指标为化学需氧量，此处对其进行了匹配工作，将其匹配到LCAflow库里面相最符合的流，污染物指标备注为化学需氧量
- chemical oxygen demand: 0.0212, 0.0265 (2 entries)
  原文件中描述污染物类别为废水，污染物指标为化学需氧量，此处对其进行了匹配工作，将其匹配到LCAflow库里面相最符合的流，污染物指标备注为化学需氧量
- Petroleum-related waste: 4.2e-5, 3.6e-5, 6e-5 (3 entries)
  原文件中描述污染物类别为废水，污染物指标为石油类，此处对其进行了匹配工作，将其匹配到LCAflow库里面相最符合的流，污染物指标备注为石油类

## Data sources
- 第二次全国污染源普查产排污核算系数手册（试用版）,二级代码30,四级代码3032文件，在完整版文件中第3368页
