# 市政污泥处理与处置;湿污泥 含水率80%;厌氧消化

Dataset: ILCD process, Unit process, single operation
Geography: DL-LN-CN
Classification: Unit processes / End-of-life treatment / Waste water treatment
Functional unit: The functional unit of sludge treatment is sludge 45t (water content 80%).
Generated by: 金思甜, 2331276@tongji.edu.cn
Owner: 天工LCI数据工作小组
Review: Dependent internal review by 天工LCI数据工作小组
Amounts: no units in this file; such an amount is in the reference unit of its flow, which a separate flow dataset defines
copyright: ['opt4ROkqig']
licenseType: Free of charge for all users and uses

## General comment
厌氧消化效率、沼气产量和发电量来自此工厂的设计数据；电能消耗是通过统计用电器的使用情况计算而得，厂区 内反应过程中排放的气 体污染物情况是由文献 查阅得知。

## Geography
大连市某污泥处理厂

## Technology and included processes
每套消化装置都配有3座厌氧发酵罐，在每座LIPP罐中都设置了一台搅拌设备和一台进料泵，开启24h，LIPP罐的上端为沼气收集装置，3台风机，开启24h，1台空气压缩机，开启1小时。

## Technical purpose
该数据集旨在评估含水率为80%的市政污泥处理和处置过程。它适用于大连某污泥处理设施进行的厌氧消化单元操作阶段。该数据集代表的材料通常用于城市废水管理系统中的市政污泥处理。

## Reference product
- Sludge: 20500; input; measured

## Inputs
- Electricity: 12793.7; calculated
  计算的是一套设备即处理量为150t/d所消耗的电量。
- Polymer: 40; measured

## Outputs
- Electricity: 14400; missing unimportant
- nitrous oxide: 60; measured
- methane (biogenic),methane (biogenic): 90; measured
  原文未区分biogenic和fossil，根据专家判断此处为biogenic。
- Biogas: 5; measured

## Use advice
使用该数据集时，需要考虑含水率为80%的市政污泥处理与处置的具体情况。厌氧消化过程应符合大连设施的运营条件进行建模。用户还应考虑污泥处置和潜在的生物气体形式的能量回收的影响。在生命周期评估或其他比较分析中应用此数据时，必须维持45吨含水率80%的湿污泥的功能单位。

## Review details
清单： 内部审查通过几个迭代步骤完成，涉及原始数据验证、原始数据记录、代表性、完整性、与 ISO 14040 和 14044 有关的建模的一致性。

## Data sources
- 张倩芸. 基于LCA的污水处理系统的环境影响评价研究[D].大连理工大学,2017.
