# Soil and groundwater remediation;Ex-situ;groundwater pump and treat;construction; Equipment and Materials Arriving on Site

Dataset: ILCD process, Unit process, single operation
Geography: CA
Reference year: 2007
Classification: Other Services / Repair and maintenance
Generated by: Wang Ning, wang_ning@caep.org.cn
Owner: Tiangong LCI Data Working Group
Review: Dependent internal review by Tiangong LCI Data Working Group
Amounts: no units in this file; such an amount is in the reference unit of its flow, which a separate flow dataset defines
copyright: false
licenseType: Free of charge for all users and uses

## General comment
Transportation of required materials and equipment to the site

## Geography
The contaminated area was located 600 m from a river shore in the northern part of the prov-ince of Quebec， Canada.

## Technology and included processes
Consumption of diesel for transportation of equipment and materials to project sites

## Technical purpose
The described industrial process is utilized for environmental rehabilitation, specifically targeting soil and groundwater contamination. This process involves the 'pump and treat' method, where contaminated groundwater is extracted and treated ex-situ (outside of its original place), as a part of construction and remediation efforts. Equipment and materials are transported to the remediation site for setup and operation.

## Reference product
- Equipment and Materials Arriving on Site: 1; estimated
  到达现场的设备和材料

## Inputs
- Diesel: 79.8; estimated
  将所需材料和设备运至现场所需要的柴油

## Use advice
This data set represents the transport and onsite preparation phase of a soil and groundwater remediation project. Data users should note that emissions and resource use associated with the transportation of materials and equipment are included. This includes the diesel fuel input for the transport vehicles. When using this data for Life Cycle Assessment (LCA), ensure that it is correctly attributed to the site preparation phase of the project and that the transportation distance and the associated environmental burdens are considered. For projects in different locations or with different transport distances, data users should adjust the parameters accordingly.

## Review details
Inventory: The internal review was done by several iteration steps concerning raw data validation, raw data documentation, representativity, completeness and consistency of modelling with regard to ISO 14040 and 14044.
