# 氧化钪的生产;氧化钪;一般工艺;含稀土矿石

Dataset: ILCD process, Unit process, single operation
Geography: CN
Reference year: 2010
Valid until: 2019
Classification: Unit processes / Materials production / Inorganic chemicals
Functional unit: The cradle-to-gate production of 1 kg of scandium oxide.
LCI method principle: Attributional
LCI method approaches: Allocation - mass
Generated by: 汪涛, twang@iue.ac.cn
Owner: 天工LCI数据工作小组
Review: Dependent internal review by 天工LCI数据工作小组
Amounts: no units in this file; such an amount is in the reference unit of its flow, which a separate flow dataset defines
copyright: false
licenseType: Free of charge for all users and uses

## General comment
此工艺生产的氧化钪主要用于制造固体氧化物燃料电池，高强度金属卤化物灯，以及航空航天工业，因为它具有高熔点和增强强度的特性。此外，因其独特的光学品质，还被用于电子陶瓷和玻璃配方中。

## Geography
中国

## Technology and included processes
我们根据ISO 14040（ISO，2006a）和ISO 14044（ISO，2006b）指南应用LCA方法来量化氧化钪生产的潜在环境影响，并且我们的评估是在GaBi 9.0软件和软件的支持下进行和评估的。 Ecoinvent 3.3 数据库。

## Reference product
- arsenic trioxide: 1; measured

## Inputs
All rows: measured
- tailings (unspecified): 64363.3
- water: 753955
- Electricity: 3138.41
- process steam: 60500
- tributylphosphorotrithioate: 6.5
  tributyl phosphate (TBP)
- P0507: 5.33
  P507, 2－乙基己基膦酸单2－乙基己基酯
- Kerosene: 6.5
- Sodium silicate: 650.01
  Water glass
- Polyglycerol fatty acid esters (PGFEs): 7.67
  Carrier (fatty ester of polyglycolether and modified polyalcohol)
- Spray mold: 5.33
  Activating reagent , Ammonium chloride (Salmiac, Solvay process)
- phenanthrene: 388.02
  Collector, DE: Phthalic anhydride
- oxalic acid: 50.17
- sulphuric acid: 1767.83
- Hydrochloric acid: 77.06
- sodium hydroxide: 77.06
- hydrogen peroxide: 21.5

## Outputs
All rows: measured
- Concentrate: 11068.3
  Fe concentrate
- Rare Earth concentrate: 2455
  RE concentrate
- Concentrate: 1020
  S concentrate
- Concentrate: 32478.3
  Fluorite coarse ore
- Concentrate: 796.67
  Nb concentrate
- Non-methane volatile organic compounds: 0.69
  NMVOC
- methane (fossil): 3.14
  原文未区分bio和fossil，根据专家判断此处为fossil
- ammonia: 0.26
- particles (PM2.5 - PM10): 0.44
- Radioactive dust, waste: 0.000651
  RS (Th, U) , Radioactive dust, waste
- sulfur dioxide: 7.38
- Nitrogen oxides: 5.24
  Nitrogen oxide
- carbon monoxide,carbon monoxide (fossil): 3.32
  原文未区分bio和fossil，根据专家判断此处为fossil
- carbon dioxide (fossil): 853.11
  原文未区分bio和fossil，根据专家判断此处为fossil
- water: 678107
- waste water - untreated: 3226.23
- Oils, unspecified: 0.01
- Sulfidic tailing: 10546.7
  Sc tailings
- Waste (solid): 6502.66

## Deviations from the LCI method approaches
Therefore, the mass-based-allocation, a fair allocation method based on material natural attributes, was performed to partition the environmental impacts among by-products in this study, and all the inputs and outputs considered during the entire process are considered. In the whole production processes, we apply the mass-based allocation principle to our assessment by considering the scandium oxide as the main product, while Fe concentrate, REs concentrate, S concentrate, Fluorite coarse ore and Nb concentrate are considered as by-products, and the detail is shown in Supporting Information (

## Use advice
在将这些LCA数据纳入环境影响评估时，确保按照所述方法正确应用基于质量的分摊方法。此分摊方法根据天然材料属性明确划分了氧化钪及其副产品之间的环境负担。用户必须考虑从摇篮到大门的整个生产过程，并参考支持信息中指定的细节，特别是在考虑副产品之间的依赖关系时。此数据集符合ISO 14040和ISO 14044指南，使用GaBi 9.0软件和Ecoinvent 3.3数据库进行分析。数据用户应确保模型和评估与这些方法论兼容。

## Review details
清单： 内部审查通过几个迭代步骤完成，涉及原始数据验证、原始数据记录、代表性、完整性、与 ISO 14040 和 14044 有关的建模的一致性。

## Data sources
- Wang, L., Wang, P., Chen, W.-Q., Wang, Q.-Q. & Lu, H.-S. Environmental impacts of scandium oxide production from rare earths tailings of Bayan Obo Mine. Journal of Cleaner Production 270, 122464 (2020).
