# 水泥生产;水泥, 通用硅酸盐水泥;新型干法窑

Dataset: ILCD process, Unit process, black box
Geography: SD-CN
Reference year: 2012
Classification: Unit processes / Materials production / Other mineralic materials
Generated by: #REF!, ysqsophia@gmail.com
Owner: 天工LCI数据工作小组
Review: Dependent internal review by 天工LCI数据工作小组
Amounts: no units in this file; such an amount is in the reference unit of its flow, which a separate flow dataset defines
copyright: false
licenseType: Free of charge for all users and uses

## General comment
采用新型干法窑工艺生产原生水泥。

## Geography
山东省代表平均生产水平的典型水泥企业

## Technical purpose
此数据代表使用新型干法窑技术生产的通用硅酸盐水泥。水泥在多种建筑应用中使用，包括用于建筑物、桥梁和道路的混凝土生产以及砌体、砂浆和灌浆。水泥的质量符合适用于一般建筑目的的技术规格。

## Model description
1t原生水泥为功能单位；研究的地理范围为山东地区，系统边界是水泥生产所涉及到的全部直接过程，所有关于原料开采、加工、能源生产以及生产设备、运输、销售和使用阶段等辅助环节的资源、能源消耗和环境排放均暂不考虑。

## Reference product
- cement, common portland cement: 1000
  单位通用水泥

## Inputs
- limestone, crushed, for mill: 1130
  石灰石
- clay: 220
  粘土
- iron, powder: 27
  铁质校正材料
- gypsum stone (CaSO4-dihydrate): 60
  石膏
- mixed materials, mineral: 200
  混合材料
- hard coal: 120.398
  原煤。煤主要消耗在水泥烧成阶段的供热环节。文献中煤耗按照低位发热值转换成标准煤耗量（0.086t），换算公式为1kg原煤=0.7143kg标准煤。这里换算为原煤进行录入。
- Electricity: 0.296316
  电。电力主要来自火力发电。文献中电耗折算为标准煤（0.067t）。换算公式为1kW·h=0.814kg标准煤。这里换算为电进行录入。

## Outputs
- sulfur dioxide: 0.5
  SO2
- particles (> PM10): 3
  粉尘，未标明粒径，按PM>10处理。
- particles (> PM10): 0.35
  烟尘，未标明粒径，按PM>10处理。
- Nitrogen oxides: 1.45
  NOx
- carbon dioxide (fossil): 658
  CO2

## Data selection and combination
山东省水泥工业在全国占有重要地位，连续十几年处于全国第1位，每年水泥产品占全国的11%～13%，成为名副其实的水泥大省。因此，数据主要来自山东省代表平均生产水平的典型水泥企业的生产数据及地方环保部门监测数据。

## Use advice
本生命周期评估（LCA）数据集的用户应注意，该数据集仅涵盖山东省典型水泥企业平均生产水平的原生水泥生产阶段。考虑了水泥生产所涉及的所有直接过程，并包含在系统边界内。但是，此阶段暂不考虑原料开采、加工、能源生产以及设备制造、运输、销售和使用阶段资源和环境排放等辅助过程。为进行准确的生命周期评估，用户需要将此数据与涵盖这些外部过程的其他LCA数据整合。此外，应认识到地理范围仅限于山东，可能不代表其他地区的生产过程。

## Review details
清单： 内部审查通过几个迭代步骤完成，涉及原始数据验证、原始数据记录、代表性、完整性、与 ISO 14040 和 14044 有关的建模的一致性。

## Data sources
- 邓琪 & 陈吉宁. (2012). 钢铁工业固废应用于水泥生产的降耗与减排. 生态环境学报, 21(2), 298–302.
