# 测井工程 ; 天然气水合物 ; 饱和度测井法

Dataset: ILCD process, Unit process, single operation
Geography: GD-CN
Reference year: 1989
Classification: Other Services / Engineering and consulting
LCI method principle: Attributional
LCI method approaches: Consequential
Generated by: 康诗康, 908798159@qq.com
Owner: 天工LCI数据工作小组
Review: Dependent internal review by 天工LCI数据工作小组
Amounts: no units in this file; such an amount is in the reference unit of its flow, which a separate flow dataset defines
copyright: false
licenseType: Free of charge for all users and uses

## General comment
通过水合物电阻率实验数据分析，从电阻率-含油（气）饱和度关系一般形式出发，导出适合水合物饱和度计算的最佳简式，明确了简式中 3 项的物理意义，即分别代表水合物颗粒完全分布于地层岩石孔隙中、以颗粒方式支撑和以成层状存在时的电阻增大率，建立了相应的水合物饱和度定量评价方法

## Geography
南海

## Time period
作者首次提出

## Technology and included processes
提出了非均匀各向孔隙体积中所占的百分比。当水合物饱和度由小增大时，其电阻率测量值变化的实验规律一般如图所示， 即在双对数坐标下随着水合物饱和度增高呈单调递增形态

## Technical purpose
所述饱和度测井方法用于南海区域天然气水合物勘探中地层水合物饱和度的定量评估。该方法涉及分析电阻率测量数据，以计算多孔岩石地层中天然气水合物的百分比。这一过程对于确定天然气储量的规模至关重要，并可在测井阶段应用，以评估潜在的提取量。

## Model description
对比前文给出的电阻增大率-含油（气）饱和度一般形式的几种不同截短形式，可以看出式（5）为一般形式右侧分母中取两项的结果，即印度尼西亚公式是一般形式在泥质含量较高时饱和度方程的特例

## Reference product
- process steam from natural gas: 1e7; log-normal; article inperiodical
  饱和度相差10%时对应的水合物储量

## Outputs
- process steam from natural gas: 1e7; log-normal; article inperiodical
  有利勘探面积
- process steam from natural gas: 0.5; log-normal; article inperiodical
  孔隙度
- process steam from natural gas: 20; log-normal; article inperiodical
  有效厚度

## Data selection and combination
含油气饱和度即油气占孔隙体积的百分比，直接决定油气储量规模，是测井评价的核心参数之一。

## Data treatment and extrapolations
岩心被完全饱和地层水后加压用油气驱替，电阻增大率随油气饱和度增加而增大。实际解释评价饱和度是其反过程，即依据测井得到的地层电阻增大率来计算饱和度

## Use advice
在使用数据集评估天然气水合物饱和度时，需注意所得公式和饱和度计算是基于特定条件（如岩石孔隙度、水合物分布以及油气在孔隙中的存在）得出的。用户必须考虑地质背景，并确保用于推导电阻率-饱和度关系的实验条件适用于其评估场景。需要按照给定的方法仔细解释电阻率测井结果，并且用户应意识到非均匀各向孔隙体积对电阻率测量结果的影响。

## Review details
清单： 内部审查通过几个迭代步骤完成，涉及原始数据验证、原始数据记录、代表性、完整性、与 ISO 14040 和 14044 有关的建模的一致性。

## Data sources
- 李宁;孙文杰;李心童;冯周;武宏亮;王克文; 天然气水合物饱和度测井解释模型及方程. 石油勘探与开发 1073–1079 (2022).
