# 硅锭铸造 ; 硅锭 ; 熔化、凝固和退火

Dataset: ILCD process, Unit process, single operation
Geography: NX-CN
Reference year: 2016
Classification: Unit processes / Materials production / Metals and semimetals
Functional unit: Grid-connected electricity generation from a 1 MWp multi-Si PV system, whose lifespan is 30 years of a 10 MWp power station has been taken as the research object and the functional unit
LCI method principle: Attributional
LCI method approaches: Allocation
Generated by: 杨锦锋, yjfzfshn@163.com
Owner: 天工LCI数据工作小组
Review: Dependent internal review by 天工LCI数据工作小组
Amounts: no units in this file; such an amount is in the reference unit of its flow, which a separate flow dataset defines
copyright: false
licenseType: Free of charge for all users and uses

## General comment
多晶硅

## Geography
该电站位于宁夏中部地区，年平均太阳辐射量约为5955.80 MJ m2 a-1，年平均日照高峰时数为1718h

## Time period
文章发表

## Technical purpose
太阳能级多晶硅铸锭的生产过程主要用于生产多晶硅光伏电池的原材料。这些光伏电池是太阳能电池板中转换太阳能为电能的重要组成部分。该数据集尤其适用于太阳能发电行业，特别是那些参与太阳能板制造和评估并网电力发电系统环境影响的公司。

## Reference product
- Multi-Si ingot: 1000; measured
  SoG- Si ingot

## Inputs
All rows: measured
- Electricity: 42778.8
- Solar grade multi-Si: 1010
  SoG-Si
- Quartz Crucible,Quartz Crucible: 180
  Quartz crucible
- Silicon nitride: 1
- Cooling water: 4200
  Circulating water

## Outputs
- Waste (solid): 182.01; measured
  Waste quartz crucible

## Deviations from the LCI method approaches
对中国冶金路线多晶硅光伏并网发电系统进行了生命周期评估

## Data selection and combination
调查云南、宁夏工厂

## Use advice
使用该数据集时，用户应考虑宁夏中部特定地区的太阳辐射数据和操作条件。需要注意的是，该数据旨在用于一个具有30年预定使用寿命的多晶硅光伏系统，该系统作为一个10 MWp容量的研究对象。在将这些数据集成到生命周期评估模型中时，用户必须考虑功能寿命和区域特定的太阳辐射，以准确评估光伏系统的环境影响。还应注意与生命周期评估中其他数据集的方法论一致性，以及确保与关于使用冶金路线多晶硅的研究目标和范围的一致性。

## Review details
清单： 内部审查通过几个迭代步骤完成，涉及原始数据验证、原始数据记录、代表性、完整性、与 ISO 14040 和 14044 有关的建模的一致性。

## Data sources
- Yu, Z. et al. Life cycle assessment of grid-connected power generation from metallurgical route multi-crystalline silicon photovoltaic system in China. Applied Energy 185, 68–81 (2017).
