# 钻井工程 ; 天然气水合物; 随钻测井

Dataset: ILCD process, Unit process, single operation
Geography: ZH-GD-CN
Reference year: 2020
Classification: Unit processes / Energy carriers and technologies / Natural gas based fuels
LCI method principle: Attributional
LCI method approaches: Consequential
Generated by: Shikang Kang, 908798159@qq.com
Owner: 天工LCI数据工作小组
Review: Dependent internal review by 天工LCI数据工作小组
Amounts: no units in this file; such an amount is in the reference unit of its flow, which a separate flow dataset defines
copyright: false
licenseType: Free of charge for all users and uses

## General comment
在尽量不损伤天然气水合物储层条件下开展敏感性钻探非常有必要，随钻测井( logging- while drilling，LWD) 已成为钻探过程中判识天然气水合物赋存和原位测试天然气水合物储层属性的 重要手段

## Geography
南海神狐海域

## Time period
文献发表时间

## Technology and included processes
钻井是天然气水合物勘探发现最直接的手段，也是天然气水合物开发的必要环节。

## Technical purpose
该数据集涉及使用随钻测井(LWD)技术进行天然气水合物勘探和原位测试的钻井工程过程。钻探过程旨在避免损害气体水合物储藏层，特别是在敏感钻探操作中。该过程适用于南海神狐海域，在这些地区拥有大量海洋沉积物中的天然气水合物，特别是在相对容易开采的富砂质沉积体中。该数据可为此类地质环境下的钻探实践提供信息，为天然气水合物开发的勘探和潜在提取阶段提供指导。

## Reference product
- methane (fossil): 1.4986e6; log-normal; calculated
  原文未区分bio和fossil，根据专家判断此处为fossil。累计产气总量

## Inputs
- Well pad: 35; min 30; max 40; uniform; missing unimportant
  钻进速率
- natural gas: 1.4986e6; log-normal
  文献中没有天然气投入量，假设天然气开采过程中投入量：输出量=1:1

## Outputs
- methane (fossil): 42; max 42; uniform; calculated
  原文未区分bio和fossil，根据专家判断此处为fossil。试采持续产气
- methane (fossil): 35700; log-normal; missing unimportant
  原文未区分bio和fossil，根据专家判断此处为fossil。日均产气量

## Data selection and combination
天然气水合物资源量巨大，且 98% 以上赋存于 海域沉积物中，其中，相对较易开采的富砂质沉 积体中的天然气水合物资源量中值约为 1 226. 4 × 10¹² m³。

## Data treatment and extrapolations
第一个实现商业化 开发的天然气水合物气田为俄罗斯的麦索亚哈 ( Messoyakha) 气田，该气田发现于 1967 年，天然气水合物与常规天然 气呈 上-下结构共存， 1969 年开始商业化开发，断续生产到 2011 年底，天 然气水合物累计产气量约 54 × 10⁸ m³ ，占总产气量 的 41. 8%。

## Use advice
提供的信息对于从事天然气水合物田的勘探和开采的工业行为者至关重要，尤其是在敏感且可能环境脆弱的海洋环境中。用户应考虑随钻测井领域的技术进步，并根据最新的安全和效率协议调整数据。解释这些数据时还应考虑目标场址的独特地质特征和当前管制海洋钻探活动的法规框架。环境影响评估应集成到规划阶段以确保可持续操作。在从数据集得出结论时，应考虑商业可行性、历史表现和能源市场条件。

## Review details
清单： 内部审查通过几个迭代步骤完成，涉及原始数据验证、原始数据记录、代表性、完整性、与 ISO 14040 和 14044 有关的建模的一致性。

## Data sources
- 张金华, 樊波 & 刘瑞江. 天然气水合物钻探现状与钻井技术. 科学技术与工程 20, 14343–14351 (2020).
