# 废纸浆造纸;新闻纸

Dataset: ILCD process, Unit process, black box
Geography: CN
Classification: Unit processes / Materials production / Paper and cardboards
Functional unit: 1t of newsprint product as a functional unit.
LCI method principle: Attributional
Generated by: 高逸翔, 22210740040@m.fudan.edu.cn
Owner: 天工LCI数据工作小组
Review: Dependent internal review by 天工LCI数据工作小组
Amounts: no units in this file; such an amount is in the reference unit of its flow, which a separate flow dataset defines
copyright: false
licenseType: Free of charge for all users and uses

## General comment
依据系统边界划分新闻纸产品为制浆、抄纸、化学品生产、能源生产、运输、污水处理，搜集各阶段资源、能源、原料消耗、环境排放原始数据。

## Technical purpose
再生纸生产新闻纸的工艺用于生产大量的报纸、传单、广告材料及其他印刷媒体使用的新闻纸。该过程包括制浆、造纸、化学品生产、能源生产、运输和污水处理等阶段。

## Reference product
- Newsprint: 1000; measured
  新闻纸（抄纸阶段）

## Inputs
All rows: measured
- Hydrogen peroxide: 79
  双氧水（制浆阶段）
- Sodium silicate: 33
  硅酸钠（制浆阶段）
- sodium hydroxide: 48
  火碱（制浆阶段）
- Saponifier: 3
  皂化剂（制浆阶段）
- Waste paper: 1325
  废纸（制浆阶段）
- Filler Material: 6
  填料（抄纸阶段）
- Starch: 3
  淀粉（抄纸阶段）
- Optical Brightening Agent: 1
  增白剂（抄纸阶段）
- Papermaking Retention Aid: 0.8
  助留剂（抄纸阶段）

## Outputs
All rows: measured
- carbon dioxide (fossil): 548.3
  CO2（制浆阶段）
- Nitrogen oxides: 3.4
  NOx（制浆阶段）
- sulfur dioxide: 2.8
  SO2（制浆阶段）
- methane (fossil): 0.0052
  CH4（制浆阶段）
- non-methane volatile organic compounds: 0.2
  NMVOC（制浆阶段）
- Total Suspended Particulate: 0.8
  TSP（制浆阶段）
- chemical oxygen demand: 0.7
  COD（制浆阶段）
- biological oxygen demand: 0.038
  BOD5（制浆阶段）
- Suspended solids, unspecified,Suspended solids, unspecified: 0.3
  TSS（制浆阶段）
- Waste (solid): 99
  废弃物（制浆阶段）
- carbon dioxide (fossil): 907.3
  CO2（抄纸阶段）
- Nitrogen oxides: 5.5
  NOx（抄纸阶段）
- sulfur dioxide: 2.5
  SO2（抄纸阶段）
- methane (fossil): 0.0087
  CH4（抄纸阶段）
- non-methane volatile organic compounds: 0.4
  NMVOC（抄纸阶段）
- Total Suspended Particulate: 0.7
  TSP（抄纸阶段）
- chemical oxygen demand: 0.027
  COD（抄纸阶段）
- biological oxygen demand: 0.002
  BOD5（抄纸阶段）
- Suspended solids, unspecified,Suspended solids, unspecified: 0.016
  TSS（抄纸阶段）
- carbon dioxide (fossil): 76.9
  CO2（运输阶段）
- Nitrogen oxides: 0.6
  NOx（运输阶段）
- sulfur dioxide: 0.3
  SO2（运输阶段）
- methane (fossil): 0.2
  CH4（运输阶段）
- particles (PM10): 0.022
  PM10（运输阶段）
- non-methane volatile organic compounds: 0.06
  NMVOC（运输阶段）
- carbon dioxide (fossil): 124.8
  CO2（化学品生产阶段）
- Nitrogen oxides: 0.2
  NOx（化学品生产阶段）
- sulfur dioxide: 0.3
  SO2（化学品生产阶段）
- methane (fossil): 0.2
  CH4（化学品生产阶段）
- particles (PM10): 0.011
  PM10（化学品生产阶段）
- non-methane volatile organic compounds: 0.082
  NMVOC（化学品生产阶段）
- Total Suspended Particulate: 0.091
  TSP（化学品生产阶段）
- chemical oxygen demand: 0.2
  COD（化学品生产阶段）
- biological oxygen demand: 0.2
  BOD5（化学品生产阶段）
- nitrogen, total (excluding N2): 0.0088
  TN（化学品生产阶段）
- nitrate: 0.037
  硝酸根（化学品生产阶段）
- phosphate: 0.004
  磷酸根（化学品生产阶段）
- Suspended solids, unspecified,Suspended solids, unspecified: 0.063
  TSS（化学品生产阶段）
- carbon dioxide (fossil): 10.2
  CO2（污水处理阶段）
- Nitrogen oxides: 0.061
  NOx（污水处理阶段）
- sulfur dioxide: 0.057
  SO2（污水处理阶段）
- methane (fossil): 9.6e-5
  CH4（污水处理阶段）
- non-methane volatile organic compounds: 0.0041
  NMVOC（污水处理阶段）
- Total Suspended Particulate: 0.016
  TSP（污水处理阶段）
- nitrogen, total (excluding N2): 0.024
  TN（污水处理阶段）
- phosphorus, total: 0.079
  TP（污水处理阶段）
- Waste (solid): 35.7
  废弃物（污水处理阶段）

## Use advice
本生命周期评价（LCA）数据集的用户应主要依据企业调研、供应商信息、采样监测和多样化数据搜集方法所获得的实际数据。当无法获得原始数据时，可以使用Ecoinvent数据库中相关数据集进行替代。该中国生命周期评价数据库利用单元过程（黑箱）方法补充数据。本研究在生命周期影响评估中排除了可回收固体废物（如煤渣、聚酯树脂和棉纤维）的回收或再利用过程对研究目标产生的经济环境影响。功能单位被定义为1吨新闻纸。化学品生产过程的选择基于超过1%的吨纸使用量或环境影响超过新闻纸产品总影响的1%的剔除标准。

## Review details
清单： 内部审查通过几个迭代步骤完成，涉及原始数据验证、原始数据记录、代表性、完整性、与 ISO 14040 和 14044 有关的建模的一致性。

## Data sources
- 许远. 典型再循环纸产品的生命周期影响全评价. 造纸科学与技术 38, 58-61+86 (2019).
