# 市政污泥处理与处置;湿污泥 含水率70.5%;干燥焚烧发电

Dataset: ILCD process, Unit process, single operation
Geography: CN
Classification: Unit processes / End-of-life treatment / Wastewater treatment
Functional unit: Taking the mechanically compressed sludge of the sewage treatment plant as the research object, the functional unit used 100 kg sludge (water content 70.5%).
Generated by: 金思甜, 2331276@tongji.edu.cn
Owner: 天工LCI数据工作小组
Review: Dependent internal review by 天工LCI数据工作小组
Amounts: no units in this file; such an amount is in the reference unit of its flow, which a separate flow dataset defines
copyright: ['opt4ROkqig']
licenseType: Free of charge for all users and uses

## General comment
利用型号为 YG75-5.29/485-M11 锅炉烟气作为热源的实际情况作简单分析，分析计算采用 25 MW 直接燃烧发电系统，该过程能耗由发电系统自身提供。

## Technology and included processes
烟气 进口温度 145℃， 烟气出口温度 80℃。引风机设计值 为 168273 m³ /h， 实 际 满 负 荷 运 行 的 烟 气 量 在 125 000 m³/h 左右。

## Technical purpose
该数据集描述了市政污泥处理和处置的过程，特别是处理含水率为70.5%的湿污泥。该数据的主要应用是详细描述一种工业过程，该过程涉及自污水处理厂机械压缩的污泥被干燥和焚烧以发电。与此数据集相关的功能单位是100公斤的污泥（含水率为70.5%）。此过程与废物管理、废物能源回收和环境工程等行业相关，特别是与市政污水副产品的管理有关。

## Reference product
- Sludge: 100; input; estimated
  100 kg 污泥（含水率为70.5%）

## Outputs
- electricity from waste incineration: 54.468; measured
- carbon dioxide (biogenic): 41.17; measured
  原文未区分biogenic和fossil，根据专家判断此处为biogenic。
- sulfur dioxide: 0.88; measured
- Nitrogen oxides: 0.67; measured
- Flue dust: 0.87
- mineral waste (ash): 17.16; measured

## Use advice
该数据集的用户应仔细关注干燥-焚烧污泥过程应用的背景，如地点、规模和相关环境法规。重要的是要在当地的废物管理实践和能源回收系统中考虑数据的技术适用性。此外，当将这些数据整合到更广泛的生命周期评估中时，用户应考虑与干燥和焚烧阶段相关的潜在排放和能源使用。如果建模回收或恢复情景，用户必须准确反映与所描述的基线过程相比的回收效率和环境影响。

## Review details
清单： 内部审查通过几个迭代步骤完成，涉及原始数据验证、原始数据记录、代表性、完整性、与 ISO 14040 和 14044 有关的建模的一致性。

## Data sources
- 漆雅庆.污泥干燥焚烧发电的生命周期评价[J].能源与节能,2013(02):47-48+79.
