# 铜基混合废料回收;金、银、硒、碳酸镍等副产物;金银回收工艺;铜电解废料（阳极泥）

Dataset: ILCD process, Unit process, single operation
Geography: JX-CN
Reference year: 2020
Classification: Unit processes / Materials production / Metals and semimetals
Functional unit: We consider the functional unit of the recycling of copper-based mixed waste to be 1000 kg electrolytic copper.
LCI method principle: Attributional
LCI method approaches: Allocation - market value
Generated by: 王鹏, 2867919560@qq.com
Owner: 天工LCI数据工作小组
Review: Dependent internal review by 天工LCI数据工作小组
Amounts: no units in this file; such an amount is in the reference unit of its flow, which a separate flow dataset defines
copyright: false
licenseType: Free of charge for all users and uses

## General comment
该铜基混合废料回收工艺旨在从铜电解废料（即阳极泥）中提取和回收金、银、硒、碳酸镍等有价金属。该工艺通常适用于金属回收行业，特别是用于从工业废品中提取贵金属。

## Geography
中国江西省的一家金属回收企

## Technology and included processes
金银回收工艺中，用液氨、联氨、盐酸、硫酸、铁粉、草酸、灰分、及其他辅助材料。以电力为主要能源，排放废水、废气、废渣。

## Reference product
- silver: 0.9; measured
  Silver

## Inputs
All rows: measured
- ammonia,ammonia: 3.5
  Ammonia
- Anode sludge: 15
  Anode sludge需要补充
- Electricity: 72
- hard coal,hard coal,hard coal: 11.2
  Hard coal
- Hydrochloric acid: 0.3
  Hydrochloric acid(32%）需要补充
- Quicklime: 7.5
  Quicklime需要补充
- natural gas,natural gas,natural gas: 1.8
  Natural gas
- Oxalic acid: 0.2
  Oxalic acid需要补充resourse
- iron: 21
  Cast iron
- Sodium chlorate: 6
  Sodium carbonate需要补充
- Sodium chlorate: 6
  Sodium chlorate需要补充
- sodium chloride: 3
  Sodium chloride
- sodium hydroxide: 1.5
  Sodium hydroxide
- Sodium sulfite: 3
  Sodium sulfite需要补充
- Sulfuric acid(98%): 18
  Sulfuric acid(98%)需要补充resourse
- transport in t*km,transport in t*km: 1.8981
  Transport
- water: 4.2
  Water
- Zinc dust: 0.3

## Outputs
All rows: measured
- carbon dioxide (fossil): 15
  Carbon dioxide
- carbon monoxide,carbon monoxide (fossil): 70.7
  Flue gas
- mineral treatment residue (unspecified): 8
  Treatment residue
- Waste (unspecified): 3.4
  Waste (deposited)
- Nickel carbonate: 1.4
  Nickel carbonate需要补充
- selenium: 0.5
  Selenium

## Deviations from the LCI method approaches
使用LCA-ReCiPe 2016（Heijungs et al., 2017）表征和归一化方法（中点和端点方法），将生命周期清单转换为多个领域的影响分数。

## Data selection and combination
前台数据和后台数据。

## Data treatment and extrapolations
采用GaBi 9.0软件计算各种铜基混合废物回收工艺单位质量的库存、资源消耗和废物排放量。

## Use advice
用户应使用GaBi 9.0软件计算每单位质量铜基混合废物回收工艺的库存、资源消耗和废物排放量。使用生命周期清单数据时，应使用LCA-ReCiPe 2016 (Heijungs et al., 2017)字符化和归一化方法，采取中点和端点方法，将库存数据转换为多个领域的影响分数。在生命周期评估中保持功能单元为1000公斤电解铜，以确保数据的一致性和可比性。

## Review details
清单： 内部审查通过几个迭代步骤完成，涉及原始数据验证、原始数据记录、代表性、完整性、与 ISO 14040 和 14044 有关的建模的一致性。

## Data sources
- Zhang, W. et al. Analyzing the environmental impact of copper-based mixed waste recycling-a LCA case study in China. Journal of Cleaner Production 284, 125256 (2021).
