# 土壤修复;异位修复;热脱附修复;工程实施;尾气处理

Dataset: ILCD process, Unit process, single operation
Geography: SH-CN
Classification: Other Services / Repair and maintenance
Generated by: Wang Feng, wangfeng@caep.org.cn
Owner: Tiangong LCI Data Working Group
Review: Dependent internal review by Tiangong LCI Data Working Group
Amounts: no units in this file; such an amount is in the reference unit of its flow, which a separate flow dataset defines
licenseType: Free of charge for all users and uses

## General comment
The described thermal desorption process caters to the decontamination of a cubic meter of polluted soil through ex situ treatment. This industrial application serves as a remediation solution, usually employed across diverse polluted lands in the Eastern China region. The process includes the use of cyclone dust collectors, secondary combustion chambers, heat exchangers, quench towers, baghouse filters, and spray absorption scrubbers to ensure the exhaust gases meet the emission standards after treatment.

## Geography
我国华东区域5 个污染土壤异位热脱附修复工程案例

## Reference product
- Water: 5000; article inperiodical

## Inputs
- Electricity: 9; article inperiodical
- Granular active carbon unit: 0.98; article inperiodical
- Sodium hydroxide: 50; article inperiodical
- Water (fresh water): 200; article inperiodical

## Use advice
Users of this data must consider the complete emission treatment chain and account for all inputs such as electricity and water usage when utilizing this process for life cycle assessments. Caution should be taken to include the consumption of activated carbon and the sodium hydroxide (NaOH) alkaline solution during the exhaust gas absorption phase. This dataset is tailored for specific case studies of soil remediation projects in the Eastern region of China and might need adjustments when applied to different contexts or geographic locations.

## Review details
Inventory: The internal review was done by several iteration steps concerning raw data validation, raw data documentation, representativity, completeness and consistency of modelling with regard to ISO 14040 and 14044.
