# Bioethanol ; Steam explosion

Dataset: ILCD process
Geography: GLO
Classification: Energy carriers and technologies / Renewable fuels
Generated by: 袁嘉翼, jiayi_y@mail.bnu.edu.cn
Owner: 天工LCI数据工作小组
Review: Dependent internal review by 天工LCI数据工作小组
Amounts: no units in this file; such an amount is in the reference unit of its flow, which a separate flow dataset defines
licenseType: Free of charge for all users and uses

## General comment
通过蒸汽爆破工艺生成的生物乙醇通常用作交通运输中的可再生燃料替代品或燃料添加剂。它也可以用作化工合成和制药中的溶剂或中间体。

## Inputs
All rows: uniform; missing unimportant
- Electricity: 0
- heat: 3000; min 843; max 8660
- Electricity: 882; min 17.136; max 6948
- heat: 2180; min 190; max 10400
- Electricity: 4752; min 48.96; max 42480

## Outputs
- heat: 0; uniform; missing unimportant

## Use advice
将通过蒸汽爆破生产的生物乙醇数据纳入生命周期评估时，确保系统边界包括蒸汽产生和爆炸过程中的能源消耗和排放。如果乙醇生产与农业（例如，使用农作物残留物）有关联，请考虑农业过程的上游影响。如果生产的生物乙醇纯粹用作化学品而非燃料，则排除汽油置换或信用。

## Review details
清单： 内部审查通过几个迭代步骤完成，涉及原始数据验证、原始数据记录、代表性、完整性、与 ISO 14040 和 14044 有关的建模的一致性。
