# 热轧卷;钢铁;钢材生产

Dataset: ILCD process, Unit process, single operation
Geography: CN
Reference year: 2006
Classification: Unit processes / Materials production / Metals and semimetals
Generated by: 王环宇, wanghuanyu00@126.com
Owner: 天工LCI数据工作小组
Review: Dependent internal review by 天工LCI数据工作小组
Amounts: no units in this file; such an amount is in the reference unit of its flow, which a separate flow dataset defines
copyright: false
licenseType: Free of charge for all users and uses

## General comment
热轧卷通常用于建筑构件如I型梁和轨道、汽车框架以及生产管道和管材的制造。它是重工业的基础材料，特别是对于需要坚固钢材构件的大型结构项目和制造过程。

## Reference product
- steel hot rolled coil: 1; measured

## Inputs
- iron: 1.349; measured
- freshwater,freshwater: 14.621; measured
- primary energy from solar energy: 21.64; measured

## Outputs
- carbon dioxide (fossil): 1.889; measured
  原文未区分bio和fossil，根据专家判断,钢铁生产过程中碳排放源此处为fossil）
- phenol,Sulphur oxides (as SO2): 0.002689; measured
- nitrous oxide: 0.002429; measured
- chemical oxygen demand: 0.000121; measured

## Use advice
在使用此数据集进行生命周期评价时，请确保将热轧阶段作为门到门评估的一部分。考虑加热和变形过程中的能耗和排放。如果您的评估包括生命周期末端建模，请考虑钢材的潜在可回收性。数据用户还应考虑能源来源和技术水平的区域差异，这些差异可以影响钢铁生产的环境影响。

## Review details
清单： 内部审查通过几个迭代步骤完成，涉及原始数据验证、原始数据记录、代表性、完整性、与 ISO 14040 和 14044 有关的建模的一致性。
