# 低密度聚乙烯（LDPE）生产;低密度聚乙烯

Dataset: ILCD process, Unit process, black box
Geography: CN
Reference year: 2020
Classification: Unit processes / Materials production / Plastics
Functional unit: considering 1 kg resin production as the functional unit.
Generated by: 郭慧娟, GHJ@email.ncu.edu.cn
Owner: 天工LCI数据工作小组
Review: Dependent internal review by 天工LCI数据工作小组
Amounts: no units in this file; such an amount is in the reference unit of its flow, which a separate flow dataset defines
copyright: false
licenseType: Free of charge for all users and uses

## General comment
通过前期原油精炼得到乙烯和丙烯，然后分别聚合成PE和PP。对于PE，根据不同的聚合方法得到了HDPE和LDPE

## Geography
Process-based data from China were used, yet if not available, data from Europe were applied instead.

## Time period
Process-based data from China were used, yet if not available, data from Europe were applied instead. The electricity input was developed based on the national grid structure in China (Table S3), which was obtained from the share of the electric power structure in 2020 (National Bureau Statistics of China, 2020).

## Technical purpose
低密度聚乙烯（LDPE）通通过从前期原油精炼过程中得到的乙烯聚合而成。LDPE应用广泛，包括塑料袋、容器、薄膜和管材，其应用主要基于其柔韧性和低成本。它还用于生产家庭和消费品的塑料零件，例如玩具和家具，以及建筑行业中的供水管道和隔热材料。本数据集特别聚焦LDPE，表明其主要应用在需要其特定属性，如柔韧性、化学抗性和低吸水性的领域。

## Model description
life cycle environmental and human health impacts were modeled using SimaPro software (version 8.5) with Ecoinvent 3 and ELCD (European Reference Life Cycle Database) databases.

## Reference product
- Polyethylene: 1; missing unimportant
  LDPE

## Inputs
- ethylene: 1.05; missing unimportant
- naphtha: 0.05; missing unimportant
- Electricity: 3; missing unimportant

## Outputs
All rows: missing unimportant
- Volatile Organic Compounds (VOCs): 7e-6
- ethane: 0.022
- toluene: 7e-6
- phenol: 9e-5
- mercury: 1.8e-8

## Data treatment and extrapolations
ReCiPe method (Europe H/H) was used as the assessment method for consistency.

## Use advice
本生命周期评估（LCA）数据集包含关于中国LDPE生产的详细过程基础信息，当中国数据不可用时，使用了欧洲的补充数据。用户应注意，电力输入参数是针对2020年中国国家电网结构量身定做的，可能与当前或区域电网组成不同。为了一致性评估环境与人体健康影响，已采用ReCiPe方法（欧洲H/H）。在模拟生命周期影响时，用户应确保使用SimaPro软件（版本8.5）结合Ecoinvent 3和ELCD数据库，并将1公斤树脂生产作为功能单位以保证方法论的一致性。将这些结果推广到不同地理语境或不同电网能源组合时应谨慎。

## Review details
清单： 内部审查通过几个迭代步骤完成，涉及原始数据验证、原始数据记录、代表性、完整性、与 ISO 14040 和 14044 有关的建模的一致性。

## Data sources
- An, J., Wu, F., Wang, D. & You, J. Estimated material metabolism and life cycle greenhouse gas emission of major plastics in China: A commercial sector-scale perspective. Resources, Conservation and Recycling 180, (2022).
