# 铁矿开采;铁矿石;采矿（Z11）

Dataset: ILCD process, Unit process, single operation
Geography: CN
Reference year: 1998
Classification: Unit processes / Materials production / Non-energetic raw materials
Generated by: 付翔, 1162850692@qq.com
Owner: 天工LCI数据工作小组
Review: Dependent internal review by 天工LCI数据工作小组
Amounts: no units in this file; such an amount is in the reference unit of its flow, which a separate flow dataset defines
copyright: false
licenseType: Free of charge for all users and uses

## General comment
来自表 4-15 Z11 钢厂生产吨材环境负荷编目表

## Time period
论文提到钢铁企业环境总体数据为1998年的吨钢环境基础数据。

## Technical purpose
该数据集描述了铁矿石生产过程，用作钢铁工业的原材料。通过这一开采过程提取的铁矿石用于钢铁制造设施，是生产各种钢铁产品的关键输入。

## Reference product
- Iron ore: 3383; measured
  铁矿石

## Inputs
- Energy, geothermal, converted: 879.433; measured
- water: 5284; measured

## Outputs
All rows: measured
- sulfur dioxide: 0.064
- cyanide: 1e-5
- phenol: 6.8e-5
  挥发酚
- Hydrocarbons, aliphatic, alkanes, unspecified: 0.001915
  石油类
- Suspended solids, unspecified: 0.064277
- chemical oxygen demand: 0.023038

## Use advice
该数据集代表基于1998年数据的钢铁生产每公吨的环境负荷清单。用户应了解该数据集特定于Z11铁矿开采过程。由于数据为历史数据，使用时应谨慎，以进行基线设定和与更新数据比较。应考虑随时间变化的技术进步和行业实践变化。此外，将此数据集纳入更广泛的生命周期评估研究时，应确保系统边界的兼容性，并在适用时适当反映回收和再利用情景。

## Review details
清单： 内部审查通过几个迭代步骤完成，涉及原始数据验证、原始数据记录、代表性、完整性、与 ISO 14040 和 14044 有关的建模的一致性。

## Data sources
- 周和敏. 钢铁材料生产过程环境协调性评价研究. (北京工业大学, 2001).
