# 稀土元素溶剂萃取;稀土元素;氟碳铈矿路线;含稀土元素矿石

Dataset: ILCD process, Unit process, single operation
Geography: NMG-CN
Reference year: 2014
Classification: Unit processes / Materials production / Non-energetic raw materials
Functional unit: The functional unit of this study is the production of 1 kg of the basket REO from each corresponding mineralogical and processing route.
LCI method principle: Attributional
LCI method approaches: Allocation - market value
Generated by: 汪涛, twang@iue.ac.cn
Owner: 天工LCI数据工作小组
Review: Dependent internal review by 天工LCI数据工作小组
Amounts: no units in this file; such an amount is in the reference unit of its flow, which a separate flow dataset defines
copyright: false
licenseType: Free of charge for all users and uses

## General comment
稀土元素溶剂萃取工艺用于从氟碳铈矿（矿石）中分离和精炼稀土元素。该过程是包括采矿和多个产品精加工阶段（如沉淀和煅烧）在内的生产系统的一部分。通过此方法生产的稀土元素是制造高科技设备、磁铁、合金、玻璃以及其他需要稀土元素的工业应用不可缺少的。

## Technology and included processes
在这项研究中，对稀土生产系统进行了分析，从采矿到溶剂萃取，其中包含沉淀和煅烧等产品精加工过程

## Reference product
- Rare Earth Oxides: 1; calculated
  REO

## Inputs
All rows: calculated
- Rare Earth chloride solution: 1.12
  Concentrated RECl Solution from acid roasting
- Hydrochloric acid: 6
- Disooctyl Phosphate (P204): 0.005
  P204 Extractant
- ammonia: 0.6
- Kerosene: 0.02
- Ammonium bicarbonate: 1.6
- Sodium carbonate: 1.05
- Active carbon: 0.04
  Powdered Activated Carbon
- Electricity: 21.6
- water: 200

## Outputs
All rows: calculated
- Spray mold: 1.08
  Ammonium Chloride
- Suspended solids, unspecified,Suspended solids, unspecified: 0.04
- chemical oxygen demand: 0.02
- ammonia: 0.15
- lead: 0.0001
- Oils, unspecified: 0.001
- copper: 7.13e-7
- zinc: 0.0003
- cadmium: 1.6e-5
- chromium: 0.0002
- chromium VI: 6e-5
- nickel: 3.68e-6
- mercury: 1e-9
- phosphorus, total: 0.0006
  Total Phosphorous (water, unspecified)
- nitrogen, total (excluding N2): 0.01
- particles (> PM10),particles (> PM10),particles (>PM10): 1.68e-6
- hydrogen chloride: 2.688e-6
- carbon dioxide (fossil): 0.00144655
  原文未区分bio和fossil，根据专家判断此处为fossil
- sulphuric acid: 1.512e-6
- chloride: 1.008e-6
- nitrous oxide: 6.719e-6

## Deviations from the LCI method approaches
In this study, the REE production system was analyzed from mining up to and including solvent extraction which contains product finishing processes such as precipitation and calcination (Fig. 1). The other categories assessed in the literature review were mineral type, radioactivity, waste treatment, and co-mining. For mineral type, it was noted that the mineralogy accounted for in each study was different, which makes comparison difficult. For radioactivity, we marked with an X those studies which exemplified radioactivity flows in the LCI (if provided). For waste, we distinguished those LCIs which quantified waste treatment flows. For co-mining, since all REE are co-products of each other, this column is meant to highlight the co-products in addition to REE.

## Use advice
在使用稀土元素生产系统的生命周期评估（LCA）数据时，确保考虑氟碳铈矿的具体矿物学组成，因为不同的矿物学特性可能影响研究之间的可比性。应关注生命周期清单（LCI）中如何计算放射性，以及如何量化废物处理流。此外，由于所有稀土元素相互之间是共生产品，因此共同开采影响应该被强调。该数据集最适合应用于旨在量化从指定矿物和加工路线生产 1 公斤混合稀土氧化物（REO）环境影响的LCA研究。

## Review details
清单： 内部审查通过几个迭代步骤完成，涉及原始数据验证、原始数据记录、代表性、完整性、与 ISO 14040 和 14044 有关的建模的一致性。

## Data sources
- Bailey, G. et al. Review and new life cycle assessment for rare earth production from bastnäsite, ion adsorption clays and lateritic monazite. Resources, Conservation and Recycling 155, 104675 (2020).
