# 华东小麦; 山东小麦生产

Dataset: ILCD process, Unit process, single operation
Geography: ZB-SD-CN
Classification: Unit processes / Materials production / Food and renewable raw materials
Functional unit: 1 t
LCI method principle: Attributional
LCI method approaches: Consequential
Generated by: Haoran Zhang, hrzhang@whu.edu.cn
Owner: 天工LCI数据工作小组
Review: Dependent internal review by 天工LCI数据工作小组
Amounts: no units in this file; such an amount is in the reference unit of its flow, which a separate flow dataset defines
copyright: false
licenseType: Free of charge for all users and uses

## General comment
冬小麦生命周期消耗的主要资源有土地、水和生 物等可再生资源以及化石能源、磷、钾等不可再生资 源，本研究仅考虑化石能源耗竭影响，包括煤炭、重 油、汽油、柴油和天然气等化石能源，见表 3。煤炭主 要用于化肥、农药和电力的生产，重油和天然气用于 氮肥生产，汽油主要用于机动车运输，柴油用于农机 耕作，电力用于化肥、农药生产和灌溉

## Geography
桓台县

## Technology and included processes
根据国际环境毒理学和化学学会（SETAC）的权 威专著[9]，LCA 由 4 个相互关联的阶段组成，即：目标 定义和范围界定（Goal and Scope Definition）；清单分 析（Inventory）；影响评价（Impact Assessment）；改进评 价( Improvement Assessment)

## Technical purpose
该数据集代表了中国山东省桓台县地区的冬小麦生产过程。该地区的冬小麦采用常规管理措施（CMP）和推荐管理措施（RMP）种植。生产过程包括使用尿素、复合肥、过磷酸钙、磷酸二铵和氯化钾等化肥，以及使用氧化乐果和辛硫磷等杀虫剂。在推荐管理措施中，不使用化学农药，并根据土壤肥力状况采用目标产量配方施肥法施肥。这个农业过程旨在生产可用于食品消费、动物饲料生产和其他需要冬小麦作为原材料的工业应用的小麦。

## Reference product
- maize grain: 1000; measured

## Inputs
All rows: measured
- hard coal,hard coal: 282.72
- heavy fuel oil: 12.15
- gasoline (regular): 1.8
- Diesel: 5.23
- natural gas; 44.1 MJ/kg: 27.1

## Outputs
All rows: measured
- carbon monoxide (fossil): 0.33
- Nitrogen oxides: 1.45
- sulfur dioxide: 2.52
- methane (fossil),methane (fossil): 1.87
- nitrous oxide: 0.04
- carbon dioxide (fossil),carbon dioxide (fossil): 611.75
- ammonium: 5.34
- Nitrogen trioxide: 2.43

## Deviations from the LCI method approaches
冬小麦生命周期主要包括原料开采与运输、化肥和农药的生产与运输以及作物种植三个阶段

## Data selection and combination
常规管理措施(conventional management practices, CMP)来自对桓台县10 个乡镇92 个农户近3 年投入产出的调查。化肥主要有尿素、复合肥、过磷酸钙、磷酸二铵和氯化钾。杀虫剂主要使用氧化乐果和辛硫磷，除草剂主要是2,4- 滴丁酯和莠去津等。推荐管理措施(recommended management practices, RMP)来自田方正等[8]的水肥管理模式优化研究结果，不使用化学农药，根据土壤肥力状况应用目标产量配方施肥法计算氮、磷、钾施用量。土肥、磷、钾和2/3 的氮肥作底肥，1/3的氮肥作拔节追肥。

## Use advice
该数据应由参与农业生产环境管理的利益相关者使用，特别是那些关注农业部门生命周期评估的人员。该数据对于模拟冬小麦生产的资源利用和环境排放至关重要。数据使用者在评估从原材料提取到农产品输出的冬小麦整个生命周期时，应该考虑CMP和RMP之间排放差异，以准确反映潜在的环境影响。此外，用户应考虑数据对中国山东地区的地理特定性。这意味着推广到其他小麦生产地区时应谨慎进行。

## Review details
清单： 内部审查通过几个迭代步骤完成，涉及原始数据验证、原始数据记录、代表性、完整性、与 ISO 14040 和 14044 有关的建模的一致性。

## Data sources
- 王明新,包永红,吴文良等.华北平原冬小麦生命周期环境影响评价[J].农业环境科学学报,2006(05):1127-1132.
