# 甲醇生产 ; 甲醇 ; 净合成气制甲醇路线 ; 净合成气

Dataset: ILCD process, Unit process, black box
Geography: ZJ-GD-CN
Reference year: 2018
Classification: Energy carriers and technologies / Other non-renewable fuels
Functional unit: A functional unit is defined as 4.48 ton of MTO methanol product
LCI method principle: Attributional
LCI method approaches: Allocation - mass
Generated by: 任亚楠, renyn15@tsinghua.org.cn
Owner: 天工LCI数据工作小组
Review: Dependent internal review by 天工LCI数据工作小组
Amounts: no units in this file; such an amount is in the reference unit of its flow, which a separate flow dataset defines
copyright: false
licenseType: Free of charge for all users and uses

## General comment
ID14丙烯生产;丙烯;煤制烯烃路线;煤;下属过程4

## Geography
催化裂化路线的案例工厂来自中国石化湛江东兴石油化工有限公司。企业位于广东省湛江市，其催化裂化制烯烃工艺建于2018年，丙烯年产能11.6万吨。

## Time period
工艺建于2018年

## Technical purpose
通过净合成气制甲醇路线生产的甲醇，通常称为‘合成气’，主要用于化工行业生产甲醛、乙酸以及做为MTO（甲醇转烯烃）过程的原料。此外，甲醇也被用作生产各种化学品如甲胺、甲基甲丙烯酸（MMA）的起始材料，并可以作为燃料或燃料添加剂。通过煤制烯烃路线，特别是通过催化裂化技术生产的丙烯，主要用于生产聚丙烯、丙烯氧化物和丙烯腈等化学品。

## Model description
考虑了各个子阶段涉及的所有相关投入原材料、能源、电力、蒸汽、水和辅助化学品的消耗，产出考虑了丙烯和副产品(如丙烷脱氢工艺生产的C4产品。采用质量分配法量化产品丙烯和副产品之间的环境负荷。此外，本模型还考虑了各工艺的废物排放。本研究注重于不同丙烯生产工艺的环境影响分析，因此，丙烯烃利用及其产品的报废处理以及、基础设施建设和以及设备维护不在本次评价边界范围之内。

## Reference product
- Methanol: 4480; measured
  MTO级甲醇

## Inputs
All rows: measured
- Syngas: 4820
  净化气
- Trisodium Phosphate: 90
  磷酸三钠
- nitrogen: 3.03
  低压氮气
- process steam: 5870
  蒸汽
- Water (fresh water): 4420
  新鲜水
- electricity mix: 121.212
  电

## Outputs
- total dissolved solids: 0.00605; measured
  TDS

## Data selection and combination
丙烯生产工艺详细的投入产出数据来自企业公开的环境影响评价报告，包括原料和辅料投入、能源和资源消耗，以及废气、废水和固体废物的排放。

## Use advice
在使用此数据进行生命周期评价（LCA）研究时，用户应根据提供的甲醇和丙烯生产过程的信息，仔细核算原材料投入、能源消耗和排放。必须使用质量分配法相应地分配丙烯及其副产品的环境影响。分析中必须考虑来自各个过程的废物排放。数据使用者须知，此数据集不包括丙烯烃使用阶段的环境影响、其产品的报废处理，以及相关的基础设施开发和设备维护的环境影响。

## Review details
清单： 内部审查通过几个迭代步骤完成，涉及原始数据验证、原始数据记录、代表性、完整性、与 ISO 14040 和 14044 有关的建模的一致性。

## Data sources
- 吕琳. 丙烯产品环境负荷及温室气体减排的碳税政策. (大连理工大学, 2022).
