# 球团矿生产;球团矿;球团

Dataset: ILCD process, Unit process, single operation
Geography: CN
Classification: Unit processes / Materials production / Other materials
Generated by: 付翔, 1162850692@qq.com
Owner: 天工LCI数据工作小组
Review: Dependent internal review by 天工LCI数据工作小组
Amounts: no units in this file; such an amount is in the reference unit of its flow, which a separate flow dataset defines
copyright: false
licenseType: Free of charge for all users and uses

## General comment
该数据集描述了用于生产球团矿的造粒过程，球团矿是钢铁制造过程的原材料前体。这种球团矿通常用于高炉-基氧炉（BF-BOF）途径的钢铁生产，尤其是在包括焦化作业和电弧炉（EAF）设施的大型综合钢铁厂中，用于钢铁的回收和制造。

## Geography
The data of the BF-BOF pathway were obtained from the large-scale integrated steel plants in China with an attached coking plant and EAF plant.

## Reference product
- Pellet: 165.8; measured

## Inputs
All rows: measured
- Iron ore: 160.7
  Iron ore (Domestic)
- Iron ore: 1.6
  Iron ore (Import)
- dolomite: 1.8
- quicklime: 0.3
  Quicklime
- Circulating water: 100
- bentonite: 2.8
- Coke oven gas: 7.3
  COG
- Blast furnace gas: 2.9
  BFG
- Linz-Donawitz gas: 0.2
  LDG
- Raw coal: 5.2
- Electricity: 23.4

## Use advice
使用此数据集的用户应在将数据应用于其生命周期评估（LCA）模型时，考虑特定于中国大型综合钢铁厂的技术适用性。应特别注意是否包括来自相关焦化厂和电弧炉厂运营的排放，因为它们是BF-BOF途径数据的一部分。确保关于地理和技术背景的假设与所建模的生命周期清单相符，特别是在可能考虑钢铁回收或使用替代钢铁制造技术的情景中。

## Review details
清单： 内部审查通过几个迭代步骤完成，涉及原始数据验证、原始数据记录、代表性、完整性、与 ISO 14040 和 14044 有关的建模的一致性。

## Data sources
- The carbon reduction potential of hydrogen in the low carbon transition of the iron and steel industry: The case of China
