# 水泥熟料煅烧;水泥熟料;流化床;磷石膏

Dataset: ILCD process, Unit process, single operation
Geography: YN-CN
Reference year: 2013
Classification: Unit processes / Materials production / Inorganic chemicals
Generated by: 曾奥, m202374287@hust.edu.cn
Owner: 天工LCI数据工作小组
Review: Dependent internal review by 天工LCI数据工作小组
Amounts: no units in this file; such an amount is in the reference unit of its flow, which a separate flow dataset defines
copyright: false
licenseType: Free of charge for all users and uses

## General comment
流化床工艺，先分解后煅烧的“二步法”

## Geography
数据来源于中试生产数据与理论计算

## Technology and included processes
循环流化床分解

## Technical purpose
此水泥熟料煅烧工艺采用流化床技术，通过'先分解后煅烧'的二步法单元过程。其应用在于使用磷石膏作为原料生产水泥熟料。该工艺包括水泥熟料的制造，并特别适用于中试规模的生产设施，其中采用实验生产数据和理论计算来优化材料和能源消耗。

## Reference product
- portland cement (CEM I): 1; calculated
  原数据为水泥熟料，所选流为普通硅酸盐水泥

## Inputs
- hard coal,hard coal: 0.175; calculated
- Phosphogypsum: 2.25; calculated
- industrial area: 0.0018; calculated

## Outputs
- carbon dioxide (fossil),carbon dioxide (fossil): 0.329; calculated
- sulfur dioxide: 0.916; calculated
- nitrous oxide: 0.007; calculated
- carbon monoxide,carbon monoxide (fossil): 0.164; calculated

## Data selection and combination
数据结合实测数据与理论计算

## Data treatment and extrapolations
从 物 耗、能 耗两部分入手，通过实 测 数 据 和 ＦａｃｔＳａｇｅ６．１ 软 件 计 算 得 出 的 热 力 学 数 据 ，得 出 清 单

## Use advice
该数据集来源于中试规模生产，并结合了循环流化床分解的理论计算。用户应注意，1kg水泥熟料的清单包含了所有主要原材料和所有必要的能源，不包括原材料的生产过程和非常微量的能量流（小于1%）。系统性排除了基础设施、服务或辅助设施的影响。数据集应当结合FactSage 6.1 软件来获得准确的热力学数据。在使用该数据进行生命周期评估研究时，应特别注意原材料生产过程的方法论背景以及潜在的能源组合变化。

## Review details
清单： 内部审查通过几个迭代步骤完成，涉及原始数据验证、原始数据记录、代表性、完整性、与 ISO 14040 和 14044 有关的建模的一致性。

## Data sources
- 张杭 et al. 不同分解工艺下磷石膏分解制水泥熟料的LCA研究. 材料导报 27, 302–305 (2013).
