# 土壤修复;异位修复;化学氧化;施工准备;基础设施建设;密闭大棚

Dataset: ILCD process, Unit process, black box
Geography: AH-CN
Reference year: 2023
Classification: Other Services / Repair and maintenance
Generated by: 桑春晖, sangch@mail.bnu.edu.cn
Owner: 天工LCI数据工作小组
Review: Dependent internal review by 天工LCI数据工作小组
Amounts: no units in this file; such an amount is in the reference unit of its flow, which a separate flow dataset defines
copyright: false
licenseType: Free of charge for all users and uses

## General comment
场地内建设尺寸为5 m×20 m×50 m的钢膜结构密闭大棚，用于场内临时化学氧化修复

## Geography
安徽省合肥市受重金属和有机物复合污染的钢铁厂地块

## Technology and included processes
建设修复必修用到的基础设施

## Technical purpose
该土壤修复过程涉及建造和操作一个临时钢膜结构封闭棚，尺寸为5米 x 20米 x 50米，用于场外化学氧化处理污染场地。此过程通常适用于工业场所，如重金属和有机化合物污染的钢铁厂，例如描述中的安徽省合肥市地块。修复设施允许受控且高效的处理受污染土壤，与周围环境隔离。

## Reference product
- enclosed shelter: 5000; estimated
  建成密闭大棚

## Inputs
- steel rebar: 4200; estimated
- Polyvinyl chloride: 1900; estimated
  PVC材料
- Polyethylene: 1000; estimated
  HDPE材料

## Use advice
使用该数据集的用户应专门将其应用于模拟利用临时钢膜结构封闭棚进行化学氧化处理污染物的现场外土壤修复项目的环境影响。有关场地背景的假设（工业区域，带有重金属和有机污染物）应与所描述的设施一致。方法论考虑必须包括准备阶段，基础设施发展，以及针对钢铁厂场地的独特应用。地理特异性（安徽省合肥市）可能会影响与运输相关的影响，并且如果适用，应被考虑在内。

## Review details
清单： 内部审查通过几个迭代步骤完成，涉及原始数据验证、原始数据记录、代表性、完整性、与 ISO 14040 和 14044 有关的建模的一致性。

## Data sources
- 桑春晖,杨欣桐,李香兰等.基于SEFA方法的异位土壤修复环境足迹分析——以某钢铁厂为例[J].中国环境科学,2023,43(10):
