# 锂电池回收有机酸浸过程（工艺 E）

Dataset: ILCD process, Unit process, single operation
Geography: CN
Reference year: 2013
Valid until: 2017
Classification: Unit processes / End-of-life treatment / Material recycling
Functional unit: FU is a typical type of LIB electrode material of 100 kg
Generated by: 马清源, m1120498928@163.com
Owner: 天工LCI数据工作小组
Review: Dependent internal review by 天工LCI数据工作小组
Amounts: no units in this file; such an amount is in the reference unit of its flow, which a separate flow dataset defines
copyright: false
licenseType: Free of charge for all users and uses

## General comment
采用弱酸（如乙酸、柠檬酸等）加还原剂作为浸取 剂，弱酸可与正极活性材料反应而不与集流体铝箔发生反应，可以实现有价金属 的选择性浸出，其产物通过调节 pH、补加金属盐等使有价金属共沉淀实现电极 活性物质再制备。

## Time period
数据来源于2013-2017

## Technical purpose
有机酸浸过程（工艺 E）使用弱酸（如乙酸、柠檬酸等）和还原剂作为浸出剂。该弱酸可选择性地与正极活性材料反应，不影响集流体铝箔，从而实现有价金属的选择性回收和电极材料的再生。通过调节 pH 值和添加金属盐以促进有价金属的共沉淀。该工艺适用于电池回收行业，特别是锂离子电池（LIB）电极材料的再生。

## Reference product
- Electrolyte: 100; input; missing unimportant
  电极浆料

## Inputs
All rows: missing unimportant
- Acetic acid: 93.3
- Hydrogen peroxide（25%）: 17
- sodium hydroxide: 3
- Sodium carbonate: 10.6
- water,water: 380
- natural gas,natural gas: 1.4
  天然气：8500 kCal
- Electricity: 64.08

## Outputs
All rows: missing unimportant
- Lithium carbonate: 10.5
- Graphite: 17.6
  石墨粉
- Al/Cu foil: 5.4
- Nickel salt: 14
  镍盐、金属
- Cobalt salt: 15
  钴盐、金属
- Manganese salt: 12
  锰盐、金属
- Ternary precursor: 10
- Slags: 4.8
- carbon dioxide (fossil): 9
  原文未区分bio和fossil，根据专家判断此处为fossil
- waste water - treated: 360

## Data selection and combination
工艺的投入产出来自文献综述所报道数据的平均结果，体现了“坟墓”到 “摇篮” 的代表性过程。本研究不考虑塑料及金属外壳的回收或处理，人工成本、 工厂建设费用及其对环境的影响亦不包括在此分析中。

## Data treatment and extrapolations
值得注意的是，欧盟的数据并非针对于某个行业的计算，部分进出口数据和回收信息不适合中国的 情况。因此，改进后的 CRMs 评价方法还结合了中国官方数据、文献报道和来自 贸易/行业协会等其它利益集团数据，对主要的 LIB 制造商、回收公司、中国的官方管理机构等利益相关方的数据进行了最佳估计。在数据的时效性方面，CRMs 评估中使用的数据的参考期是基于最近的 4 年平均值（即 2013 年-2016 年）。

## Use advice
使用此生命周期评估（LCA）数据集的用户应注意，工艺 E 的输入输出数据来源于 2013-2017 年代表性的“摇篮至坟墓”方法的文献综述平均数据。数据未考虑塑料和金属外壳的回收或处理，不包括人工成本、工厂建设费用及其对环境的影响。此外，在将这些基于欧盟的数据应用于中国环境时，用户应谨慎，因为数据可能不完全符合中国行业特定状况。该数据通过结合中国官方数据、行业报告和来自贸易协会的信息进行了预估，以更好地反映中国利益相关方的数据。在使用数据时，应参考最新的四年平均期数据，具体为 2013-2016 年。功能单位（FU）参考基于 100 公斤典型的 LIB 电极材料。

## Review details
清单： 内部审查通过几个迭代步骤完成，涉及原始数据验证、原始数据记录、代表性、完整性、与 ISO 14040 和 14044 有关的建模的一致性。

## Data sources
- 宋佳丽. 面向能源金属高效回收的资源关键性评价模型与应用. (天津大学, 2019).
