# 废旧NCM电池火法冶金术

Dataset: ILCD process, Unit process, single operation
Geography: CN
Reference year: 2018
Classification: Unit processes / End-of-life treatment / Material recycling
Functional unit: using 1 kWh as the functionalunit
Generated by: 彭菲, pengfei24@email.ncu.edu.cn
Owner: 天工LCI数据工作小组
Review: Dependent internal review by 天工LCI数据工作小组
Amounts: no units in this file; such an amount is in the reference unit of its flow, which a separate flow dataset defines
copyright: false
licenseType: Free of charge for all users and uses

## General comment
首先将完全放电的EoL NCM电池拆解和破碎。然后，电池材料通过1400℃高温冶炼（或称为烧结）过程进行处理。接着进行酸浸，溶剂萃取。最后氧化并进行900℃焙烧得到LiCoO2

## Technology and included processes
拆除电池外壳获得电极材料后 ，在高温环境加入石灰石进行焙烧，焙烧后的锂和铝形成炉渣，不被回收，形成合金的铜、 镍、 钴、锰通过进一步处理分离提取出来。

## Technical purpose
所述火法冶金过程用于回收使用寿命结束的镍钴锰（NCM）电池。这些回收材料，例如LiCoO2，特别适合用于生产新的锂离子电池。

## Reference product
- EoL NCM battery: 3.6; input; software or database

## Inputs
All rows: software or database
- Limestone: 1.36
- Sulphuric acid: 3.88
- sodium hydroxide: 2.88
  氢氧化钠，生产混合物/EU-28
- Hydrogen peroxide (30%): 0.085
  过氧化氢生产混合物/DE
- Lithium carbonate: 0.19
  碳酸锂，生产混合物/CN
- Electricity: 0.054
- natural gas,natural gas: 7.4

## Outputs
All rows: software or database
- Carbon dioxide (fossil): 10.32
  原文未区分bio和fossil，根据专家判断此处为fossil
- nickel: 0.96
- cobalt: 0.32
- copper: 0.98
- aluminium: 0.14

## Data selection and combination
数据来自多篇论文，难以区分。

## Use advice
使用数据时，必须考虑火法冶金回收过程的效率和环境影响。用户应注意，在生命周期评估中必须记入每个阶段的物料投入和排放污染物。由于熔炼和焙烧阶段特别耗能，应仔细评估对气候变化和资源耗竭的影响。根据该数据进行影响评估的功能单位是1 kWh的电池容量。

## Review details
清单： 内部审查通过几个迭代步骤完成，涉及原始数据验证、原始数据记录、代表性、完整性、与 ISO 14040 和 14044 有关的建模的一致性。

## Data sources
- Wang, Y. et al. Environmental impact assessment of second life and recycling for LiFePO4 power batteries in China. Journal of Environmental Management 314, 115083 (2022).
