# 地下水原位修复;地下水原位化学氧化;药剂制配设备

Dataset: ILCD process, Unit process, single operation
Geography: CA
Reference year: 2007
Classification: Unit processes / Other Services / Repair and maintenance
Generated by: 王宁, wang_ning@caep.org.cn
Owner: 天工LCI数据工作小组
Review: Dependent internal review by 天工LCI数据工作小组
Amounts: no units in this file; such an amount is in the reference unit of its flow, which a separate flow dataset defines
copyright: false
licenseType: Free of charge for all users and uses

## General comment
制药装置，包括制药储罐、混合装置

## Geography
The contaminated area was located 600 m from a river shore in the northern part of the prov-ince of Quebec， Canada.

## Technology and included processes
使用钢铁、乳胶、玻璃建造药剂制配装置

## Technical purpose
该工艺描述了地下水原位修复系统的使用，特别是侧重于原位化学氧化技术。开发的设备用于准备和分配修复过程所需的化学品。包括储罐和混合单元在内的药剂装置，专门设计用于处理加拿大魁北克省河岸附近的受污染地下水。这些装置预计将应用于环境管理中，特别是地下水净化项目。

## Reference product
- A device for configuring solid pharmaceuticals into liquid pharmaceuticals: 1; input; estimated
  地表制药系统

## Inputs
- Steel sections: 10534; estimated
  使用铁建造地表制药系统
- Latex: 1.7; estimated
  使用乳胶造地表制药系统
- Glass (formed & finished): 167; estimated
  使用玻璃造地表制药系统

## Use advice
使用该数据集时，建议用户考虑所描述的具体位置和环境条件。地理特定性（魁北克省河岸600米处）可能会影响数据对其他地点的适用性和有效性。用户还应注意，工艺中指示的建筑材料（钢铁、乳胶、玻璃）可能有特定的回收和处置考量。生产和运输这些材料所关联的能耗和排放应在整体环境影响评估中被考虑。此外，设备的使用寿命终止阶段也应包含在生命周期分析中。

## Review details
清单： 内部审查通过几个迭代步骤完成，涉及原始数据验证、原始数据记录、代表性、完整性、与 ISO 14040 和 14044 有关的建模的一致性。

## Data sources
- Cadotte, M., Deschênes, L. & Samson, R. Selection of a remediation scenario for a diesel-contaminated site using LCA. Int J Life Cycle Assess 12, 239–251 (2007).
