# 水泥生产;水泥, 替代成分 21-35%;混合固废

Dataset: ILCD process, Partly terminated system
Geography: CQ-CN
Classification: Materials production / Other mineralic materials
LCI method principle: Other
Generated by: 杨思琪, ysqsophia@gmail.com
Owner: 天工LCI数据工作小组
Review: Dependent internal review by 天工LCI数据工作小组
Amounts: no units in this file; such an amount is in the reference unit of its flow, which a separate flow dataset defines
copyright: false
licenseType: Free of charge for all users and uses

## General comment
固废包括矿渣、粉煤灰、石膏粉、煤渣、混掺石子、锅炉渣。重庆市有水泥企业近170家，2014年全年水泥总产量近7000万ｔ。目前重庆水泥原料主要是石灰石、天然石膏和砂岩及掺混石子等，占比分别约90%，5%和3%。

## Geography
重庆市内某工厂

## Technology and included processes
固废包括矿渣、粉煤灰、石膏粉、煤渣、混掺石子、锅炉渣。

## Technical purpose
该数据集描述了含有 21-35% 代用成分的水泥生产过程，这些代用成分来自于混合固废，包括矿渣、粉煤灰、石膏粉、煤渣、混掺石子和锅炉渣。这种特定类型的水泥可能适用于允许使用此类替代成分的建筑项目，并且因为利用了废弃物料，可能有助于可持续的建筑实践。

## Model description
重庆水泥厂内生产碳足迹主要包括燃料直接燃烧的碳足迹，电能消耗碳足迹、原材料的物化反应及熟料煅烧等。水泥生产的主要碳排放源，一是熟料煅烧；二是燃料直接燃烧和间接燃烧碳排放。排放的温室气体中99%以上为CO2，所以“水泥碳足迹”只涉及CO2碳足迹，不包括其他温室气体。

## Reference product
- cement, alternative constituents 21-35%: 1000
  水泥

## Inputs
- limestone, crushed, for mill: 944.904
  石灰石
- sandstone: 125.083
  砂岩
- Acid slag: 190.546
  酸渣
- hard coal: 160.361
  烟煤
- blast furnace slag: 102.833
  矿渣
- ash: 104.934
  粉煤灰
- gypsum stone (CaSO4-dihydrate): 60.7457
  石膏粉
- coal, powder: 66.086
  煤渣
- stone: 35.5168
  混掺石子
- Boiler slag: 30.5777
  锅炉渣
- electricity, medium voltage: 0.0377892
  火力发电。供电方式：江津供电局或自发电。
- diesel: 9.118e-6
  汽油，原文描述为柴油。
- hard coal; 26.3 MJ/kg: 140.412
  煤

## Outputs
- carbon dioxide: 667.466
  碳足迹（CO2）。不考虑原料开采和运输过程碳排放。重庆水泥厂内生产碳足迹主要包括燃料直接燃烧的碳足迹，电能消耗碳足迹、原材料的物化反应及熟料煅烧等。

## Use advice
数据集用户应专注于水泥生产的碳足迹，特别是要考虑与CO2排放相对应的排放因子。请注意，此处涉及的碳足迹不包括其他温室气体。在计算碳足迹时必须特别注意工厂使用的替代成分，因为与传统水泥生产相比，排放特征可能有所不同。确保在与其他数据集比较或在较大生命周期评估中集成时，对此类排放进行一致的核算。

## Review details
清单： 内部审查通过几个迭代步骤完成，涉及原始数据验证、原始数据记录、代表性、完整性、与 ISO 14040 和 14044 有关的建模的一致性。

## Data sources
- 杨李宁 & 付祥钊. (2016). 以重庆为案例的水泥碳足迹研究. 中国水泥, 8, 87–92.
