# Municipal wastewater treatment | Wastewater | Cyclic activated-sludge technology

Dataset: ILCD process, Unit process, black box
Reference year: 2014
Valid until: 2014
Classification: Materials production / Other mineralic materials
Generated by: YU Chenyang, yuchenyang0506@foxmail.com
Amounts: no units in this file; such an amount is in the reference unit of its flow, which a separate flow dataset defines

## Geography
Chongnonsi,Thailand

## Time period
2014年

## Reference product
- Wastewater: 1

## Inputs
- electricity: 1.12464
- transport in t*km
  transport by lorry

## Outputs
- Polyaluminium Chloride: 5e-5
  polymer
- Sludge: 0.0248

## Data sources
- A comparative life cycle assessment of municipal wastewater treatment plants in Thailand under variable power schemes and effluent management programs
