# 煤炭井工开采|开采煤炭

Dataset: ILCD process, Unit process, black box
Geography: SQ-HEN-CN
Reference year: 2015
Classification: Materials production / Other mineralic materials
Generated by: Linlin Yin, yinlinlin0623@163.com
Amounts: no units in this file; such an amount is in the reference unit of its flow, which a separate flow dataset defines

## Geography
永城矿区的资源 储量和储采比例与省内其他矿区相比具有较高的优势，现共划分 5 个勘探煤矿区、 2 个找煤预测区，永城矿区煤层的赋存较为稳定，开采技术条件也相对简单，可采煤层的倾角 比较平缓，适于机械化开采方式。

## Technology and included processes
煤炭开采环节的生产工艺流程包括井田开拓、井巷掘进、支护、回采等，井工开采主要通过井巷的开挖将埋在地下的煤炭实施开采并输送至地面。对该环节进行清单分析主要包括消耗燃料、原材料，还有废气的逸散。

## Reference product
- Hard coal, at consumer EU-27; uniform; article inperiodical
  论文通过对永城矿区井进行实地调研得到各项活动水平数据,现以新桥煤矿的 2013年的数据为例进行核算前的分析。2013年新桥煤矿矿井开采中“原煤产量”活动水平数据。

## Inputs
All rows: uniform; article inperiodical
- Hard coal, at consumer EU-27
  论文通过对永城矿区井进行实地调研得到各项活动水平数据,现以新桥煤矿的 2013年的数据为例进行核算前的分析。2013年新桥煤矿矿井开采中“原煤”消耗活动水平数据。
- Gasoline (regular)
  论文通过对永城矿区井进行实地调研得到各项活动水平数据,现以新桥煤矿的 2013年的数据为例进行核算前的分析。2013年新桥煤矿矿井开采中“汽油”消耗活动水平数据。
- Diesel
  论文通过对永城矿区井进行实地调研得到各项活动水平数据,现以新桥煤矿的 2013年的数据为例进行核算前的分析。2013年新桥煤矿矿井开采中“柴油”消耗活动水平数据。
- water
  论文通过对永城矿区井进行实地调研得到各项活动水平数据,现以新桥煤矿的 2013年的数据为例进行核算前的分析。2013年新桥煤矿矿井开采中“水”消耗活动水平数据。
- Electricity: 1.86595e8
  论文通过对永城矿区井进行实地调研得到各项活动水平数据,现以新桥煤矿的 2013年的数据为例进行核算前的分析。2013年新桥煤矿矿井开采中“电”消耗活动水平数据。
- Hard coal, at consumer EU-27
  新桥煤矿2013年矿井开采“原煤修正排放因子”
- Diesel
  新桥煤矿2013年矿井开采“柴油修正排放因子”
- Gasoline (regular)
  新桥煤矿2013年矿井开采“汽油修正排放因子”
- Electricity
  新桥煤矿2013年矿井开采“电修正排放因子”
- water
  新桥煤矿2013年矿井开采“水修正排放因子”
