# 天然气开发规划; KLS构造带;随机模拟

Dataset: ILCD process, Unit process, single operation
Geography: XJ-CN
Reference year: 2014
Classification: Unit processes / Energy carriers and technologies / Natural gas based fuels
LCI method principle: Attributional
LCI method approaches: Consequential
Generated by: Shikang Kang, 908798159@qq.com
Owner: 天工LCI数据工作小组
Review: Dependent internal review by 天工LCI数据工作小组
Amounts: no units in this file; such an amount is in the reference unit of its flow, which a separate flow dataset defines
copyright: false
licenseType: Free of charge for all users and uses

## General comment
天然气开发规划方案风险评价需要进行大量的随机模拟，必须借助计算机实现，为此基于天然气开发规划方案风险评价理论研制了评价软件，借助软件开展 应用研究

## Geography
新疆塔里木盆地克拉苏构造带

## Time period
数据搜集时间

## Technology and included processes
软件还集成了储量、 产量和效益常用评价方法，主要是产量预测的动态分析方法和数值模拟方法， 形成不同开发阶段气田推荐方法列表

## Technical purpose
此工业过程专为天然气田开发的风险评估而设计。基于天然气开发规划方案风险评估理论研制的评价软件适用于新疆塔里木盆地KLS构造带的随机模拟研究。它适用于已识别具有重要地质储备和特定油藏特征的气田A。软件集成了评估储备、产量和效益的各种方法，便于在气田开发的不同阶段进行生产预测的动态分析和数值模拟，以有效规划和运行。

## Reference product
- Shale gas well: 0.31; input; min 0.28; max 0.34; uniform; calculated
  内部收益率集中于28%-34%，全生命周期经济效益风险较小

## Inputs
- natural gas: 2.51e12; log-normal; missing unimportant
  文献中没有天然气投入量，假设天然气开采过程中投入量：输出量=1:1

## Outputs
- methane (fossil): 2.51e12; log-normal; missing unimportant
  2030年甲烷产量将达到 2.15E12

## Data selection and combination
KLS构造带内探明已开发气田只有气田Ａ， 上报探明地质储量2830×10⁸，可采储量2130×10⁸，气藏类型属于中孔中渗、 底水、 异常高压、 干气气藏。２００４年１１ 月１９日投产， ２００６年底所有井完钻， 并达到方案设计的107×10⁸ 产能规模。

## Data treatment and extrapolations
待钻圈闭落实， 因此采用资源转化率法对新增储量趋势进行预测。 历史上，构造带内及周围资源转化率集中于５０％-５５％之间， 以历史为参考， 同时以资 源量评价的可靠程度界限， 即上下浮动３０％， 作为概率区间， 概率曲线函数釆用正态分布

## Use advice
使用提供的LCA数据时，应将评价软件的随机模拟结果纳入对天然气开发规划风险的评估中。请确保以气田A的中孔隙度和中渗透性、底水、异常高压和干气藏特征为背景，解读软件输出的内容，如生产预测的动态分析和数值模拟结果。使用历史资源转化率作为概率预测的依据，并调整30%的浮动。应用正态分布函数来估计概率曲线。此数据应在其技术适用性和数据收集时间范围内使用。

## Review details
清单： 内部审查通过几个迭代步骤完成，涉及原始数据验证、原始数据记录、代表性、完整性、与 ISO 14040 和 14044 有关的建模的一致性。

## Data sources
- 陆家亮. 天然气开发规划风险量化评价模型研究[D].中国地质大学(北京),2020.DOI:10.27493/d.cnki.gzdzy.2014.000149.
