# 溶剂萃取;稀土元素;氟碳铈矿路线;IAD

Dataset: ILCD process, Unit process, single operation
Geography: CN
Reference year: 2014
Classification: Materials production / Inorganic chemicals
Functional unit: The functional unit of this study is the production of 1 kg of the basket REO from each corresponding mineralogical and processing route.
LCI method principle: Attributional
LCI method approaches: Allocation - market value
Generated by: 汪涛, twang@iue.ac.cn
Owner: 天工LCI数据工作小组
Review: Dependent internal review by 天工LCI数据工作小组
Amounts: no units in this file; such an amount is in the reference unit of its flow, which a separate flow dataset defines
copyright: false
licenseType: Free of charge for all users and uses

## General comment
所述工艺在采矿行业中用于通过氟碳铈矿路线生产稀土元素（REE）。这包括使用溶剂萃取技术在沉淀和煅烧等初步过程之后提炼开采的矿石。开采的产品主要用于各种高科技应用，包括电子产品、磁铁、可再生能源技术以及化学合成中的催化剂。

## Geography
南方七省

## Technology and included processes
在这项研究中，对稀土生产系统进行了分析，从采矿到溶剂萃取，其中包含沉淀和煅烧等产品精加工过程

## Reference product
- Rare Earth Oxides: 1; calculated
  REO

## Inputs
All rows: calculated
- water: 0.0563
- Disooctyl Phosphate (P204): 0.0253
- Sodium hydroxide: 2.67
- Rare Earth Oxides: 1.17
  REO concentrate production from ion-adsorption deposits, in-situ leaching, 91% purity
- hydrogen chloride: 3.23
- Electricity: 0.954
- antimony: 0.791
  citric acid

## Outputs
All rows: calculated
- municipal solid waste deposition: 0.00531
- Water (groundwater from technosphere, waste water): 0.0538
- Low radioactive wastes: 0.108
- Hazardous waste (deposited, hibernating in ground, non elementary flow): 0.00268
- Sludge: 0.00215
- sodium: 0.00144
- hydrogen chloride: 0.0062
- water: 0.075
- chlorine: 0.0127

## Deviations from the LCI method approaches
In this study, the REE production system was analyzed from mining up to and including solvent extraction which contains product finishing processes such as precipitation and calcination (Fig. 1). The other categories assessed in the literature review were mineral type, radioactivity, waste treatment, and co-mining. For mineral type, it was noted that the mineralogy accounted for in each study was different, which makes comparison difficult. For radioactivity, we marked with an X those studies which exemplified radioactivity flows in the LCI (if provided). For waste, we distinguished those LCIs which quantified waste treatment flows. For co-mining, since all REE are co-products of each other, this column is meant to highlight the co-products in addition to REE.

## Use advice
从这项研究中得到的生命周期清单（LCI）数据集特定于南方七省通过氟碳铈矿路线的稀土元素溶剂萃取。在比较这个LCI数据集与其他数据集时应格外小心，因为矿物学、放射性和废物处理过程的差异可能导致不一致性。特别注意那些示例放射性并量化废物处理流量的研究所使用的方法论。在考虑共采影响时，重要的是除了REE之外还要评估共产品。这个LCI数据代表了与指定矿物和加工路线生产1公斤REO篮子相关的环境输入和输出。

## Review details
清单： 内部审查通过几个迭代步骤完成，涉及原始数据验证、原始数据记录、代表性、完整性、与 ISO 14040 和 14044 有关的建模的一致性。

## Data sources
- Bailey, G. et al. Review and new life cycle assessment for rare earth production from bastnäsite, ion adsorption clays and lateritic monazite. Resources, Conservation and Recycling 155, 104675 (2020).
