# 猪肉生产 ; 肉猪饲养

Dataset: ILCD process, Unit process, single operation
Geography: ZY-GS-CN
Reference year: 2012
Classification: Unit processes / Materials production / Food and renewable raw materials
Functional unit: 1kg pork as functional unit (FU)
Generated by: 杨瑞, 1632707028@qq.com
Owner: 天工LCI数据工作小组
Review: Dependent internal review by 天工LCI数据工作小组
Amounts: no units in this file; such an amount is in the reference unit of its flow, which a separate flow dataset defines
copyright: false
licenseType: Free of charge for all users and uses

## General comment
在生猪育肥期内，育肥猪饲料全部为精饲料

## Geography
根据作者对张掖市前进牧业石岗墩牧场调查得到平均每头奶牛每天耗水 70kg

## Time period
猪饲料成分（刘鸣达等，2012）

## Technology and included processes
通过 LCA 评价这四种畜产品，从原材料生产到最终产品产 出全过程的各种资源消耗、产品投入、环境排放，在同一种评价模型中评价四种 畜产品，定性、定量地评估单位畜产品生产对某一环境影响类型的影响程度、以 及对环境综合影响，最终分别得到生产 1kg 牛肉、1kg 牛奶、1kg 猪肉、1kg 鸡 蛋对环境的影响指标，通过分析比较四种畜产品生产对环境的负荷，为我国畜牧 业养殖结构和畜产品生产结构调整提供建议。并且通过在张掖市前进牧业实地调 研，借鉴前进牧业合作社发展模式，探讨我国草地农业发展模式。

## Technical purpose
所述工艺特别涉及猪肉生产，重点关注使用全精饲料的猪只育肥阶段。这表明猪只主要用于肉类生产。这些育肥猪可能是较大规模农业畜牧农场或作业的一部分。出栏时这些猪的平均体重为125公斤。这组数据可用于模型化猪肉生产的环境影响，并与其他蛋白源进行比较，或用来衡量特定农业作业的效率和环境足迹。

## Reference product
- pig: 1; measured
  猪肉

## Inputs
- maize grain: 2.1; measured
  玉米
- wheat: 1.4; measured
  小麦
- soybean: 0.32; measured
  大豆
- water: 7; measured

## Data selection and combination
出栏时平均体重为 125kg（刘 鸣达等，2012），料肉比为 3：1（张颖等，2010）

## Use advice
在应用此生命周期评价（LCA）数据进行猪肉生产分析时，用户需确保他们纳入了提及的特定饲料制度（全精饲料的独家使用），因为这显著影响环境足迹。同样，用户也应关注分配的每头奶牛每天70公斤的水消耗，这可能是水资源影响评估的一个考虑因素。功能单位为1公斤猪肉，应用于系统边界内的比较和缩放。反映平均重量和饲料至肉比率的数据提供了计算猪肉生产生命周期内输入和输出所需的关键参数。

## Review details
清单： 内部审查通过几个迭代步骤完成，涉及原始数据验证、原始数据记录、代表性、完整性、与 ISO 14040 和 14044 有关的建模的一致性。

## Data sources
- 魏云. 基于生命周期评价的禽畜产品环境影响评价及对策探讨. (兰州大学, 2016).
