# 轮胎生产;混合化合物;复合混合;天然橡胶、合成橡胶、炭黑、二氧化硅、氧化锌、硬脂酸、润滑油、加工剂、活性粘土

Dataset: ILCD process, Unit process, single operation
Geography: CN
Reference year: 2014
Classification: Unit processes / Materials production / Non-energetic raw materials
Generated by: Cui, di, 2806553850@qq.com
Owner: 天工LCI数据工作小组
Review: Dependent internal review by 天工LCI数据工作小组
Amounts: no units in this file; such an amount is in the reference unit of its flow, which a separate flow dataset defines
copyright: false
licenseType: Free of charge for all users and uses

## General comment
生产阶段相当复杂，包括复合共混、轧制、挤出、包环生产、切割成型、硫化和测试等工艺。我们将密切相关的流程与避免分配。确定了以下四种主要生产工艺：复合共混、轧制和挤出，切割成型，硫化成型。

## Time period
”评估中使用了中国最大的轮胎公司之一在2014年现场收集的数据“。文章中已说明数据调研与2014年，但没有具体时间，所以该时间定位2014年1月1日。

## Technical purpose
所描述的工业过程涉及轮胎生产。它使用的混合化合物包括天然橡胶、合成橡胶、炭黑、二氧化硅、氧化锌、硬脂酸、润滑油、加工剂和活性粘土。该过程适用于各种类型的轮胎制造，其中包括复合共混、轧制、挤出、包环生产、切割成型、硫化以及测试等关键阶段。所述阶段确保了用于汽车应用的高质量轮胎的生产，包括私家车、商用卡车和其他类型的机动交通工具。

## Reference product
- Tire: 9.497; measured

## Inputs
All rows: measured
- Natural Rubber: 1.859
- synthetic rubber: 2.471
- Carbon Black: 2.515
- Silicon dioxide: 0.077
- Electricity: 14.44
- steam: 0.76
- Tap water: 6.96

## Outputs
- non-methane volatile organic compounds: 5e-6; measured
- chemical oxygen demand: 0.00173; measured
- Suspended solids, unspecified: 0.00019; measured
- Waste rubber,Waste fiber fabric: 0.001; measured

## Data selection and combination
调查轮胎产品中使用的原材料数据来源于中国最大轮胎公司之一的现场调查。这些数据是在2014年目标轮胎产品制造期间收集的。还考虑了其他材料，如活性粘土、氧化锌、硬脂酸、加工剂和润滑油。这些其他材料的生命周期背景数据来自Ecoinvent 3.0的全球平均LCI数据

## Use advice
数据集用户在评估LCA时应特别考虑生产年份，因为数据是2014年现场收集的。所描述的技术方面与当时相关，用户在将此数据应用于当前评估时可能需要考虑轮胎生产的技术进步。特别是，如氧化锌、硬脂酸和加工剂等材料的回收应在其各自生命周期的背景下进行评估，Ecoinvent 3.0为全球平均值提供了这些数据。数据用户应整合紧密相关的流程以避免分配错误，并应确保数据质量和相关性。

## Review details
清单： 内部审查通过几个迭代步骤完成，涉及原始数据验证、原始数据记录、代表性、完整性、与 ISO 14040 和 14044 有关的建模的一致性。

## Data sources
- Sun X, Liu J, Hong J, et al. Life cycle assessment of Chinese radial passenger vehicle tire[J]. The International Journal of Life Cycle Assessment, 2016, 21: 1749-1758.
