# 玻璃生产 ;夹层玻璃;切割

Dataset: ILCD process, Unit process, single operation
Geography: SX-ZJ-CN
Reference year: 2004
Classification: Unit processes / Materials production / Glass and ceramics
Generated by: 和夏夏, 18616148319@163.com
Owner: 天工LCI数据工作小组
Review: Dependent internal review by 天工LCI数据工作小组
Amounts: no units in this file; such an amount is in the reference unit of its flow, which a separate flow dataset defines
copyright: false
licenseType: Free of charge for all users and uses

## General comment
该工业过程数据集涉及PVB（聚乙烯醇丁醛）薄膜的生产和切割夹层玻璃。它通常用于生产安全和安保玻璃产品，例如汽车挡风玻璃、建筑用玻璃以及不同行业的各种防护玻璃。

## Reference product
- polyvinyl butyral PVB胶片: 19500; measured
  PVB胶片，polyvinyl butyral

## Inputs
- Electricity: 59760; measured
- polyvinyl butyral PVB胶片: 20000; measured
  PVB胶片，polyvinyl butyral

## Outputs
- Waste (solid): 500; measured

## Use advice
在使用该数据集进行生命周期评估（LCA）时，请确保LCA的范围清晰地定义了玻璃切割过程的界限。考虑切割阶段的能耗和产生的废物。此外，还需要考虑PVB薄膜的来源和回收潜力，因为它可能对环境评估结果产生重大影响。

## Review details
清单： 内部审查通过几个迭代步骤完成，涉及原始数据验证、原始数据记录、代表性、完整性、与 ISO 14040 和 14044 有关的建模的一致性。

## Data sources
- 年产5600吨钢化玻璃及250吨夹层玻璃生产线建设项目环境影响报告
