# 电力生产 ; 火电 ; 广西壮族自治区

Dataset: ILCD process, Unit process, single operation
Geography: GX-CN
Reference year: 2019
Classification: Unit processes / Energy carriers and technologies / Electricity
Generated by: 熊若熙, xiongrx0126@163.com
Owner: 天工LCI数据工作小组
Review: Dependent internal review by 天工LCI数据工作小组
Amounts: no units in this file; such an amount is in the reference unit of its flow, which a separate flow dataset defines
copyright: false
licenseType: Free of charge for all users and uses

## General comment
火电发电包括原煤、洗煤、石油、天然气等十七种化石燃料。该过程只考虑直接发电过程，不考虑上游原材料开采加工和下游消费

## Time period
根据2019年能源统计年鉴数据计算

## Technical purpose
该数据集中提到的广西壮族自治区的火电发电过程，主要使用包括原煤、洗煤、石油和天然气在内的十七种化石燃料转换能源。该过程主要用于直接生产电能，供区域消费使用，不包括上游原材料提取及加工过程或下游消费者使用的电力。

## Reference product
- electricity for thermal power: 3.6; calculated

## Inputs
All rows: calculated
- Raw coal: 0.408746
- Coke oven gas: 0.007461
- blast furnace gas: 0.122026
- Converter gas: 0.010273
- Diesel: 4.372e-5
- Petroleum Coke: 0.00130948
- natural gas: 0.001202

## Outputs
- carbon dioxide (fossil): 0.883318; calculated
- sulfur dioxide: 0.000146361; calculated
- Nitrogen oxides: 0.00023433; calculated
- particles (> PM10): 3.1121e-5; calculated

## Data treatment and extrapolations
核算方法参考《企业温室气体排放核算方法与报告指南 发电设施》。不同形式发电量及燃料用量来自于《中国能源统计年鉴 2020》中的第三章（能源生产） 和第六章（地区能源平衡表）。用于计算二氧化碳排放因子的低位发热量、单位热值含碳量等燃料参数来自于《2019 年度中国区域电网二氧化碳基准线排放因子 OM 计算说明》、《企业温室气体排放核算方法与报告指南 发电设施》

## Use advice
使用者应参照《企业温室气体排放核算方法与报告指南 发电设施》来核算排放数据。另外，关于不同形式的发电和燃料消耗数据，应来源于《中国能源统计年鉴 2020》的第三章（能源生产）和第六章（地区能源平衡表）。用于计算二氧化碳排放因子的燃料参数如低位发热量和单位热值含碳量，应来自《2019年度中国区域电网二氧化碳基准线排放因子OM计算说明》和重申的指南。本数据集严格关系到电力的直接生成，不包括像上游燃料提取和加工或电力终端使用等生命周期考虑。

## Review details
清单： 内部审查通过几个迭代步骤完成，涉及原始数据验证、原始数据记录、代表性、完整性、与 ISO 14040 和 14044 有关的建模的一致性。

## Data sources
- 熊若熙. 中国电力生产和消费二氧化碳与污染物排放因子核算. (清华大学, 2023).
