# Siliconcarbide|Quartzsand|Resistancefurnacemethod|All sizes / /|碳化硅|石英砂|电阻炉法|所有规模

Dataset: ILCD process, Partly terminated system
Geography: CN
Reference year: 2019
Classification: Materials production / Other mineralic materials
Generated by: The data was created by the Office of the Second National Pollution Source Census of the Ministry of Ecology and Environment, and the data was organized by the TianGong Plan team for ILCD format / 生态环境部第二次全国污染源普查工作办公室创建数据，天工计划团队常慧敏整理数据为ILCD格式
Amounts: no units in this file; such an amount is in the reference unit of its flow, which a separate flow dataset defines
copyright: false

## Technology and included processes
the Technical of end-of-pipe management technology for pollution silicon carbideis/，Its Technical efficiency of end-of-pipe management0
污染物指标废气量的末端治理技术是/，其效率为0，末端治理设施实际运行率（k值）计算公式为k=废气治理设施运行时间(小时/年）/企业正常生产时间（小时/年）

## Reference product
- silicon carbide: 1000; calculated
  原文件中描述污染物类别为Product，污染物指标为碳化硅，此处对其进行了匹配工作，将其匹配到LCAflow库里面相最符合的流，污染物指标备注为废气量

## Outputs
- Exhaust gas: 31938; calculated
  原文件中描述污染物类别为废气，污染物指标为废气量，此处对其进行了匹配工作，将其匹配到LCAflow库里面相最符合的流，污染物指标备注为废气量
- particles (PM2.5 - PM10): 41.148, 1.0287, 2.0574 (3 entries); calculated
  原文件中描述污染物类别为废气，污染物指标为颗粒物，此处对其进行了匹配工作，将其匹配到LCAflow库里面相最符合的流，污染物指标备注为颗粒物
- Nitrogen oxides: 0.93; calculated
  原文件中描述污染物类别为废气，污染物指标为氮氧化物，此处对其进行了匹配工作，将其匹配到LCAflow库里面相最符合的流，污染物指标备注为氮氧化物
- sulfur dioxide: 0.219, 0.4818, 0.657, 0.0438, 0.219 (5 entries); calculated
  原文件中描述污染物类别为废气，污染物指标为二氧化硫，此处对其进行了匹配工作，将其匹配到LCAflow库里面相最符合的流，污染物指标备注为SO2

## Data sources
- 第二次全国污染源普查产排污核算系数手册（试用版）,四级代码3218文件，在完整版文件中第5023页
