# Bioethanol ; Liquid hot water

Dataset: ILCD process
Geography: GLO
Classification: Energy carriers and technologies / Renewable fuels
Generated by: 袁嘉翼, jiayi_y@mail.bnu.edu.cn
Owner: 天工LCI数据工作小组
Review: Dependent internal review by 天工LCI数据工作小组
Amounts: no units in this file; such an amount is in the reference unit of its flow, which a separate flow dataset defines
licenseType: Free of charge for all users and uses

## General comment
使用热水预处理生产的生物乙醇可用作可再生燃料和绿色化学原料，适用于交通燃料混合物、能源生成，以及可能用于生产可生物降解塑料和其他生物基材料。

## Inputs
All rows: uniform; missing unimportant
- Electricity: 0.4608; min 0.11232; max 84.24
- heat: 17400; min 8390; max 41000
- Electricity: 77.4; min 33.768; max 142.92
- heat: 6160; min 652; max 21600
- Electricity: 633.6; min 96.84; max 1947.6

## Outputs
- heat: 9340; min 4420; max 22100; uniform; missing unimportant

## Use advice
使用此数据集时，需考虑热水过程的效率及其对总体生物乙醇产量的影响。应关注数据的地理相关性、能源输入，以及系统边界内考虑的潜在共产品或副产品。数据应与关于生物燃料可持续性和环境影响评估的当前指南一起使用。

## Review details
清单： 内部审查通过几个迭代步骤完成，涉及原始数据验证、原始数据记录、代表性、完整性、与 ISO 14040 和 14044 有关的建模的一致性。
