# Bioethanol ; Acid

Dataset: ILCD process
Geography: GLO
Classification: Energy carriers and technologies / Renewable fuels
Generated by: 袁嘉翼, jiayi_y@mail.bnu.edu.cn
Owner: 天工LCI数据工作小组
Review: Dependent internal review by 天工LCI数据工作小组
Amounts: no units in this file; such an amount is in the reference unit of its flow, which a separate flow dataset defines
licenseType: Free of charge for all users and uses

## General comment
这种含酸性的生物乙醇适用于需要较低pH值的应用。它通常用于生化过程中，或作为特定工业反应中的溶剂，其中酸性特性可能是有益的。

## Inputs
All rows: uniform; missing unimportant
- Electricity: 17.928; max 152.64
- heat: 5730; min 372; max 1570
- Electricity: 568.8; min 45; max 6840
- heat: 2080; min 244; max 5790
- Electricity: 608.4; min 65.52; max 2368.8

## Outputs
- heat: 2880; min 130; max 8400; uniform; missing unimportant

## Use advice
使用此数据集的用户应注意，由于生物乙醇的酸性质可能会影响后续化学反应，因此在其工艺设计中应考虑此变量。应注意确保与构建材料的兼容性以及安全处理含酸生物乙醇。在生命周期评估中，应强调酸含量至关重要的特定应用，并应考虑酸性对环境潜在影响。

## Review details
清单： 内部审查通过几个迭代步骤完成，涉及原始数据验证、原始数据记录、代表性、完整性、与 ISO 14040 和 14044 有关的建模的一致性。
