# 电池加工 ; 多晶硅太阳能电池 ; 掺杂元素的高温扩散

Dataset: ILCD process, Unit process, single operation
Geography: CN
Reference year: 2014
Classification: Unit processes / Systems / Electrics and electronics
Functional unit: The functional unit of the LCA study was 1 kWh based on a multi-Si PV module
LCI method principle: Attributional
LCI method approaches: Allocation
Generated by: 杨锦锋, yjfzfshn@163.com
Owner: 天工LCI数据工作小组
Review: Dependent internal review by 天工LCI数据工作小组
Amounts: no units in this file; such an amount is in the reference unit of its flow, which a separate flow dataset defines
copyright: false
licenseType: Free of charge for all users and uses

## General comment
多晶硅

## Geography
本研究对中国采用多晶硅组件的光伏系统进行了生命周期评估

## Time period
文章发表

## Technical purpose
通过高温扩散工艺生产的多晶硅(Multi-Si)太阳能电池主要用于光伏(PV)组件的制造，这些组件是构建太阳能电力系统不可或缺的组成部分。这些系统将太阳能转化为电能，有效地为住宅、商业和工业应用提供可再生能源。

## Reference product
- Multi-Si solar cell,Multi-Si solar cell,Multi-Si solar cell: 1090; measured
  Multi-Si Solar cell

## Inputs
All rows: measured
- Multi-Si wafer,Multi-Si wafer,Multi-Si wafer: 3.34
  Multi-Si Wafer
- Ammonia: 0.0881
- Ethanol: 0.23
  Ethanol (99.7%)
- Hydrochloric acid: 2.57
  Hydrochloric acid (37%)
- Hydrofluoric acid: 0.78
- Nitric acid: 1.43
  Nitric acid (70%)
- dinitrogen: 7.62
  Nitrogen
- phosphoric acid: 0.00931
  Phosphoric acid (85%)
- Potassium hydroxide: 2.76
  KOH (21%)
- silver: 0.0679
  Silver
- aluminium: 0.38
  Aluminum
- freshwater: 866.04
  Water
- natural gas: 0.59
  Natural gas
- Electricity: 686.69
- process steam: 26.15
  Steam

## Outputs
All rows: measured
- ammonia: 0.00786
  Ammonia emissions to air
- hydrogen chloride: 0.00492
  Hydrogen chloride emissions to air
- hydrogen fluoride: 0.00393
  Hydrogen fluoride emissions to air
- Nitrogen oxides: 0.061
  Nitrogen oxides emissions to air
- non-methane volatile organic compounds: 0.03464
  NMVOC to air
- process water: 888.13
  Water

## Deviations from the LCI method approaches
本研究旨在定量评估中国光伏系统的生命周期对环境的影响，为中国光伏产业的可持续发展政策制定提供科学依据。

## Data selection and combination
库存数据，包括太阳能级产品生产过程中的材料消耗和 太阳能级硅、硅片、硅锭、电池和组件生产过程中的材料消耗和环境排放 硅、硅片、硅锭、电池和组件生产过程中涉及的材料消耗和环境排放。主要从代表中国目前多晶硅光伏技术领域的企业收集。技术的企业。能耗数据参考了 能耗数据参考了《中国太阳能光伏清洁生产报告》（Li 和 Chang，2012 年）。多晶硅生产数据来自有关中国多晶硅生产的文献。的文献资料。

## Use advice
在使用此数据进行光伏系统的生命周期评估(LCA)时，重要的是根据地理背景考虑数据的技术适用性，因为数据是具体针对中国多晶硅PV技术公司的。能耗数据应参照《中国太阳能光伏清洁生产报告》(Li 和 Chang, 2012)。确保在整个太阳能级硅、硅片、硅锭、电池和组件的生产过程中对材料消耗和环境排放进行透明核算也至关重要。在 LCA 建模时，功能单位应一致地视为 1 kWh 的多晶硅光伏组件输出。

## Review details
清单： 内部审查通过几个迭代步骤完成，涉及原始数据验证、原始数据记录、代表性、完整性、与 ISO 14040 和 14044 有关的建模的一致性。

## Data sources
- Fu, Y., Liu, X. & Yuan, Z. Life-cycle assessment of multi-crystalline photovoltaic (PV) systems in China. Journal of Cleaner Production 86, 180–190 (2015).
