# 电力生产 ; 火电 ; 山东

Dataset: ILCD process, Unit process, single operation
Geography: SD-CN
Reference year: 2019
Classification: Unit processes / Energy carriers and technologies / Electricity
Generated by: 熊若熙, xiongrx0126@163.com
Owner: 天工LCI数据工作小组
Review: Dependent internal review by 天工LCI数据工作小组
Amounts: no units in this file; such an amount is in the reference unit of its flow, which a separate flow dataset defines
copyright: false
licenseType: Free of charge for all users and uses

## General comment
火电发电包括原煤、洗煤、石油、天然气等十七种化石燃料。该过程只考虑直接发电过程，不考虑上游原材料开采加工和下游消费

## Time period
根据2019年能源统计年鉴数据计算

## Technical purpose
所述工艺过程用于山东地区使用火电方法生产电能。该过程专指采用原煤、洗煤、石油和天然气等十七种化石燃料直接发电的方法。该过程仅涉及电力的直接生产，不包括上游原材料的开采加工或下游电力的消费。

## Reference product
- electricity for thermal power: 3.6; calculated

## Inputs
All rows: calculated
- Raw coal: 0.475393
- Other Washed Coal: 0.00013815
- Gangue, in ground: 0.00338593
- Coke oven gas: 0.009257
- blast furnace gas: 0.139575
- Converter gas: 0.010036
- Diesel: 3.521e-5
- fuel oil, unspecified: 0.00033385
- refinery gas: 3.725e-5

## Outputs
- carbon dioxide (fossil): 0.758989; calculated
- sulfur dioxide: 0.000131695; calculated
- Nitrogen oxides: 0.000209241; calculated
- particles (> PM10): 2.63388e-5; calculated

## Data treatment and extrapolations
核算方法参考《企业温室气体排放核算方法与报告指南 发电设施》。不同形式发电量及燃料用量来自于《中国能源统计年鉴 2020》中的第三章（能源生产） 和第六章（地区能源平衡表）。用于计算二氧化碳排放因子的低位发热量、单位热值含碳量等燃料参数来自于《2019 年度中国区域电网二氧化碳基准线排放因子 OM 计算说明》、《企业温室气体排放核算方法与报告指南 发电设施》

## Use advice
生命周期评估数据的用户应将该数据集视为代表山东地区基于2019年统计数据通过火力发电直接发电过程的。使用此数据时，请注意温室气体排放核算的指定方法，因为它们对于准确报告排放至关重要。数据排除了上游和下游过程，专注于工厂内部的电力生产。使用参考指南和统计年鉴中提供的核算方法和排放因子，以确保在为生命周期评估清单计算排放时保持方法论的一致性。

## Review details
清单： 内部审查通过几个迭代步骤完成，涉及原始数据验证、原始数据记录、代表性、完整性、与 ISO 14040 和 14044 有关的建模的一致性。

## Data sources
- 熊若熙. 中国电力生产和消费二氧化碳与污染物排放因子核算. (清华大学, 2023).
