# 高炉炼铁;球团矿烧结矿;生铁

Dataset: ILCD process, Unit process, single operation
Geography: CN
Reference year: 2020
Classification: Unit processes / Materials production / Metals and semimetals
Generated by: 纪伟, 1299801467@qq.com
Owner: 天工LCI数据工作小组
Review: Dependent internal review by 天工LCI数据工作小组
Amounts: no units in this file; such an amount is in the reference unit of its flow, which a separate flow dataset defines
copyright: false
licenseType: Free of charge for all users and uses

## General comment
这种通过使用球团矿和烧结矿的高炉炼铁过程生产的生铁，是钢铁企业制造各种钢铁产品的原材料，广泛应用于建筑、汽车和机械制造行业。

## Time period
论文提到钢铁企业环境总体数据为1998年的吨钢环境基础数据。

## Reference product
- iron: 752; calculated

## Inputs
All rows: calculated
- Sinter ore: 1131
- freshwater,freshwater: 700
- Pellet: 74.1
- Electricity: 378
- carbon: 289.6
- anthracite: 108.3
- Blast furnace gas: 621.3

## Outputs
All rows: calculated
- Blast furnace gas: 708
- BF Slag: 501
- BF Shop Dust: 29.2
- carbon dioxide (fossil): 1281.6
  原文未区分bio和fossil，根据专家判断此处为carbon dioxide (fossil)
- sulfur dioxide: 0.17
- Nitrogen oxides: 0.2
- Sinter / Pellet Dust: 0.12

## Use advice
该生铁的生命周期评估数据基于1998年钢铁企业的环境基础数据。用户应注意，自那时以来的技术和效率改进可能会影响这些数据对当前评估的相关性。在将这些历史数据集外推到当前或未来的情境时应谨慎。建议考虑技术进步，以及当前和预期的法规，以确保准确的影响评估。

## Review details
清单： 内部审查通过几个迭代步骤完成，涉及原始数据验证、原始数据记录、代表性、完整性、与 ISO 14040 和 14044 有关的建模的一致性。

## Data sources
- 梁田. 基于生命周期评价的典型钢铁企业环境影响评估及绿色发展研究. (郑州大学, 2020).
