# 锂电池回收碳热还原法（工艺 B）

Dataset: ILCD process, Unit process, single operation
Geography: CN
Reference year: 2013
Valid until: 2017
Classification: Unit processes / End-of-life treatment / Material recycling
Functional unit: FU is a typical type of LIB electrode material of 100 kg
Generated by: 马清源, m1120498928@163.com
Owner: 天工LCI数据工作小组
Review: Dependent internal review by 天工LCI数据工作小组
Amounts: no units in this file; such an amount is in the reference unit of its flow, which a separate flow dataset defines
copyright: false
licenseType: Free of charge for all users and uses

## General comment
在旋转炉中引入还原性碳进行混合焙烧，以石墨为还 原剂在高温（600-1000 oC）下可以实现对有价化合物的还原，分离得到 Ni、Co、 MnO 等还原产物，通过水浸法可以以 Li2CO3 的形式回收锂资源，对产物实现选 择性回收。

## Time period
数据来源于2013-2017

## Technical purpose
碳热还原法（工艺 B）是一种在旋转炉中，采用石墨作为还原剂，高温（600-1000 oC）下对有价化合物进行混合焙烧与还原的工业过程。该法能有效还原及分离Ni（镍）、Co（钴）、MnO（氧化锰）等还原产物，并通过水浸法选择性地回收形式为Li2CO3的锂资源。通常用于LIB（锂离子电池）电极材料的生产和对废旧LIB中金属的循环再利用和提值。

## Reference product
- Electrolyte: 100; input; missing unimportant
  电极浆料

## Inputs
- carbon: 6.2; missing unimportant
- water,water: 100; missing unimportant
- hard coal: 28.5; missing unimportant
- Electricity: 22.32; missing unimportant

## Outputs
All rows: missing unimportant
- Lithium carbonate: 13.3
- Graphite: 1
  石墨粉
- Al/Cu foil: 2.7
- nickel: 4
  镍盐、金属
- cobalt: 6
  钴盐、金属
- Manganese salt: 3
  锰盐、金属
- Alloy (Ni, Fe, Al, etc.): 20
- Slags: 7.9
- Metal Fumes: 2.42
- carbon dioxide (fossil): 104.1
  原文未区分bio和fossil，根据专家判断此处为fossil
- sulfur dioxide: 0.3
- waste water - treated: 90

## Data selection and combination
工艺的投入产出来自文献综述所报道数据的平均结果，体现了“坟墓”到 “摇篮” 的代表性过程。本研究不考虑塑料及金属外壳的回收或处理，人工成本、 工厂建设费用及其对环境的影响亦不包括在此分析中。

## Data treatment and extrapolations
值得注意的是，欧盟的数据并非针对于某个行业的计算，部分进出口数据和回收信息不适合中国的 情况。因此，改进后的 CRMs 评价方法还结合了中国官方数据、文献报道和来自 贸易/行业协会等其它利益集团数据，对主要的 LIB 制造商、回收公司、中国的官方管理机构等利益相关方的数据进行了最佳估计。在数据的时效性方面，CRMs 评估中使用的数据的参考期是基于最近的 4 年平均值（即 2013 年-2016 年）。

## Use advice
在使用工艺 B 的生命周期评估数据集时，用户必须考虑区域差异；该数据集平均值基于文献综述，并未针对单独行业或国家优化。它不包括塑料及金属外壳的回收或处理，人工成本、建设成本或其环境影响。为了准确应用，需要补充区域特定数据，特别是在中国背景下，欧盟进出口数据和回收信息可能不适用。用户应尽可能调整证据权重，更侧重于当前和本地相关数据，并且意识到功能单元（FU）是基于100公斤典型LIB电极材料。

## Review details
清单： 内部审查通过几个迭代步骤完成，涉及原始数据验证、原始数据记录、代表性、完整性、与 ISO 14040 和 14044 有关的建模的一致性。

## Data sources
- 宋佳丽. 面向能源金属高效回收的资源关键性评价模型与应用. (天津大学, 2019).
