# Lime|Gaseousfuels(includingblastfurnacegas,cokeovengas,mixedgas,convertergas,generatorgas,etc.)|RotaryKiln|All sizes / /|石灰|气体类燃料（含高炉煤气、焦炉煤气、混合煤气、转炉煤气、发生炉气等）|回转窑|所有规模

Dataset: ILCD process, Partly terminated system
Geography: CN
Reference year: 2019
Classification: Materials production / Other mineralic materials
Generated by: The data was created by the Office of the Second National Pollution Source Census of the Ministry of Ecology and Environment, and the data was organized by the TianGong Plan team for ILCD format / 生态环境部第二次全国污染源普查工作办公室创建数据，天工计划团队常慧敏整理数据为ILCD格式
Amounts: no units in this file; such an amount is in the reference unit of its flow, which a separate flow dataset defines
copyright: false

## Technology and included processes
the Technical of end-of-pipe management technology for pollution Limeis/，Its Technical efficiency of end-of-pipe management0
污染物指标氮氧化物的末端治理技术是/，其效率为0

## Reference product
- Lime: 1000; calculated
  原文件中描述污染物类别为Product，污染物指标为石灰，此处对其进行了匹配工作，将其匹配到LCAflow库里面相最符合的流，污染物指标备注为氮氧化物

## Outputs
- Nitrogen oxides: 0.913, 0.6391 (2 entries); calculated
  原文件中描述污染物类别为废气，污染物指标为氮氧化物，此处对其进行了匹配工作，将其匹配到LCAflow库里面相最符合的流，污染物指标备注为氮氧化物
- Exhaust gas: 976; calculated
  原文件中描述污染物类别为废气，污染物指标为工业废气量，此处对其进行了匹配工作，将其匹配到LCAflow库里面相最符合的流，污染物指标备注为工业废气量

## Data sources
- 第二次全国污染源普查产排污核算系数手册（试用版）,二级代码30,四级代码3012文件，在完整版文件中第3333页
