# 土壤和地下水修复;原位;地下水抽出处理;施工;活性炭单元

Dataset: ILCD process, Unit process, single operation
Geography: JS-CN
Reference year: 2022
Classification: Other Services / Repair and maintenance
Generated by: 王宁, wang_ning@caep.org.cn
Owner: 天工LCI数据工作小组
Review: Dependent internal review by 天工LCI数据工作小组
Amounts: no units in this file; such an amount is in the reference unit of its flow, which a separate flow dataset defines
copyright: false
licenseType: Free of charge for all users and uses

## General comment
使用钢铁和活性炭颗粒建造活性炭装置

## Geography
a closed pesticide manufacturing plant located in Jiangsu Province, China.

## Technical purpose
该工艺包括建设颗粒活性碳处理装置，用于土壤和地下水的原位修复。具体而言，该处理装置旨在解决位于中国江苏省一个已关闭农药制造厂的污染问题。构建使用钢材和活性炭颗粒，表明修复单元专为重型工业应用设计，尤其是通过泵送并通过活性碳过滤来处理受污染的地下水，以去除污染物。

## Reference product
- Granular active carbon unit: 1; measured

## Inputs
- Activated Carbon: 900; measured
- Steel sections: 250; measured

## Use advice
该数据集的用户应注意，生命周期评估数据特定于江苏省一个农药厂关闭后地下水修复活性炭单元的建设。该过程数据可能无法直接应用于其他地区或不同的污染物概况。在将此数据应用于其他项目时，建议考虑当地的法规要求、地质条件以及涉及的特定污染物。在模拟使用阶段时，应特别注意活性炭过滤材料的维护和更换时间表以及地下水泵系统的能耗。

## Review details
清单： 内部审查通过几个迭代步骤完成，涉及原始数据验证、原始数据记录、代表性、完整性、与 ISO 14040 和 14044 有关的建模的一致性。

## Data sources
- Ding, D. et al. Assessing the environmental impacts and costs of biochar and monitored natural attenuation for groundwater heavily contaminated with volatile organic compounds. Science of The Total Environment 846, 157316 (2022).
