# 处置后清洁尾气;土壤原位修复;气相抽提;尾气处置

Dataset: ILCD process, Unit process, single operation
Geography: KR
Reference year: 2011
Classification: Unit processes / Other Services / Repair and maintenance
Generated by: 张建宾, zhangjb@caep.org.cn
Owner: 天工LCI数据工作小组
Review: Dependent internal review by 天工LCI数据工作小组
Amounts: no units in this file; such an amount is in the reference unit of its flow, which a separate flow dataset defines
copyright: false
licenseType: Free of charge for all users and uses

## General comment
采用活性炭对修复环节产生的废气进行吸附处置

## Technology and included processes
活性炭更换量估算:18000 kg

## Technical purpose
该工艺涉及环境修复领域，特别是使用SVE系统的土壤原位修复。通过活性炭对修复过程中产生的废气进行吸附，确保处理过的气体在释放前满足环境标准。这种方法通常适用于土壤中挥发性有机化合物（VOCs）为污染物的情形。数据集有助于了解SVE系统的材料和能源需求，并可以用于土壤修复项目的环境影响评估。

## Reference product
- Purified exhaust gas (produced by thermal desorption of 1 m3 soil): 1; measured

## Inputs
- Activated Carbon: 18000; measured
- Exhaust gas: 1; estimated

## Outputs
- Waste (solid): 18000; measured
  用于尾气吸收产生的废弃活性炭

## Use advice
在应用此数据时，用户必须考虑土壤修复项目的具体条件，如VOCs的类型和浓度。提供的活性炭更换量（18,000 kg）应根据过程实际所需的吸附能力进行调整。用户应确保所有输入和输出（包括所详述的所有主要原材料和能耗）都正确地纳入生命周期评估模型。特别要注意用过的活性炭的处置方法，因为它可能带来重大的环境影响。

## Review details
清单： 内部审查通过几个迭代步骤完成，涉及原始数据验证、原始数据记录、代表性、完整性、与 ISO 14040 和 14044 有关的建模的一致性。

## Data sources
- Jeong, S.-W. & Suh, S.-W. Assessment of Environmental Impacts and CO 2 Emissions from Soil Remediation Technologies using Life Cycle Assessment - Case Studies on SVE and Biopile Systems -. Journal of Korean Society of Environmental Engineers 33, 267–274 (2011).
