# 湿蒸法棉布染整加工;印染棉布;最终处置;焚烧

Dataset: ILCD process, Unit process, black box
Geography: CN
Reference year: 2012
Classification: Unit processes / End-of-life treatment / Energy recycling
Generated by: 段颖凡, 1300925579@qq.com
Owner: 天工LCI数据工作小组
Review: Dependent internal review by 天工LCI数据工作小组
Amounts: no units in this file; such an amount is in the reference unit of its flow, which a separate flow dataset defines
copyright: false
licenseType: Free of charge for all users and uses

## General comment
由于产品消费和最终处置的地点具有不确定性，本研究忽略研究对象到终处置地的运输过程。其中，产品最终处置过程基于中国某一城市的终处置模型（杨建新,徐成,王如松.产品生命周期评价方法及应用[M]北京:气象出版社,2002,6.）。由于缺乏足够可信的数据，本研究忽略产品终处置过程中的能源消耗且假设卫生填埋和焚烧这两种处置方式所占的比例相同，即各为50%。

## Geography
中国是世界上最大的印染生产基地，但高速发展的同时也伴随着严重的环境问题。目前印染行业主要是通过企业的清洁生产审核，实施原辅材料低毒与低污染研究、废弃物的资源化、设备改造与更新、水与蒸汽的循环利用、生产工艺改进等针对某一特定环境问题的清洁生产方案来实现节能减排，而忽略了工业系统间的关联。

## Technical purpose
该过程涉及湿蒸法棉布染整加工，用于生产印染棉织品。这些纺织品可用于多种用途，包括服装、家居装饰品和工业用纺织品。'最终处置'部分涉及废旧纺织品的焚烧，表明数据也可适用于棉质纺织产品的废物管理实践。

## Reference product
- Cotton Fabric: 1000; input; estimated

## Outputs
All rows: estimated
- carbon monoxide (fossil): 0.578
- carbon dioxide (fossil): 722
- nitrous oxide: 0.123
- Chlorinated Hydrocarbon: 0.0902
- Nitrogen oxides: 0.513
- sulfur dioxide: 1.03
- hydrogen chloride: 0.225
- hydrogen sulfide: 1.75e-5
- ammonia: 8.4e-5
- chemical oxygen demand: 0.00281
- cadmium: 0.451
- lead: 0.00565
- mercury: 0.458

## Use advice
由于产品消费和最终处置地点具有不确定性，研究中排除了至终处置地的运输过程。产品的最终处置过程基于中国某城市的模型（参考已发表的资源）。研究假设由于缺乏可靠数据，忽略了产品最终处置过程中的能源消耗，并且假设卫生填埋和焚烧这两种处置方式占比相同，即各为50%。在生命周期评估（LCA）中应用此数据时，应考虑这一点以确保方法论的一致性。

## Review details
清单： 内部审查通过几个迭代步骤完成，涉及原始数据验证、原始数据记录、代表性、完整性、与 ISO 14040 和 14044 有关的建模的一致性。

## Data sources
- 朱亚楠. 棉布连续轧染工艺生命周期环境影响评价. (南京大学, 2012).
