# 催化氧化装置地下水异位修复;P&T系统;基础设施建设

Dataset: ILCD process, Unit process, single operation
Geography: JS-CN
Reference year: 2022
Classification: Other Services / Repair and maintenance
Generated by: 王宁, wang_ning@caep.org.cn
Owner: 天工LCI数据工作小组
Review: Dependent internal review by 天工LCI数据工作小组
Amounts: no units in this file; such an amount is in the reference unit of its flow, which a separate flow dataset defines
copyright: false
licenseType: Free of charge for all users and uses

## General comment
由铝和铁制成的催化氧化装置

## Geography
a closed pesticide manufacturing plant located in Jiangsu Province, China.

## Technology and included processes
使用铝和铁制成的催化氧化装置

## Technical purpose
催化氧化装置是为地下水异位修复而设计的，作为抽水处理系统的一部分，用来处理中国江苏省一个已关闭的农药制造厂的受污染的水。该装置使用铝和铁作为主要构建材料，用于催化反应以减少地下水中的污染物。

## Reference product
- Air stripping unit,Catalytic oxidation unit: 1; measured

## Inputs
- Aluminium and aluminium alloy products: 250; measured
- Steel sections: 250; measured
- transport in t*km: 50; calculated

## Use advice
当使用这个数据集时，用户应当注意催化氧化单元是专门用于地下水异位修复的，因此可能不适用于原位处理或其他类型的废水处理过程。考虑到建造和运行阶段的地理和技术适用性是重要的。还应该考虑在设备使用寿命结束后铝和铁的潜在回收利用。

## Review details
清单： 内部审查通过几个迭代步骤完成，涉及原始数据验证、原始数据记录、代表性、完整性、与 ISO 14040 和 14044 有关的建模的一致性。

## Data sources
- Ding, D. et al. Assessing the environmental impacts and costs of biochar and monitored natural attenuation for groundwater heavily contaminated with volatile organic compounds. Science of The Total Environment 846, 157316 (2022).
