# 熟料煅烧;熟料;高硫循环流化床还原分解磷石膏;磷石膏

Dataset: ILCD process, Unit process, black box
Geography: CN
Reference year: 2013
Classification: Unit processes / Materials production / Inorganic chemicals
Generated by: #REF!, ysqsophia@gmail.com
Owner: 天工LCI数据工作小组
Review: Dependent internal review by 天工LCI数据工作小组
Amounts: no units in this file; such an amount is in the reference unit of its flow, which a separate flow dataset defines
copyright: false
licenseType: Free of charge for all users and uses

## General comment
高硫煤循环流化床还原磷石膏制SO2和水泥熟料。磷石膏（云天化集团下属某化工厂，CaSO4的质量分数 为70.68％），高硫煤（选取云南镇雄县某煤矿，煤中硫的质量分数为2.87％）。在流化床设备上的中试研究，考察反应温度、一次风量、二次风量和磷石膏处理量对烟气SO2浓度的影响，确定了磷石膏分解的最优条件：分解炉反应温度（1000±10）°C，一次风量220m3/h，无二次风，m（磷石膏）∶m（高硫煤）=10∶1。在此试验条件下，烟气中SO2体积分数最高达到8.18%，可以用于硫酸生产，磷石膏转化率达到90.39%，熟料中CaO质量分数达65%，分解率为95%。

## Technology and included processes
方案 Ａ：高硫煤循环流化床还原磷石膏制ＳＯ２ 和水 泥熟料。 在流化床设备上的中试研究［６，７］，考 察 反 应 温 度、一 次 风 量 、二次风量和磷石膏处理量对烟气 ＳＯ２ 浓 度 的 影 响，确 定 了磷石膏分解的最优条件：分解炉反应温度（１０００±１０）°C ， 一次风量２２０ ｍ３／ｈ，无 二 次 风，ｍ（磷 石 膏 ）∶ｍ（高 硫 煤 ）＝ １０∶１。在 此 试 验 条 件 下，烟 气 中 ＳＯ２ 体积分数最高达到 ８．１８％ ，可以用于硫酸生产，磷石膏转化率达到９０．３９％ ，熟 料中 ＣａＯ 质量分数达 ６５％，分 解 率 为 ９５％。

## Technical purpose
该数据集代表了一种使用高硫循环流化床还原分解磷石膏的熟料生产过程。此流程用于生产SO2，可用于硫酸生产，同时生成水泥熟料，这是水泥制造的主要成分。

## Model description
1kg水泥熟料作为功能单位；系统边界定义为水泥熟料的煅烧工艺，具体内容包括：原料的输入→不同的分解煅烧工艺→ 产物和废气的排出。

## Reference product
- clinker: 1000
  水泥熟料

## Inputs
- phosphogypsum: 2250
  磷石膏
- hard coal: 188.352
  高硫煤（选取云南镇雄县某煤矿，煤中硫的质量分数为2.87％）。原始数据为0.175kg标准煤，这里换算为硬煤，换算公式为1kg硬煤=0.929kg标准煤。

## Outputs
- carbon dioxide (fossil): 329
  CO2
- sulfur dioxide: 916
  SO2
- Nitrogen oxides: 7
  NOx
- carbon monoxide (fossil): 164
  CO

## Use advice
使用此数据集时，用户应特别注意所定义的系统边界为水泥熟料的煅烧工艺。数据特定于磷石膏的质量分数为70.68%的CaSO4，来自质量分数为2.87%硫的高硫煤。必须遵守磷石膏分解的最佳条件：反应温度（1000±10）°C，一次风量220m3/h，物料比为磷石膏与高硫煤10:1。流程不包括二次风。数据反映了在上述条件下，可达到磷石膏转化率90.39%与烟气中SO2体积分数达8.18%的情形，适用于硫酸生产，并且水泥熟料包含65%质量分数的CaO，分解率为95%。

## Review details
清单： 内部审查通过几个迭代步骤完成，涉及原始数据验证、原始数据记录、代表性、完整性、与 ISO 14040 和 14044 有关的建模的一致性。

## Data sources
- 张杭, 马丽萍, 胡建红, 毛宇, 戴取秀, & 谢龙贵. (2013). 不同分解工艺下磷石膏分解制水泥熟料的LCA研究. 材料导报, 27(S1), 302–305.
