# 鸡蛋生产 ; 饲料原料生产

Dataset: ILCD process, Unit process, single operation
Geography: HLJ-CN
Reference year: 2009
Classification: Unit processes / Materials production / Agricultural production means
Functional unit: The main output product of laying hens is eggs, so the functional unit defined in this study is "1kg egg".
Generated by: 杨瑞, 1632707028@qq.com
Owner: 天工LCI数据工作小组
Review: Dependent internal review by 天工LCI数据工作小组
Amounts: no units in this file; such an amount is in the reference unit of its flow, which a separate flow dataset defines
copyright: false
licenseType: Free of charge for all users and uses

## General comment
蛋鸡的词料原料由玉米、 豆柏、 麸皮、 石粉等组成， 根据黑 龙 江省的实际情况， 玉米占 词料组成的60%~66% 豆柏占词料组成的20%~26% 又由于麸皮、 石粉生产的相关数据的 缺乏， 因此本文在词料原料组成上仅考虑玉米和豆柏。 词料原料生产阶段主要包括化肥的生 产阶段、 玉米和大豆的种植阶段和豆粕生产阶段。

## Geography
黑龙江省集约化蛋鸡场的生命周期评价

## Time period
黑龙江省玉米、大豆的在2009年的平均 单产量来自中国农业年鉴。

## Technology and included processes
本研究采用定量方法。 这种评价包括对研究目标和范围的重新审查或修正， 从而决定如何才 能满足研究的目标。 依据 ， 结合蛋鸡生产的实际情况， 给出生命周期影响评价的技术框架（图 。 影响评价包括四个步骤分类、 特征化、 标 准 化、加权评估。 （1）分类： 将生命周期清单分析中输入输出数据分门别类的归纳到不同环境影响类型中， 针 对蛋鸡的生命周期清单分析结果， 本文分为以下四种环境影响类型进行评估： 全球变暖， 环境酸化， 富营养化， 光化学臭氧合成。 （2）特征化： 定量清单分析中的数据， 确定四种环境影响类型的影响程度。 这使本来不具可 比性的环境污染排放量具有可比性。 （3）标准化： 首先要建立标准化基准， 为全球变暖、 环境酸化、 富营养化、光化学臭氧合成 四种环境影响类型的相对大小提供可比较的标准。（4） 加权评估： 是将环境影响归为统一的指标 —环境负荷大小的过程， 从而直接对不同生 产系统进行对比。

## Technical purpose
鸡蛋生产工艺使用的饲料主要由玉米和大豆组成。根据黑龙江省的农业实践，饲料混合中玉米占60%至66%，大豆占20%至26%。该过程是该地区集约化蛋鸡场运营的核心部分，是该地区主要的鸡蛋来源。饲料原料的生产包括多个阶段，如化肥生产、玉米和大豆作物的种植，以及大豆粕的生产。

## Reference product
- egg: 1; estimated
  作为参考定量，非实际输出

## Inputs
- hard coal: 0.00903058; calculated

## Outputs
All rows: measured
- carbon monoxide (fossil): 1.0437e-5
- nitrogen, total (excluding N2): 0.000283551
- sulfur oxides: 0.000102912
- carbon dioxide (fossil),carbon dioxide (fossil): 0.0767573
- sulfur dioxide: 0.000383436
- maize grain: 1.721
- soybean: 0.764

## Data selection and combination
本研究中玉米和大豆的种植期间化肥投入的相关数据取自高强等王伟等的资料， 基 本能代表目前黑龙江省玉米、大豆生产的实际情况。

## Use advice
数据使用者在核算鸡蛋生产的环境影响时应关注提供的饲料组成。应当注意，由于缺乏关于麸皮和石粉等其他成分的数据，该数据集中仅考虑玉米和大豆。在评估过程中应包括黑龙江省特有的玉米和大豆生长期间化肥的使用影响。在评估每个功能单元的环境影响时，应使用'1kg鸡蛋'作为参考产出。关于作物产量和化肥使用量的数据基于2009年的情况，并来源于《中国农业年鉴》和相关研究。

## Review details
清单： 内部审查通过几个迭代步骤完成，涉及原始数据验证、原始数据记录、代表性、完整性、与 ISO 14040 和 14044 有关的建模的一致性。

## Data sources
- 高雪. 黑龙江省集约化蛋鸡场的生命周期评价. (东北农业大学, 2012).
