# 熟料煅烧;熟料;传统回转窑;磷石膏

Dataset: ILCD process, Unit process, black box
Geography: SD-CN
Reference year: 2013
Classification: Unit processes / Materials production / Inorganic chemicals
Generated by: #REF!, ysqsophia@gmail.com
Owner: 天工LCI数据工作小组
Review: Dependent internal review by 天工LCI数据工作小组
Amounts: no units in this file; such an amount is in the reference unit of its flow, which a separate flow dataset defines
copyright: false
licenseType: Free of charge for all users and uses

## General comment
传统回转窑生产水泥熟料。经检测得到回转窑的气体流量是32137~43251Nm3/h之间。

## Geography
鲁北化工集团股份有限公司下属某硫酸厂

## Technology and included processes
根 据 资 料 ，选取鲁北化工集团股份有限公司下属某硫酸 厂定额实测值年产硫酸６５ｋｔ／ａ和 ８１ｋｔ／ａ水泥熟料的窑前 窑 后 的 数 据。 经检测得到回转窑的气体流量是３２１３７～ ４３２５１ Ｎｍ３／ｈ 之 间 。

## Technical purpose
描述的传统回转窑专门用于生产水泥熟料，这是水泥制造中的关键组成部分。熟料生产过程是水泥制造行业的一个基本环节，在此过程中熟料作为创造各种类型水泥的主要原料。

## Model description
1kg水泥熟料作为功能单位；系统边界定义为水泥熟料的煅烧工艺，具体内容包括：原料的输入→不同的分解煅烧工艺→ 产物和废气的排出。

## Reference product
- clinker: 1000
  水泥熟料

## Inputs
- phosphogypsum: 2002
  磷石膏
- hard coal: 558.599
  原始数据为0.519kg标准煤，这里换算为硬煤，换算公式为1kg硬煤=0.929kg标准煤。

## Outputs
- carbon dioxide (fossil): 1340
  CO2
- sulfur dioxide: 975
  SO2
- Nitrogen oxides: 0.9
  NOx
- particles (> PM10): 0.76
  粉尘。在水泥熟料生产这一环节，几乎不产生粉尘。未标明粒径，按PM>10处理。

## Sampling procedure
鲁北化工集团股份有限公司下属某硫酸厂定额实测值年产硫酸65kt/a和81kt/a水泥熟料的窑前窑后的数据。

## Use advice
使用数据集时，用户应注意所提供的具体生产速率，分别是65kt/a和81kt/a，针对关联的硫酸厂和水泥熟料生产。气体流速在32137-43251 Nm3/h之间应在其排放建模中考虑。确保正确整合系统边界，包括原料输入、分解煅烧过程以及产品和废气排放到生命周期评估中，以准确确定熟料生产的环境影响。

## Review details
清单： 内部审查通过几个迭代步骤完成，涉及原始数据验证、原始数据记录、代表性、完整性、与 ISO 14040 和 14044 有关的建模的一致性。

## Data sources
- 张杭, 马丽萍, 胡建红, 毛宇, 戴取秀, & 谢龙贵. (2013). 不同分解工艺下磷石膏分解制水泥熟料的LCA研究. 材料导报, 27(S1), 302–305.
