# Solvent-basedcoatings|Film-formingsubstances,solvents,pigments,auxiliaries|Solvent-based paint production process|All sizes / /|溶剂型涂料|成膜物质、溶剂、颜料、助剂|溶剂型涂料生产工艺|所有规模

Dataset: ILCD process, Partly terminated system
Geography: CN
Reference year: 2019
Classification: Materials production / Other mineralic materials
Generated by: The data was created by the Office of the Second National Pollution Source Census of the Ministry of Ecology and Environment, and the data was organized by the TianGong Plan team for ILCD format / 生态环境部第二次全国污染源普查工作办公室创建数据，天工计划团队常慧敏整理数据为ILCD格式
Amounts: no units in this file; such an amount is in the reference unit of its flow, which a separate flow dataset defines
copyright: false

## Technology and included processes
the Technical of end-of-pipe management technology for pollution Solvent-based Coatingsis/，Its Technical efficiency of end-of-pipe management0
污染物指标工业废气量的末端治理技术是/，其效率为0

## Reference product
- Solvent-based Coatings: 1000; calculated
  原文件中描述污染物类别为Product，污染物指标为溶剂型涂料，此处对其进行了匹配工作，将其匹配到LCAflow库里面相最符合的流，污染物指标备注为工业废气量

## Outputs
- Exhaust gas: 49300; calculated
  原文件中描述污染物类别为废气，污染物指标为工业废气量，此处对其进行了匹配工作，将其匹配到LCAflow库里面相最符合的流，污染物指标备注为工业废气量
- particles (PM2.5 - PM10): 0.0051, 0.0051 (2 entries); calculated
  原文件中描述污染物类别为废气，污染物指标为颗粒物，此处对其进行了匹配工作，将其匹配到LCAflow库里面相最符合的流，污染物指标备注为颗粒物
- volatile organic compound: 6.1, 7.4, 6.4, 4.1, 6.1, 4.5, 4.1, 4.5, 8, 7.4 (10 entries); calculated
  原文件中描述污染物类别为废气，污染物指标为挥发性有机物，此处对其进行了匹配工作，将其匹配到LCAflow库里面相最符合的流，污染物指标备注为挥发性有机物

## Data sources
- 第二次全国污染源普查产排污核算系数手册（试用版）,二级代码26,四级代码2641文件，在完整版文件中第4111页
