# 乙烯生产 ; 乙烯 ; 天然气基乙烷制乙烯路线 ; 天然气基乙烷

Dataset: ILCD process, Unit process, black box
Geography: LZ-GS-CN
Reference year: 2021
Classification: Energy carriers and technologies / Natural gas based fuels
Functional unit: Define 1t of industrial grade ethylene product as a functional unit
LCI method principle: Attributional
LCI method approaches: Allocation - mass
Generated by: 任亚楠, renyn15@tsinghua.org.cn
Owner: 天工LCI数据工作小组
Review: Dependent internal review by 天工LCI数据工作小组
Amounts: no units in this file; such an amount is in the reference unit of its flow, which a separate flow dataset defines
copyright: false
licenseType: Free of charge for all users and uses

## General comment
80万吨/年乙烯，中石油天然气股份有限公司乙烯项目，天然气基乙烷制乙烯，中石油自主乙烷制乙烯高温蒸汽裂解技术

## Geography
陕西省榆林市榆横工业区

## Time period
未提及，以文献发表时间代替

## Technology and included processes
天然气基乙烷路径制乙烯的模型采用我国中石油自主乙烷制乙烯高温蒸汽裂解技术，裂解炉采用HQF-IV 型，裂解产物采用前脱乙烷前加氢技术进行分离制得乙烯产品。裂解过程为乙烷在隔绝空气和高温条件下发生分解反应而生成烯烃或烷烃的过程。在此过程同时还有叠合、缩合的反应，使一部分烃类又变成为较大的分子。乙烯装置分为裂解炉单元(含原料预热、炉内裂解)、急冷单元(急冷阶段、除焦系统、工艺水汽提、稀释蒸汽)、压缩及碱洗单元(压缩阶段、碱洗阶段、前脱乙烷、乙炔加氢)、冷分离单元(深冷系统、脱甲烷单元、甲烷化反应)、乙烯精馏及热泵单元(热泵单元、丙烯制冷单元)、废碱氧化单元(废碱脱烃、废碱氧化、废碱中和)及火炬、公用工程系统等。

## Technical purpose
乙烯是石油化工行业中广泛使用的化学基础原料，对于聚合物和化学品的生产至关重要。因此，该数据集代表通过天然气乙烷制乙烯的路线年产80万吨工业级乙烯的生产，利用中石油高温蒸汽裂解技术。此过程通常应用于大规模合成，用于生产塑料、防冻剂、溶剂和洗涤剂等产品。

## Reference product
- ethene (ethylene): 1000; measured
  乙烯

## Inputs
All rows: measured
- Ethane: 1120
  乙烷
- Methane: 110
  甲烷
- Methanol: 0.09
  甲醇
- Dimethyl disulfide: 0.17
  二甲基二硫
- sodium hydroxide: 3.77
  NaOH
- Sulphuric acid: 0.44
  浓硫酸
- Carbon Monoxide: 0.27
  CO
- Cooling water: 20
  冷却水
- Water (desalinated; deionized): 3480
  除盐水
- process steam: 260
  蒸汽
- Instrument Air: 35.57
  仪表空气
- air: 4.36
  工厂空气
- Hydrogen: 90
  氢气
- nitrogen: 5.33
  氮气
- electricity mix: 198.504
  电
- Compressor Washing Oil: 20
  压缩机洗油
- Phosphate: 2.67
  磷酸盐

## Outputs
All rows: measured
- biological oxygen demand: 0.06
  BOD5
- chemical oxygen demand: 0.23
  CODcr
- Oils, unspecified: 0.00108
  石油类
- total dissolved solids: 7.38
  TDS
- phenol: 0.02
  苯酚
- sulfide: 0.00113
  硫化物
- Water (groundwater from technosphere, waste water): 108.24
  稀释排污水
- nitrous oxide: 0.46
  NOx
- Dust (unspecified, from stack): 0.1
  颗粒物
- carbon monoxide: 0.27
  CO
- sulfur dioxide: 0.02
  SO2
- volatile organic compound: 0.1
  VOCs
- carbon dioxide: 0.02
  CO2
- Tar Residue: 0.29
  焦油残渣
- Waste Alumina Catalyst: 3.85e-5
  废Al2O3催化剂

## Deviations from the LCI method approaches
本研究选择质量分配

## Data selection and combination
数据清单来源于中石油天然气兰州石化乙烷制乙烯项目

## Use advice
在使用此数据集进行生命周期评估时，应注意所描述的高温蒸汽裂解技术及随后的分离过程的具体情况。这包括用于分离乙烯的HQF-IV型裂解炉和前脱乙烷加氢技术。用户应将这个过程视为'黑箱'，并认识到通过叠加和缩合反应产生更大的烃类也是所描述方法的一部分。在评估产出时，必须应用质量分配原则，将1吨工业级乙烯定义为功能单位。根据乙烯的实际应用和当地技术变化，可能需要进行调整。

## Review details
清单： 内部审查通过几个迭代步骤完成，涉及原始数据验证、原始数据记录、代表性、完整性、与 ISO 14040 和 14044 有关的建模的一致性。

## Data sources
- 赵悦如. 基于生命周期方法的乙烯生产环境影响分析. (大连理工大学, 2021).
