# 水泥生产;水泥, 普通硅酸盐水泥, 42.5MPa;新型干法回转窑, 4000 t/d;混合固废

Dataset: ILCD process, Unit process, black box
Geography: BJ-CN
Classification: Unit processes / Materials production / Other mineralic materials
Generated by: #REF!, ysqsophia@gmail.com
Owner: 天工LCI数据工作小组
Review: Dependent internal review by 天工LCI数据工作小组
Amounts: no units in this file; such an amount is in the reference unit of its flow, which a separate flow dataset defines
copyright: false
licenseType: Free of charge for all users and uses

## General comment
基于矿渣的水泥（Slag-based cement，SBC）。按照中国水泥标准（GB175-2007），SBC是一种普通硅酸盐水泥（Ordinary portland cement，OPC），由80-95%的硅酸盐水泥熟料和适量的石膏以及5-20%的高炉矿渣组成。该工厂采用新的干法工艺和5级预热器旋转窑生产SBC。生产规模约为4000吨/天。高炉矿渣（Blast furnace slag，BFS）含量约为10％。高炉矿渣是在高炉炉内与生铁同时产生的副产品，经过空气冷却和水淬两种方式进行处理。空气冷却矿渣通常用于低级应用，而水淬矿渣则可以与石膏一起磨细作为水泥生产中的胶凝材料。此外，将矿渣用作SBC中的外加剂可以提高技术性能，包括强度、渗透性和耐腐蚀性。

## Geography
北京现代水泥厂

## Technology and included processes
This plant adopted new dry process and rotary kiln with 5 stages preheater to product SBC. The production scale was about 4000 ton/day. The content of BFS was approximately 10%.BFS was generated as a co-product of pig iron in blast furnaces, and further treated by the means of aircooling and water-quenching. Air-cooled BFS was typically used in low-grade applications; while water-quenching BFS can be grinded with gypsum as a substitute of cementitious materials in cement production. Moreover, the utilization of BFS as admixture in SBC can improve technical properties, including strength, permeability and corrosion resistance (Song and Saraswathy, 2006). Therefore, the inventory of BFS was obtained in accordance with the allocation between pig iron and BFS based on their economic value. Moreover, the land use inventories of BFS, including land occupation and land transformation, were also considered as a benefit of preventing slag storage.

## Technical purpose
所述水泥为普通硅酸盐水泥(OPC)，等级为42.5MPa，适用于包括基础设施、建筑和土木工程项目在内的广泛建设应用。主要用于要求高强度和耐久性的混凝土、砂浆和灌浆。包含5-20%高炉矿渣（BFS）能增强如强度、渗透性和耐腐蚀性等技术性能，使这种OPC变体特别适合需要提升性能特征的项目。

## Model description
该功能单位被定义为42.5 MPa强度的1公斤水泥。系统边界为水泥生产。

## Reference product
- cement, ordinary portland cement, 42.5MPa: 1000
  普通硅酸盐水泥，42.5MPa

## Inputs
- blast furnace slag: 102
  高炉矿渣（BFS）
- sandstone: 70.2
  砂岩
- limestone, crushed, for mill: 1080
  石灰石
- dolomite: 0.000649
  白云石
- iron ore: 21.4
  铁矿
- ash: 2.96
  粉煤灰
- gypsum stone (CaSO4-dihydrate): 76.3
  石膏
- hard coal; 26.3 MJ/kg: 137
  原煤
- crude oil; 42.3 MJ/kg: 0.0416
  原油

## Outputs
- carbon dioxide (fossil): 744
  CO2排放：根据化石燃料和石灰石的消耗量，使用公式计算CO2排放，表达式如下：ECO2=3.67FQkα+mcx0.48x44/56。其中，ECO2是总CO2排放量（千克）；F和Q分别是化石燃料的燃烧量（千克）和热值（MJ/kg）；k是化石燃料的碳排放因子（kgC/MJ），对于煤而言，中国燃烧煤的平均值为24.74E-3kgC/MJ；α是碳燃烧的氧化率，取0.9；mc是石灰石的消耗量（千克）。
- sulfur dioxide: 0.239
  SO2排放：根据燃料中的硫含量、燃料的硫排放率以及调查工厂的相对脱硫情况，使用以下公式计算SO2排放：Eso2=2FSα（1-γ）。其中，Eso2是SO2排放量（kg）；F和S分别是燃料消耗量（kg）和燃料的硫含量（wt％）；α是燃料的SO2排放率，对于煤炭来说是1.74E-3；γ是脱硫率。由于中国水泥工业的脱硫技术仍处于研究阶段，尚未实际应用，因此假定y为零。
- Nitrogen oxides: 1.37
  NOx排放：根据化石燃料消耗量、NOx排放因子和受调查工厂的脱氮率，使用以下公式估算NOx排放：ENOx=0.001Fα（1-γ）。其中，ENOx是NOx排放量（kg）；F是燃料消耗量（kg）；α是燃料燃烧时的NOx排放因子（kg/t），煤燃烧时的NOx排放因子为9.95kg/t；γ是脱氮率。由于中国水泥厂的脱氮技术目前仍处于研究阶段，因此不考虑脱氮。
- carbon monoxide (fossil): 0.244
  CO。CO的排放量采用公式计算，表达式如下：E=FQα。其中，E是相对气体排放量（kg）；F和Q分别是化石燃料的消耗量（kg）和热值（MJ/kg）；α是气体排放因子（kg/TJ）。基于IPCC（2006）推荐的默认值，CO的气体排放因子为106kg/TJ。
- methane (fossil): 0.00184
  CH4。利用公式计算CH4的排放量，如下所示：E=FQα。其中E是相对气体排放量（千克），F和Q分别是化石燃料的消耗量（千克）和热值（MJ/kg），α是气体排放因子（千克/TJ）。根据IPCC（2006）推荐的默认值，CH4的气体排放因子为0.8kg/TJ。
- non-methane volatile organic compounds: 0.0575
  NMVOC。利用公式进行计算挥发性有机化合物（NMVOC）的排放量，表示如下：E=FQα。其中E为相对气体排放量（kg），F和Q分别为化石燃料的消耗量（kg）和热值（MJ/kg），α为气体排放因子（kg/TJ）。NMVOC的气体排放因子为25kg/TJ。

## Data selection and combination
水泥生产过程的环境数据是从北京现代水泥厂中调查和测量得出的。

## Use advice
该数据集代表了北京现代水泥厂生产42.5MPa强度普通硅酸盐水泥的环境影响，采用新型干法回转窑和5级预热器，日产能力为4000吨。该数据集包括混合固废的使用和10%高炉矿渣（BFS）外加剂。在使用此数据时，必须确保其应用与水泥生产的定义系统边界一致。还应考虑生铁与BFS之间的经济分摊，以及由于避免矿渣储存而带来的土地使用效益也应计入生命周期评估。建议仅将数据应用于类似的生产过程和区域条件，因为概括到其他情境可能不准确。

## Review details
清单： 内部审查通过几个迭代步骤完成，涉及原始数据验证、原始数据记录、代表性、完整性、与 ISO 14040 和 14044 有关的建模的一致性。

## Data sources
- Yao Li et al. (2016). Environmental impact analysis of blast furnace slag applied to ordinary Portland cement production. Journal of Cleaner Production 120, 221–230 (2016).
