# 电池模块生产

Dataset: ILCD process, Unit process, single operation
Geography: CN
Reference year: 2016
Classification: Systems / Electrics and electronics
Functional unit: Grid-connected electricity generation from a 1 MWp multi-Si PV system, whose lifespan is 30 years of a 10 MWp power station has been taken as the research object and the functional unit
LCI method principle: Attributional
LCI method approaches: Allocation
Generated by: 杨锦锋, yjfzfshn@163.com
Owner: 天工LCI数据工作小组
Review: Dependent internal review by 天工LCI数据工作小组
Amounts: no units in this file; such an amount is in the reference unit of its flow, which a separate flow dataset defines
copyright: false
licenseType: Free of charge for all users and uses

## General comment
多晶硅

## Geography
该电站位于宁夏中部地区，年平均太阳辐射量约为5955.80 MJ m2 a-1，年平均日照高峰时数为1718h

## Time period
文章发表

## Technical purpose
所述的多晶硅（Multi-Si）光伏（PV）模块包装工艺用于生产效率为14.8%的光伏模块。这些模块由紧凑的光伏玻璃和细胞组成，用粘合剂结合在一起，用铝合金外壳，并在背面安装接线盒。这些模块的应用专门用于并网电力发电光伏系统，研究重点是预计寿命为30年的10 MWp电站。地理应用目标是中国宁夏中部等地区，该地区以高太阳辐射量和高日照峰值小时数为特点。

## Reference product
- Solar Module: 1; article inperiodical
  PV module

## Inputs
All rows: article inperiodical
- electricity: 42.84
  Electricity
- Multi-Si solar cell: 60
  PV cells
- Water (fresh water): 20.7
  Fresh water
- Glass: 14.5
- Polyvinyl fluoride (PVF): 0.28
  Polyvinylfluoride film (PVF)
- Polyethylene terephthalate: 0.28
  Polyethylene terephthalate(PET)
- Ethylene-vinyl acetate copolymer: 1.29
  Ethylene vinyl acetatecopolymer (EVA)
- Organic Silicone: 0.05
  Silicone
- aluminium: 3.48
  Aluminum
- Ethanol: 0.00253
- Isopropanol: 0.00081
- Tin coated copper strips: 0.00311
- copper wire: 0.006
  Copper wire

## Outputs
- volatile organic compound: 0.00025; article inperiodical
  Volatile organic compound(VOC)
- waste water - untreated: 1.32; article inperiodical
  Waste water
- industrial waste (unspecified): 0.00734; article inperiodical
  Solid waste
- Hazardous organic waste for disposal (unspecific): 0.01188; article inperiodical
  Solid waste (organic waste)

## Deviations from the LCI method approaches
对中国冶金路线多晶硅光伏并网发电系统进行了生命周期评估

## Data selection and combination
调查云南、宁夏工厂

## Use advice
在应用多晶硅光伏模块生产过程的生命周期评估（LCA）数据进行环境影响评估或其他可持续性分析时，请确保考虑模块使用的地理特性，特别是中国宁夏中部地区的太阳辐射和日照峰值小时数。光伏系统的寿命为30年，应将此数据整合到随时间的累积能源需求和排放计算中。此外，对模块末端生命周期阶段的考虑应包括铝材和玻璃部件的潜在回收和再利用途径。

## Review details
清单： 内部审查通过几个迭代步骤完成，涉及原始数据验证、原始数据记录、代表性、完整性、与 ISO 14040 和 14044 有关的建模的一致性。

## Data sources
- Yu, Z. et al. Life cycle assessment of grid-connected power generation from metallurgical route multi-crystalline silicon photovoltaic system in China. Applied Energy 185, 68–81 (2017).
