# 稀土浸出、沉淀及无机预选;镝;B/M;含稀土元素矿石

Dataset: ILCD process, Unit process, single operation
Geography: CN
Reference year: 2010
Valid until: 2019
Classification: Unit processes / Materials production / Inorganic chemicals
Functional unit: The goal of this investigation is to compare environmental impacts related to the production of 1 kg Dy (functional unit) from IAC (Southern China), from B/M ore (Bayan Obo), and from an eudialyte deposit (Norra Kärr) using the LCA method
LCI method principle: Attributional
LCI method approaches: Allocation - mass
Generated by: 汪涛, twang@iue.ac.cn
Owner: 天工LCI数据工作小组
Review: Dependent internal review by 天工LCI数据工作小组
Amounts: no units in this file; such an amount is in the reference unit of its flow, which a separate flow dataset defines
copyright: false
licenseType: Free of charge for all users and uses

## General comment
所描述的稀土浸出、沉淀及无机预选工艺涉及从含有稀土元素的矿石中提取和纯化镝（Dy）。这一工艺对镝的生产至关重要，镝是一种关键材料，用于制造高强度永磁体、激光材料和核反应堆。该工业过程特定于中国南方和白云鄂博地区的操作，是全球供应镝的重要环节，用于各种技术和工业应用。

## Geography
华南地区和白云鄂博

## Technology and included processes
本次调查的目的是比较 IAC（中国南方）、B/M 矿石（白云鄂博）和 eudialyte 矿床（Norra Kärr）生产 1 千克镝（功能单位）的环境影响，使用生命周期分析法

## Reference product
- Rare Earth chloride solution: 441; measured
  RE chloride solution. HCl Leaching: input for next process Solvent extraction

## Inputs
- sulphuric acid: 29.03; calculated
  Leaching: Sulphuric acid, liquid, at plant, calculation based on Xu et al. (2008)
- Electricity: 1.584
  Leaching: electricity mix 2014, estimation based on energy demand of solvent extraction
- transport in t*km,transport in t*km: 0.58
  Leaching: market for transport, freight, lorry >32 metric ton, EURO3, 20 km assumed
- water: 570; calculated
  Leaching: Water, calculation based on Xu et al. (2008)
- Electricity: 1.584; calculated
  Precipitation: estimation based on energy demand of solvent extraction, electricity mix 2014
- Ammonium bicarbonate: 27.9
  Ammonium bicarbonate. Precipitation: ecoinvent process adapted to lifetime and throughput, aluminium hydroxide factory construction
- Lime: 18.96; calculated
  Precipitation: market for lime, hydraulic, for waste water treatment, stoichiometric calculation
- transport in t*km,transport in t*km: 0.561; measured
  Precipitation: 20 km, market for transport, freight, lorry >32 metric ton, EURO3
- water: 92.8; calculated
  Precipitation: based on solubility of ammonium bicarbonate
- Electricity: 1.584; calculated
  HCl Leaching: electricity mix 2014, estimation based on energy demand of solvent extraction
- hydrogen chloride: 24.21; calculated
  HCl Leaching: hydrochloric acid, 36 % in H2O, from reacting propylene and chlorine, at plant (adapted with CN: electricity mix 2014), calculated under consideration of a pH value of 4.
- water: 416; calculated
  HCl Leaching: value based on mass and humidity of REE carbonat
- transport in t*km,transport in t*km: 0.484; measured
  HCl Leaching: market for transport, freight, lorry >32 metric ton, EURO3, 20km

## Outputs
- Sludge: 26.7; measured
  Leaching: separate process, see Table S 20 and Table S 22
- particles (> PM10),particles (> PM10),particles (>PM10): 609; measured
  Leaching: input for next process: Precipitation
- waste water - untreated: 589; measured
  Precipitation: main emissions, without waste water treatment
- ammonium: 4.41; measured
  Precipitation: main emissions, without waste water treatment
- sulfite: 1.1; measured
  Precipitation: main emissions, without waste water treatment
- carbonate: 24.3; measured
  RE carbonate. Precipitation: nput for next process: HCl leaching
- carbon dioxide (fossil): 4.52; calculated
  原文未区分bio和fossil，根据专家判断此处为fossil

## Deviations from the LCI method approaches
In this study, an allocation method based on the mass of produced REEs combined with their market prices (based on an international metals market analysis and pricing index company ) are considered, as usual for metals with strongly different prices. As the ores have different compositions, the allocation factor has to be assessed individually for each site.

## Use advice
使用本工艺提供的生命周期评估数据集时，用户应考虑特定场址（中国南方和白云鄂博）的具体条件，因为不同矿石的成分会影响分配因子。环境影响评估必须考虑一种结合产出稀土元素质量和市场价格的分配方法（国际金属市场分析和定价指数）。这种方法是必需的，以确保数据准确反映在比较不同来源的镝生产环境影响时各种稀土元素的经济价值权重。

## Review details
清单： 内部审查通过几个迭代步骤完成，涉及原始数据验证、原始数据记录、代表性、完整性、与 ISO 14040 和 14044 有关的建模的一致性。

## Data sources
- Zapp, P., Marx, J., Schreiber, A., Friedrich, B. & Voßenkaul, D. Comparison of dysprosium production from different resources by life cycle assessment. Resources, Conservation and Recycling 130, 248–259 (2018).
