# 稀土元素选矿;稀土元素;氟碳铈矿路线;含稀土元素矿石

Dataset: ILCD process, Unit process, single operation
Geography: NMG-CN
Reference year: 2014
Classification: Unit processes / Materials production / Non-energetic raw materials
Functional unit: The functional unit of this study is the production of 1 kg of the basket REO from each corresponding mineralogical and processing route.
LCI method principle: Attributional
LCI method approaches: Allocation - market value
Generated by: 汪涛, twang@iue.ac.cn
Owner: 天工LCI数据工作小组
Review: Dependent internal review by 天工LCI数据工作小组
Amounts: no units in this file; such an amount is in the reference unit of its flow, which a separate flow dataset defines
copyright: false
licenseType: Free of charge for all users and uses

## General comment
该工业过程涉及使用氟碳铈矿路线的稀土元素（REE）选矿，该过程涉及含稀土元素矿石的处理。这个过程在生产对各种先进技术至关重要的含稀土材料中至关重要。这些材料通常用于制造高性能磁铁、催化剂、合金、玻璃添加剂，以及电子产品中，如智能手机和先进的防御系统。该工业过程特别关注的成果是生产1公斤篮子稀土氧化物（REO）。

## Technology and included processes
在这项研究中，对稀土生产系统进行了分析，从采矿到溶剂萃取，其中包含沉淀和煅烧等产品精加工过程

## Reference product
- Rare Earth Oxides: 1; calculated
  REO

## Inputs
All rows: calculated
- transport in t*km,transport in t*km: 0.303, 1.52 (2 entries)
- Sodium silicate: 0.068
- hydrogen peroxide: 0.032
  H2O5 and H102
- Electricity: 1.1988
- Raw ore: 15.15
- ammonium hydroxide: 0.047
- water: 0.0174

## Outputs
All rows: calculated
- Iron ore: 7.365
- industrial area: 1
- waste heat: 1.22
- chemical oxygen demand: 0.002272
- biological oxygen demand: 0.00157
- DOC, Dissolved Organic Carbon: 5.68e-5
- total organic carbon: 5.68e-5
- Suspended solids, unspecified,Suspended solids, unspecified: 0.00303
- thorium-232: 0.0029, 1 (2 entries)
- ammonia: 0.000379
- chromium: 1.5152e-5
- fluoride: 0.00022727
- Oils, unspecified: 7.575e-5
- phosphorus, total: 4.545e-5
- nitrogen, total (excluding N2): 0.00075757
- uranium-234: 0.022
- particles (> PM10),particles (> PM10),particles (>PM10): 0.000364
- Water: 17.4
- nickel: 5.25e-6
- mercury: 1.05e-7
- iron: 3.67e-5

## Deviations from the LCI method approaches
In this study, the REE production system was analyzed from mining up to and including solvent extraction which contains product finishing processes such as precipitation and calcination (Fig. 1). The other categories assessed in the literature review were mineral type, radioactivity, waste treatment, and co-mining. For mineral type, it was noted that the mineralogy accounted for in each study was different, which makes comparison difficult. For radioactivity, we marked with an X those studies which exemplified radioactivity flows in the LCI (if provided). For waste, we distinguished those LCIs which quantified waste treatment flows. For co-mining, since all REE are co-products of each other, this column is meant to highlight the co-products in addition to REE.

## Use advice
在使用概述的稀土元素（REE）选矿过程的LCA数据集时，从业者必须在将这些数据应用于他们的评估时考虑矿物学和加工路线的具体情况。特别注意包括从采矿到溶剂提取的完整生命周期，包括沉淀和煅烧过程。务必考虑不同矿物类型、放射性水平、废物处理程序以及除稀土元素外的共产品。为了比较目的，必须注意不同研究之间矿物学的差异，因为直接比较可能很有挑战性。数据应用的功能单元是生产1公斤混合REO篮子。确保任何涉及此数据的分析都准确符合这些方法论参数。

## Review details
清单： 内部审查通过几个迭代步骤完成，涉及原始数据验证、原始数据记录、代表性、完整性、与 ISO 14040 和 14044 有关的建模的一致性。

## Data sources
- Bailey, G. et al. Review and new life cycle assessment for rare earth production from bastnäsite, ion adsorption clays and lateritic monazite. Resources, Conservation and Recycling 155, 104675 (2020).
