# 水泥生产;水泥, 普通硅酸盐水泥;硫酸渣

Dataset: ILCD process, Unit process, black box
Geography: JS-CN
Classification: Materials production / Other mineralic materials
Generated by: 杨思琪, ysqsophia@gmail.com
Owner: 天工LCI数据工作小组
Review: Dependent internal review by 天工LCI数据工作小组
Amounts: no units in this file; such an amount is in the reference unit of its flow, which a separate flow dataset defines
copyright: false
licenseType: Free of charge for all users and uses

## General comment
普通硅酸盐水泥。水泥生产单元过程。

## Geography
江苏某水泥厂

## Technical purpose
普通硅酸盐水泥（P·O 42.5）主要用于制造混凝土结构、地基、道路和桥梁等建筑应用。适用于一般建设用途，不需要特定性能例如高早期强度。

## Model description
功能单位为 1t P·O 42.5 普通硅酸盐水泥。将普通硅酸盐水泥研究的系统边界确定为生料制备、熟料粉磨煅烧和水泥制备一直到最后的水泥储存为止，不包括水泥在使用阶段和废物回收阶段对环境的影响。

## Reference product
- cement, ordinary portland cement: 1000
  普通硅酸盐水泥

## Inputs
- limestone, crushed, for mill: 1300
  石灰石
- sandstone: 300
  砂岩
- Sulfate slag: 20
  硫酸渣
- hard coal; 26.3 MJ/kg: 190
  煤
- electricity, medium voltage: 370.296
  电

## Outputs
- carbon dioxide: 998.3
  CO2。水泥企业一般对于CO2的排放不做检测，故采用经验公式即锻烧水泥熟料时CO2的排放量=0.51+2.57×标准煤用量（t）。
- sulfur dioxide: 0.55
  SO2。SO2、NOx和粉尘的排放数据需要监测获得。
- Nitrogen oxides: 0.843
  NOx。SO2、NOx和粉尘的排放数据需要监测获得。
- particles (> PM10): 2.697
  粉尘，未标明粒径，按PM>10处理。SO2、NOx和粉尘的排放数据需要监测获得。

## Use advice
使用该普通硅酸盐水泥生命周期评估（LCA）数据集时，请确保系统边界的一致性，包括生料制备、熟料磨、煅烧和水泥制备直至最后储存。不要包括水泥使用阶段和废物回收阶段的环境影响。为了进行准确评估，应将数据集放置在其技术适用性和区域相关性的背景下使用。在考虑技术发展或地区实践变化时，可能需要进行调整。

## Review details
清单： 内部审查通过几个迭代步骤完成，涉及原始数据验证、原始数据记录、代表性、完整性、与 ISO 14040 和 14044 有关的建模的一致性。

## Data sources
- 张乐. (2009). 磷石膏基生态水泥的开发及其生命周期评价研究 [硕士, 华中科技大学].
