# 湿法制砂|砂石中碎|圆锥破碎技术

Dataset: ILCD process, Unit process, single operation
Geography: CS-HUN-CN
Reference year: 2020
Classification: Materials production / Other mineralic materials
Generated by: Cui hang, Cuihang0716@163.com
Amounts: no units in this file; such an amount is in the reference unit of its flow, which a separate flow dataset defines
copyright: false

## General comment
二次破碎、筛分加工（圆锥破碎）

## Technology and included processes
鄂破后通过输送带运至圆锥破碎机进行第二次破碎，破碎后进入振动筛筛分，得到的1~2cm碎石通过输送带进入成品堆场，大于2cm的不合格产品重新回到圆锥破碎机进行破碎，制砂机进入制砂，其他部分 筛分后通过输送带送至制砂机进行制砂。

## Reference product
- gravel: 133333; measured
  中碎所产生的砂石

## Inputs
- gravel: 166667; measured
  中碎所投入的砂石
- electricity mix: 1800; measured
  圆锥破碎机用电量

## Outputs
- Rolling gravel: 33333.3; measured
  中碎所产生的中骨料
- particles (> PM10): 16.667; measured
  生产过程中产生的粉尘颗粒

## Data sources
- 年产 60 万吨机制砂建设项目环评报告
