# 土壤修复;异位修复;生物堆;工程实施;土壤调理;预处理土壤

Dataset: ILCD process, Unit process, single operation
Geography: KR
Reference year: 2011
Classification: Unit processes / Other Services / Repair and maintenance
Generated by: 桑春晖, sangch@mail.bnu.edu.cn
Owner: 天工LCI数据工作小组
Review: Dependent internal review by 天工LCI数据工作小组
Amounts: no units in this file; such an amount is in the reference unit of its flow, which a separate flow dataset defines
copyright: false
licenseType: Free of charge for all users and uses

## General comment
向污染土壤中添加适量水分、营养和调节剂等，调节土壤含水率、pH和孔隙度等。

## Technical purpose
该生物堆工程实施过程用于异位修复受污染土壤。该技术通过向土壤中添加适量的水分、营养和调节剂来调整土壤含水率、pH值和孔隙度。它用于土壤的预处理和处理，然后进行生物降解，特别适用于土壤污染处理需在原位之外的环境项目。

## Reference product
- Pre-treatment Soil: 1000; estimated

## Inputs
All rows: estimated
- Tap Water: 67400
- Ammonium sulfate,Ammonium sulfate: 2708
- Potassium in potassium sulfate: 558
- Microorganism: 4.777
- Excavated soil,Excavated soil: 1000
- Hardened impermeable ground: 600

## Use advice
在使用此数据集进行生命周期评估（LCA）时，请确保评估过程中包括修复系统标准化报告中列出的所有输入材料和能源消耗。考虑方法论方面如治疗系统边界、操作规模和地理相关性。准确核算输入生产的上游影响和任何现场能源使用至关重要。此外，如果评估长期效应，还应包括修复过程后土壤的分析，计算潜在的环境负担变化。

## Review details
清单： 内部审查通过几个迭代步骤完成，涉及原始数据验证、原始数据记录、代表性、完整性、与 ISO 14040 和 14044 有关的建模的一致性。

## Data sources
- Jeong, S.-W. & Suh, S.-W. Assessment of Environmental Impacts and CO 2 Emissions from Soil Remediation Technologies using Life Cycle Assessment - Case Studies on SVE and Biopile Systems -. Journal of Korean Society of Environmental Engineers 33, 267–274 (2011).
