# 稀土开采;稀土;原地浸出;钕铁硼（NdFeB）磁铁

Dataset: ILCD process, Unit process, single operation
Geography: NMG-CN
Reference year: 2014
Classification: Materials production / Non-energetic raw materials
Functional unit: The functional unit is a 1 kg NdFeB magnet
LCI method principle: Attributional
LCI method approaches: Allocation - market value; Allocation - mass
Generated by: 汪涛, twang@iue.ac.cn
Owner: 天工LCI数据工作小组
Review: Dependent internal review by 天工LCI数据工作小组
Amounts: no units in this file; such an amount is in the reference unit of its flow, which a separate flow dataset defines
copyright: false
licenseType: Free of charge for all users and uses

## General comment
所描述的稀土开采过程用于生产钕铁硼（NdFeB）磁铁。这些磁铁用于各种高科技应用，例如电动车辆的电动机制造、风力涡轮发电机、硬盘驱动器以及其他需要强大永照行磁铁的设备。中国巴彦淖尔市现场浸出法特别提取钕（Nd）和镨（Pr），这是NdFeB磁铁的重要组成部分。这些稀土元素的工业质量允许它们在商业规模的磁铁生产中使用，不仅限于专门的实验室设置。

## Geography
Bayan Obo (China)

## Technology and included processes
所有三个矿床生产 Nd 和 Pr 的基本过程都是相同的。 Nd 和 Pr 是相同的，除了最后的溶剂萃取步骤 (SX5)，其中两者被分离。

## Reference product
- Raw ore: 336; article inperiodical
  Raw ore. Bayan Obo: input for next process, Crushing

## Inputs
- Electricity: 1.2024; article inperiodical
  Bayan Obo: value of iron mine
- Diesel: 2.76; article inperiodical
  Bayan Obo: Diesel for mining truck
- Explosive: 0.064; article inperiodical
  Explosive. Bayan Obo: 0.095 kg/t moved rock multiplied by stripping rate
- transport in t*km,transport in t*km: 0.123; measured
  Bayan Obo: Diesel 150 km, oil and explosives 929 km, EURO3 lorry
- transport in t*km,transport in t*km: 0.305; measured
  Bayan Obo: Rail, 1046 km
- lubricating oil, waste: 0.01; article inperiodical
  lubricating oil, waste. Bayan Obo: based on Ruhrberg adapted to mining rate
- to unspecified, used: 0.00515; article inperiodical
  Bayan Obo

## Outputs
All rows: article inperiodical
- Dust (unspecified, from stack): 0.754
  Bayan Obo: based on Arpacioglu and Er multiplied by stripping rate
- Radioactive dust, waste: 0.363
  Radioactive dust. Bayan Obo: based on Th232 and U238 activity in the ore
- Water (river water from technosphere, waste water): 409
  Bayan Obo
- overburden (unspecified): 336
  Bayan Obo: calculation based on stripping rate
- lubricating oil, waste: 0.01
  lubricating oil, waste. Bayan Obo: incineration of hazardous waste is assumed

## Deviations from the LCI method approaches
In this study, an allocation method based on the market prices of REOs28 is considered. To estimate uncertainties that refer to the allocation method, a mass-based allocation is undertaken as a sensitivity analysis

## Use advice
在使用稀土开采过程数据集时，遵循为1公斤NdFeB磁铁功能单元提供的Nd和Pr市场价格分配方法至关重要。用户应注意，已应用基于质量的分配进行敏感性分析；在估计与分配方法相关的不确定性时应考虑这一点。指定的技术适用性对于确保在生命周期评估中准确表示至关重要，应指导包括上游过程的纳入和环境影响的评估。

## Review details
清单： 内部审查通过几个迭代步骤完成，涉及原始数据验证、原始数据记录、代表性、完整性、与 ISO 14040 和 14044 有关的建模的一致性。

## Data sources
- Marx, J., Schreiber, A., Zapp, P. & Walachowicz, F. Comparative Life Cycle Assessment of NdFeB Permanent Magnet Production from Different Rare Earth Deposits. ACS Sustainable Chem. Eng. 6, 5858–5867 (2018).
