# Rubbersheetforsportsgrounds|NaturalRubber,SyntheticRubber,ReclaimedRubber|Mixing,vulcanizing|All sizes / /|运动场地用橡胶板|天然橡胶，合成橡胶，再生橡胶|混炼，硫化|所有规模

Dataset: ILCD process, Partly terminated system
Geography: CN
Reference year: 2019
Classification: Materials production / Other mineralic materials
Generated by: The data was created by the Office of the Second National Pollution Source Census of the Ministry of Ecology and Environment, and the data was organized by the TianGong Plan team for ILCD format / 生态环境部第二次全国污染源普查工作办公室创建数据，天工计划团队常慧敏整理数据为ILCD格式
Amounts: no units in this file; such an amount is in the reference unit of its flow, which a separate flow dataset defines
copyright: false

## Technology and included processes
the Technical of end-of-pipe management technology for pollution Natural Rubberis/，The formula for calculating the actual operation rate (k-value) of the end-of-pipe treatment facility is Annual actual operating hours of desulfurization facilities / annual actual operating hours of units
污染物指标工业废气量的末端治理技术是/

## Reference product
- Natural Rubber: 1000, 1000 (2 entries); input; calculated
  原文件中描述污染物类别为Product，污染物指标为天然橡胶，合成橡胶，再生橡胶，此处对其进行了匹配工作，将其匹配到LCAflow库里面相最符合的流，污染物指标备注为工业废气量

## Outputs
- Exhaust gas: 74000; calculated
  原文件中描述污染物类别为废气，污染物指标为工业废气量，此处对其进行了匹配工作，将其匹配到LCAflow库里面相最符合的流，污染物指标备注为工业废气量
- particles (PM2.5 - PM10): 0.504; calculated
  原文件中描述污染物类别为废气，污染物指标为颗粒物，此处对其进行了匹配工作，将其匹配到LCAflow库里面相最符合的流，污染物指标备注为颗粒物
- volatile organic compound: 1.635, 1.308, 0.654 (3 entries); calculated
  原文件中描述污染物类别为废气，污染物指标为挥发性有机物①，此处对其进行了匹配工作，将其匹配到LCAflow库里面相最符合的流，污染物指标备注为挥发性有机物①

## Data sources
- 第二次全国污染源普查产排污核算系数手册（试用版）,二级代码29,四级代码2916文件，在完整版文件中第3277页
