# 运输 ; 风轮机（27×3.6MW+1×5MW） ; 公路运输可忽略不计，但使用更为复杂的船队，包括抛锚船、挖泥船、混凝土搅拌船、起重船、电缆敷设船等，接近25英里。

Dataset: ILCD process, Unit process, single operation
Geography: SH-CN
Reference year: 2009
Classification: Unit processes / Transport services / Water
Functional unit: The functional unit is 1 kWh on-grid electricity provision.
LCI method principle: Consequential
LCI method approaches: Allocation
Generated by: 赵云志, ll10088@163.com
Owner: 天工LCI数据工作小组
Review: Dependent internal review by 天工LCI数据工作小组
Amounts: no units in this file; such an amount is in the reference unit of its flow, which a separate flow dataset defines
copyright: false
licenseType: Free of charge for all users and uses

## General comment
东海大桥海上风电场（DBOWF）旨在利用风能产生接入电网的电力。海上风力发电涵盖了27台3.6MW和1台5MW的风力涡轮机，汇聚产生可再生能源。风力涡轮机重型和大型组件的运输技术复杂性，需要专门的船队，包括抛锚船、挖泥船、混凝土搅拌船、起重船和电缆敷设船。该海上风电场是增加中国可再生能源占比和减少对化石燃料依赖的重要一步。

## Geography
所研究的风电场- -东海大桥海上风电场( DBOWF )是中国在上海管辖范围内的第一个海上风电场，也是欧洲以外的第一个海上风电场。工程分两期施工，分别位于东海大桥两侧(图1 )。

## Reference product
- Wind turbine: 28; measured
  27 3.6-MW wind turbines and one 5-MW prototype wind turbine.

## Inputs
- Diesel: 747000; calculated
- Energy, geothermal, converted: 4.99e7; calculated

## Outputs
- carbon dioxide (fossil): 3.3687e6; calculated
- particles (PM2.5): 3600; calculated
- sulfur dioxide: 5200; calculated
- nitrous oxide: 37500; calculated

## Deviations from the LCI method approaches
本研究采用PLCA建模方法计算了中国某典型海上风电场的能源和环境排放。从摇篮到坟墓的过程包括材料和设备制造、运输和安装、操作和维护、拆解和回收4个阶段(图2 )。

## Data selection and combination
风机、基础和电缆的技术参数从DBOWF的设计文件中获得(表2)。对于关键材料和设备，其海上运输能量由运输负荷和海运能量强度计算得到。根据施工方案，对设施安装能耗和排放进行了估算。风电场的运行和维护数据，如维护的频率和工作时间，是通过与工程技术人员的现场调查获得的。与模型参数和输入数据相关的不确定性在本文的敏感性分析部分进行了说明。

## Use advice
使用此生命周期评估(LCA)数据集时，应注意风电场生命周期的特定阶段：材料和设备制造、运输和安装、操作和维护以及拆解和回收。用户应将与这些阶段相关的数据相应地应用于其评估中。由于海上风电场安装的复杂性，模型制作者必须根据不同专用船只的运输负荷和能量强度计算海运的能源和排放。在为接网电力供应功能单元确定正确参数时应特别注意。应进行敏感性分析，以了解数据不确定性对总体结果的影响。

## Review details
清单： 内部审查通过几个迭代步骤完成，涉及原始数据验证、原始数据记录、代表性、完整性、与 ISO 14040 和 14044 有关的建模的一致性。

## Data sources
- Yang, J. et al. The life-cycle energy and environmental emissions of a typical offshore wind farm in China. Journal of Cleaner Production 180, 316–324 (2018).
