# Sinteredbricksandbuildingblocks,coalganguebricks,steamedbricks,etc.|Clayshaleflyash,coalgangue,etc.|Screening, molding and drying, etc.|All sizes / /|烧结类砖瓦及建筑砌块、煤矸石砖、蒸养砖等|粘土页岩粉煤灰、煤矸石等|筛分、成型干燥等|所有规模

Dataset: ILCD process, Partly terminated system
Geography: CN
Reference year: 2019
Classification: Materials production / Other mineralic materials
Generated by: The data was created by the Office of the Second National Pollution Source Census of the Ministry of Ecology and Environment, and the data was organized by the TianGong Plan team for ILCD format / 生态环境部第二次全国污染源普查工作办公室创建数据，天工计划团队常慧敏整理数据为ILCD格式
Amounts: no units in this file; such an amount is in the reference unit of its flow, which a separate flow dataset defines
copyright: false

## Technology and included processes
the Technical of end-of-pipe management technology for pollution Sintered Brickis/
污染物指标工业废气量（除窑炉外工艺废气）的末端治理技术是/

## Reference product
- Sintered Brick: 10000, 10000 (2 entries); calculated
  原文件中描述污染物类别为Product，污染物指标为烧结类砖瓦及建筑砌块、煤矸石砖、蒸养砖等，此处对其进行了匹配工作，将其匹配到LCAflow库里面相最符合的流，污染物指标备注为工业废气量（除窑炉外工艺废气）

## Outputs
- Exhaust gas: nan; calculated
  原文件中描述污染物类别为废气，污染物指标为工业废气量（除窑炉外工艺废气），此处对其进行了匹配工作，将其匹配到LCAflow库里面相最符合的流，污染物指标备注为工业废气量（除窑炉外工艺废气）
- particles (PM2.5 - PM10): 0.0246, 0.492, 1.23 (3 entries); calculated
  原文件中描述污染物类别为废气，污染物指标为颗粒物（除窑炉外工艺废气），此处对其进行了匹配工作，将其匹配到LCAflow库里面相最符合的流，污染物指标备注为颗粒物（除窑炉外工艺废气）

## Data sources
- 第二次全国污染源普查产排污核算系数手册（试用版）,二级代码30,四级代码3031文件，在完整版文件中第3368页
