# 漏斗-沉箱式导水门;原位地下水修复;漏斗-导水门式PRB

Dataset: ILCD process, Unit process, single operation
Geography: US
Reference year: 2011
Classification: Unit processes / Other Services / Repair and maintenance
Generated by: 张建宾, zhangjb@caep.org.cn
Owner: 天工LCI数据工作小组
Review: Dependent internal review by 天工LCI数据工作小组
Amounts: no units in this file; such an amount is in the reference unit of its flow, which a separate flow dataset defines
copyright: false
licenseType: Free of charge for all users and uses

## General comment
漏斗-沉箱式导水门由隔水漏斗、导水门及活性材料组成，用于潜水埋藏浅的大型地下水污染羽状体。导水门采用沉箱方式安装。

## Geography
假设的污染场地

## Technical purpose
漏斗-沉箱式导水门系统被用于原位修复浸没在浅层的大型地下水污染羽状体。这个系统特别设计用于通过一个由隔水漏斗和一个装有活性材料的导水门来截取和处理受污染的地下水，这些活性材料能够去除污染物。该导水门采用适用于此类环境修复项目的沉箱安装方法。

## Reference product
- Funnel and caisson-based gate: 1; estimated

## Inputs
- Impermeable funnel: 36.6; estimated
  A 36.6 m length of funnel and four 2.4 m diameter cylindrical gates is installed
- Caisson-based gate: 4; estimated

## Use advice
在应用描述的原位地下水修复过程的LCA数据时，实践者必须确保过程中使用的所有假设与预期场地特征相符。这包括评估污染羽状体的大小和性质、地下水位深度以及特定场地的水文地质条件是否与数据集中预设的条件一致。必须全面核算安装和维护漏斗-导水门系统所需的所有主要原材料和能源输入。应仔细考虑系统的使用寿命以及它将如何影响潜在的环境效益，以及在结束使用阶段是否包括回收利用。

## Review details
清单： 内部审查通过几个迭代步骤完成，涉及原始数据验证、原始数据记录、代表性、完整性、与 ISO 14040 和 14044 有关的建模的一致性。

## Data sources
- Mark S. H. Mak and Irene M. C. Lo.Environmental Life Cycle Assessment of Permeable Reactive Barriers: Effects of Construction Methods, Reactive Materials and Groundwater Constituents[J].Environmental Science & Technology 2011, 45, 23, 10148-10154
