# 烧结矿生产;烧结矿;烧结

Dataset: ILCD process, Unit process, single operation
Geography: CN
Reference year: 2014
Classification: Unit processes / Materials production / Other mineralic materials
Generated by: 付翔, 1162850692@qq.com
Owner: 天工LCI数据工作小组
Review: Dependent internal review by 天工LCI数据工作小组
Amounts: no units in this file; such an amount is in the reference unit of its flow, which a separate flow dataset defines
copyright: false
licenseType: Free of charge for all users and uses

## General comment
本数据集所代表的烧结矿生产过程与将细铁矿粉颗粒团聚成适合高炉冶铁的粗粒材料的过程有关。该数据集基于 A 钢厂 2014 年烧结单元的操作数据，通常用于提高钢铁行业的效率和环境性能。

## Time period
基于 A 钢厂 2014 年的生产数据进行计算和分析对比。

## Reference product
- Sinter: 1211; measured
  烧结矿

## Inputs
All rows: measured
- quicklime: 121.36
  生石灰
- dolomite: 93.2
- Limestone: 72.91
- coke,Coke: 49.35
  焦炭
- Electricity: 158.4
- Iron ore: 1340
  铁矿石
- Electricity: 115.2
  余热发电
- Sinter: 347
  烧结返矿
- Blast furnace gas: 53
  高炉煤气

## Outputs
- Sinter: 347; measured
  烧结返矿
- carbon dioxide (fossil): 513400; measured
  原文未区分bio和fossil，根据专家判断此处为fossil
- methane: 50; measured
- nitrous oxide: 2; measured

## Use advice
在使用该数据集进行生命周期评估或其他可持续性研究时，用户应确保明确定义系统边界以包括必要的上游和下游过程。与其他烧结数据集的比较应考虑时间和地理相关性。任何数据的外推或修改都应记录下来，并附上方法论的理由。

## Review details
清单： 内部审查通过几个迭代步骤完成，涉及原始数据验证、原始数据记录、代表性、完整性、与 ISO 14040 和 14044 有关的建模的一致性。

## Data sources
- 刘宏强, 付建勋, 刘思雨, 谢欣悦, & 杨笑楹. 钢铁生产过程二氧化碳排放计算方法与实践. 钢铁 51, 74–82 (2016).
