# 市政污泥处理与处置;干污泥;水泥生产

Dataset: ILCD process, Unit process, single operation
Geography: CN
Classification: Unit processes / End-of-life treatment / Waste water treatment
Functional unit: One ton of sludge on a dry basis (1 t-DS) is defined as the functional unit.
Generated by: 金思甜, 2331276@tongji.edu.cn
Owner: 天工LCI数据工作小组
Review: Dependent internal review by 天工LCI数据工作小组
Amounts: no units in this file; such an amount is in the reference unit of its flow, which a separate flow dataset defines
copyright: ['opt4ROkqig']
licenseType: Free of charge for all users and uses

## General comment
选择国内几个典型的污泥处理设施，分别为厌氧消化、堆肥、共燃、热干燥焚烧和水泥生产，进行调查。数据主要来自具体地点的测量，要么通过实地调查，要么通过操作报告。污泥特性基于所调查场地的平均值。

## Technology and included processes
污泥首先用回转窑的余热烘干至15%。之后，它与其他原料(1.6吨煤、15.8吨石灰石、1.6吨铁矿石和每吨干污泥1.4吨粘土)在1400°C下燃烧以生产水泥。

## Technical purpose
本寿命周期评估数据中提到的干污泥是作为备选燃料或原料（AFR）用于水泥制造过程。过程数据代表了市政污泥的处理与处置，经干燥后在水泥工业中使用，可以部分替代传统燃料或由于其热值和材料成分作为原料的补充。

## Reference product
- Sludge: 1000; input; estimated
  干基 （1 t-DS）

## Inputs
All rows: measured
- Electricity: 2640.6
- Diesel: 0.2
- hard coal; 26.3 MJ/kg: 1600
- Limestone: 15800
- iron: 1600
  铁矿

## Outputs
- cement, unspecified: 12700; measured

## Use advice
在生命周期评估框架内应用此数据时，用户应确保贯穿其分析始终使用一吨干基污泥（1 t-DS）作为功能单位以保持准确性。应注意与地区或特定处理设施相关的污泥特性的任何潜在差异。此外，用户必须考虑将污泥运输至水泥厂所伴随的环境影响，以及水泥制造过程中共处理污泥所产生的排放。

## Review details
清单： 内部审查通过几个迭代步骤完成，涉及原始数据验证、原始数据记录、代表性、完整性、与 ISO 14040 和 14044 有关的建模的一致性。

## Data sources
- Dong, J., Chi, Y., Tang, Y., Wang, F. & Huang, Q. Combined Life Cycle Environmental and Exergetic Assessment of Four Typical Sewage Sludge Treatment Techniques in China. Energy Fuels 28, 2114–2122 (2014).
