# 初级铜冶炼;精炼铜;闪速熔炼;铜精矿

Dataset: ILCD process, Unit process, single operation
Geography: CN
Reference year: 2018
Classification: Unit processes / Materials production / Metals and semimetals
Functional unit: The production of 1000 kg of refined copper (99.99% cathode copper) was selected as the FU in this paper” (Chen 等, 2019, p. 36)
LCI method principle: Attributional
LCI method approaches: Allocation - market value
Generated by: 王鹏, 2867919560@qq.com
Owner: 天工LCI数据工作小组
Review: Dependent internal review by 天工LCI数据工作小组
Amounts: no units in this file; such an amount is in the reference unit of its flow, which a separate flow dataset defines
copyright: false
licenseType: Free of charge for all users and uses

## General comment
本数据集所描述的初级铜冶炼过程是指通过闪速熔炼技术将铜精矿转化为精炼铜（99.99%阴极铜），该过程涉及能源和资源的使用，同时会产生污染。所得到的精炼铜广泛用于电子、建筑、运输和铜基产品的制造各个行业。

## Geography
本研究主要通过对生产工艺和典型企业的调查，收集了原铜生产的资源、能源消耗和污染数据。

## Technology and included processes
闪速熔炼和吹炼统称为熔炼。

## Reference product
- Refined copper: 1000; measured
  Refined copper 需要补充

## Inputs
- crude oil; 42.3 MJ/kg: 40; software or database
  Crude oil (resource)
- hard coal,hard coal,hard coal: 1140; software or database
  Hard coal (resource)
- natural gas; 44.1 MJ/kg: 53.2; software or database
  Natural gas (resource)
- Copper ore: 197000; measured
- Copper scrap（Cu 95%）,Copper scrap（Cu 95%）: 0; measured
  Copper scrap需要补充
- freshwater,freshwater: 29600; measured
  Fresh water
- Butyl xanthate: 7.93; measured
  Butyl xanthate需要补充
- Pine camphor oil: 4.96; measured
  Pine camphor oil需要补充
- Limestone: 210; software or database
- quartz sand: 518; software or database
  Quartz sand
- Soften water: 3360; measured
  Soften water 需要补充flow
- Industrial oxygen: 1010; measured
  Industrial oxygen需要补充flow
- Refractory material: 13.3; measured
  Refractory material需要补充flow
- hydrogen chloride: 0.48; measured
- Sulfuric acid(98%): 6.5; measured
  Sulfuric acid resourse 需要补充
- Gelatin: 0.0448; measured
  Gelatin需要补充
- Thiourea: 0.035; measured
  Thioureas需要补充
- Casein: 0.025; measured
  Casein需要补充

## Outputs
All rows: measured
- carbon dioxide (fossil): 3180
  carbon dioxide
- sulfur dioxide: 13.7
  Sulfur dioxide
- Nitrogen oxides: 0.785
  NOx需要补充
- carbon monoxide,carbon monoxide (fossil): 3.17
  Carbon monoxide
- methane (fossil): 8.33
  Methane
- nitrous oxide: 0.0491
  Nitrous oxide
- sulphuric acid: 0.553
- particles (PM2.5 - PM10): 10.5
- mercury: 0.00205
  Mercury
- lead: 0.00205
  Lead
- zinc: 0.00411
- nickel: 0.00615
  Nickel
- arsenic: 0.0103
  Arsenic
- chemical oxygen demand: 0.0164
  Chemical oxygen demand
- biological oxygen demand: 0.0159
  Biochemical oxygen demand需要补充
- Solid suspension: 1.26
  Solid suspension需要补充
- Ammonia Nitrogen: 0.376
  Ammonia nitrogen需要补充
- municipal solid waste deposition: 106000
  Solid waste

## Deviations from the LCI method approaches
结合我国精炼铜生产特点，本研究选用CML2001方法（2016年修订）进行环境影响核算。

## Data selection and combination
本研究主要通过对生产工艺和典型企业的调查，收集了原铜生产的资源、能源消耗和污染数据。上游数据来自 GaBi (ts Vision) 和 Ecoinvent 数据库

## Data treatment and extrapolations
本研究使用Gabi软件（ts版）作为计算软件，并针对这两种技术建立了模型。

## Use advice
使用提供的数据应考虑所描述的方法论框架，具体为使用CML2001方法（2016年修订）进行环境影响核算。用户在解读数据时应该考虑中国精炼铜生产的特点。确保体系边界包括对生产技术和典型企业的调查。功能单元（FU）是生产1000公斤精铜。为了进一步提高精确度，用户应参考Gabi软件（ts版）和Ecoinvent数据库获取上游数据的情境化信息。

## Review details
清单： 内部审查通过几个迭代步骤完成，涉及原始数据验证、原始数据记录、代表性、完整性、与 ISO 14040 和 14044 有关的建模的一致性。

## Data sources
- Chen, J. et al. Environmental benefits of secondary copper from primary copper based on life cycle assessment in China. Resources, Conservation and Recycling 146, 35–44 (2019).
