# 风轮机制造 ; 3.6 MW 的风轮机

Dataset: ILCD process, Unit process, black box
Geography: SH-CN
Reference year: 2009
Classification: Unit processes / Energy carriers and technologies / Mechanical energy
Functional unit: The functional unit is 1 kWh on-grid electricity provision.
LCI method principle: Attributional
LCI method approaches: Allocation
Generated by: 赵云志, ll10088@163.com
Owner: 天工LCI数据工作小组
Review: Dependent internal review by 天工LCI数据工作小组
Amounts: no units in this file; such an amount is in the reference unit of its flow, which a separate flow dataset defines
copyright: false
licenseType: Free of charge for all users and uses

## General comment
作为该工业流程的一部分制造的3.6兆瓦风轮机设计用于海上风电场，特别是东海大桥海上风电场(DBOWF)。这些风力发电机是大规模可持续能源发电的重要组成部分，旨在利用风能为电网提供电力。

## Geography
所研究的风电场- -东海大桥海上风电场( DBOWF )是中国在上海管辖范围内的第一个海上风电场，也是欧洲以外的第一个海上风电场。工程分两期施工，分别位于东海大桥两侧(图1 )。

## Reference product
- Wind turbine: 1; measured

## Inputs
- Resin: 216000
  Resin and fiber glass
- iron: 78300
- Steel,Steel: 407900
- silicon: 500
  silica
- copper: 5200

## Deviations from the LCI method approaches
本研究采用PLCA建模方法计算了中国某典型海上风电场的能源和环境排放。从摇篮到坟墓的过程包括材料和设备制造、运输和安装、操作和维护、拆解和回收4个阶段(图2 )。

## Data selection and combination
风机、基础和电缆的技术参数从DBOWF的设计文件中获得(表2)。能源和排放因子(即单位材料和构件生产的能源消耗和环境排放)来源于Ecoinvent 2.2数据集(生态发明中心, 2009)，优先参考中国实践的系数。对于关键材料和设备，其海上运输能量由运输负荷和海运能量强度计算得到。根据施工方案，对设施安装能耗和排放进行了估算。风电场的运行和维护数据，如维护的频率和工作时间，是通过与工程技术人员的现场调查获得的。与模型参数和输入数据相关的不确定性在本文的敏感性分析部分进行了说明。

## Use advice
当在生命周期评价(LCA)中使用这个数据集时，用户应仔细考虑从摇篮到坟墓的整个生命周期，包括材料和设备制造、运输和安装、运行和维护，以及拆解和回收。从Ecoinvent 2.2数据集获得的能源和排放因子应当调整以反映适用的中国实践。在评估中纳入关键材料和设备的海上运输能耗计算至关重要。用户还必须考虑在敏感性分析部分讨论的不确定性，尤其是在与其他能源生产方法或地理位置相比较时。根据来自DBOWF的运行数据来模拟使用阶段行为，包括维护频率和工作时间。

## Review details
清单： 内部审查通过几个迭代步骤完成，涉及原始数据验证、原始数据记录、代表性、完整性、与 ISO 14040 和 14044 有关的建模的一致性。

## Data sources
- Yang, J. et al. The life-cycle energy and environmental emissions of a typical offshore wind farm in China. Journal of Cleaner Production 180, 316–324 (2018).
