# 注入生物培养基的地下水;地下水原位修复;生物强化修复;生物培养基注射

Dataset: ILCD process, Unit process, single operation
Geography: SH-CN
Reference year: 2020
Classification: Unit processes / Other Services / Repair and maintenance
Generated by: 肖萌, xiaomeng@mail
Owner: 天工LCI数据工作小组
Review: Dependent internal review by 天工LCI数据工作小组
Amounts: no units in this file; such an amount is in the reference unit of its flow, which a separate flow dataset defines
copyright: false
licenseType: Free of charge for all users and uses

## General comment
CHC+ISB用于场地修复，在设备运行阶段，进行生物质培养基的注入。

## Geography
The aquifer in a certain area in Shanghai, China, is uniformly contaminated with chlorinated volatile organic compounds (CVOCs), with a surface area of 20,000 m2 and a depth of 50 m, with the water table located at a depth of 30 m.

## Technical purpose
所描述的工业过程用于特定区域地下水中氯代挥发性有机化合物（CVOCs）的原位修复。使用CHC+ISB（特定化合物同位素表征和原位生物修复）技术涉及向含水层注射生物培养基，以增强污染物的生物降解能力。这一过程专门用于地下水受污染的场地修复，特别是针对中国上海一个面积为20,000平方米、深度为50米的受污染区域。

## Reference product
- Groundwater after biological Medium injection: 600000; measured
  注射生物培养基后的地下水

## Inputs
- Biological Medium: 523.53; software or database
  1 kWh/m3 medium, 523.53 m3 biological medium
- Electricity: 1884.71; measured

## Use advice
在使用本数据集进行生命周期评估或其他环境影响分析时，用户应特别注意确保所采用的方法论框架与CHC+ISB修复过程的具体情况相一致。应考虑数据集对中国上海地理位置的具体性和污染的深度。数据使用者在模拟使用阶段的行为以及可能影响生物修复有效性的自然减弱或其他场地特定条件时，应该考虑这一背景。此外，用户应评估他们感兴趣的场地是否存在类似条件，以确定这些数据的普适性。

## Review details
清单： 内部审查通过几个迭代步骤完成，涉及原始数据验证、原始数据记录、代表性、完整性、与 ISO 14040 和 14044 有关的建模的一致性。

## Data sources
- Ni, Z. et al. Comparative Life-Cycle Assessment of Aquifer Thermal Energy Storage Integrated with in Situ Bioremediation of Chlorinated Volatile Organic Compounds. Environ. Sci. Technol. 54, 3039–3049 (2020).
