# 玻璃生产 ;有机玻璃单体MMA生产;精馏过程

Dataset: ILCD process, Unit process, single operation
Geography: JX-CN
Classification: Unit processes / Materials production / Glass and ceramics
Generated by: 和夏夏, 18616148319@163.com
Owner: 天工LCI数据工作小组
Review: Dependent internal review by 天工LCI数据工作小组
Amounts: no units in this file; such an amount is in the reference unit of its flow, which a separate flow dataset defines
copyright: false
licenseType: Free of charge for all users and uses

## General comment
通过精馏过程生产的有机玻璃单体MMA旨在创造聚甲基丙烯酸甲酯(PMMA)，也被称为亚克力玻璃。该物质通常用于需要透明性和高强度的应用中，如防护障壁、透镜和标志，以及汽车和建筑行业的各种组件。

## Reference product
- methyl methacrylate: 1015.48; measured
  MMA粗成品

## Inputs
- Electricity: 335.52; measured
- methyl methacrylate: 997.998; measured
  MMA粗成品
- propionic acid: 17.479; measured
  精馏冷凝液

## Use advice
在使用有机玻璃生产过程的数据集时，要考虑精馏过程可能包括的环境影响，如能源消耗和排放。确保根据PMMA产品的具体应用准确建模使用阶段行为。此外，考虑产品的生命周期终点场景，特别是PMMA将被回收还是丢弃，因为这将显著影响整体的环境影响。

## Review details
清单： 内部审查通过几个迭代步骤完成，涉及原始数据验证、原始数据记录、代表性、完整性、与 ISO 14040 和 14044 有关的建模的一致性。

## Data sources
- 江西旺达新材料有限公司年产20000吨有机玻璃原料生产项目
