# 砖生产 ; 混凝土路面砖 ; 面料混合工艺

Dataset: ILCD process, Unit process, single operation
Geography: JNA-SD-CN
Reference year: 2018
Classification: Unit processes / Materials production / Other mineralic materials
Functional unit: The functional unit is the area of 1 m2 brick products.
Generated by: 王湘锦, r99rt4@163.com
Owner: 天工LCI数据工作小组
Review: Dependent internal review by 天工LCI数据工作小组
Amounts: no units in this file; such an amount is in the reference unit of its flow, which a separate flow dataset defines
copyright: false
licenseType: Free of charge for all users and uses

## General comment
混凝土路面砖块的非烧结工艺

## Technical purpose
济南顺德水泥制品有限公司生产的混凝土路面砖和透水砖主要用于铺设人行道、走道以及需要耐用和稳定地面覆盖的其他户外表面。这些砖块提供了一个坚固的表面，能够承受车辆和行人流量。

## Reference product
- brick dust: 14; measured
  Fabric blending 材料

## Inputs
All rows: measured
- portland cement: 6.17
- sand: 7.41
- freshwater: 0.617
- Iron oxide pigment: 0.124
- Electricity: 0.29196

## Outputs
- particles (PM10): 9e-5; measured

## Deviations from the LCI method approaches
本研究采用了 ReCiPe midpoint（H）模型。

## Data selection and combination
本研究从济南顺德水泥制品有限公司收集了混凝土路面砖和透水砖的生产能耗以及各种原材料、能源投入和废气排放的相关数据。济南顺德水泥制品有限公司 山东省。

## Sampling procedure
原材料、能源投入和废物排放的大部分数据都是从生产厂家的现场调查中收集的。减水剂，其化学成分是磺酸钠盐的甲醛缩合物

## Use advice
使用该数据集的用户应采用本研究中使用的 ReCiPe midpoint（H）模型来评估砖生产过程的环境影响。比较不同产品或过程时，功能单位应以 1 平方米砖制品的面积为基础。使用此LCA数据时，建议考虑敏感性分析结果，特别是当关键工序变化的输入和输出数据变动在5%范围内时。

## Review details
清单： 内部审查通过几个迭代步骤完成，涉及原始数据验证、原始数据记录、代表性、完整性、与 ISO 14040 和 14044 有关的建模的一致性。

## Data sources
- Yuan, X. et al. Environmental and economic impacts assessment of concrete pavement brick and permeable brick production process - A case study in China. Journal of Cleaner Production 171, 198–208 (2018).
