# 直接还原铁生产;直接还原铁;SF

Dataset: ILCD process, Unit process, single operation
Geography: CN
Classification: Materials production / Metals and semimetals
Generated by: 付翔, 1162850692@qq.com
Owner: 天工LCI数据工作小组
Review: Dependent internal review by 天工LCI数据工作小组
Amounts: no units in this file; such an amount is in the reference unit of its flow, which a separate flow dataset defines
copyright: false
licenseType: Free of charge for all users and uses

## General comment
通过基于煤的还原过程（通常称为煤基直接还原铁，简称Coal-DR）生产的直接还原铁（DRI）是钢铁制造中的传统高炉方法的替代品。使用该过程获得的直接还原铁可用于电弧炉生产钢铁。单炉直接还原铁（SF-DRI）装置在此制造路线中具体用于单一操作。

## Geography
The LCI of Coal-DR is obtained, as shown in Table 9, based on the statistics of the demonstration project in China.

## Reference product
- Direct Reduced Iron: 1027.1; calculated
  DRI

## Inputs
- Pellet: 1394.1; calculated
  Pellets
- Reducing gas: 1362.3; calculated
- Natural gas, at consumer EU-27: 42.5; calculated
- Electricity: 70.92; calculated

## Outputs
- Top gas: 1439.2; calculated

## Data treatment and extrapolations
LCI of COG-DR and H-DR routes, which is not scaled-up in China are estimated based on Coal-DR routes combined with literature data from simulations, laboratory tests, and process modeling in Table 9 [49,50]. The LCI of Coal-DR is obtai

## Use advice
在使用煤基直接还原铁（Coal-DR）过程的生命周期评价（LCA）数据时，用户应考虑到数据来源中国示范项目的具体背景。对于在中国尚未广泛实施的焦炉气直接还原（COG-DR）和氢直接还原（H-DR）途径，LCA数据应被视为基于煤基DR数据以及来自模拟、实验室测试和过程建模的额外信息的估算值。在将来自Coal-DR的数据应用于COG-DR和H-DR过程时，应注意方法论的差异。

## Review details
清单： 内部审查通过几个迭代步骤完成，涉及原始数据验证、原始数据记录、代表性、完整性、与 ISO 14040 和 14044 有关的建模的一致性。

## Data sources
- The carbon reduction potential of hydrogen in the low carbon transition of the iron and steel industry: The case of China
