# 反渗透模块生产;螺旋缠绕

Dataset: ILCD process, Unit process, single operation
Geography: US
Reference year: 2022
Classification: Unit processes / Materials production / Other materials
Functional unit: 1 item of reverse osmosis module
Generated by: 陆嘉麒, wilsherelu@foxmail.com
Owner: 天工LCI数据工作小组
Review: Dependent internal review by 天工LCI数据工作小组
Amounts: no units in this file; such an amount is in the reference unit of its flow, which a separate flow dataset defines
copyright: false
licenseType: Free of charge for all users and uses

## General comment
该反渗透模块采用螺旋缠绕结构，通常用于水净化和海水淡化过程。它旨在去除溶解盐、细菌、热原和有机物等广泛污染物，从而为各种应用生产高质量的水。可用于住宅、商业、工业和市政供水设施。

## Reference product
- Reverse Osmosis Component: 1; measured
  1 Reverse osmosis module

## Inputs
All rows: measured
- 1,1-Difluoroethane, HFC-152a: 0.014
  1,1-二氟乙烷，HFC-152a
- polyvinylchloride resin (E-PVC): 0.052
  PVC
- Polyvinylidene fluoride: 0.088
  聚偏二氟乙烯（PVDF）膜
- polypropylene fibres (PP): 0.129
  PP膜
- Adhesive Tape: 1.643
  胶带（缠绕外壳）
- plastic pipes: 0.016
  挤压塑料管
- Plastic (unspecified): 0.012
  注塑塑料
- isopropanol: 0.013
  异丙醇
- Polyurethane (PU) Filler: 0.032
  PU填充剂
- freshwater: 0.001
  自来水
- Electricity: 3.7116
  过程电耗

## Use advice
在使用此反渗透模块数据集进行生命周期评估时，重要的是要包括反映实际或预期使用情况的操作条件，如压力、温度和回收率。还应考虑水质组成和质量的区域差异，因为这些差异会影响模块性能。在结束使用阶段，用户应考虑膜元件的处置或回收。在LCA模型中，应清楚地说明关于模块使用寿命、能耗和维护的假设和限制。

## Review details
清单： 内部审查通过几个迭代步骤完成，涉及原始数据验证、原始数据记录、代表性、完整性、与 ISO 14040 和 14044 有关的建模的一致性。

## Data sources
- DuPont. Product Data Sheet
