# 熟料生产;熟料;选择性催化还原脱氮技术

Dataset: ILCD process, Unit process, black box
Geography: TJ-CN
Reference year: 2010
Classification: Unit processes / Materials production / Other mineralic materials
Generated by: #REF!, ysqsophia@gmail.com
Owner: 天工LCI数据工作小组
Review: Dependent internal review by 天工LCI数据工作小组
Amounts: no units in this file; such an amount is in the reference unit of its flow, which a separate flow dataset defines
copyright: false
licenseType: Free of charge for all users and uses

## General comment
将水泥储备库选择性催化还原（Selective catalytic reduction，SCR）反应器作为基准进行计算。

## Geography
中材国际天津分公司

## Technical purpose
熟料生产数据集代表了在水泥生产过程中使用选择性催化还原脱硝技术（SCR DeNOx）。它适用于对水泥制造进行生命周期评估，特别是在评估使用SCR系统在熟料焚烧阶段减少NOx排放的环境性能时。该过程特定于中材国际天津分公司的设施，包括煤炭和原材料运输、磨碎以及熟料焚烧并实施SCR DeNOx。

## Model description
LCA模型以选择性催化还原脱硝（SCR DeNOx）技术作为其SCR系统，对水泥生产的整个生命周期进行建模。生命周期包括从煤炭和原材料运输、煤炭和生料磨碎、到熟料焚烧，最终将含有NOx的烟气送入SCR反应器。功能单位为1吨熟料。

## Reference product
- clinker: 1000
  熟料

## Inputs
- hard coal; 26.3 MJ/kg: 146
  煤炭
- limestone, crushed, for mill: 1533
  石灰石
- sandstone: 52.96
  砂岩
- Electricity: 227.448
  电

## Outputs
All rows: uniform
- carbon dioxide (fossil): 807.3; min 807.3; max 807.3
  CO2
- carbon monoxide (fossil): 1.765; min 1.765; max 1.765
  CO
- sulfur dioxide: 0.004573; min 0.004573; max 0.004573
  SO2
- nitrogen monoxide: 0.4071; min 0.4071; max 0.4071
  NO
- nitrogen dioxide: 0.06935; min 0.06935; max 0.06935
  NO2
- particles (> PM10): 0.01692; min 0.01692; max 0.01692
  PM，未标明粒径，按PM>10处理。
- non-methane volatile organic compounds: 0.0002896; min 0.0002896; max 0.0002896
  NMVOC
- arsenic: 2.21e-5; min 7.621e-6; max 3.658e-5
  As
- cadmium: 3.811e-6; min 1.524e-6; max 6.097e-6
  Cd
- chromium: 1.524e-5; min 1.524e-5; max 1.524e-5
  Cr
- mercury: 9.906e-7; min 7.621e-7; max 1.219e-6
  Hg
- nickel: 2.286e-5; min 1.219e-5; max 3.353e-5
  Ni
- lead: 5.335e-5; min 1.524e-5; max 9.145e-5
  Pb
- zinc: 6.706e-5; min 1.524e-6; max 0.0001326
  Zn
- fluorine: 0.000218; min 0.000218; max 0.000218
  F
- 2,3,7,8-tetrachlorodibenzo-p-dioxin: 4.42e-11; min 4.42e-11; max 4.42e-11
  Dioxin
- cadmium: 1.524e-6; min 1.524e-6; max 1.524e-6
  Cu
- hydrogen chloride: 0.0001951; min 0.0001951; max 0.0001951
  HCI

## Data selection and combination
2010年中材国际天津分公司进行了热平衡与物料平衡的测量。输入输出数据来自于该报告。

## Data treatment and extrapolations
原始数据的污染物排放量给出的是最大值和最小值。我们假设服从均匀分布，计算了平均值。

## Sampling procedure
考虑到排放量的正式波动，有些数据以最小值和最大值的形式展示。

## Use advice
使用具有SCR DeNOx技术的熟料生产LCA数据集的用户应注意，数据来源于2010年针对中材国际天津分公司的热平衡和物料平衡测量。排放数据基于报告的最大值和最小值，并假设均匀分布来计算平均值。用户被建议考虑数据的技术适用性，其他地点或技术的潜在方法学变化，并在建模时考虑特定使用阶段行为。在没有考虑本地环境和技术变化的情况下，应谨慎地概括结果。

## Review details
清单： 内部审查通过几个迭代步骤完成，涉及原始数据验证、原始数据记录、代表性、完整性、与 ISO 14040 和 14044 有关的建模的一致性。

## Data sources
- Chen Li, Suping Cui, Xianzheng Gong, Xiance Meng, & Boxue Sun. (2013). LCI Study of SCR DeNOx Technology for Cement Industry (XF Tang, Y Wu, Y Yao, & ZZ Zhang, Eds.; WOS:000319791800042; Vols. 743–744, pp. 252–257).
