# 设备安装与回撤;开采煤炭

Dataset: ILCD process, Unit process, single operation
Geography: LF-SX-CN
Reference year: 2022
Classification: Other Services / Engineering and consulting
Generated by: 尹琳琳, yinlinlin0623@163.com
Owner: 天工LCI数据工作小组
Review: Dependent internal review by 天工LCI数据工作小组
Amounts: no units in this file; such an amount is in the reference unit of its flow, which a separate flow dataset defines
licenseType: Free of charge for all users and uses

## General comment
设备安装与回撤过程涉及煤炭开采作业。此数据集对于理解大规模煤炭提取中处理采矿设备的逻辑和时间方面具有相关性。具体而言，它可以适用于一年四季的生产时间表和设备管理在工业采矿活动中至关重要的场景。

## Geography
M 煤矿的年产量为120万t，每年实际工作时间按360d计，则该工作面共需 499d开采完成。M煤矿一个工作面的开采过程中，设备的安装与撤回的时间各为半个月，在一年的生产中，掘进的时间为11个月，回采的时间为10个月。

## Technology and included processes
设备安装与设备回撤

## Reference product
- carbon dioxide (fossil): 1.06648e7; uniform; article inperiodical
  根据M煤矿煤炭开采全生 命周期内各个阶段的时间进度安排以及整个工作面的开采时间,计算得出这一工作面开采的全生命周期中设备安装与回撤中消耗14413.87mw·h的电量产生的CO2排放量。

## Inputs
- Electricity: 5.18899e7; uniform; article inperiodical
  根据M煤矿煤炭开采全生 命周期内各个阶段的时间进度安排以及整个工作面的开采时间,计算得出这一工作面开采的全生命周期中设备安装与回撤的电力消耗量。

## Use advice
数据集使用者在对煤炭开采过程的生命周期进行建模时，应考虑设备安装和回撤的时间分配。值得注意的是，为了确保准确性，必须要将设备设置和收回所需的时间包括在整个过程时间内。用户还应注意由于这些过程，设备每年有一个月的时间是不活动的。建议确保操作时间表反映实际情况，并且设备使用时间的假设与此数据的表示一致。

## Review details
清单： 内部审查通过几个迭代步骤完成，涉及原始数据验证、原始数据记录、代表性、完整性、与 ISO 14040 和 14044 有关的建模的一致性。
