# 天然气气藏开发 ; 气藏储量丰富地质;多属性开发决策

Dataset: ILCD process, Unit process, single operation
Geography: SC-CN
Reference year: 2013
Classification: Unit processes / Energy carriers and technologies / Natural gas based fuels
LCI method principle: Attributional
LCI method approaches: Consequential
Generated by: Shikang Kang, 908798159@qq.com
Owner: 天工LCI数据工作小组
Review: Dependent internal review by 天工LCI数据工作小组
Amounts: no units in this file; such an amount is in the reference unit of its flow, which a separate flow dataset defines
copyright: false
licenseType: Free of charge for all users and uses

## General comment
将多属性决策方法运用到天然气开发决策领域，构建了综合评价模型，通过模型分析及测算结果得知如何的开采序列会使效益最大化

## Geography
四川油气田是位于中国西南以四川盆地为中心的油气产区

## Time period
数据搜集时间

## Technology and included processes
以四川气田为研究对 象，从中选取的12个区块作为评价样本，依照第四章构建的指标体系和所阐述的评价方 法，对四川气田的勘探开发进行决策并作出最优的排序。

## Technical purpose
此天然气气藏开发过程用于评估和优化中国四川地区气田的开采序列。这涉及将多属性决策方法应用于最大化天然气储备开发的效益。

## Model description
以第二章的理论为依据，结合天然气气藏开发决策的特点确定该决策的评价因 子，属性权重值以及综合评价方法并分别建立了计算模型。

## Reference product
- Shale gas well: 0.8861; input; min 0.6362; max 0.8861; uniform; missing unimportant
  权重系数

## Inputs
- natural gas: 706; log-normal
  气藏埋深

## Outputs
- methane (fossil): 706; log-normal
  文献中没有天然气开采量，假设天然气开采过程中投入量：输出量=1:1

## Data selection and combination
选取四川气田的12个区块即：新场蓬一、新场蓬二、新场沙溪庙、合兴场蓬莱 镇、合兴场须二、洛带蓬一、洛带蓬二、洛带蓬三、洛带蓬四、马井蓬莱镇、新都蓬莱 镇、东泰蓬莱镇，并用p={p1,p2,...p12}来表示。由第四章我们已经选取了8个指标作为评 价标准

## Data treatment and extrapolations
本文的重难点在于权重系数的确定，目前常用的有主观赋权法和客观赋权法两 种，但是两个方法都有其优点并存在一定的不足，为了弥补它们的不足本文采用最大离 差的组合赋权方法，将主观与客观权重综合起来确定属性的最终权重值。更具科学性。

## Use advice
用户应应用提供的数据集和综合评价模型，考虑确定的评价因子和属性权重。应注意探索和开发项目的方法论建议，包括为了更科学的权重系数将主观和客观权重的整合，以及四川气田12个选定区块的最优排名。

## Review details
清单： 内部审查通过几个迭代步骤完成，涉及原始数据验证、原始数据记录、代表性、完整性、与 ISO 14040 和 14044 有关的建模的一致性。

## Data sources
- 刘亚莉. 基于多属性决策的天然气气藏开发决策方法研究[D].西安石油大学,2013.
