# 水泥生产;水泥, 普通硅酸盐水泥, 42.5MPa;新型干法, 4000 t-cl/d;混合固废

Dataset: ILCD process, Unit process, black box
Geography: CN
Reference year: 2005
Classification: Materials production / Other mineralic materials
Generated by: 杨思琪, ysqsophia@gmail.com
Owner: 天工LCI数据工作小组
Review: Dependent internal review by 天工LCI数据工作小组
Amounts: no units in this file; such an amount is in the reference unit of its flow, which a separate flow dataset defines
copyright: false
licenseType: Free of charge for all users and uses

## General comment
预分解窑干法水泥生产是新型干法的典型代表。我国日产4000t熟料的预分解窑新型干法水泥生产线的工艺流程。来自矿山的石灰石由自卸卡车运入破碎机喂料仓，经破碎机和破碎机破碎，送入碎石库内存储，然后由裙板式喂料机、皮带输送机定量送往预均化堆场。粘土用自卸卡车输入或从工厂的粘土堆棚中用铲斗卸入粘土喂料仓，经喂料机喂入双辊破碎机破碎，经计量设备送入预配料的预均化堆场。石灰石和粘土在预配料均化堆场自动配合，并均化成均匀的混合原料。混合原料、石灰石及铁粉各自从堆场由皮带输送机送往生料磨的磨头喂料仓，经定量卸料、喂料送入烘干磨进行烘干与粉磨。烘干磨的热气体来自悬浮预热器排出的废气，启动时则借助热风炉供热风。粉磨后的生料用气力提升泵送入两个连续性空气均化库进一步用空气搅拌均化生料和储存生料。均化库中的生料经卸料、计量、提升、定量喂入后由气力提升泵送至窑尾悬浮预热器和分解炉经预热和分解后的物料进入回转窑煅烧成熟料。回转窑和分解炉所用原煤经烘干兼粉磨后制成的煤粉并存储在煤粉仓中供给。熟料经蓖式冷却机冷却后由裙板输送机、计量称、斗式提升机分别送入熟料库中存储。熟料、石膏经定量喂料机喂料送入水泥磨中粉磨。水泥磨带有选粉机构成所谓的圈流水泥磨粉磨时也可根据产品要求加入适量的混合材料和熟料、石膏一同粉磨。粉磨后的水泥经仓式空气输送泵送至水泥库中存储一部分水泥经包装机包装为袋装水泥用火车或卡车运输出厂另一部分由散装专用车散装出厂。

## Technology and included processes
来 自矿 山 的石 灰 石 1 由 自卸卡 车运 入 破 碎 机 喂 料仓 经 破 碎 机 6 和 破 碎 机 7 破 碎 送 入碎 石库 内 存储 然 后由 裙 板式 喂 料 机 、 皮带 输 送 机 定 量 送 往 预均 化 堆场 9 。 粘 土 用 自卸卡车 输 入 或 从工 厂的 粘 土 堆 棚 中用 铲 斗卸 入 粘土 喂 料仓 经 喂 料 机 喂 入双辊破 碎 机 破 碎 经计 量 设备 送 入 预配 料 的预 均 化 堆场 9 。石 灰 石 和 粘 土 在 预 配料 均化堆场 自动 配 合 并均 化成 均 匀的 混合原 料 。 混 合 原 料 、 石 灰 石及 铁 粉 3 各 自从堆场 由 皮 带 输送机 送 往 生 料磨 1 的磨头喂 料 仓 经 定 量 卸 料 、 喂 料送 入烘 干 磨进 行 烘 干与 粉 磨 。 烘干磨 的 热气体 来自悬 浮 预热 器 14排 出 的 废 气 启动 时 则 借 助 热 风 炉 供 热 风 。粉 磨 后的 生 料 用 气力提 升泵 12 送 入两 个 连续 性 空 气均化 库 进 一 步 用 空 气 搅拌均 化 生 料 和 储存 生 料 。 均 化 库 中的生 料 经 卸 料 、 计 量 、 提升 、 定 量 喂 入 后 由气 力提 升 泵送 至窑尾悬 浮 预 热 器 14 和 分 解 炉 15 经 预热 和 分解 后的 物料进入 回 转 窑 16锻 烧 成熟 料 。 回转 窑 和 分 解炉 所 用 原 煤 4 经 烘干兼 粉磨 后 制 成 的 煤粉 并存储在煤粉 仓 中供给 。 熟 料经 蓖 式冷 却 机 17 冷 却后 由 裙 板 输 送 机 、 计 量称 、 斗 式 提升 机 分别 送 入 熟 料 库 中存 储 。熟料 、 石膏 5 经 定 量 喂 料 机 喂 料 送 入 水 泥磨 中粉 磨 。 水 泥 磨 23带 有 选 粉 机24 构 成所谓 的 圈 流水泥磨 粉 磨 时也 可 根据产 品 要 求 加 入 适量 的 混合 材 料 和 熟料 、 石膏 一同 粉 磨 。 粉 磨 后的水泥 经 仓 式 空 气 输 送泵 25 送 至 水 泥 库 2 6 中存 储 一部 分水 泥 经 包 装 机 27 包装为 袋 装水 泥 用 火 车或 卡 车28 运 输 出厂 另 一部 分 由 散装专 用 车 29 散 装 出厂 。

## Technical purpose
该数据集描述了使用新型干法技术生产42.5MPa强度的普通硅酸盐水泥。它通常应用于需要高强度混凝土的建筑项目，适用于各种类型的大型土木工程和建筑工程。

## Model description
以1千克28天抗压强度为42.5MPa的水泥所具有的使用性能为功能单位，即IFu=42.5kgMPa。研究范围界定为：原料预处理一生料粉磨一生料煅烧一熟料粉磨一水泥均化一水泥储存。

## Reference product
- cement, ordinary portland cement, 42.5MPa: 1000
  42.5普通硅酸盐水泥

## Inputs
- limestone, crushed, for mill: 1073.7
  石灰石
- gypsum stone (CaSO4-dihydrate): 51.1
  石膏
- ash: 98
  粉煤灰
- blast furnace slag: 137.6
  原文献是矿渣（即高炉矿渣）
- hard coal: 100.957
  原始数据为0.0938kg标准煤，这里换算为硬煤，换算公式为1kg硬煤=0.929kg标准煤。
- electricity, medium voltage: 347.76
  电力

## Outputs
- particles (> PM10): 0.15
  粉尘，未标明粒径，按PM>10处理。
- sulfur dioxide: 0.3501
  二氧化硫。考虑到国内水泥厂运行的实际情况和未来很长时间的发展趋势，本次评价采用实测数据的统计平均值。
- Nitrogen oxides: 1.419
  氮氧化物。考虑到国内水泥厂运行的实际情况和未来很长时间的发展趋势，本次评价采用实测数据的统计平均值。
- carbon dioxide: 807.3
  二氧化碳。考虑到国内水泥厂运行的实际情况和未来很长时间的发展趋势，本次评价采用实测数据的统计平均值。

## Use advice
该数据集概述了水泥生产的生命周期评估，使用时应考虑规定的边界，包括原料预处理、生料磨、生料煅烧、熟料磨、水泥均质化和水泥储存。用户必须单独核算超出此范围的其他排放和能源使用。确保此数据的应用与42.5MPa强度等级一致，并与描述的技术相匹配；过程之间的差异可能导致评估结果不准确。

## Review details
清单： 内部审查通过几个迭代步骤完成，涉及原始数据验证、原始数据记录、代表性、完整性、与 ISO 14040 和 14044 有关的建模的一致性。

## Data sources
- 曹晓润. (2005). 低环境负荷型水泥的生态环境评价 [硕士, 武汉理工大学].
