# 市政污泥处理与处置;湿污泥 含水率80.94%;填埋

Dataset: ILCD process, Unit process, single operation
Geography: HF-AH-CN
Classification: Unit processes / End-of-life treatment / Waste water treatment
Functional unit: The residual sludge moisture content of Hefei Wangtang Sewage Treatment Plant is 80.94%, and the functional unit is 1t of residual sludge.
Generated by: 金思甜, 2331276@tongji.edu.cn
Owner: 天工LCI数据工作小组
Review: Dependent internal review by 天工LCI数据工作小组
Amounts: no units in this file; such an amount is in the reference unit of its flow, which a separate flow dataset defines
copyright: ['opt4ROkqig']
licenseType: Free of charge for all users and uses

## General comment
烟尘、固体废物和渗滤液的估算基于文献和经验，COD、BOD、氨氮、SS 的环境排放依据《生活垃圾填埋场污染控制标准》水污染物排放浓度限值计算。

## Geography
合肥望塘污水处理厂

## Technology and included processes
需要先对污泥进行干燥脱水处理，使用热泵除湿干燥机，假定含水率从80.94%下降到60%。

## Technical purpose
该数据集描述了合肥望塘污水处理厂市政污泥处理与处置过程，湿污泥含水率为80.94%，并且计划填埋。该数据适用于环境影响评估，其中市政污泥处理作为废物管理策略的一部分被选择为填埋。市政府和废物管理公司可以利用这一信息来计划和优化来自污水处理厂的湿污泥的填埋过程。

## Reference product
- Sludge: 1000; input; estimated
  1t含水率为80.94%的剩余污泥

## Inputs
- Diesel: 0.0001906; calculated
- Electricity: 5.148; calculated

## Outputs
All rows: calculated
- carbon dioxide (biogenic): 47.51
  原文未区分biogenic和fossil，根据专家判断此处为biogenic。
- methane (biogenic),methane (biogenic): 21.12
  原文未区分biogenic和fossil，根据专家判断此处为biogenic。
- carbon monoxide (biogenic): 0.0006719
  原文未区分biogenic和fossil，根据专家判断此处为biogenic。
- hydrogen chloride: 0.003494
- hydrogen fluoride: 0.0006988
- hydrogen sulfide: 0.01075
- ammonia: 0.0408
- hydrocarbons (unspecified): 0.1075
- cadmium: 5.699e-6
- chromium: 0.00202
- lead: 0.0009187
- mercury: 3.145e-5
- zinc: 0.02127
- copper: 0.0101
- nickel: 0.921
- chemical oxygen demand: 0.004765
- biological oxygen demand: 0.00143
- ammonia: 0.001191
  氨氮
- Suspended solids, unspecified,Suspended solids, unspecified,Suspended solids, unspecified: 0.00143
- Non Hazardous non organic waste for disposal (unspecific sludges and dusts): 0.319
  粉尘
- Waste (solid): 476.5

## Use advice
在使用此数据集进行生命周期评估时，请确保研究或应用的环境与通过填埋专门管理污泥的状况一致。针对不同的地理或技术条件，可能需要进行适应性调整。始终考虑污泥处理的时间相关性以及具体的环境条件。排除任何回收活动，因为该数据集仅涉及到填埋处置。

## Review details
清单： 内部审查通过几个迭代步骤完成，涉及原始数据验证、原始数据记录、代表性、完整性、与 ISO 14040 和 14044 有关的建模的一致性。

## Data sources
- 齐星昊. 基于生命周期评价的典型剩余污泥处理方法的环境影响比较研究[D].河南师范大学,2020.
