# 水泥研磨;水泥, 通用硅酸盐水泥;新型干法

Dataset: ILCD process, Unit process, black box
Geography: CN
Reference year: 2011
Classification: Unit processes / Materials production / Other mineralic materials
Generated by: #REF!, ysqsophia@gmail.com
Owner: 天工LCI数据工作小组
Review: Dependent internal review by 天工LCI数据工作小组
Amounts: no units in this file; such an amount is in the reference unit of its flow, which a separate flow dataset defines
copyright: false
licenseType: Free of charge for all users and uses

## General comment
新型干法生产通用硅酸盐水泥。2011年，新型干法水泥的比例已占到全国总量的89.0%，还处于上升期，所以基本可以代表全国的水平。

## Technical purpose
该数据代表了中国新型干法技术生产的通用硅酸盐水泥的典型应用。截至2011年，该技术生产的水泥占全国产量的89.0％，且仍在增长。这种通用硅酸盐水泥主要用于建筑应用，包括混凝土结构、建筑物、道路和其他基础设施项目的建设。由于其通用性质和强度，它适用于广泛的建筑项目。

## Model description
研究只针对通用水泥，选取国内采用新型干法工艺生产1kg熟料含量为70%的通用水泥作为功能单位。

## Reference product
- cement, common portland cement: 1000
  通用水泥，孰料含量70%。

## Inputs
- clinker, portland cement clinker, 52.5MPa: 700
  熟料52.5MPa。其中基准方案的产品投入数据以清洁生产指标体系的III级基准值为基础。
- Electricity: 144
  电力。其中基准方案的产品投入数据以清洁生产指标体系的III级基准值为基础。
- hard coal; 26.3 MJ/kg: 4.3
  原煤。其中基准方案的产品投入数据以清洁生产指标体系的III级基准值为基础。
- gypsum stone (CaSO4-dihydrate): 50
  石膏。其中基准方案的产品投入数据以清洁生产指标体系的III级基准值为基础。
- tap water: 2
  工业用自来水。其中基准方案的产品投入数据以清洁生产指标体系的III级基准值为基础。

## Outputs
- carbon dioxide (fossil): 8.7
  二氧化碳。环境排放主要以排污系数手册、文献调查数据为主。
- chemical oxygen demand: 6e-5
  化学需氧量。环境排放主要以排污系数手册、文献调查数据为主。

## Data selection and combination
调查国内水泥生产的相关文献，结合水泥行业清洁生产评价指标体系，以及排污系数手册，得到熟料生产、水泥研磨过程的清单数据。

## Use advice
使用此LCA数据集时，用户需注意，它特别针对中国新型干法工艺生产的通用水泥，并代表了2011年及其之后趋势上升期的行业实践。功能单位是1kg含熟料70%的通用水泥。数据集中关于与ECER（节能减排）政策目标相关的清单指示器，并可能不完整。使用此数据进行LCA的过程中，应仔细研究系统边界、假设和数据质量等方法论考虑因素。理想情况下，应更新数据以反映自2011年以来发生的任何重大技术或政策变化。

## Review details
清单： 内部审查通过几个迭代步骤完成，涉及原始数据验证、原始数据记录、代表性、完整性、与 ISO 14040 和 14044 有关的建模的一致性。

## Data sources
- 何晓雪, 张璐, & 王洪涛. (2014). 基于生命周期节能减排评价方法的水泥行业清洁生产评价指标权重的计算. 化学工程与装备, 4, 208–211.
