# 铜基混合废料回收;粗铜;精炼工艺;黑铜

Dataset: ILCD process, Unit process, single operation
Geography: JX-CN
Reference year: 2020
Classification: Unit processes / Materials production / Metals and semimetals
Functional unit: We consider the functional unit of the recycling of copper-based mixed waste to be 1000 kg electrolytic copper.
LCI method principle: Attributional
LCI method approaches: Allocation - market value
Generated by: 王鹏, 2867919560@qq.com
Owner: 天工LCI数据工作小组
Review: Dependent internal review by 天工LCI数据工作小组
Amounts: no units in this file; such an amount is in the reference unit of its flow, which a separate flow dataset defines
copyright: false
licenseType: Free of charge for all users and uses

## General comment
该回收过程适用于位于中国江西省的金属回收设施。主要从铜基混合废料中回收铜材质。以冶炼过程中产生的黑铜为主要原料，此过程对生产阳极铜至关重要，并用于后续的电解精炼。阳极铜主要用于电气行业，尤其是用于生产各种电器应用的高纯度电解铜。

## Geography
中国江西省的一家金属回收企

## Technology and included processes
精炼以冶炼过程中的黑铜为主要原料，以重油、煤为燃料，以氧气、石英砂等辅助材料生产阳极铜为主要产品（送电解工序） 。

## Reference product
- Black copper: 1200; measured
  Blister copper(98.50%)

## Inputs
All rows: measured
- Activated coke: 2.4
  Activated coke需要补充
- Anodes (used): 210
  Anodes (used)
  Self-produced
- Black copper（90% Cu）: 1350
  Black copper;90%copper需要补充
- clay: 5.9
  Clay bricks
- hard coal,hard coal,hard coal: 23.8
  Hard coal
- heavy fuel oil: 85.5
  Heavy fuel oil (1.0wt.% S)
- magnesium: 5.9
  Magnesium powder
- oxygen: 0.3
  Oxygen (gaseous)
- quartz sand: 48.8
  Quartz sand(90%)
- Sodium silicate: 9.6
  Sodium silicate需要补充
- transport in t*km,transport in t*km: 13.0828
  Transport

## Outputs
All rows: measured
- mineral waste (ash): 31.9
  Ash ;To zinc recovery
- particles (PM2.5 - PM10): 1.4
  Dust;需要补充
- Slag: 190.2
  Slag;To smelting
- mineral waste (ash): 0.1
  Ash;Emission into the air
- carbon dioxide (fossil): 151.7
  Emission into the air

## Deviations from the LCI method approaches
使用LCA-ReCiPe 2016（Heijungs et al., 2017）表征和归一化方法（中点和端点方法），将生命周期清单转换为多个领域的影响分数。

## Data selection and combination
前台数据和后台数据。

## Data treatment and extrapolations
采用GaBi 9.0软件计算各种铜基混合废物回收工艺单位质量的库存、资源消耗和废物排放量。

## Use advice
使用提供的铜基混合废料回收工艺的LCA数据时，用户应考虑数据的地域特定性，因为典型案例基于中国江西省。该数据包括前台和后台信息，并使用GaBi 9.0软件和LCA-ReCiPe 2016方法进行评估、特性化和归一化。为确保评估或比较的准确性，用户必须应用研究中假设的1000公斤电解铜功能单元。在不同技术或地理环境中应用数据集时，应进行相应调整。

## Review details
清单： 内部审查通过几个迭代步骤完成，涉及原始数据验证、原始数据记录、代表性、完整性、与 ISO 14040 和 14044 有关的建模的一致性。

## Data sources
- Zhang, W. et al. Analyzing the environmental impact of copper-based mixed waste recycling-a LCA case study in China. Journal of Cleaner Production 284, 125256 (2021).
