# 水泥生产;水泥, 粉煤灰硅酸盐水泥, 52.5MPa;干法回转窑;污泥

Dataset: ILCD process, Unit process, black box
Geography: CN
Classification: Materials production / Other mineralic materials
Generated by: 杨思琪, ysqsophia@gmail.com
Owner: 天工LCI数据工作小组
Review: Dependent internal review by 天工LCI数据工作小组
Amounts: no units in this file; such an amount is in the reference unit of its flow, which a separate flow dataset defines
copyright: false
licenseType: Free of charge for all users and uses

## General comment
考虑了100％水泥窑尘回收技术的干法回转窑方案。

## Geography
北京和重庆

## Technical purpose
这种强度等级为52.5MPa的硅酸盐粉煤灰水泥采用100%水泥窑尘回收技术的干法回转窑技术生产，用于基础设施、住宅和商业建筑等一般建筑目的。在水泥生产中使用污泥可以提高废物管理效率，有助于循环经济。

## Model description
选择管理1吨硅酸盐粉煤灰水泥（P·F 52.5）。考虑了采用100%水泥窑尘回收技术的干法回转窑场景。每个场景的基础设施过程、原材料到水泥生产现场的公路运输、直接排放、污水处理、原材料和能源生产以及从干法回转窑场景中回收电力的过程均包括在内。

## Reference product
- cement, portland fly-ash cement, 52.5MPa: 1000
  粉煤灰硅酸盐水泥（P.F52.5）

## Inputs
- limestone, crushed, for mill: 1160
  石灰石
- hard coal: 94.69
  烟煤
- iron, powder: 1.7
  铁粉
- gypsum stone (CaSO4-dihydrate): 50
  石膏
- ash: 170
  煤灰，即粉煤灰。
- sandstone: 6.1
  砂岩
- electricity, medium voltage: 372.204
  电力
- Water (fresh water): 180
  淡水消耗
- crude oil; 42.3 MJ/kg: 0.35
  油
- sewage sludge, dried: 83.55
  脱水污泥。北京水泥生产现场使用的脱水污泥来自北京市酒仙桥污水处理厂。污泥的热值为3800 kcal/kg-干重。

## Outputs
- sulfur dioxide: 0.09
  SO2
- hydrogen chloride: 0.00528
  HCI
- carbon dioxide: 760
  CO2
- hydrogen fluoride: 0.00025
  HF
- carbon monoxide: 0.15
  CO
- Nitrogen oxides: 0.93
  NOx
- zinc: 1e-5
  Zn
- arsenic: 5.09e-8
  As
- nickel: 1e-5
  Ni
- cadmium: 7.92e-7
  Cd
- lead: 0.0002
  Pb
- mercury: 0.00024
  Hg
- chromium: 5.28e-6
  Cr
- copper: 3.02e-6
  Cu
- 2,3,7,8-tetrachlorodibenzo-p-dioxin: 3.08e-10
  二恶英（TEQ-g）
- hydrogen sulfide: 9.36e-6
  H2S
- ammonia: 1.2e-5
  NH3
- methyl mercaptan: 1.2e-6
  甲基硫醇
- particles (> PM10): 0.036
  颗粒，未标明粒径，按PM>10处理。

## Data selection and combination
尽可能使用了中国的数据，但在中国数据不可得时，使用了欧洲的数据和相关背景数据（Ecoinvent中心，2007年）。基于中国数据，使用了中国北京水泥生产基地的水泥生产过程（包括能源、水和原材料消耗、直接排放）的年平均监测数据（http://www.jiancai.hk/news/show/265/）。北京水泥生产现场普通水泥重金属气体排放数据来自报告(2007)。污泥的重金属排放数据采用的是中国重庆润江水泥生产现场水泥生产过程的数据。

## Sampling procedure
北京水泥生产基地的实际年产量约为200万吨。

## Use advice
使用北京生产基地水泥制造过程的这个生命周期评估(LCA)数据集时，确保考虑到特定于该站点的能源、水和原材料消耗以及直接排放的年平均监测数据。另外，需要注意普通水泥和污泥的重金属气体排放数据，以进行全面的环境影响评估。请注意，此数据集依赖于中国数据，在必要时由Ecoinvent中心的欧洲数据补充。任何对其他数据集的外推或比较都应仔细考虑技术适应性和地理特点。

## Review details
清单： 内部审查通过几个迭代步骤完成，涉及原始数据验证、原始数据记录、代表性、完整性、与 ISO 14040 和 14044 有关的建模的一致性。

## Data sources
- Jinglan Hong & Xiangzhi Li. (2011). Environmental assessment of sewage sludge as secondary raw material in cement production – A case study in China. Waste Management 31, 1364–1371.
