# 光伏组件制造 ; 光伏组件 ; 集成方法

Dataset: ILCD process, Unit process, black box
Geography: CN
Reference year: 2015
Classification: Unit processes / Materials production / Other materials
Functional unit: Therefore, to achieve the goals, 1 kWp of multi-crystalline silicon PV modules produced is used as the functional unit (FU)
LCI method principle: Attributional
LCI method approaches: Allocation
Generated by: 杨锦锋, yjfzfshn@163.com
Owner: 天工LCI数据工作小组
Review: Dependent internal review by 天工LCI数据工作小组
Amounts: no units in this file; such an amount is in the reference unit of its flow, which a separate flow dataset defines
copyright: false
licenseType: Free of charge for all users and uses

## General comment
多晶硅

## Geography
我们对中国与国际贸易相关的多晶硅光伏组件进行了生命周期环境评估。

## Time period
文章发表

## Technical purpose
通过此工艺制造的多晶硅光伏组件用于太阳能发电。该光伏组件技术被集成应用于多种太阳能应用中，从住宅和商业太阳能板安装到大型太阳能农场，促进将阳光转化为电能。

## Reference product
- Solar Module,Solar Module,Solar Module: 1000; software or database
  multi-crystalline silicon PV modules

## Inputs
All rows: software or database
- silicon: 11.6
  Silicon
- bauxite: 59.6
  Bauxite
- Calcite: 46.2
- hard coal: 930
  Coal
- metallurgical coal: 83.6
  Crude oil
- gravel: 10.2
  Gravel
- iron: 76.5
  Iron
- Limestone: 12.1
- natural gas: 4.18
  Natural gas
- sodium chloride: 21.4
  Sodium chloride
- freshwater: 36800
  Water
- silver: 0.106
  Silver

## Outputs
All rows: software or database
- Coal ash: 113
- Slag: 31.5
  Slags
- industrial waste (unspecified): 64.4
  Industrial waste
- carbon dioxide (fossil): 1990
  二氧化碳
- methane (fossil): 9.78
  甲烷
- Nitrogen oxides: 6.85
  氮氧化物
- sulfur oxides: 1.85
  硫氧化物
- sulfate: 4.26
  Sulfate
- biological oxygen demand: 0.691
  生物需氧量
- chemical oxygen demand: 0.731
  化学需氧量
- phosphate: 0.42
  Phosphate

## Deviations from the LCI method approaches
这项研究有两个主要目标:评估环境影响，确定中国多晶硅光伏组件生命周期中的“热点”。量化中国多晶硅光伏组件出口对环境影响的转变。

## Data selection and combination
通过对中国相关工厂的调查和环境影响评价报告，获得了硅矿开采、多晶硅制造、多晶硅芯片切割、光伏组件封装等方面的数据。从文献中获得了工业硅制造过程的数据。

## Use advice
在使用此数据集进行生命周期环境评估时，需要考虑多晶硅光伏组件生命周期的特定阶段，如硅矿开采、多晶硅制造、芯片切割和模块封装。数据使用时应理解技术背景，并在必要时针对特定场所条件进行调整。还应考虑国际贸易的影响及出口中国多晶硅光伏组件的相应影响。此数据的功能单元是生产的1 kWp多晶硅光伏组件。

## Review details
清单： 内部审查通过几个迭代步骤完成，涉及原始数据验证、原始数据记录、代表性、完整性、与 ISO 14040 和 14044 有关的建模的一致性。

## Data sources
- Yang, D., Liu, J., Yang, J. & Ding, N. Life-cycle assessment of China’s multi-crystalline silicon photovoltaic modules considering international trade. Journal of Cleaner Production 94, 35–45 (2015).
