# 土壤修复;异位修复;生物堆;工程实施;堆体养护;修复后的土壤

Dataset: ILCD process, Unit process, single operation
Geography: KR
Reference year: 2011
Classification: Unit processes / Other Services / Repair and maintenance
Generated by: 桑春晖, sangch@mail.bnu.edu.cn
Owner: 天工LCI数据工作小组
Review: Dependent internal review by 天工LCI数据工作小组
Amounts: no units in this file; such an amount is in the reference unit of its flow, which a separate flow dataset defines
copyright: false
licenseType: Free of charge for all users and uses

## General comment
采用强制通风为系统514天不间断泵入氧气

## Technical purpose
所描述的工业工艺涉及到土壤修复的应用，具体是异位生物堆处理。它包括创建生物堆来生物处理受污染的土壤。该修复技术涉及工程实施的生物堆，在这里受污染的土壤经过一个长期治疗过程，并补充氧气以增强微生物活动。该过程适用于环境工程和废物管理部门，旨在恢复受污染土地的可用性。

## Reference product
- Remediated soil: 1000; estimated

## Inputs
- Electricity: 229320; estimated
- Pre-treatment Soil: 10000; estimated

## Outputs
- Exhaust gas: 1; estimated

## Use advice
在使用此LCA数据集时，请确保评估中考虑了修复系统标准化报告中列出的所有输入材料和能量。评估过程的环境影响时，要考虑完整的514天治疗周期。至关重要的是要模拟生物堆的特定行为，特别是关于连续通风和随后的堆体养护。考虑在处理过程中产生的任何排放或副产品，并相应评估其影响。确保所使用的方法与异位土壤修复LCA的标准一致。

## Review details
清单： 内部审查通过几个迭代步骤完成，涉及原始数据验证、原始数据记录、代表性、完整性、与 ISO 14040 和 14044 有关的建模的一致性。

## Data sources
- Jeong, S.-W. & Suh, S.-W. Assessment of Environmental Impacts and CO 2 Emissions from Soil Remediation Technologies using Life Cycle Assessment - Case Studies on SVE and Biopile Systems -. Journal of Korean Society of Environmental Engineers 33, 267–274 (2011).
