# 水泥研磨;水泥, 替代成分 21-35%;立窑

Dataset: ILCD process, Unit process, single operation
Geography: CN
Classification: Materials production / Other mineralic materials
Generated by: 杨思琪, ysqsophia@gmail.com
Owner: 天工LCI数据工作小组
Review: Dependent internal review by 天工LCI数据工作小组
Amounts: no units in this file; such an amount is in the reference unit of its flow, which a separate flow dataset defines
copyright: false
licenseType: Free of charge for all users and uses

## General comment
水泥磨系统将水泥窑产生的熟料与石膏及其他添加剂混合后磨成一定粒度的细粉，这是水泥的最终产品。该阶段完全由物理过程组成，没有涉及任何化学过程。

## Technology and included processes
The clinker from the cement kiln, mixed together with gypsum and other additives, is milled into fine particles of a particular size in the cement milling sub-system, which are a final product of cement. This phase consists entirely of physical processes; no chemical processes are involved, as described and depicted in Fig. 5.

## Technical purpose
该数据集的技术应用针对的是水泥磨制行业。描述的水泥磨制过程涉及将立窑生产的熟料与石膏以及21-35%的替代成分磨成细粉，以获得最终的水泥产品。这种磨制的水泥通常用于建筑目的，包括混凝土生产、基础设施开发和建筑施工。该过程的特点是物理磨粉而无化学反应，并且指的是与立式窑生产线相关的过程，这些生产线通常具有高能耗和低生产效率。

## Model description
系统边界为产生水泥的研磨阶段。

## Reference product
- cement, alternative constituents 21-35%: 1000
  水泥

## Inputs
- clinker: 867.679
  水泥熟料
- mixed materials, mineral: 91.829
  混合材料
- gypsum stone (CaSO4-dihydrate): 46.276
  石膏
- Water (fresh water): 15.184
  水（水含量）：输入材料中的水。

## Outputs
- particles (> PM10): 5.785
  灰尘，未标明粒径，按PM>10处理。
- Water (groundwater from technosphere, waste water): 15.184
  水

## Sampling procedure
经调查，采用立窑生产系统的水泥企业的年产能为100,000吨熟料。立窑生产线的总体特点是能耗高，生产能力有限，劳动生产率低，粉尘排放量大。立窑生产线的动态代谢分析是在正常生产水平下以1小时为单位进行的。

## Use advice
在使用这份数据集进行含替代成分立窑生产的水泥的生命周期评估（LCA）时，请注意特定条件，例如替代材料的百分比（21-35%）和生产过程的能耗特征。考虑技术的适用性到目标区域或行业。确保在系统边界内包含所有相关输入和输出，以准确表示，并在环境影响评估中计算高粉尘排放。避免将数据外推到与描述的过程不同的过程，如使用回转窑的过程，这些可能有不同的技术和环境概况。

## Review details
清单： 内部审查通过几个迭代步骤完成，涉及原始数据验证、原始数据记录、代表性、完整性、与 ISO 14040 和 14044 有关的建模的一致性。

## Data sources
- Dan Hu, Zhen Guo, Zhen Wang, & Qiang Xiao. (2015). Metabolism analysis and eco-environmental impact assessment of two typical cement production systems in Chinese enterprises. Ecological Informatics 26, 70–77.
