# 水泥生产;水泥, 普通硅酸盐水泥, 42.5MPa;新型干法回转窑, 焚烧城市生活垃圾;粉煤灰

Dataset: ILCD process, Unit process, black box
Geography: CN
Reference year: 2008
Classification: Materials production / Other mineralic materials
Generated by: 杨思琪, ysqsophia@gmail.com
Owner: 天工LCI数据工作小组
Review: Dependent internal review by 天工LCI数据工作小组
Amounts: no units in this file; such an amount is in the reference unit of its flow, which a separate flow dataset defines
copyright: false
licenseType: Free of charge for all users and uses

## General comment
实验室数据。城市生活垃圾作为二次燃料生产水泥。

## Technical purpose
该数据集代表了一种普通硅酸盐水泥生产过程，其中使用新型干法回转窑，并结合城市生活垃圾焚烧作为辅助燃料。所生产的具有28天抗压强度为42.5MPa的水泥，通常用于需要高强度混凝土的建筑应用。

## Model description
以1kg28天抗压强度为42.5MPa的水泥所具有的使用性能作为功能单位，即1Fu=42.5kgMPa。评价范围为生料准备、熟料煅烧和水泥制备。粘土类资源消耗造成的环境负荷暂不考虑。铁粉属于铁质校正材料，其引发的环境影响不予考虑。产品系统输出端考虑排放的废弃物主要包括氮氧化物、二氧化硫、二氧化碳及粉尘。

## Reference product
- cement, ordinary portland cement, 42.5MPa: 1000
  42.5普通硅酸盐水泥

## Inputs
- limestone, crushed, for mill: 1104.4
  石灰石
- gypsum stone (CaSO4-dihydrate): 58.7
  石膏
- ash: 362.4
  粉煤灰
- hard coal: 70.731
  标准煤。原始数据为0.065717kg标准煤，这里换算为硬煤，换算公式为1kg硬煤=0.929kg标准煤。
- electricity, medium voltage: 343.8
  电力

## Outputs
- particles (> PM10): 0.324
  粉尘，未标明粒径，按PM>10处理。
- sulfur dioxide: 0.3893
  二氧化硫
- Nitrogen oxides: 1.557
  氮氧化物
- carbon dioxide: 747.22
  二氧化碳

## Data selection and combination
结合对我国城市生活垃圾工业分析及热值分析，对所确定产品系统的输入、输出数据进行收集，并对数据进行了计算、量化。

## Use advice
使用此数据集的用户应注意，尽管技术过程考虑了城市家庭垃圾作为辅助燃料的使用，但与粘土类资源消耗相关的环境负荷目前尚未包括在分析中。此外，由于使用铁粉作为铁质校正材料而引起的环境影响也被排除在外。产品系统输出端的排放数据包括氮氧化物、二氧化硫、二氧化碳和粉尘。在应用这些数据时，请确保它与您的生命周期评估(LCA)研究的具体背景一致，并且评估范围的界限与您的系统边界相匹配。

## Review details
清单： 内部审查通过几个迭代步骤完成，涉及原始数据验证、原始数据记录、代表性、完整性、与 ISO 14040 和 14044 有关的建模的一致性。

## Data sources
- 于淼. (2008). 黑龙江水泥工业可持续发展研究 [硕士, 哈尔滨工业大学].
