# 运输到场的设备和材料;土壤风险管控;垂直阻隔;水泥注浆墙

Dataset: ILCD process, Unit process, single operation
Geography: US
Reference year: 2013
Classification: Unit processes / Other Services / Repair and maintenance
Generated by: 肖萌, xiaomeng@mail
Owner: 天工LCI数据工作小组
Review: Dependent internal review by 天工LCI数据工作小组
Amounts: no units in this file; such an amount is in the reference unit of its flow, which a separate flow dataset defines
copyright: false
licenseType: Free of charge for all users and uses

## General comment
将水泥浆垂直阻隔施工所需的石灰石、混凝土、沙子和石膏材料运输至现场。

## Geography
For this project, a Superfund location at the Brookhaven National Laboratory (BNL) is studied. This particular case was chosen because it is representative of the scale and scenario where soil grouting would be used. It is also one of only a few sites where CS grouting has been used for full scale remediation. BNL has served as a production facility for research and development of radioisotopes for decades. The design of some of the facilities failed to provide adequate safety measures against the spread of radioactivity to the soils and groundwater beneath them and as a result, BNL was added to the Superfund National Priorities List in 1989.

## Technical purpose
该工业流程涉及将石灰石、混凝土、沙子和石膏等材料运输到施工现场，以创建水泥浆垂直阻隔。这一过程主要用于环境修复项目中的土壤风险管控，特别是在布鲁克黑文国家实验室（BNL）之类的超级基金场地，那里采用土壤灌浆技术防止历史活动中污染物的扩散。

## Reference product
- Equipment and Materials Arriving on Site: 37510; measured
  运输到场的相关材料（石灰石、混凝土、黏土和石膏）

## Inputs
- transport in t*km: 1139.31; software or database

## Use advice
使用此数据集时，用户必须考虑在超级基金场地进行环境修复的具体背景。应注意材料运输和垂直阻隔建设所需的方法学调整，包括当地法规、运输距离和排放等场地特定因素的影响。此外，在将这些数据整合入更广泛的生命周期评估框架中时，考虑环境修复项目从规划到执行和长期维护的完整生命周期至关重要。

## Review details
清单： 内部审查通过几个迭代步骤完成，涉及原始数据验证、原始数据记录、代表性、完整性、与 ISO 14040 和 14044 有关的建模的一致性。

## Data sources
- Gallagher, P. M., Spatari, S. & Cucura, J. Hybrid life cycle assessment comparison of colloidal silica and cement grouted soil barrier remediation technologies. Journal of Hazardous Materials 250–251, 421–430 (2013).
