# 干法制砂|砂石粗碎|颚式破碎技术

Dataset: ILCD process, Unit process, single operation
Geography: HAIN-CN
Reference year: 2020
Classification: Materials production / Other mineralic materials
Generated by: Cui hang, Cuihang0716@163.com
Amounts: no units in this file; such an amount is in the reference unit of its flow, which a separate flow dataset defines
copyright: false

## Reference product
- sand: 147243; measured

## Inputs
- gravel: 201000; measured
- electricity mix: 774; measured

## Outputs
- gravel: 32330
  经粗碎后产生的碎石
- Sludge: 790; measured
- particles (> PM10): 7; measured

## Data selection and combination
干法制砂的工艺过程及清单数据来自于该项目提供的经验数据

## Data sources
- 陵水海岛混凝土有限公司干法制砂项目
