# 牛奶生产 ; 奶牛饲养 ; 种养一体化奶牛场(IPBS)

Dataset: ILCD process, Unit process, single operation
Geography: QD-SD-CN
Reference year: 2016
Classification: Unit processes / Materials production / Agricultural production means
Functional unit: The 1t FPCM corrected for protein and fat content was selected as the evaluation unit
Generated by: 杨瑞, 1632707028@qq.com
Owner: 天工LCI数据工作小组
Review: Dependent internal review by 天工LCI数据工作小组
Amounts: no units in this file; such an amount is in the reference unit of its flow, which a separate flow dataset defines
copyright: false
licenseType: Free of charge for all users and uses

## General comment
在 IPBS 中,养殖 场部分青贮玉米饲料来源于自产,所调研养殖场中, 有 3 家养殖场的青贮玉米自给率达 100%.除青贮玉 米外,2 种模式的饲养过程相同,生产资料的投入主 要有饲料、水、电、柴油等,产品有牛奶、公犊牛、 淘汰母牛、肉用牛等(表 4).具体来说,奶牛饲料主要 有浓缩饲料(含 30%的豆粕、50%的玉米粒、10%的 麦麸和 10%的其他物质)、玉米粒、麦麸、青贮玉米、 棉籽、燕麦、苜蓿和羊草等.个别奶牛场还伴随用酒 糟和菜籽粕,但其用量少对整体环境影响可忽略不 计.浓缩饲料中的其他物质用量少对整体环境影响 可忽略不计.奶牛饲养环节的温室气体排放包括外购饲料在其生产过程中的排放、养殖场能源消耗的 排放(如养殖场内饲料加工、牛舍照明和通风、水 加 热、牛奶冷藏等)和奶牛肠道气体排放及牛舍气体排 放.

## Geography
于 2020 年 7 月~8 月在山东省青岛市进行奶牛 场问卷调查.

## Time period
从 2016 年,山东开始实施青贮玉米种植补贴 政策,是国内最早实施该补贴政策的省份之一,补贴 标准为 20~50 元/t.2019 年,山东省青贮玉米种植面 积达 1.41 万 hm2,占全国的 7.3%.

## Technology and included processes
研究地区主要有 2 种牛奶生产模式:IPBS 和 non-IPBS.non-IPBS 中,养殖场只有饲养 环节和粪污处理环节,饲料全部来源于购买,粪便堆 肥制成有机肥后全销售给果农和菜农.IPBS 中,养殖 场增加青贮玉米种植环节,有机肥、液体肥主要施用 于场内农田,剩余部分销售给果农和菜农等.2 种模 式的区别:1)养殖场青贮玉米的来源不同,导致饲料 运输距离和饲料成本不同;2)有机肥、液体肥的利用 途径不同,运输距离不同.本研究共调研奶牛场 109 家,剔除不符合研究问卷后,得 83 份有效问卷,其中 non-IPBS 为 38 家,IPBS 为 45 家.

## Technical purpose
种养一体化奶牛场（IPBS）的用途是生产如牛奶和牛肉等乳制品。在该系统中，一部分饲料——青贮玉米由农场内自行生产，以实现自给自足，减少对外界饲料资源的依赖。通过农场内饲料生产与奶牛饲养的有效循环利用，旨在作为农业的可持续模式，增强当地食品系统，并有可能降低乳品生产的环境影响。

## Reference product
- milk: 1000; measured
  FPCM（IPBS模式）

## Inputs
All rows: measured
- cow: 0.1111
  泌乳牛（IPBS模式）
- cow: 0.025
  干泌乳牛（IPBS模式）
- cow: 0.072
  育成牛（IPBS模式）
- cow: 0.032
  犊牛（IPBS模式）
- feed: 228
  浓缩饲料（IPBS模式）
- maize grain: 111
  玉米粒（IPBS模式）
- bean pulp: 51
  豆粕（IPBS模式）
- wheat bran: 43
  麦麸（IPBS模式）
- maize grain: 682
  外购青贮玉米（IPBS模式）
- maize grain: 318
  自产青贮玉米（IPBS模式）
- alfalfa: 108
  苜蓿（IPBS模式）
- oat: 115
  燕麦（IPBS模式）
- chinese wildrye: 290
  羊草（IPBS模式）
- cottonseed: 38
  棉籽（IPBS模式）
- Electricity: 397.595
  IPBS模式
- Diesel: 0.002183
  IPBS模式
- water: 10.2
  IPBS模式
- unspecified: 13.975
  土地占用（IPBS模式）

## Outputs
- cow: 0.798; measured
  销售公犊牛（IPBS模式）
- cow: 11.445; measured
  销售淘汰母牛（IPBS模式）
- beef: 2.209; measured
  销售肉用牛（IPBS模式）

## Use advice
在使用此数据集进行生命周期评估（LCA）时，请确保准确计量所有输入（如饲料、水、电、柴油）和输出（如牛奶、公犊牛、淘汰母牛、肉用牛）。应核算的排放包括饲料生产（农场自产和外购）过程中的排放、农场能源消耗的排放，以及奶牛直接排放的温室气体。用户应采用纠正了脂肪和蛋白含量的1吨FPCM作为功能单位，用以比较不同奶牛饲养系统或情景。推荐用户考虑诸如青贮玉米种植补贴等区域政策对乳牛产业的经济和环境影响。

## Review details
清单： 内部审查通过几个迭代步骤完成，涉及原始数据验证、原始数据记录、代表性、完整性、与 ISO 14040 和 14044 有关的建模的一致性。

## Data sources
- 黄显雷, 师博扬, 张英楠, 龙昭宇, & 尹昌斌. 基于生命周期视角的种养一体化奶牛场环境经济效益评估. 中国环境科学 41, 3944–3955 (2021).
