# 玻璃生产 ;有机玻璃单体MMA生产;干式破碎

Dataset: ILCD process, Unit process, single operation
Geography: JX-CN
Classification: Materials production / Glass and ceramics
Generated by: 和夏夏, 18616148319@163.com
Owner: 天工LCI数据工作小组
Review: Dependent internal review by 天工LCI数据工作小组
Amounts: no units in this file; such an amount is in the reference unit of its flow, which a separate flow dataset defines
copyright: false
licenseType: Free of charge for all users and uses

## General comment
此数据集代表PMMA（聚甲基丙烯酸甲酯）的生产过程，通常被称为有机玻璃，包括干式破碎工序。PMMA广泛应用于需要透明度和耐用性的领域，如汽车窗户、水族馆、建筑特色和保护屏障。

## Reference product
- polymethyl methacrylate (PMMA) beads: 1098.25; measured

## Inputs
- Electricity: 349.92; measured
- polymethyl methacrylate (PMMA) beads: 1043.73; measured
- Water (fresh water): 21.9735; measured
- organic waste (unspecified): 32.96; measured

## Outputs
- Dust (unspecified, from stack): 0.412; measured

## Use advice
在使用此数据集进行生命周期评估研究时，用户应考虑生产过程的具体区域背景、干式破碎方法的效率、以及能耗情况。重要的是要核算生产阶段可能的排放，并确认PMMA的品质是否符合预期用途。用户应注意，产品生命周期末端可能包括潜在的回收或废物处理情景，这些必须根据当地环境管理政策分别建模。

## Review details
清单： 内部审查通过几个迭代步骤完成，涉及原始数据验证、原始数据记录、代表性、完整性、与 ISO 14040 和 14044 有关的建模的一致性。

## Data sources
- 江西旺达新材料有限公司年产20000吨有机玻璃原料生产项目
