# 转炉炼钢;生铁;粗钢

Dataset: ILCD process, Unit process, single operation
Geography: HUN-CN
Reference year: 2013
Classification: Unit processes / Materials production / Metals and semimetals
Generated by: 王环宇, wanghuanyu00@126.com
Owner: 天工LCI数据工作小组
Review: Dependent internal review by 天工LCI数据工作小组
Amounts: no units in this file; such an amount is in the reference unit of its flow, which a separate flow dataset defines
copyright: false
licenseType: Free of charge for all users and uses

## General comment
转炉炼钢工艺是将生铁生产成粗钢的流程。这一工业过程通常用于冶金领域，尤其是在将原料转化为钢的综合型钢铁厂，这种钢材是构建材料、汽车和家用电器等多种产品的基础。

## Geography
湖南华菱湘潭钢铁有限公司

## Reference product
- Crude Steel: 1000; measured
  粗钢

## Inputs
- Molten Iron: 950; measured
  生铁

## Outputs
- BF Slag: 280; measured
  高炉渣
- Steel slag: 80; measured
  钢渣

## Use advice
在使用这个数据集进行生命周期评估时，确保计算与转炉炼钢过程相关的所有输入和输出，包括能源消耗、对空气和水的排放以及固体废物的产生。应考虑技术的适用性，确保过程数据对应于所引用的设施——位于湖南湘潭的华菱钢铁有限公司的技术和效率水平。此外，用户应考虑副产品回收的潜力以及生产出的钢铁的最终处理的必要性。

## Review details
清单： 内部审查通过几个迭代步骤完成，涉及原始数据验证、原始数据记录、代表性、完整性、与 ISO 14040 和 14044 有关的建模的一致性。

## Data sources
- 1.
