# 初级铜生产;精炼铜;闪速熔炼及闪速吹炼;铜矿石

Dataset: ILCD process, Unit process, single operation
Geography: AH-CN
Reference year: 2022
Classification: Unit processes / Materials production / Metals and semimetals
Functional unit: the production of 1 ton of refined copper is taken as the functional unit.
LCI method principle: Attributional
LCI method approaches: Allocation - market value
Generated by: 王鹏, 2867919560@qq.com
Owner: 天工LCI数据工作小组
Review: Dependent internal review by 天工LCI数据工作小组
Amounts: no units in this file; such an amount is in the reference unit of its flow, which a separate flow dataset defines
copyright: false
licenseType: Free of charge for all users and uses

## General comment
初级铜生产涉及从矿石中提取和精炼铜，以制造工业用纯净产品。通过此工艺生产的精炼铜用途广泛，包括用于电线电缆、屋顶覆盖材料、管道以及作为工业机械和设备制造中的关键组成部分。

## Geography
精炼铜生命周期清单（LCI）数据来源于对中国安徽省和江西省多家铜生产企业的现场调查和年度监测报告。

## Technology and included processes
初级铜生产包括矿石开采过程和铜冶炼过程。该矿石开采工艺的关键步骤是对铜矿石进行破碎和球磨，从而通过选矿获得铜精矿。因此，该铜冶炼工艺的关键步骤包括铜精矿的火法精炼和电解以获得精炼铜。

## Reference product
- Refined copper: 1000; measured
  refined copper需要补充

## Inputs
- Copper concentrates: 6260; measured
  Copper concentrate需要补充
- quartz sand: 520; software or database
  Quartz sand
- Quicklime: 38.3; software or database
  Quick lime需要补充
- water: 8.56; software or database
  Fresh water需要补充
- Sodium silicate: 1.31; software or database
  需要补充
- Sodium sulfide: 13.3; software or database
  Sodium sulfide需要补充
- sodium hydroxide: 22.6; software or database
  Sodium hydroxide
- Limestone: 72.3; software or database
- Ferrous sulfate: 4.43; software or database
  Ferrous sulfate需要补充
- hydrated lime dry slaked: 12.2; software or database
  Hydrated lime
- hydrogen chloride: 0.151; software or database
- Sulfuric acid(98%): 0; software or database
  Sulfuric acid需要补充resourse
- Gelatin: 0.045; software or database
  Gelatin需要补充
- Thiourea: 0.075; software or database
  Thiourea需要补充resourse
- barium sulfate: 0; software or database
  Barium sulfate
- Diesel: 1.15; software or database
- natural gas,natural gas,natural gas: 57.3; software or database
  Natural gas
- Electricity: 4860; measured

## Outputs
All rows: software or database
- chemical oxygen demand: 0
  COD需要补充
- ammonium: 0
- sulfur dioxide: 0.265
  Sulfur dioxide
- nitrous oxide: 0.249
  Nitrogen oxide
- particles (PM2.5 - PM10): 0.022
- lead: 0.000895
  Lead
- mercury: 4.25e-5
  Mercury
- arsenic: 0.00103
  Arsenic
- cadmium: 0
  Cadmium
- chromium: 0
  Chromium
- fluorine: 0.0029
  Fluoride

## Deviations from the LCI method approaches
鉴于ReCiPe模型应用广泛，本研究选择LCIA模型。

## Data selection and combination
精炼铜数据来源于中国安徽省和江西省的多家铜生产企业的现场调查和年度监测报告。本次LCA分析的其他材料生产数据来源于Eco-invent数据库。

## Use advice
使用来自中国安徽省和江西省的精炼铜的生命周期清单（LCI）数据时，确保包含矿石开采过程中的关键步骤，如矿石破碎、球磨和选矿，以及冶炼过程中的火法精炼和电解作为生命周期评估的一部分。对于本生命周期评价(LCA)中其他材料的生产数据，应参考Eco-invent数据库。应注意正确模拟系统边界和回收处理方式。推荐使用ReCiPe模型进行生命周期影响评估（LCIA），功能单位是生产1吨精炼铜。

## Review details
清单： 内部审查通过几个迭代步骤完成，涉及原始数据验证、原始数据记录、代表性、完整性、与 ISO 14040 和 14044 有关的建模的一致性。

## Data sources
- Zhang, J., Tian, X., Chen, W., Geng, Y. & Wilson, J. Measuring environmental impacts from primary and secondary copper production under the upgraded technologies in key Chinese enterprises. Environmental Impact Assessment Review 96, 106855 (2022).
