# 玻璃纤维托盘的生产 ; 玻璃纤维增强托盘 ; 玻璃纤维的生产，托盘的生产

Dataset: ILCD process, Unit process, single operation
Geography: YL-GX-CN
Reference year: 2012
Classification: Unit processes / Materials production / Glass and ceramics
Functional unit: For example, the generation of 1 kW h (kW h) of electricity is adapted as the functional unit in this study, and the corresponding amounts of CO2 emissions and air pollutants (SO2,NOX and PM10)perkWh of electricity are chosen as the indicators for environmental performances, and the monetary value (US$) of per kW h of electricity is chosen as the indicator for cost-effectiveness evaluation.
LCI method principle: Attributional
LCI method approaches: Allocation
Generated by: 赵云志, ll10088@163.com
Owner: 天工LCI数据工作小组
Review: Dependent internal review by 天工LCI数据工作小组
Amounts: no units in this file; such an amount is in the reference unit of its flow, which a separate flow dataset defines
copyright: false
licenseType: Free of charge for all users and uses

## General comment
文献里只提供了部分污染物排放数据，未提供原材料和能源消耗清单

## Geography
本研究选取中国广西壮族自治区玉林市的典型风电场系统作为案例研究地点。开发商即中国华电股份有限公司，是一家国有企业，通过提供风力发电设备及相关服务，致力于在中国发展风力发电[ 37 ]。

## Technical purpose
通过这一工业过程生产的玻璃纤维增强托盘用于各个行业的货物存储和运输，其高强度比和耐用性获得了行业的青睐。特别是在需要坚固且不腐蚀的物料处理解决方案的行业，如化工、汽车和食品行业，其使用尤为普遍。此外，作为案例研究的一部分生产的风力涡轮机用于生成可再生能源，特别是针对致力于可持续能源生产的风电场。

## Reference product
- Fiber glass: 1; calculated
  文献里只提供了部分污染物排放数据，未提供原材料和能源消耗清单

## Outputs
- carbon dioxide (fossil): 4.87; calculated
- sulfur dioxide: 0.0193; calculated
- nitrous oxide: 0.0342; calculated
  nitrogen oxide
- particles (PM10): 0.00383; calculated

## Deviations from the LCI method approaches
根据引入的生命周期评价方法[ 34、35 ]，首先确定了风能和火力发电的系统边界。然后，提出了评价环境和经济效益的方法，以量化共同利益，并从共同利益的角度介绍了环境和经济影响评价的方法。

## Data selection and combination
该风电场装有24台风电机组，每台机组的生产能力为1.25 MW，预计每台机组的运行寿命为20年。风电系统的生命周期可分为5个阶段： (1)生产制造、 (2)运输和安装、 (3)发电、 (4)维护和 (5)报废回收和处置。不可再生能源的投入在各个阶段都有所体现。在这项研究中，原材料、化石燃料的消耗和相应的排放都考虑了一个生命周期过程。同时，考虑风电场的成本效益，因为成本在风电场运营中扮演着非常重要的角色[38]。考虑到数据的可靠性和可获得性，该风电场的成本数据主要取自辽宁省康平县某风电场(设计容量为49.5 MW)的可行性报告[39]

## Use advice
使用这一玻璃纤维增强托盘的生命周期评价(LCA)数据集的用户必须考虑所有生命周期阶段（从原材料提取到报废回收和处置）的不可再生能源的投入和相关排放。在评估风电系统的环境和经济影响时，用户应应用所提供的环境绩效指标，如CO2、SO2、NOX和PM10排放，以及发电的货币价值。至关重要的是要遵守定义的系统边界，并确保与选定的功能单位—每1千瓦时（kWh）电—的精确一致，以保证评估的一致性。

## Review details
清单： 内部审查通过几个迭代步骤完成，涉及原始数据验证、原始数据记录、代表性、完整性、与 ISO 14040 和 14044 有关的建模的一致性。
