# 监测井回填;Din=0.15m,L=50m;地下水原位修复;生物强化修复

Dataset: ILCD process, Unit process, single operation
Geography: SH-CN
Reference year: 2020
Classification: Unit processes / Other Services / Repair and maintenance
Generated by: 肖萌, xiaomeng@mail
Owner: 天工LCI数据工作小组
Review: Dependent internal review by 天工LCI数据工作小组
Amounts: no units in this file; such an amount is in the reference unit of its flow, which a separate flow dataset defines
copyright: false
licenseType: Free of charge for all users and uses

## General comment
将修复过程中新建的监测井，在修复项目结束后进行回填。

## Geography
The aquifer in a certain area in Shanghai, China, is uniformly contaminated with chlorinated volatile organic compounds (CVOCs), with a surface area of 20,000 m2 and a depth of 50 m, with the water table located at a depth of 30 m.

## Technical purpose
所描述的过程是监测井回填，用于环境修复项目。具体来说，它与土壤原位修复和强化生物修复技术有关，用以治疗受氯代挥发性有机化合物（CVOCs）污染的含水层。监测井直径为0.15米，长度为50米，用于衡量和评估生物修复过程的进展。一旦达到土壤解毒的目标，这些井将被回填，即它们被封闭并且地面恢复到原来的状况。

## Reference product
- Well backfilling: 272
  文中仅给出监测井和注入井一共544口，没有给出单独的监测井和注入井数量，这里填报人简单估计两种监测井数量各半。

## Inputs
- Monitoring well: 272
  文中仅给出监测井和注入井一共544口，没有给出单独的监测井和注入井数量，这里填报人简单估计两种监测井数量各半。
- Concrete: 4069.88; calculated
- Gravel Sand: 38155.1; calculated
- clay: 18047.4; calculated
- Water: 6865.28; calculated

## Use advice
在使用此数据集进行生命周期评估时，用户应考虑监测井回填是一种特定场所的程序，可能无法直接无修改地转移到其他地点或项目。需要考虑场地的特点，如水位的深度和CVOCs污染的范围。对于任何比较研究，确保地理和环境语境的可比性，以及系统边界包括与井回填操作相关的所有相关环境干预措施是至关重要的。该数据集针对中国上海某特定类型的CVOCs污染量身定做，应用于不同污染物或地理位置时可能需要调整。

## Review details
清单： 内部审查通过几个迭代步骤完成，涉及原始数据验证、原始数据记录、代表性、完整性、与 ISO 14040 和 14044 有关的建模的一致性。

## Data sources
- Ni, Z. et al. Comparative Life-Cycle Assessment of Aquifer Thermal Energy Storage Integrated with in Situ Bioremediation of Chlorinated Volatile Organic Compounds. Environ. Sci. Technol. 54, 3039–3049 (2020).
