# 丙烯生产 ; 丙烯 ; 催化裂化路线 ; 石脑油

Dataset: ILCD process, Unit process, black box
Geography: ZJ-GD-CN
Reference year: 2018
Classification: Unit processes / Materials production / Organic chemicals
Functional unit: A functional unit is defined as 1 ton of propylene product
LCI method principle: Attributional
LCI method approaches: Allocation - mass
Generated by: 任亚楠, renyn15@tsinghua.org.cn
Owner: 天工LCI数据工作小组
Review: Dependent internal review by 天工LCI数据工作小组
Amounts: no units in this file; such an amount is in the reference unit of its flow, which a separate flow dataset defines
copyright: false
licenseType: Free of charge for all users and uses

## General comment
催化裂化工艺路线主要包括催化裂化和气体分馏两个过程。前者包括反应-再生、能量回收、分馏、吸收稳定、脱硝、脱硫、除尘等子过程，后者包括脱丙烷、脱乙烷、丙烯精制。催化裂化路线的主要投入包括原料(即重油和加氢柴油)、能源(即电力、淡水和蒸汽)以及催化剂氧化铝等辅料。按重量计算，丙烯占产量的33%，副产品为乙烷和丙烷、C4和C5馏分以及LPG。值得主要的是，焦炭燃烧产生的蒸汽副产品，输送到目标工厂外进行使用。此过程补偿了原料生产、能源消耗时造成的环境影响，降低了环境负担。

## Geography
催化裂化路线的案例工厂来自中国石化湛江东兴石油化工有限公司。企业位于广东省湛江市，其催化裂化制烯烃工艺建于2018年，丙烯年产能11.6万吨。

## Time period
工艺建于2018年

## Technology and included processes
工厂为炼化一体化体制，因此原材料(重油、加氢柴油)作为中间产品，不考虑运输阶段。

## Technical purpose
通过催化裂化路线生产的丙烯用于制造多种化工产品和塑料。它主要应用于生产聚丙烯、丙烯氧化物、丙烯腈、异丁苯、丁醛和异丙醇，以及在化工行业各种中间体的合成。该特定工艺由综合炼化一体化体系采用，生成具有年产能11.6万吨的丙烯，主要服务于在制造过程中需要高品质丙烯的行业。

## Model description
考虑了各个子阶段涉及的所有相关投入原材料、能源、电力、蒸汽、水和辅助化学品的消耗，产出考虑了丙烯和副产品(如丙烷脱氢工艺生产的C4产品。采用质量分配法量化产品丙烯和副产品之间的环境负荷。此外，本模型还考虑了各工艺的废物排放。本研究注重于不同丙烯生产工艺的环境影响分析，因此，丙烯烃利用及其产品的报废处理以及、基础设施建设和以及设备维护不在本次评价边界范围之内。

## Reference product
- propene (propylene): 1000; measured
  丙烯

## Inputs
All rows: measured
- heavy fuel oil: 12940
  重油
- Diesel oil: 4310
  加氢柴油
- Aluminum oxide (alumina): 20
  催化剂
- Trisodium Phosphate: 0.02226
  磷酸三钠
- nitrogen: 20.67
  氮气
- compressed air: 0.43488
  压缩空气
- process steam: -6380
  蒸汽
- freshwater: 9710
  新鲜水
- Electricity: 348.768
  电

## Outputs
All rows: measured
- Refinery Gas: 530
  炼厂干气
- gasoline (regular): 7520
  汽油
- Diesel oil: 4310
  催化柴油
- Slurry oil: 600
  油浆
- Ethane: 370
  乙烷
- C4 Hydrocarbon Mixture: 1650
  C4+
- carbon dioxide (fossil): 4160
  CO2
- sulfur dioxide: 0.20294
  SO2
- nitrous oxide: 0.28992
  NOx
- particles (> PM10): 0.1837
  颗粒物
- volatile organic compound: 0.53704
  VOCs
- ammonia: 0.00081
  氨氮
- chemical oxygen demand: 0.02954
  COD

## Deviations from the LCI method approaches
采用质量分配法量化产品丙烯和副产品之间的环境负荷

## Data selection and combination
丙烯生产工艺详细的投入产出数据来自企业公开的环境影响评价报告，包括原料和辅料投入、能源和资源消耗，以及废气、废水和固体废物的排放。

## Use advice
在利用此数据集进行生命周期评估或其他环境影响研究时，必须基于主产品和副产品的质量比例来考虑环境负荷。由于不考虑中间原材料的运输，因此必须考虑仅限于现场过程的环境负荷。此外，所有工艺阶段的废物排放都融合在分析中。此数据的用户不应包括丙烯使用、相关产品的最终处置、基础设施建设和设备维护的影响，因为这些都在评估范围之外。研究人员需要确保他们根据公司发布的环境影响评估报告，准确引用丙烯生产过程的详细投入产出数据。

## Review details
清单： 内部审查通过几个迭代步骤完成，涉及原始数据验证、原始数据记录、代表性、完整性、与 ISO 14040 和 14044 有关的建模的一致性。

## Data sources
- 吕琳. 丙烯产品环境负荷及温室气体减排的碳税政策. (大连理工大学, 2022).
