# 水泥;水泥生产;土壤风险管控;垂直阻隔;水泥注浆墙

Dataset: ILCD process, Unit process, single operation
Geography: US
Reference year: 2013
Classification: Unit processes / Other Services / Repair and maintenance
Generated by: 肖萌, xiaomeng@mail
Owner: 天工LCI数据工作小组
Review: Dependent internal review by 天工LCI数据工作小组
Amounts: no units in this file; such an amount is in the reference unit of its flow, which a separate flow dataset defines
copyright: false
licenseType: Free of charge for all users and uses

## General comment
通过煅烧和熟料研磨等工艺制备水泥。

## Geography
For this project, a Superfund location at the Brookhaven National Laboratory (BNL) is studied. This particular case was chosen because it is representative of the scale and scenario where soil grouting would be used. It is also one of only a few sites where CS grouting has been used for full scale remediation. BNL has served as a production facility for research and development of radioisotopes for decades. The design of some of the facilities failed to provide adequate safety measures against the spread of radioactivity to the soils and groundwater beneath them and as a result, BNL was added to the Superfund National Priorities List in 1989.

## Technical purpose
该数据集描述了一个用于制造水泥的过程，该水泥用于土壤风险控制，通过建造垂直的水泥浆障壁。此过程包括煅烧和熟料研磨步骤。提供的特定用例是在布鲁克黑文国家实验室（BNL）的土壤灌浆，作为一种防止生产放射性同位素的设施中的污染物扩散到下方土壤和地下水的修复技术。

## Reference product
- cement, unspecified: 22970; measured

## Inputs
All rows: measured
- Limestone: 32388
- clay: 3192.8
- sand: 780.98
- Gypsum: 1148.5
- Iron ore (Domestic): 344.55
  Iron ore（铁矿石）
- Coal,Coal,Coal: 2917.2
- Light fuel oil: 390.49
- natural gas,natural gas: 436.34
- Electricity: 9344.16

## Use advice
该数据集的用户应在水泥浆障壁适用的大型土壤修复项目的背景下应用信息。所提供的示例代表了土壤污染情况，特别是在放射性物质区域。用户必须考虑应用规模，因为这些数据代表了在Superfund网站上的全面修复。在水泥的性质及其在创建防水层以保护土壤和地下水方面的有效性上需要方法论上的关注。

## Review details
清单： 内部审查通过几个迭代步骤完成，涉及原始数据验证、原始数据记录、代表性、完整性、与 ISO 14040 和 14044 有关的建模的一致性。

## Data sources
- Gallagher, P. M., Spatari, S. & Cucura, J. Hybrid life cycle assessment comparison of colloidal silica and cement grouted soil barrier remediation technologies. Journal of Hazardous Materials 250–251, 421–430 (2013).
