# 玻璃生产 ;钢化玻璃;切片过程

Dataset: ILCD process, Unit process, single operation
Geography: KM-YN-CN
Reference year: 2015
Valid until: 2023
Classification: Unit processes / Materials production / Glass and ceramics
Generated by: 和夏夏, 18616148319@163.com
Owner: 天工LCI数据工作小组
Review: Dependent internal review by 天工LCI数据工作小组
Amounts: no units in this file; such an amount is in the reference unit of its flow, which a separate flow dataset defines
copyright: false
licenseType: Free of charge for all users and uses

## General comment
钢化玻璃生产过程涉及将玻璃切割至所需尺寸，这是生产各种玻璃产品的必要步骤。该切片过程特别采用加水湿式打磨技术，以确保边缘光滑及高品质表面，这对于要求安全性、耐用性和光学清晰度的钢化玻璃应用至关重要，如汽车窗户、建筑玻璃和电子设备。

## Technology and included processes
加水湿式打磨

## Reference product
- Glass (formed & finished): 302998; measured
  平板玻璃

## Inputs
- Electricity: 905966; measured
- Glass (formed & finished): 303202; measured
  平板玻璃

## Outputs
- Waste (solid): 203.4; measured

## Use advice
在使用此数据集进行生命周期评估（LCA）时，必须考虑使用钢化玻璃的具体情境。确保数据集反映您场景的地理位置和技术相关性。注意加水湿式打磨过程中的用水情况，这可能需要在水资源稀缺地区分配环境影响。评估切片过程的能源需求及相关排放，并审视钢化玻璃回收可能影响整体环境影响的终生阶段情景。

## Review details
清单： 内部审查通过几个迭代步骤完成，涉及原始数据验证、原始数据记录、代表性、完整性、与 ISO 14040 和 14044 有关的建模的一致性。

## Data sources
- 建设项目环境影响报告表（国环评证乙字 第 2501 号）
