# 地下水异位修复;地下水抽出处理;到达现场的设备和材料

Dataset: ILCD process, Unit process, single operation
Geography: DK
Reference year: 2021
Classification: Unit processes / Other Services / Repair and maintenance
Generated by: 王宁, wang_ning@caep.org.cn
Owner: 天工LCI数据工作小组
Review: Dependent internal review by 天工LCI数据工作小组
Amounts: no units in this file; such an amount is in the reference unit of its flow, which a separate flow dataset defines
copyright: false
licenseType: Free of charge for all users and uses

## General comment
将设备与材料运输至现场

## Technology and included processes
经过400km路程，将设备和材料运输至现场

## Technical purpose
该数据集描述了一个环境修复过程，专注于地下水处理。所述过程，即地下水异位修复，涉及提取受污染的地下水进行处理。该数据的使用适用于已识别地下水污染的环境管理项目，需要进行修复以恢复水质。为了设置和进行修复过程（包括抽水和处理方法），必要的设备和材料被运输了400公里到修复现场。

## Reference product
- Equipment and Materials Arriving on Site: 1; estimated

## Inputs
- Equipment and Materials Arriving on Site: 400000; estimated

## Use advice
在使用该数据集进行生命周期评估时，用户应确保它与其特定的地下水修复情景相关，并考虑到运输设备和材料所涉及的距离。生命周期评估应反映400公里运输过程中的环境影响。用户在其生命周期评估模型中务必包括运输影响，作为整个修复过程评估的一部分。用户还应考虑是否可以在更靠近现场的地方采购设备，以减少运输影响，并且如果他们的运输距离与规定的400公里不同，必须相应调整数据。

## Review details
清单： 内部审查通过几个迭代步骤完成，涉及原始数据验证、原始数据记录、代表性、完整性、与 ISO 14040 和 14044 有关的建模的一致性。

## Data sources
- Sustainable remediation assessment of a chlorinated ethene plume: method evelopment, application, and assessment
