# 再生纸生产|瓦楞原纸|废纸制浆

Dataset: ILCD process, Unit process, single operation
Classification: Materials production / Other mineralic materials
LCI method principle: Attributional
Generated by: Yixiang Gao, 22210740040@m.fudan.edu.cn
Review: Dependent internal review by Tiangong LCI Data Working Group
Amounts: no units in this file; such an amount is in the reference unit of its flow, which a separate flow dataset defines
copyright: false

## Inputs
- Waste paper: 1099; measured
  废纸
- water: 0.79; measured
  水
- Electricity: 335.16; measured
  电力

## Outputs
All rows: measured
- carbon dioxide: 398.96
  CO2
- Nitrogen oxides: 0.06
  NOx
- sulfur dioxide: 0.04
  SO2
- methane: 0.05
  CH4
- carbon monoxide: 0.74
  CO
- chemical oxygen demand: 0.191
  CODcr
- biological oxygen demand: 0.037
  BOD5
- total suspended solids, unspecified: 0.12
  TSS
- Waste (solid): 189.17
  固体废弃物

## Review details
Inventory: The internal review was done by several iteration steps concerning raw data validation, raw data documentation, representativity, completeness and consistency of modelling with regard to ISO 14040 and 14044.; Documentation: The review of the documentation was performed by Ecobilan and is in compliance with ISO 14040 and 14044. The data set documentation is correct in view of the appropriateness of the information provided. It includes all relevant information in view of data quality and scope of application of the respective LCI result.

## Data sources
- 赵国杰, 游亚杰, & 黄起帅. 基于生命周期评价的瓦楞原纸产品碳足迹评价. 中国造纸 40, 40–44 (2021).
