# 鸡肉生产 ; 肉鸡饲养

Dataset: ILCD process, Unit process, single operation
Geography: SD-CN
Reference year: 2018
Classification: Unit processes / Materials production / Agricultural production means
Functional unit: The main output of broiler production is chicken, and the functional unit is 1 kg chicken
Generated by: 杨瑞, 1632707028@qq.com
Owner: 天工LCI数据工作小组
Review: Dependent internal review by 天工LCI数据工作小组
Amounts: no units in this file; such an amount is in the reference unit of its flow, which a separate flow dataset defines
copyright: false
licenseType: Free of charge for all users and uses

## General comment
肉鸡饲养阶段向环境释放的污染物主要 分为肉鸡自身和其他能源消耗。

## Geography
以山东某肉鸡养殖场为目标，对肉鸡规模化 养殖进行生命周期评价

## Technology and included processes
以山东某肉鸡养殖场为目标，对肉鸡规模化 养殖进行生命周期评价，有关肉鸡生产的系统边界包括作物种植( 化肥生产、玉米和大豆 的种植) 、豆粕生产、饲料加工、饲料运输、肉鸡饲养和粪便处 理在内的整个生产过程。肉鸡生产的主要输出产品为鸡肉， 功能单位为 1 kg 鸡肉

## Technical purpose
该工艺数据集的主要应用是生产鸡肉。该数据与家禽行业相关利益方相关，特别是涉及山东省肉鸡大规模饲养的人。生命周期数据代表了与山东省一个农场生产的1公斤鸡肉相关的环境产出，可以用于各种生态和可持续性评估。

## Reference product
- chicken: 1; measured
  鸡肉

## Inputs
- maize grain: 1.88; measured
  玉米
- soybean: 1.1; measured
  大豆
- Electricity: 0.54; measured
- hard coal: 0.26; measured

## Outputs
- nitrous oxide: 0.00143; measured
- ammonia: 0.0157; measured
- methane (biogenic): 0.00143; measured

## Data selection and combination
根据实地调研，整合饲养阶 段数据得出

## Use advice
用户应注意，LCA数据集特别反映了山东省大规模环境中肉鸡饲养的环境影响。用户在将数据应用到其它地理环境时，必须考虑到此数据的地区特性。在核算饲养实践和能源消耗的区域差异时必须细心。数据使用者应确保1公斤鸡肉的功能单位与其可持续性评估或生态足迹计算的范围相匹配。在饲养阶段包含所有相关的输入和输出至关重要，并应理解该数据集可能不完全代表在不同环境或规模下鸡肉生产的环境影响。

## Review details
清单： 内部审查通过几个迭代步骤完成，涉及原始数据验证、原始数据记录、代表性、完整性、与 ISO 14040 和 14044 有关的建模的一致性。

## Data sources
- 牛学锐 & 韩美. 肉鸡规模化养殖的生命周期评价——以山东某养鸡场为例. 安徽农业科学 46, 48–52 (2018).
