# 危险废物处理工艺;运输所需外购柴油

Dataset: ILCD process
Geography: SH-CN
Classification: Unit processes / End-of-life treatment / Other end-of-life services
Generated by: 陆嘉麒, wilsherelu@foxmail.com
Owner: 天工LCI数据工作小组
Review: Dependent internal review by 天工LCI数据工作小组
Amounts: no units in this file; such an amount is in the reference unit of its flow, which a separate flow dataset defines
copyright: true
licenseType: Free of charge for all users and uses

## General comment
所描述的工艺用于处理危险废物。该设施专门用于安全且受监管的处理危险材料。此外，外购柴油的要求指的是将危险废物运输到处理设施所需的燃料。柴油专门用于设计和授权处理及运输此类物质的车辆，通常在受监管的框架内跨不同的距离。

## Reference product
- Hazardous waste treatment: 1000; input; measured
  处理1t危险废物

## Inputs
- Electricity: 226.8; measured
  电力
- natural gas,natural gas: 4.17; measured
  天然气
- Diesel: 0.26; measured
  柴油

## Use advice
使用此数据集时，请确保将购买的柴油作为危险废物处理工艺间接环境影响的一部分。在生命周期评估中应考虑到燃料消耗，因为它是运输阶段的一个关键组成部分。此外，还应考虑车辆的使用寿命终结处理以及零部件和液体的回收或处置。用户应参考最新的环境法规和标准，以确保在模拟此危险废物运输和处理过程中的合规性。

## Review details
清单： 内部审查通过几个迭代步骤完成，涉及原始数据验证、原始数据记录、代表性、完整性、与 ISO 14040 和 14044 有关的建模的一致性。

## Data sources
- 上海市市政固废调研结果
