# 市政污水处理; 污水 ;全混合活性污泥技术

Dataset: ILCD process, Unit process, black box
Geography: TH
Reference year: 2014
Valid until: 2014
Classification: Unit processes / End-of-life treatment / Waste water treatment
Generated by: 于晨阳, yuchenyang0506@foxmail.com
Owner: 天工LCI数据工作小组
Review: Dependent internal review by 天工LCI数据工作小组
Amounts: no units in this file; such an amount is in the reference unit of its flow, which a separate flow dataset defines
copyright: ['opt4ROkqig']
licenseType: Free of charge for all users and uses

## General comment
全混合活性污泥技术是一种生物处理方法，利用微生物将废水中的有机物质转化为水和二氧化碳。通过污水与活性污泥充分混合反应，达到高效净化废水的目的，广泛应用于城市和工业污水处理。

## Geography
Dindaeng,Thailand

## Time period
2014年

## Technology and included processes
全混合活性污泥技术包括以下过程：进水和混合：废水被引入处理系统，并与已经存在于反应器中的活性污泥充分混合。生物降解：混合后的废水在反应器中接触到活性污泥，微生物将废水中的有机物质降解为水和二氧化碳。沉淀：处理后的水经过一段时间的沉淀，使污泥颗粒沉降到底部形成污泥沉积物。污泥回流：一部分已经沉淀的活性污泥被回流到反应器中，以保持污泥中的微生物数量和活性。清水排放：经过处理后的水通过出水口排放，清洁水被释放到环境中。

## Technical purpose
此工艺描述使用全混合活性污泥技术处理市政污水。这项技术通常用于市政污水处理设施中，以降低污水中的有机物、悬浮固体和营养物质的水平，并生产出符合环保排放标准的出水。该数据集代表了截至2014年，泰国丁当区市政污水处理工艺。

## Reference product
- Wastewater: 1; measured

## Inputs
- Electricity: 0.936; measured
- transport in t*km: 2.82e-14; measured
  transport by lorry
- Polyaluminium Chloride: 4e-5; measured
  polymer

## Outputs
All rows: measured
- Waste (solid): 0.0014
- nitrogen, total (excluding N2): 0.0084
- phosphorus, total: 0.0012
- Suspended solids, unspecified,Suspended solids, unspecified,Suspended solids, unspecified: 0.009
- chemical oxygen demand: 0.0202
- biological oxygen demand: 0.0063
- nitrous oxide: 0.00012
- methane (biogenic),methane (biogenic): 0.00096
  原文未区分biogenic和fossil，根据专家判断此处为biogenic。
- carbon dioxide (biogenic): 0.0189
  原文未区分biogenic和fossil，根据专家判断此处为biogenic。
- Sludge: 0.0849

## Use advice
使用此数据集的用户应注意，信息专指泰国丁当区2014年使用全混合活性污泥技术的市政污水处理设施。当将数据应用于不同的地理位置或时间范围时，应谨慎使用，因为技术、法规和进水污水特性可能有所不同。用户在使用此数据集时，还应考虑任何技术更新、法规变化或进水组成的变化。如果意图在生命周期评估中使用数据，必须按照适当的分摊程序操作，特别是涉及共产品或废物回收时。

## Review details
清单： 内部审查通过几个迭代步骤完成，涉及原始数据验证、原始数据记录、代表性、完整性、与 ISO 14040 和 14044 有关的建模的一致性。

## Data sources
- Polruang, S., Sirivithayapakorn, S. & Prateep Na Talang, R. A comparative life cycle assessment of municipal wastewater treatment plants in Thailand under variable power schemes and effluent management programs. Journal of Cleaner Production 172, 635–648 (2018).
