# 水泥研磨;水泥, 普通硅酸盐水泥

Dataset: ILCD process, Unit process, single operation
Geography: CS-HUN-CN
Classification: Materials production / Other mineralic materials
Generated by: 杨思琪, ysqsophia@gmail.com
Owner: 天工LCI数据工作小组
Review: Dependent internal review by 天工LCI数据工作小组
Amounts: no units in this file; such an amount is in the reference unit of its flow, which a separate flow dataset defines
copyright: false
licenseType: Free of charge for all users and uses

## General comment
普通硅酸盐水泥（Ordinary portland cement，OPC）

## Geography
湖南省长沙市内某典型水泥厂

## Technical purpose
位于中国湖南省长沙市一家典型水泥工厂通过水泥研磨过程生产的普通硅酸盐水泥（OPC）用途广泛，适合一般建筑施工使用。该水泥可用于制造混凝土、砂浆、灰泥以及非专用灌浆材料。普通硅酸盐水泥具有42.9 MPa的规定抗压强度，适合从住宅建筑到基础设施项目的各种建筑应用。

## Model description
功能单位（FU）被定义为具有42.9 MPa抗压强度的1千克混合水泥。

## Reference product
- cement, ordinary portland cement: 1000
  OPC

## Inputs
- clinker: 938
  熟料
- gypsum stone (CaSO4-dihydrate): 67.6
  石膏
- electricity, medium voltage: 245.88
  电。电力是由热力产生的。

## Outputs
- particles (> PM10): 2.41e-5
  PM，未标明粒径，按PM>10处理。

## Deviations from the LCI method approaches
与背景系统相关的数据从Ecoinvent 3.1数据库中获得。

## Data selection and combination
前景系统的清单数据是直接从位于中国湖南省长沙市的水泥厂收集的。

## Use advice
当使用来自长沙的普通硅酸盐水泥LCA数据时，数据用户应遵循以1千克混合水泥42.9 MPa抗压强度为功能单元。在进行环境影响评估时，应仔细考虑生命周期终端阶段（如循环利用和废物处理）的包含/排除，并确保与研究目标和范围的一致性。用于背景系统的Ecoinvent 3.1数据库中的数据应与从长沙水泥厂收集的初级数据结合使用，以确保影响评估的准确性和区域特定性。

## Review details
清单： 内部审查通过几个迭代步骤完成，涉及原始数据验证、原始数据记录、代表性、完整性、与 ISO 14040 和 14044 有关的建模的一致性。

## Data sources
- Qinli Zhang, Bingyi Zhang, & Daolin Wang. (2022). Environmental Benefit Assessment of Blended Cement with Modified Granulated Copper Slag. MATERIALS, 15(15).
