# 页岩气生产

Dataset: ILCD process
Geography: SC-CN
Classification: Energy carriers and technologies / Natural gas based fuels
Generated by: 洪溥, 15695258655@163.com
Owner: 天工LCI数据工作小组
Review: Dependent internal review by 天工LCI数据工作小组
Amounts: no units in this file; such an amount is in the reference unit of its flow, which a separate flow dataset defines
licenseType: Free of charge for all users and uses

## General comment
本数据集代表了以中国四川和重庆地区为主的页岩气生产过程。页岩气是一种存在于页岩层中的天然气，应用广泛，包括作为发电燃料、供暖以及在化工行业作为生产各种化学产品的原料。

## Geography
我国页岩气开采工作目前集中在四川及重庆地区，选取四川及重庆的数据进行LCA计算。

## Reference product
- Methane: 8.092e7; uniform; article inperiodical
  页岩气井全生命周期产量（包含泄漏部分）

## Inputs
All rows: article inperiodical
- gravel: 163000; min 12000; max 359000; uniform
  场地准备阶段--道路维修所用碎石
- Diesel: 1050; min 50; max 2877; uniform
  场地准备阶段--道路维修和施工所用设备及碎石等运输
- gravel: 1.005e6; min 912000; max 1.191e6; uniform
  场地准备阶段--井场建设所用碎石
- Diesel: 4122; min 3741; max 4886; uniform
  场地准备阶段--井场建设设备及碎石等运输
- waterproof fabric: 2627; min 1163; max 3366; uniform
  场地准备阶段--淡水蓄水池建设所用防水布
- #325 cement: 164000; min 110000; max 220000; uniform
  场地准备阶段--废水池建造消耗的水泥
- sand: 281000; min 189000; max 377000; uniform
  场地准备阶段--废水池建造消耗的沙子
- gravel: 485000; min 327000; max 651000; uniform
  场地准备阶段--废水池建造消耗的碎石
- freshwater: 77000; min 52000; max 103000; uniform
  场地准备阶段--废水池建造消耗的清水
- Diesel: 3791; min 2382; max 5238; uniform
  场地准备阶段--废水池建造中物料运输消耗的汽油
- Electricity: 1519.2; min 1022.4; max 2037.6; uniform
  场地准备阶段--废水池建造过程混凝土搅拌消耗的电能
- #325 cement: 199000; min 149000; max 282000; uniform
  场地准备阶段--固体废物池建设消耗的水泥
- sand: 341000; min 255000; max 482000; uniform
  场地准备阶段--固体废物池建设消耗的沙子
- gravel: 590000; min 441000; max 834000; uniform
  场地准备阶段--固体废物池建设消耗的碎石
- freshwater: 94000; min 70000; max 132000; uniform
  场地准备阶段--固体废物池建设消耗的清水
- Diesel: 5050; min 3689; max 7251; uniform
  场地准备阶段--固体废物池建设过程材料运输消耗的汽油
- Electricity: 1846.8; min 1382.4; max 2610; uniform
  场地准备阶段--固体废物池建设中混凝土搅拌消耗的电能
- #325 cement: 23000; min 10000; max 36000; uniform
  场地准备阶段--火炬坑建设消耗的水泥
- sand: 40000; min 16000; max 62000; uniform
  场地准备阶段--火炬坑建设消耗的沙子
- gravel: 69000; min 28000; max 108000; uniform
  场地准备阶段--火炬坑建设消耗的碎石
- freshwater: 11000; min 4000; max 17000; uniform
  场地准备阶段--火炬坑建设消耗的清水
- Diesel: 469; min 173; max 789; uniform
  场地准备阶段--火炬坑建设过程中材料运输消耗的汽油
- Electricity: 216; min 90; max 338.4; uniform
  场地准备阶段--火炬坑建设混凝土搅拌消耗的电能
- freshwater: 627000; min 330000; max 849000; uniform
  钻井阶段--钻井流程所用水基、油基钻井液主要组成部分
- Diesel: 330; min 267; max 432; uniform
  钻井阶段--钻井流程所用油基钻井液主要组成部分
- bentonite: 21000; min 12000; max 30000; uniform
  钻井阶段--钻井流程所用油基钻井液主要组成部分
- Limestone: 42000; min 34000; max 54000; uniform
  钻井阶段--钻井流程所用油基钻井液主要组成部分
- calcium chloride: 61000; min 50000; max 80000; uniform
  钻井阶段--钻井流程所用油基钻井液主要组成部分
- Diesel: 395000; min 220000; max 522000; uniform
  钻井阶段--钻井流程驱动钻井设备消耗的汽油
- Diesel: 2596; min 1453; max 3642; uniform
  钻井阶段--钻井流程中物料运输消耗的汽油
- casing: 607000; min 353000; max 760000; uniform
  钻井阶段-固井流程消耗的套管
- freshwater: 293000; min 72000; max 419000; uniform
  钻井阶段-固井流程使用G级水泥消耗的清水
- G class cement: 405000; min 235000; max 499000; uniform
  钻井阶段-固井流程消耗的G级水泥
- Diesel: 4682; min 2709; max 5806; uniform
  钻井阶段-固井流程运输物料及驱动设备消耗的汽油
- freshwater: 104000
  压裂和完井阶段-洗井流程清洗井消耗的清水
- Diesel: 451000
  压裂和完井阶段-洗井流程清水及废水运输消耗的汽油
- freshwater: 2.6071e7; min 1.0253e7; max 4.0237e7; uniform
  压裂和完井阶段 - 射孔和压裂流程所用压裂液的组成部分
- sand: 1.253e6; min 304000; max 1.91e6; uniform
  压裂和完井阶段 - 射孔和压裂流程所用压裂液的组成部分
- Diesel: 6470; min 2025; max 9920; uniform
  压裂和完井阶段 - 射孔和压裂流程物料、水及废水运输消耗的汽油
- Diesel: 209794; min 82508; max 323791; uniform
  压裂和完井阶段 - 射孔和压裂流程现场设备消耗的汽油
- Diesel: 1189; min 906; max 1479; uniform
  生产流程运输废水消耗的汽油
- freshwater: 295000; min 174000; max 432000; uniform
  工程期间工人生活用水消耗
- Diesel: 25; min 14; max 36; uniform
  工程期间生活用水运输消耗的汽油

## Outputs
- waste water - untreated: 100000; article inperiodical
  压裂和完井阶段-洗井流程产生的废水
- waste water - untreated: 209000; min 82000; max 322000; uniform; article inperiodical
  压裂和完井阶段 - 射孔和压裂流程产生的废水
- methane: 1679.72; calculated
  压裂和完井阶段--生产测试流程甲烷排放（依据火炬燃烧效率确定）
- carbon dioxide (fossil): 226343; calculated
  压裂和完井阶段--生产测试流程甲烷燃烧生成的CO2
- waste water - untreated: 268000; min 205000; max 268000; uniform; article inperiodical
  生产流程中全生命周期产生的废水

## Use advice
在使用该数据集进行涉及页岩气的产品或服务的生命周期评估(LCA)计算时，应确保地理范围与数据来源地区相符，即四川和重庆地区。在影响评估阶段应注重考虑当地环境影响类别。此外，用户在应用此数据集时，应考虑采取技术进步提高页岩气抽取技术，并注意政策变化或自然资源可用性可能导致数据的变动。

## Review details
清单： 内部审查通过几个迭代步骤完成，涉及原始数据验证、原始数据记录、代表性、完整性、与 ISO 14040 和 14044 有关的建模的一致性。

## Data sources
- Wang, J., Liu, M., McLellan, B. C., Tang, X. & Feng, L. Environmental impacts of shale gas development in China: A hybrid life cycle analysis. Resources, Conservation and Recycling 120, 38–45 (2017).
