# 土壤修复;异位修复;生物堆;工程实施;土壤清挖;挖掘出来的污染土壤

Dataset: ILCD process, Unit process, single operation
Geography: KR
Reference year: 2011
Classification: Unit processes / Other Services / Repair and maintenance
Generated by: 桑春晖, sangch@mail.bnu.edu.cn
Owner: 天工LCI数据工作小组
Review: Dependent internal review by 天工LCI数据工作小组
Amounts: no units in this file; such an amount is in the reference unit of its flow, which a separate flow dataset defines
copyright: false
licenseType: Free of charge for all users and uses

## General comment
污染源区面积200 m2，污染深度5 m，污染土壤清挖

## Technical purpose
此数据集描述了一种使用异位生物堆技术的土壤修复工艺，适用于土壤污染的场地。特别是针对污染源区面积为200平方米、污染深度为5米的区域。生物堆技术适合需要挖掘污染土壤并随后处理以降低污染水平的工程项目。

## Reference product
- Excavated soil,Excavated soil: 1000; estimated

## Inputs
- Diesel: 0.803; estimated

## Use advice
在使用此数据集进行生命周期评估（LCA）时，必须确保生物堆修复系统标准化报告中报告的所有输入材料和能源消耗被纳入。用户应考虑场地特定条件，如土壤类型和污染物特性，并确保系统边界在模型中准确反映。此外，还应注意数据在地理、技术和时间维度上的代表性，以保证LCA结果的有效性。

## Review details
清单： 内部审查通过几个迭代步骤完成，涉及原始数据验证、原始数据记录、代表性、完整性、与 ISO 14040 和 14044 有关的建模的一致性。

## Data sources
- Jeong, S.-W. & Suh, S.-W. Assessment of Environmental Impacts and CO 2 Emissions from Soil Remediation Technologies using Life Cycle Assessment - Case Studies on SVE and Biopile Systems -. Journal of Korean Society of Environmental Engineers 33, 267–274 (2011).
