# 监测井;建井;井深20m，井管内径46 mm;地下水异位修复;P&T系统

Dataset: ILCD process, Unit process, single operation
Geography: JS-CN
Reference year: 2022
Classification: Unit processes / Other Services / Repair and maintenance
Generated by: 王宁, wang_ning@caep.org.cn
Owner: 天工LCI数据工作小组
Review: Dependent internal review by 天工LCI数据工作小组
Amounts: no units in this file; such an amount is in the reference unit of its flow, which a separate flow dataset defines
copyright: false
licenseType: Free of charge for all users and uses

## General comment
使用聚氯乙烯、膨润土、硅石、柴油和钢材建造三口监测井

## Geography
a closed pesticide manufacturing plant located in Jiangsu Province, China.

## Technical purpose
这三口已建成的监测井旨在使用泵吸和处理(P&T)系统进行位于一家关闭的江苏省农药制造工厂的地下水异位修复。这些监测井深度为20米，内径为46毫米，使得可以监测并抽取受污染的地下水进行处理。所使用的建筑材料包括聚氯乙烯（PVC）、膨润土、硅石、柴油和钢材，反映了具有抵抗化学和结构压力的典型井建造材料。

## Reference product
- Monitoring well: 3; measured

## Inputs
- Polyvinyl chloride: 54.86; measured
- bentonite: 644.53; measured
- quartz sand: 3222.64; measured
- Steel sections: 15; measured
- Diesel oil,diesel oil: 0.01152; measured
- transport in t*km: 393.703; calculated

## Use advice
使用此LCA数据的用户应考虑监测井的完整生命周期，包括建造、运行和关闭阶段。数据特定于用列出的材料（PVC、膨润土、硅石、柴油和钢材）构造的监测井，不适用于用不同材料或设计构造的井。为了准确建模，用户必须考虑诸如在井建造和维护中共产品或共享过程的环境负担分配等方法论选择。

## Review details
清单： 内部审查通过几个迭代步骤完成，涉及原始数据验证、原始数据记录、代表性、完整性、与 ISO 14040 和 14044 有关的建模的一致性。

## Data sources
- Ding, D. et al. Assessing the environmental impacts and costs of biochar and monitored natural attenuation for groundwater heavily contaminated with volatile organic compounds. Science of The Total Environment 846, 157316 (2022).
