# 砖块生产 ;页岩空心砖生产 ;鄂破过程

Dataset: ILCD process, Unit process, single operation
Geography: GZ-JX-CN
Reference year: 2020
Classification: Unit processes / Materials production / Other mineralic materials
Generated by: 王湘锦, r99rt4@163.com
Owner: 天工LCI数据工作小组
Review: Dependent internal review by 天工LCI数据工作小组
Amounts: no units in this file; such an amount is in the reference unit of its flow, which a separate flow dataset defines
copyright: false
licenseType: Free of charge for all users and uses

## General comment
传统页岩空心砖生产工艺

## Technical purpose
该数据集代表建筑行业中页岩空心砖生产过程中的鄂破工序。这些砖块通常用于墙体和建筑物的建造，尤其是在需要考虑轻质和保温属性的地方。

## Reference product
- coal gangue: 330; measured
  破碎后的煤矸石

## Inputs
- coal gangue: 336; measured
- Electricity: 14.9472; measured

## Outputs
- particles (> PM10),particles (> PM10): 0.02; measured
  烟尘
- Particles (PM0.2 - PM2.5): 0.03; measured
  粉尘

## Deviations from the LCI method approaches
环境影响评估报告基于砖的年产量（8000万块砖），出于统计目的，数据已根据其中所述的尺寸规格进行转换，即每吨生产的砖

## Data selection and combination
采用根据《第一次全国污染源普查工业污染源产排污系数手册 第七分册》中 3131 烧结类砖瓦及建筑砌块制造业产排污系数表的相关数据。

## Sampling procedure
该环评报告的数据来源于工厂的实时数据

## Use advice
使用者应将此数据特定地视为烧结类砖瓦及建筑砌块制造业（代码3131）的数据, 如《第一次全国污染源普查工业污染源产排污系数手册 第七分册》中所述。数据反映了年产量，如果用于更小的生产场景或不同砖块尺寸，应该进行相应调整。务必使用相同的测量单位（例如，每吨砖块数）以保持一致性。用户还必须了解数据基于实际工厂运行，可能需要针对理论或其他特定应用进行调整。

## Review details
清单： 内部审查通过几个迭代步骤完成，涉及原始数据验证、原始数据记录、代表性、完整性、与 ISO 14040 和 14044 有关的建模的一致性。

## Data sources
- 年产 8000 万块页岩标砖项目环评报告公示
