# 地下水原位修复;地下水原位化学氧化;得到修复的地下水

Dataset: ILCD process, Unit process, single operation
Geography: CA
Reference year: 2007
Classification: Unit processes / Other Services / Repair and maintenance
Generated by: 王宁, wang_ning@caep.org.cn
Owner: 天工LCI数据工作小组
Review: Dependent internal review by 天工LCI数据工作小组
Amounts: no units in this file; such an amount is in the reference unit of its flow, which a separate flow dataset defines
copyright: false
licenseType: Free of charge for all users and uses

## General comment
药物制剂、注射系统运行，地下水得到修复

## Geography
The contaminated area was located 600 m from a river shore in the northern part of the prov-ince of Quebec， Canada.

## Technology and included processes
使用醋酸、硫酸亚铁、双氧水制备氧化药剂，使用电力驱动地下水原位氧化系统，使地下水得到修复

## Technical purpose
所描述的工业过程用于地下水原位修复。使用醋酸、硫酸亚铁和双氧水作为氧化化学品，并配合电力驱动的原位氧化系统能够处理受污染的地下水资源。这项技术通常适用于地下水污染对生态系统和人类健康构成风险的地区，适合于加拿大魁北克省北部河岸600米处的场地。

## Reference product
- Remediated groundwater: 110067; estimated
  运行地下水原位氧化系统得到修复后的地下水

## Inputs
All rows: estimated
- Electricity: 166000
  消耗电力使地下水原位氧化系统运行
- acetic acid: 2280
  消耗醋酸使地下水原位氧化系统运行
- Hydrogen peroxide,Hydrogen peroxide: 4406
  消耗双氧水使地下水原位氧化系统运行
- Iron sulphate dissolution: 9844
  消耗硫酸亚铁使地下水原位氧化系统运行
- Tap Water: 9844
  消耗水使地下水原位氧化系统运行
- injection well: 125
- A device for configuring solid pharmaceuticals into liquid pharmaceuticals: 1

## Use advice
在使用该数据集进行生命周期评估（LCA）时，请确保LCA的范围包括由使用化学品和电力进行地下水原位修复所产生的潜在环境影响。数据应仅适用于原位化学氧化可行且污染特征与魁北克省所述场地类似的情景。需要考虑地理位置，因为它可能会影响修复过程的环境影响和有效性。

## Review details
清单： 内部审查通过几个迭代步骤完成，涉及原始数据验证、原始数据记录、代表性、完整性、与 ISO 14040 和 14044 有关的建模的一致性。

## Data sources
- Cadotte, M., Deschênes, L. & Samson, R. Selection of a remediation scenario for a diesel-contaminated site using LCA. Int J Life Cycle Assess 12, 239–251 (2007).
