# 干法制砂;砂石除尘;袋式除尘工艺

Dataset: ILCD process, Unit process, single operation
Geography: HAIN-CN
Reference year: 2020
Classification: Unit processes / Materials production / Other mineralic materials
Generated by: 崔航, Cuihang0716@163.com
Owner: 天工LCI数据工作小组
Review: Dependent internal review by 天工LCI数据工作小组
Amounts: no units in this file; such an amount is in the reference unit of its flow, which a separate flow dataset defines
copyright: false
licenseType: Free of charge for all users and uses

## General comment
使用除尘设备对半成品砂进行除尘

## Technology and included processes
使用脉冲除尘器对半成品砂进行除尘

## Technical purpose
该工艺用于干法生产建筑用砂。它包括使用袋式除尘技术对半成品砂石进行除尘，特别是采用脉冲除尘器。这种技术通常用于对最终产品中的粉尘含量有严格要求的工业环境中，以保证生产出高质量的建筑砂。

## Reference product
- sand: 38870; measured

## Inputs
- Electricity: 108; measured
- sand: 41870; measured

## Outputs
- Fly ash: 3000; measured

## Use advice
在使用此数据集进行生命周期评估（LCA）时，用户应考虑脉冲除尘器的具体操作设置及其在除尘过程中的效率。考虑除尘设备的能耗和维护活动非常重要。此外，如果此工艺与砂生产的其他单元过程相连，需要仔细整合，并在LCA中避免重复计算。

## Review details
清单： 内部审查通过几个迭代步骤完成，涉及原始数据验证、原始数据记录、代表性、完整性、与 ISO 14040 和 14044 有关的建模的一致性。

## Data sources
- 陵水海岛混凝土有限公司干法制砂项目
