# 东北水稻种植 ; 矿石和化石能源开采 ; 用于生产化肥农药

Dataset: ILCD process, Unit process, single operation
Geography: SY-LN-CN
Reference year: 2016
Valid until: 2017
Classification: Unit processes / Materials production / Agricultural production means
Functional unit: 1t
LCI method principle: Attributional
LCI method approaches: Consequential
Generated by: Haoran Zhang, hrzhang@whu.edu.cn
Owner: 天工LCI数据工作小组
Review: Dependent internal review by 天工LCI数据工作小组
Amounts: no units in this file; such an amount is in the reference unit of its flow, which a separate flow dataset defines
copyright: false
licenseType: Free of charge for all users and uses

## General comment
考 虑 矿 石 、化 石 能 源的开采与运输的资源消耗和污染排放

## Technology and included processes
以生产 1 t 稻谷为功能单位，规定起始边界为生 产化肥农药的矿石和化石能源开采，终止边界为水稻 种植阶段的污染物排放

## Technical purpose
该数据集代表中国东北水稻生产阶段的环境影响，包括原料开采。它旨在评估水稻种植的环境足迹并识别农业实践中潜在的改进领域。该数据可用于生命周期评估研究，其中水稻是主要成分。

## Reference product
- rice: 1000; measured

## Inputs
All rows: measured
- Hard coal, at consumer EU-27: 10.85
- Diesel: 3.51, 0.41 (2 entries)
- Natural gas, at consumer EU-27: 1.63
- Electricity: 78.408
- water: 0.2
- crude oil; 42.3 MJ/kg: 7.66
- potassium chloride: 37.98
- phosphorus: 15.64

## Outputs
All rows: measured
- carbon monoxide (fossil): 1.22
- carbon dioxide (fossil),carbon dioxide (fossil): 44.81
- nitrous oxide: 5.15
- sulfur dioxide: 0.72
- Nitrogen oxides: 0.28
- methane (fossil),methane (fossil): 0.05
- chemical oxygen demand: 0.02
- cadmium: 0.0001
- nickel: 0.0013
- vanadium: 0.0005
- zinc: 0.0001
- arsenic: 0.0003

## Deviations from the LCI method approaches
规定起始边界为生产化肥农药的矿石和化石能源开采，终止边界为水稻种植阶段的污染物排放

## Data selection and combination
共调查农户62户，调查内容包括化肥种类及用量、农药种类及用量、机械耗油、生产耗电、灌溉水量等相关信息

## Data treatment and extrapolations
采用当量系数法将同类污染物转化为参照物的环境影响潜力[22]，评价水稻生产的环境影响。

## Use advice
在使用这个数据集进行生命周期评估时，用户应注意，系统边界开始于为生产化肥和农药开采矿石和化石能源，并以水稻种植阶段的污染物排放结束。已经应用了等效系数法，允许将相似的污染物转换为一个共同单位的环境影响潜力。在将这些数据整合到更大的研究或评估中时，考虑这些边界和转化方法是很重要的。此外，在使用数据时，应注意用当前实践和区域特定情况更新或验证数据，因为此数据集反映了62个调查农户的实践。

## Review details
清单： 内部审查通过几个迭代步骤完成，涉及原始数据验证、原始数据记录、代表性、完整性、与 ISO 14040 和 14044 有关的建模的一致性。

## Data sources
- 常俊彦,宋明阳,于晓曼等.沈阳地区水稻生产的生态环境影响研究[J].农业环境科学学报,2018,37(08):1793-1801.
