# 油气藏评价; 三类预探区带; 资源价值计算

Dataset: ILCD process, Unit process, single operation
Geography: SC-CN
Reference year: 2015
Classification: Unit processes / Energy carriers and technologies / Energetic raw materials
LCI method principle: Attributional
LCI method approaches: Consequential
Generated by: Shikang Kang, 908798159@qq.com
Owner: 天工LCI数据工作小组
Review: Dependent internal review by 天工LCI数据工作小组
Amounts: no units in this file; such an amount is in the reference unit of its flow, which a separate flow dataset defines
copyright: false
licenseType: Free of charge for all users and uses

## General comment
根据预探区带的模板及参数对四川盆地的 5 个预 探区带的资源战略价值进行评价。为了便于比较和对比，我们根据四川盆地预探区带的勘探现状进行了评价指数的归一化

## Geography
四川盆地预探区带

## Time period
文献发表时间

## Technology and included processes
基于勘探风险 分析技术建立了“油气发现概率 － 资源战略价值”的预探区带评价模板，提出了对应的评价参数、赋值标准、计算公式及结果分类标准，实现了统一平台下的预探区带评价优选。

## Technical purpose
该数据集用于四川盆地预探区带油气藏的评价。其应用目的是根据地质和技术参数确定资源的战略价值。该数据可在能源行业应用，特别是被从事油气资源勘探和价值评估的实体用来优化勘探策略，并对潜在钻探地点做出明智决策。

## Reference product
- carbon: 1e12; input; min 1e12; max 3e13; normal; missing unimportant
  各个区带的资源量均值与其的比值

## Inputs
- carbon: 3e11; max 3e11; uniform; missing unimportant
  潜在资源量

## Outputs
- natural gas: 0.34; log-normal; missing unimportant
  油气发现率
- methane (fossil): 1e12; normal; missing unimportant
  文献中没有天然气开采量，假设天然气开采过程中投入量：输出量=1:1

## Data selection and combination
其中区带的油气发现概率评价参数包括地质 成藏关键因素( 烃源岩、圈闭、储层、保存和油气配套史) 及工程技术适用性，资源战略价值评价参数包括资源潜 力、资源规模、勘探战略意义和探井成功率

## Data treatment and extrapolations
评价时考虑可发现的资源规模、潜力、探井成功率以及勘 探的战略意义等因素的影响，利用资源量指数、潜在资 源量指数、探井成功率指数和勘探战略价值 4个参数 综合反映预探区带的资源价值的相对大小，定量化表示资源潜力和价值

## Use advice
在使用该数据集进行生命周期评估或其他分析时，用户应考虑四川盆地预探区带的特定地质条件和工程技术适用性。建议用户考虑勘探风险，包括烃源岩、圈闭、储层条件和历史油气发现等地质因素。还需要整合技术适用性和探井成功率。应仔细考虑数据集的正规化过程，以确保正确的比较和对比分析，且应仅在其预期的上下文中使用 — 即四川盆地的预探区带。

## Review details
清单： 内部审查通过几个迭代步骤完成，涉及原始数据验证、原始数据记录、代表性、完整性、与 ISO 14040 和 14044 有关的建模的一致性。

## Data sources
- 刘超英;闫相宾;高山林;闵斌; 油气预探区带评价优选方法及其应用. 石油与天然气地质 314-318+329 (2015).
