# Cadmium-nickelbattery|Cadmiumorcadmiumoxide,potassiumhydroxide,nickeloushydroxide,nickelnitrate|Sintering|All sizes / /|镉镍电池|镉或氧化镉、氢氧化钾、氢氧化亚镍、硝酸镍|烧结式|所有规模

Dataset: ILCD process, Partly terminated system
Geography: CN
Reference year: 2019
Classification: Materials production / Other mineralic materials
Generated by: The data was created by the Office of the Second National Pollution Source Census of the Ministry of Ecology and Environment, and the data was organized by the TianGong Plan team for ILCD format / 生态环境部第二次全国污染源普查工作办公室创建数据，天工计划团队常慧敏整理数据为ILCD格式
Amounts: no units in this file; such an amount is in the reference unit of its flow, which a separate flow dataset defines
copyright: false

## Technology and included processes
the treatment technology for the pollution of Nickel-Cadmium Batterydidn't offered
污染物指标工业废水量的末端治理技术是－

## Reference product
- Nickel-Cadmium Battery: 10000; calculated
  原文件中描述污染物类别为Product，污染物指标为镉镍电池，此处对其进行了匹配工作，将其匹配到LCAflow库里面相最符合的流，污染物指标备注为工业废水量

## Outputs
- Waste water: 0.28; calculated
  原文件中描述污染物类别为废水，污染物指标为工业废水量，此处对其进行了匹配工作，将其匹配到LCAflow库里面相最符合的流，污染物指标备注为工业废水量
- chemical oxygen demand: 0.002705; calculated
  原文件中描述污染物类别为废水，污染物指标为化学需氧量，此处对其进行了匹配工作，将其匹配到LCAflow库里面相最符合的流，污染物指标备注为化学需氧量
- cadmium: 4.6e-6; calculated
  原文件中描述污染物类别为废水，污染物指标为总镉，此处对其进行了匹配工作，将其匹配到LCAflow库里面相最符合的流，污染物指标备注为总镉
- Exhaust gas: 1350; calculated
  原文件中描述污染物类别为废气，污染物指标为工业废气量，此处对其进行了匹配工作，将其匹配到LCAflow库里面相最符合的流，污染物指标备注为工业废气量

## Data sources
- 第二次全国污染源普查产排污核算系数手册（试用版）,二级代码38,四级代码3849文件，在完整版文件中第3413页
