# 电力生产 ; 火电 ; 天津

Dataset: ILCD process, Unit process, single operation
Geography: TJ-CN
Reference year: 2019
Classification: Energy carriers and technologies / Electricity
Generated by: 熊若熙, xiongrx0126@163.com
Owner: 天工LCI数据工作小组
Review: Dependent internal review by 天工LCI数据工作小组
Amounts: no units in this file; such an amount is in the reference unit of its flow, which a separate flow dataset defines
copyright: false
licenseType: Free of charge for all users and uses

## General comment
火电发电包括原煤、洗煤、石油、天然气等十七种化石燃料。该过程只考虑直接发电过程，不考虑上游原材料开采加工和下游消费

## Time period
根据2019年能源统计年鉴数据计算

## Technical purpose
该数据集涉及天津的火电发电，使用包括原煤、洗煤、石油和天然气在内的多种化石燃料。此过程用于为该地区提供从住宅到工业需求的电力。

## Reference product
- electricity for thermal power: 3.4704; calculated

## Inputs
All rows: calculated
- Raw coal: 0.295106
- Coke oven gas: 0.002412
- blast furnace gas: 0.076089
- Converter gas: 0.004795
- crude oil; 42.3 MJ/kg: 0.00225798
- Diesel: 2.821e-5
- fuel oil, unspecified: 2.82e-6
- petroleum coke: 0.00241876
- refinery gas: 2.82e-6
- Natural Gas: 0.043749

## Outputs
- carbon dioxide: 0.7; calculated
- sulfur dioxide: 0.000112; calculated
- Nitrogen oxides: 0.000173325; calculated
- Dust (unspecified, from stack): 2.5396e-5; calculated

## Data treatment and extrapolations
核算方法参考《企业温室气体排放核算方法与报告指南 发电设施》。不同形式发电量及燃料用量来自于《中国能源统计年鉴 2020》中的第三章（能源生产） 和第六章（地区能源平衡表）。用于计算二氧化碳排放因子的低位发热量、单位热值含碳量等燃料参数来自于《2019 年度中国区域电网二氧化碳基准线排放因子 OM 计算说明》、《企业温室气体排放核算方法与报告指南 发电设施》

## Use advice
使用这份生命周期评估（LCA）数据时，关注直接发电过程。排除上游的原材料提取加工活动以及下游电力消费。结合《2019年能源统计年鉴》以及《企业温室气体排放核算方法与报告指南 发电设施》等参考文献和《中国能源统计年鉴 2020》的相关章节使用数据，以确保准确核算二氧化碳排放。

## Review details
清单： 内部审查通过几个迭代步骤完成，涉及原始数据验证、原始数据记录、代表性、完整性、与 ISO 14040 和 14044 有关的建模的一致性。

## Data sources
- 熊若熙. 中国电力生产和消费二氧化碳与污染物排放因子核算. (清华大学, 2023).
