# 钢水生产;钢水;转炉炼钢

Dataset: ILCD process, Unit process, single operation
Geography: CN
Classification: Unit processes / Materials production / Metals and semimetals
Generated by: 付翔, 1162850692@qq.com
Owner: 天工LCI数据工作小组
Review: Dependent internal review by 天工LCI数据工作小组
Amounts: no units in this file; such an amount is in the reference unit of its flow, which a separate flow dataset defines
copyright: false
licenseType: Free of charge for all users and uses

## General comment
该数据集代表了使用氧气顶吹转炉（BOF）方法的钢水生产过程，常用于大型综合钢铁厂。所生产的钢水通常用于各种应用，如建筑业、汽车工业、重型机械制造和家用电器等。

## Geography
The data of the BF-BOF pathway were obtained from the large-scale integrated steel plants in China with an attached coking plant and EAF plant.

## Reference product
- Molten steel: 1023.4; measured

## Inputs
All rows: measured
- Molten Iron: 924
  Molten iron
- Iron scrap: 124.2
  Scrap steel/iron
- dolomite: 2.6
- quicklime: 24.3
  Quicklime
- Circulating water: 7600
- Refractory: 9.8
- oxygen: 51.6
- Coke oven gas: 13.7
  COG
- Linz-Donawitz gas: 2.2
  LDG
- Silicomanganese: 17.8
- Electricity: 180.36

## Outputs
- Linz-Donawitz gas: 98.1; measured
  LDG
- BOF Slag: 157.1; measured

## Use advice
在使用该数据集进行生命周期评估时，需特别注意系统边界和技术适用性。所指范围应反映具有焦化和电弧炉能力的综合钢铁厂。应考虑特定地区实践以及相关上游和下游过程的包含或排除，如原材料开采、运输和潜在的生命周期末期回收方面。

## Review details
清单： 内部审查通过几个迭代步骤完成，涉及原始数据验证、原始数据记录、代表性、完整性、与 ISO 14040 和 14044 有关的建模的一致性。

## Data sources
- The carbon reduction potential of hydrogen in the low carbon transition of the iron and steel industry: The case of China
