# 土壤修复;异位修复;生物堆;工程实施;废气处置;处理后的废气

Dataset: ILCD process, Unit process, single operation
Geography: KR
Reference year: 2011
Classification: Unit processes / Other Services / Repair and maintenance
Generated by: 桑春晖, sangch@mail.bnu.edu.cn
Owner: 天工LCI数据工作小组
Review: Dependent internal review by 天工LCI数据工作小组
Amounts: no units in this file; such an amount is in the reference unit of its flow, which a separate flow dataset defines
copyright: false
licenseType: Free of charge for all users and uses

## General comment
采用活性炭对修复环节产生的废气进行吸附

## Technical purpose
该土壤修复工艺旨在使用生物堆技术对污染土壤进行异位处理。它关注在开挖土壤中污染物的生物降解的工程实施，并结合使用活性炭吸附法进行废气处置。此过程特别应用于环境清洁项目，在土地可以被回收或重复使用之前，需要在控制条件下生物降解土壤中的污染物。

## Reference product
- Treated exhaust gas: 1; estimated

## Inputs
- Activated Carbon: 1368; estimated
- Exhaust gas: 1; estimated

## Use advice
在生命周期评估中使用这个数据集时，请确保包括土壤修复系统标准化报告中详细列出的所有输入材料和能耗数据。考虑生物堆修复过程运行的具体条件，包括修复规模和正在处理的土壤污染物类型。通过活性炭处理的废气应作为整体环境影响评估的一部分进行考虑。特别注意系统的边界，确保你的LCA研究范围内考虑了从土壤开挖到最终处置或土地再利用的所有阶段。

## Review details
清单： 内部审查通过几个迭代步骤完成，涉及原始数据验证、原始数据记录、代表性、完整性、与 ISO 14040 和 14044 有关的建模的一致性。

## Data sources
- Jeong, S.-W. & Suh, S.-W. Assessment of Environmental Impacts and CO 2 Emissions from Soil Remediation Technologies using Life Cycle Assessment - Case Studies on SVE and Biopile Systems -. Journal of Korean Society of Environmental Engineers 33, 267–274 (2011).
