# 阻隔层;土壤原位修复;气相抽提;基础设施建设

Dataset: ILCD process, Unit process, single operation
Geography: KR
Reference year: 2011
Classification: Unit processes / Other Services / Repair and maintenance
Generated by: 张建宾, zhangjb@caep.org.cn
Owner: 天工LCI数据工作小组
Review: Dependent internal review by 天工LCI数据工作小组
Amounts: no units in this file; such an amount is in the reference unit of its flow, which a separate flow dataset defines
copyright: false
licenseType: Free of charge for all users and uses

## General comment
办公室、仓库及SVE系统基础

## Technology and included processes
砾石9.6 m3，混凝土19 m3，钢丝网96 m2 -巴克霍柴油机21升

## Technical purpose
此数据集代表了使用土壤气相抽提（SVE）系统进行土壤原位修复时，建造阻隔层和基础所需的材料和能源消耗。包括使用砾石、混凝土和钢丝网作为材料，以及用于操作建筑机械的柴油能源。该数据集适用于评估与土壤修复基础设施相关项目的环境影响，特别是与办公室、仓库和其他相关建设中的SVE系统建立相关。

## Reference product
- Barrier layer: 1; measured
  根据原位，这里建设的是用于办公区、贮存区和SVE系统建设的混凝土硬化地层，文中没有给出具体的建设面积和混凝土厚度，这里采用项目为计量单位

## Inputs
- Gravel Sand: 9.6; measured
- cement, unspecified: 19; measured
- Wire Mesh: 96; measured
- Diesel,Diesel: 0.021; measured
- Equipment and Materials Arriving on Site: 30000
  文中给出修复工程总的材料使用量为99.8吨，但基础设施建设和建井两个环节材料用量没有单独统计重量，此处30吨为填报人根据经验估算得到的结果。

## Use advice
使用此数据集的用户应注意，它包括土壤原位修复系统建造阶段所需的所有原材料和能源。应用这些数据时，重要的是要正确地将这些材料和能源消耗归属于所研究的生命周期的建设阶段。另外，用户必须考虑数据的技术适用性，确保数据与他们分析中考虑的特定类型SVE系统和修复过程相匹配。根据特定生命周期评估的目标，还应根据方法学的其他方面，例如包括或排除使用后建筑材料潜在回收或模拟不同使用阶段行为，也应仔细评估。

## Review details
清单： 内部审查通过几个迭代步骤完成，涉及原始数据验证、原始数据记录、代表性、完整性、与 ISO 14040 和 14044 有关的建模的一致性。

## Data sources
- Jeong, S.-W. & Suh, S.-W. Assessment of Environmental Impacts and CO 2 Emissions from Soil Remediation Technologies using Life Cycle Assessment - Case Studies on SVE and Biopile Systems -. Journal of Korean Society of Environmental Engineers 33, 267–274 (2011).
