# Veterinarychemicalrawmaterials|Corn,starch,glucose,etc.|Fermentation|200~1000 t/a / /|兽用化学药品原料药|玉米、淀粉、葡萄糖等|发酵|200~1000吨/年

Dataset: ILCD process, Partly terminated system
Geography: CN
Reference year: 2019
Classification: Materials production / Other mineralic materials
Generated by: The data was created by the Office of the Second National Pollution Source Census of the Ministry of Ecology and Environment, and the data was organized by the TianGong Plan team for ILCD format / 生态环境部第二次全国污染源普查工作办公室创建数据，天工计划团队常慧敏整理数据为ILCD格式
Amounts: no units in this file; such an amount is in the reference unit of its flow, which a separate flow dataset defines
copyright: false

## Technology and included processes
the Technical of end-of-pipe management technology for pollution Veterinary Chemical Drug Raw Materialsis/，The formula for calculating the actual operation rate (k-value) of the end-of-pipe treatment facility is k = opreating time of treatment facilities (hours/year) / normal production time (hours/year)
污染物指标废气量的末端治理技术是/，末端治理设施实际运行率（k值）计算公式为/

## Reference product
- Veterinary Chemical Drug Raw Materials: 1000; calculated
  原文件中描述污染物类别为Product，污染物指标为兽用化学药品原料药，此处对其进行了匹配工作，将其匹配到LCAflow库里面相最符合的流，污染物指标备注为废气量，产污系数备注为发酵工艺中采用非树脂提取工艺，

## Outputs
All rows: calculated
- Exhaust gas: nan, nan (2 entries)
  原文件中描述污染物类别为废气，污染物指标为废气量，此处对其进行了匹配工作，将其匹配到LCAflow库里面相最符合的流，污染物指标备注为废气量，产污系数备注为发酵工艺中采用非树脂提取工艺，
- Exhaust gas: nan, nan (2 entries)
  原文件中描述污染物类别为废气，污染物指标为废气量，此处对其进行了匹配工作，将其匹配到LCAflow库里面相最符合的流，污染物指标备注为废气量，产污系数备注为发酵工艺中采用树脂提取工艺
- volatile organic compound: nan, nan, nan, nan, nan, nan, nan, nan, nan, nan (10 entries)
  原文件中描述污染物类别为废气，污染物指标为挥发性有机物，此处对其进行了匹配工作，将其匹配到LCAflow库里面相最符合的流，污染物指标备注为挥发性有机物，产污系数备注为发酵工艺中采用非树脂提取工艺，
- volatile organic compound: nan, nan, nan, nan, nan, nan, nan, nan, nan, nan (10 entries)
  原文件中描述污染物类别为废气，污染物指标为挥发性有机物，此处对其进行了匹配工作，将其匹配到LCAflow库里面相最符合的流，污染物指标备注为挥发性有机物，产污系数备注为发酵工艺中采用树脂提取工艺
- Waste water: nan
  原文件中描述污染物类别为废水，污染物指标为废水量，此处对其进行了匹配工作，将其匹配到LCAflow库里面相最符合的流，污染物指标备注为废水量，产污系数备注为发酵工艺中采用非树脂提取工艺，
- Waste water: nan
  原文件中描述污染物类别为废水，污染物指标为废水量，此处对其进行了匹配工作，将其匹配到LCAflow库里面相最符合的流，污染物指标备注为废水量，产污系数备注为发酵工艺中采用树脂提取工艺
- chemical oxygen demand: nan, nan, nan, nan (4 entries)
  原文件中描述污染物类别为废水，污染物指标为化学需氧量，此处对其进行了匹配工作，将其匹配到LCAflow库里面相最符合的流，污染物指标备注为化学需氧量，产污系数备注为发酵工艺中采用非树脂提取工艺，
- chemical oxygen demand: nan, nan, nan, nan (4 entries)
  原文件中描述污染物类别为废水，污染物指标为化学需氧量，此处对其进行了匹配工作，将其匹配到LCAflow库里面相最符合的流，污染物指标备注为化学需氧量，产污系数备注为发酵工艺中采用树脂提取工艺
- Ammonia Nitrogen: nan, nan, nan, nan (4 entries)
  原文件中描述污染物类别为废水，污染物指标为氨氮，此处对其进行了匹配工作，将其匹配到LCAflow库里面相最符合的流，污染物指标备注为氨氮，产污系数备注为发酵工艺中采用非树脂提取工艺，
- Ammonia Nitrogen: nan, nan, nan, nan (4 entries)
  原文件中描述污染物类别为废水，污染物指标为氨氮，此处对其进行了匹配工作，将其匹配到LCAflow库里面相最符合的流，污染物指标备注为氨氮，产污系数备注为发酵工艺中采用树脂提取工艺
- phosphorus, total: nan, nan, nan, nan (4 entries)
  原文件中描述污染物类别为废水，污染物指标为总磷，此处对其进行了匹配工作，将其匹配到LCAflow库里面相最符合的流，污染物指标备注为总磷，产污系数备注为发酵工艺中采用非树脂提取工艺，
- phosphorus, total: nan, nan, nan, nan (4 entries)
  原文件中描述污染物类别为废水，污染物指标为总磷，此处对其进行了匹配工作，将其匹配到LCAflow库里面相最符合的流，污染物指标备注为总磷，产污系数备注为发酵工艺中采用树脂提取工艺
- Nitrogen, organic bound: nan, nan, nan, nan (4 entries)
  原文件中描述污染物类别为废水，污染物指标为总氮，此处对其进行了匹配工作，将其匹配到LCAflow库里面相最符合的流，污染物指标备注为总氮，产污系数备注为发酵工艺中采用树脂提取工艺
- Nitrogen, organic bound: nan, nan, nan, nan (4 entries)
  原文件中描述污染物类别为废水，污染物指标为总氮，此处对其进行了匹配工作，将其匹配到LCAflow库里面相最符合的流，污染物指标备注为总氮，产污系数备注为发酵工艺中采用非树脂提取工艺，

## Data sources
- 第二次全国污染源普查产排污核算系数手册（试用版）,二级代码27,三级代码275.0文件，在完整版文件中第3116页
