# Bioethanol ; Solvent-based

Dataset: ILCD process
Geography: GLO
Classification: Energy carriers and technologies / Renewable fuels
Generated by: 袁嘉翼, jiayi_y@mail.bnu.edu.cn
Owner: 天工LCI数据工作小组
Review: Dependent internal review by 天工LCI数据工作小组
Amounts: no units in this file; such an amount is in the reference unit of its flow, which a separate flow dataset defines
licenseType: Free of charge for all users and uses

## General comment
这种溶剂基生物乙醇通常用作各种工业应用中的可再生溶剂。它还可以作为生物燃料成分与汽油混合使用，增加含氧量以改善燃烧并减少排放。

## Inputs
All rows: uniform; missing unimportant
- Electricity: 13.716; max 189
- heat: 1290; max 6550
- Electricity: 374.4; min 4.176; max 2415.6
- heat: 4770; min 417; max 14800
- Electricity: 417.6; min 227.52; max 597.6

## Outputs
- heat: 603; max 3280; uniform; missing unimportant

## Use advice
在使用此数据集进行生命周期评估时，用户应确保适当时包括农业原料种植的影响和溶剂回收过程。应注意生产中与生物乙醇的处理和燃烧相关的排放特性。还应考虑记账土地使用变化和潜在间接效应的方法论。

## Review details
清单： 内部审查通过几个迭代步骤完成，涉及原始数据验证、原始数据记录、代表性、完整性、与 ISO 14040 和 14044 有关的建模的一致性。
