# 土壤修复;原位修复;电修复;电动修复设施运行;得到修复的土壤

Dataset: ILCD process, Unit process, single operation
Geography: KR
Reference year: 2014
Classification: Unit processes / Other Services / Repair and maintenance
Generated by: 浩骅, wangyp@caep.org.cn
Owner: 天工LCI数据工作小组
Review: Dependent internal review by 天工LCI数据工作小组
Amounts: no units in this file; such an amount is in the reference unit of its flow, which a separate flow dataset defines
copyright: false
licenseType: Free of charge for all users and uses

## General comment
系统的运行和维护

## Technical purpose
该数据集描述了一种通过电修复进行原位土壤修复的工业过程。它适用于在现场处理土壤污染的情况，无需将土壤运输到其他地方。此数据集中概述的电修复设施运行涉及通过应用电流处理土壤以去除污染物的过程。该过程适用于挖掘不切实际或传统修复方法可能效果不佳的区域。

## Reference product
- Remediated soil: 90; measured

## Inputs
All rows: measured
- Water for industrial use: 50
  2 m3 /month
- sodium hydroxide: 10
  Chemical (0.01 M)
- Electricity: 21600
  Pump, power supply, etc
- EDTA: 36.5
- Diesel: 0.0927
  Vehicle (onetime/week, 19.3 km, 10 km/1 L)
- contaminated soil: 90
- Electric restoration facilities: 1

## Outputs
- Greenhouse Gases: 4340; measured
- Nitrogen oxides: 10.1; measured
- SOx: 11.2; measured
- particles (> PM10): 0.037; measured

## Use advice
在使用此LCA数据集时，重要的是确保数据准确代表所采用的特定电修复过程。用户应验证输入输出流数据反映了他们应用中所有主要原材料的使用情况和所需的能源消耗。如果在修复过程中发生材料回收，必须在数据分析中考虑这一点。所描述的电修复系统的维护和运营方面也应包含在LCA中，以确保对环境影响进行完整的评估。

## Review details
清单： 内部审查通过几个迭代步骤完成，涉及原始数据验证、原始数据记录、代表性、完整性、与 ISO 14040 和 14044 有关的建模的一致性。

## Data sources
- Kim, DH., Yoo, JC., Hwang, BR. et al. Environmental assessment on electrokinetic remediation of multimetal-contaminated site: a case study. Environ Sci Pollut Res 21, 6751–6758 (2014).
