# 钢铁产品;钢铁;钢铁生产

Dataset: ILCD process, Unit process, single operation
Geography: CN
Reference year: 2006
Classification: Unit processes / Materials production / Metals and semimetals
Generated by: 王环宇, wanghuanyu00@126.com
Owner: 天工LCI数据工作小组
Review: Dependent internal review by 天工LCI数据工作小组
Amounts: no units in this file; such an amount is in the reference unit of its flow, which a separate flow dataset defines
copyright: false
licenseType: Free of charge for all users and uses

## General comment
该数据集代表了钢铁产品的生产。从这个过程中获得的钢铁因其强度、耐用性和可回收性，适用于包括建筑、汽车、制造和基础设施等多种用途。

## Reference product
- Alloy steel: 1000; measured
  文献中只统计了生产流程外的源头指标和末端指标，中间的一些input（比如流程中的自产和加工废钢）文献中没有给出

## Inputs
- iron: 729; measured
  文献中只统计了生产流程外的源头指标和末端指标，中间的一些input（比如流程中的自产和加工废钢）文献中没有给出
- primary energy from solar energy: 560.2; measured
  文献中只统计了生产流程外的源头指标和末端指标，中间的一些input（比如流程中的自产和加工废钢）文献中没有给出
- freshwater,freshwater: 16000; measured
  文献中只统计了生产流程外的源头指标和末端指标，中间的一些input（比如流程中的自产和加工废钢）文献中没有给出

## Outputs
All rows: measured
- carbon monoxide (fossil): 21.27
  文献中只统计了生产流程外的源头指标和末端指标，中间的一些input（比如流程中的自产和加工废钢）文献中没有给出
- carbon dioxide (fossil): 1336.28
  文献中只统计了生产流程外的源头指标和末端指标，中间的一些input（比如流程中的自产和加工废钢）文献中没有给出原文未区分bio和fossil，根据专家判断,钢铁生产过程中碳排放源此处为fossil）
- phenol,Sulphur oxides (as SO2): 4.66
  文献中只统计了生产流程外的源头指标和末端指标，中间的一些input（比如流程中的自产和加工废钢）文献中没有给出
- nitrous oxide: 2.85
  文献中只统计了生产流程外的源头指标和末端指标，中间的一些input（比如流程中的自产和加工废钢）文献中没有给出
- Flue dust: 15.64
  文献中只统计了生产流程外的源头指标和末端指标，中间的一些input（比如流程中的自产和加工废钢）文献中没有给出

## Use advice
使用此数据集时，用户应考虑钢铁生产过程对其特定环境的技术适用性。在考虑产品生命周期末期时，应注意是否包括回收。此外，如果钢铁将在特殊环境或应用中使用，用户必须考虑特定使用阶段的行为表现，例如暴露于腐蚀性元素或机械应力。

## Review details
清单： 内部审查通过几个迭代步骤完成，涉及原始数据验证、原始数据记录、代表性、完整性、与 ISO 14040 和 14044 有关的建模的一致性。

## Data sources
- 杜涛 & 蔡九菊. 典型钢铁生产流程的环境负荷分析. 中国冶金 38–41 (2006) doi:
