# 开采阶段;原油;地震勘探、钻井、修井

Dataset: ILCD process, Unit process, single operation
Geography: BJ-CN
Reference year: 2004
Classification: Unit processes / Energy carriers and technologies / Crude oil based fuels
LCI method principle: Attributional
LCI method approaches: Consequential
Generated by: 朱睿希, z2958242159@163.com
Owner: 天工LCI数据工作小组
Review: Dependent internal review by 天工LCI数据工作小组
Amounts: no units in this file; such an amount is in the reference unit of its flow, which a separate flow dataset defines
copyright: false
licenseType: Free of charge for all users and uses

## General comment
石油在勘探开采阶段要进行的主要工程类别有地 震勘探、钻井、修井、油气集储等。按照开采地域的不 同又分为陆上石油的开采和海洋石油的开采。在这 些过程中对环境产生的影响主要有噪音、废水、废气 和固体废弃物等但最主要的是废水、固体废弃物这两 个部分。以下对它们所产生的影响及所要消耗的能量 进行分析

## Geography
江汉油田

## Technology and included processes
石油在勘探开采阶段要进行的主要工程类别有地震勘探、钻井、修井、油气集储等。按照开采地域的不同, 又分为陆上石油的开采和海洋石油的开采。在这些过程中, 对环境产生的影响主要有噪音、废水、废气和固体废弃物等, 但最主要的是废水、固体废弃物这两个部分。地震勘探通常分为地震资料采集、处理和解释三个阶段。地震勘探中常用的技术包括地震震源的释放（如爆炸源或振动源）、地震检波器的布设、地震资料的记录和数字处理等。钻井技术涉及钻井设备的选择和操作、钻头和钻杆的设计和使用、钻井液的循环和管理等方面。常见的钻井方式包括旋挖钻井、循环钻井和非循环钻井等。修井技术涉及井眼壁面的修复、套管的安装和固定、水泥封固等工艺。修井的具体操作取决于井眼的深度、地质条件和井眼状况。

## Technical purpose
该数据集代表了江汉油田原油勘探和开采阶段涉及的各种活动。技术用途包括地震勘探、钻井和修井，重点应用于陆上和海洋石油开采。这覆盖了油气积累、储存以及在这些过程中减轻噪音、废水、废气和固体废物排放对环境影响的努力。所提供的数据对于制定减少石油部门资源消耗和废物生成的策略至关重要。

## Reference product
- LPG - liquefied petroleum gas: 2030; uniform; missing unimportant
  油田单位原油生产自用百分数

## Inputs
- LPG - liquefied petroleum gas: 250000; uniform; missing unimportant
  原油生产耗水量

## Deviations from the LCI method approaches
（1）从能耗表中可以看到在开采和炼制阶段石 油损耗率较大因此有必要采取措施减少在此过程中 的损耗量。 （2）在石油的开采和使用过程中废水的数量较 多故须对水回收再利用以减少废水污染并节约用 水。 （3）从整个生命周期来看石油的利用污染比较大。但是其应用广泛产品众多所以在短时期内还没 有可替代品。

## Use advice
生命周期评价数据集的用户应考虑到在勘探和炼制阶段石油损耗率较高的问题，采取措施尽量减少损失。需要特别注意水的回收利用，以减轻废水污染并节约资源。考虑到石油使用全生命周期的显著环境影响，数据用户应将提供的数据纳入更广泛的环境管理策略中，同时考虑到目前尚缺乏能够替代石油产品的可行选择以及其广泛的应用场景。

## Review details
清单： 内部审查通过几个迭代步骤完成，涉及原始数据验证、原始数据记录、代表性、完整性、与 ISO 14040 和 14044 有关的建模的一致性。

## Data sources
- 董志强,马晓茜,张凌.石油利用对环境影响的生命周期分析[J].石油与天然气化工,2004(06):456-459.
