# 熟料煅烧;熟料;立窑

Dataset: ILCD process, Unit process, single operation
Geography: CN
Classification: Materials production / Other mineralic materials
Generated by: 杨思琪, ysqsophia@gmail.com
Owner: 天工LCI数据工作小组
Review: Dependent internal review by 天工LCI数据工作小组
Amounts: no units in this file; such an amount is in the reference unit of its flow, which a separate flow dataset defines
copyright: false
licenseType: Free of charge for all users and uses

## General comment
在煅烧熟料的阶段中，生料（主要是CaCO3）与燃料如煤混合。通过向窑中加入空气进行煅烧，使得生料在高温下分解为熟料（主要是CaO）。在这个过程中会产生各种污染物。

## Technology and included processes
In the calcinating phase for clinker, the raw meal (mainly CaCO3)is mixed with fuels as coal. Adding air into the kiln for calcinating causes the raw meal to decompose into clinker (mainly CaO) at a high temperature. Various pollutants are generated in the process.

## Technical purpose
通过这个工业过程生产的熟料是制造水泥的基础组成部分。立窑中的熟料煅烧阶段涉及使用煤作为燃料对主要成分为碳酸钙的原料进行热分解。产生的主要产品是氧化钙，它在建筑行业中是创造各种类型水泥的关键成分。

## Model description
系统边界为产生熟料的煅烧阶段。

## Reference product
- clinker: 1000
  熟料

## Inputs
- raw meal: 2042.5
  生料球
- limestone, crushed, for mill: 1165.83
  石灰石
- clay: 242.5
  黏土
- hard coal; 26.3 MJ/kg: 161.667
  煤炭。煤1.94；添加煤0.4。
- iron, powder: 56.667
  铁粉
- Water (fresh water): 416.667
  水
- oxygen: 373.333
  O2

## Outputs
- particles (> PM10): 27.5
  灰尘，未标明粒径，按PM>10处理。
- carbon dioxide: 914.167
  二氧化碳
- sulfur dioxide: 2.5
  SO2
- Nitrogen oxides: 4.167
  NOX
- Water (groundwater from technosphere, waste water): 416.667
  水
- Waste, solid, from cement production: 73.753
  其他物质。原文没有指明是什么物质，所以我们假设它是固体废物。

## Sampling procedure
经调查，采用立窑生产系统的水泥企业的年产能为100,000吨熟料。立窑生产线的总体特点是能耗高，生产能力有限，劳动生产率低，粉尘排放量大。立窑生产线的动态代谢分析是在正常生产水平下以1小时为单位进行的。

## Use advice
在使用这个数据集时，确保计算高温煅烧过程中关联的污染物排放。应关注立窑系统的能耗特征和有限的生产能力。特别是粉尘排放应被监控并包括在任何环境影响评估中。数据使用和方法论必须与立窑系统的技术适用性保持一致，且生产数据应仅适用于具有类似生产环境和能力的水泥厂。

## Review details
清单： 内部审查通过几个迭代步骤完成，涉及原始数据验证、原始数据记录、代表性、完整性、与 ISO 14040 和 14044 有关的建模的一致性。

## Data sources
- Dan Hu, Zhen Guo, Zhen Wang, & Qiang Xiao. (2015). Metabolism analysis and eco-environmental impact assessment of two typical cement production systems in Chinese enterprises. Ecological Informatics 26, 70–77.
