# 市政污泥处理与处置;干污泥;堆肥

Dataset: ILCD process, Unit process, single operation
Geography: CN
Classification: Unit processes / End-of-life treatment / Waste water treatment
Functional unit: One ton of sludge on a dry basis (1 t-DS) is defined as the functional unit.
Generated by: 金思甜, 2331276@tongji.edu.cn
Owner: 天工LCI数据工作小组
Review: Dependent internal review by 天工LCI数据工作小组
Amounts: no units in this file; such an amount is in the reference unit of its flow, which a separate flow dataset defines
copyright: ['opt4ROkqig']
licenseType: Free of charge for all users and uses

## General comment
选择国内几个典型的污泥处理设施，分别为厌氧消化、堆肥、共燃、热干燥焚烧和水泥生产，进行调查。数据主要来自具体地点的测量，要么通过实地调查，要么通过操作报告。污泥特性基于所调查场地的平均值。

## Technology and included processes
运行数据显示，约57%的有机物降解，堆肥后的污泥含水率约为40%。干基堆肥后的全氮和全磷分别占消化物质的2.01%和1.27%。

## Technical purpose
该数据集的技术用途描述了通过堆肥进行市政污泥处理和处置的工艺。这一过程与专门将干污泥转化为堆肥的废物管理设施有关，之后可将其作为各种农业和景区土壤改良剂或肥料使用。

## Reference product
- Sludge: 1000; input; estimated
  干基 （1 t-DS）

## Inputs
- Electricity: 275.4; measured
- Diesel: 11.3; measured
- Straw: 455; measured

## Outputs
- Compost: 1700; measured

## Use advice
在使用此数据集时，用户应确保他们考虑了具体的堆肥过程参数和涉及的排放。用户必须考虑与堆肥和随后产生的堆肥使用相关的当地法规和标准。功能单位是一吨干基污泥（1 t-DS）; 这应该是任何评估和比较的参考。还应考虑到与未经资源回收的处置相对，使用堆肥的潜在环境利益或负担。

## Review details
清单： 内部审查通过几个迭代步骤完成，涉及原始数据验证、原始数据记录、代表性、完整性、与 ISO 14040 和 14044 有关的建模的一致性。

## Data sources
- Dong, J., Chi, Y., Tang, Y., Wang, F. & Huang, Q. Combined Life Cycle Environmental and Exergetic Assessment of Four Typical Sewage Sludge Treatment Techniques in China. Energy Fuels 28, 2114–2122 (2014).
