# 电力生产 ; 火电 ; 河南

Dataset: ILCD process, Unit process, single operation
Geography: HEN-CN
Reference year: 2019
Classification: Unit processes / Energy carriers and technologies / Electricity
Generated by: 熊若熙, xiongrx0126@163.com
Owner: 天工LCI数据工作小组
Review: Dependent internal review by 天工LCI数据工作小组
Amounts: no units in this file; such an amount is in the reference unit of its flow, which a separate flow dataset defines
copyright: false
licenseType: Free of charge for all users and uses

## General comment
火电发电包括原煤、洗煤、石油、天然气等十七种化石燃料。该过程只考虑直接发电过程，不考虑上游原材料开采加工和下游消费

## Time period
根据2019年能源统计年鉴数据计算

## Technical purpose
该数据集描述了使用原煤、洗煤、石油和天然气等多种化石燃料，特别是在河南省的火力热电站中进行直接发电过程的情况。使用限于火电厂内的直接发电过程，不涉及上述原材料的开采加工或生成电力的最终使用。

## Reference product
- electricity for thermal power: 3.6; calculated

## Inputs
All rows: calculated
- Raw coal: 0.389693
- Other Washed Coal: 0.00779244
- Gangue, in ground: 0.00808067
- Coke oven gas: 0.004942
- blast furnace gas: 0.039495
- Converter gas: 0.000584
- Diesel: 6.031e-5
- fuel oil, unspecified: 7.83e-6
- Petroleum Coke: 0.000168
- refinery gas: 3.446e-5
- natural gas: 0.001555

## Outputs
- carbon dioxide (fossil): 0.770836; calculated
- sulfur dioxide: 0.000134019; calculated
- Nitrogen oxides: 0.00021242; calculated
- particles (> PM10): 2.64002e-5; calculated

## Data treatment and extrapolations
核算方法参考《企业温室气体排放核算方法与报告指南 发电设施》。不同形式发电量及燃料用量来自于《中国能源统计年鉴 2020》中的第三章（能源生产） 和第六章（地区能源平衡表）。用于计算二氧化碳排放因子的低位发热量、单位热值含碳量等燃料参数来自于《2019 年度中国区域电网二氧化碳基准线排放因子 OM 计算说明》、《企业温室气体排放核算方法与报告指南 发电设施》

## Use advice
在使用此数据集进行生命周期评估时，请将数据仅适用于火力发电厂的直接发电阶段。排除上游阶段，如燃料提取和加工，以及电力使用等下游阶段。在温室气体排放核算中，遵循《企业温室气体排放核算方法与报告指南 发电设施》中概述的方法论，使用“中国能源统计年鉴 2020”和其他指定参考文献中提供的2019年的具体参数和统计数据。

## Review details
清单： 内部审查通过几个迭代步骤完成，涉及原始数据验证、原始数据记录、代表性、完整性、与 ISO 14040 和 14044 有关的建模的一致性。

## Data sources
- 熊若熙. 中国电力生产和消费二氧化碳与污染物排放因子核算. (清华大学, 2023).
