# 电力生产 ; 火电 ; 重庆

Dataset: ILCD process, Unit process, single operation
Geography: CQ-CN
Reference year: 2019
Classification: Unit processes / Energy carriers and technologies / Electricity
Generated by: 熊若熙, xiongrx0126@163.com
Owner: 天工LCI数据工作小组
Review: Dependent internal review by 天工LCI数据工作小组
Amounts: no units in this file; such an amount is in the reference unit of its flow, which a separate flow dataset defines
copyright: false
licenseType: Free of charge for all users and uses

## General comment
火电发电包括原煤、洗煤、石油、天然气等十七种化石燃料。该过程只考虑直接发电过程，不考虑上游原材料开采加工和下游消费

## Time period
根据2019年能源统计年鉴数据计算

## Technical purpose
该数据集代表位于重庆的热电厂使用原煤、洗煤、石油、天然气等十七种化石燃料的直接电力发电过程。它适用于在仅考虑直接发电过程而不考虑上游原材料开采加工和下游电力消费时，对热电力发电设施的评估。

## Reference product
- electricity for thermal power: 3.6; calculated

## Inputs
All rows: calculated
- Raw coal: 0.37003
- Other Washed Coal: 0.00021627
- Gangue, in ground: 0.0154132
- Coke oven gas: 0.002776
- blast furnace gas: 0.09918
- Converter gas: 0.001964
- Diesel: 6.128e-5
- fuel oil, unspecified: 7.21e-6
- natural gas: 0.006705

## Outputs
- carbon dioxide (fossil): 0.796079; calculated
- sulfur dioxide: 0.000133331; calculated
- Nitrogen oxides: 0.000214871; calculated
- particles (> PM10): 2.7557e-5; calculated

## Data treatment and extrapolations
核算方法参考《企业温室气体排放核算方法与报告指南 发电设施》。不同形式发电量及燃料用量来自于《中国能源统计年鉴 2020》中的第三章（能源生产） 和第六章（地区能源平衡表）。用于计算二氧化碳排放因子的低位发热量、单位热值含碳量等燃料参数来自于《2019 年度中国区域电网二氧化碳基准线排放因子 OM 计算说明》、《企业温室气体排放核算方法与报告指南 发电设施》

## Use advice
使用本数据集的用户应参照《企业温室气体排放核算方法与报告指南 发电设施》了解数据计算方法。数据集基于2019年能源统计年鉴数据，特别是《中国能源统计年鉴2020》第3章（能源生产）和第6章（地区能源平衡表）的多种形式电力发电和燃料消耗统计数据。建议用户使用诸如《2019年中国区域电网二氧化碳基准线排放因子计算说明OM》和相关企业温室气体报告指南中的低位发热量、单位热值含碳量等参数来计算二氧化碳排放因子。对用户而言，将此数据集应用在其定义的范围内至关重要，即仅核算电力发电过程中的直接排放，排除上游和下游过程。

## Review details
清单： 内部审查通过几个迭代步骤完成，涉及原始数据验证、原始数据记录、代表性、完整性、与 ISO 14040 和 14044 有关的建模的一致性。

## Data sources
- 熊若熙. 中国电力生产和消费二氧化碳与污染物排放因子核算. (清华大学, 2023).
