# 勘探潜力分析; 海相烃源岩 ;有机地球化学分析

Dataset: ILCD process, Unit process, single operation
Geography: SC-CN
Reference year: 1940
Classification: Unit processes / Other Services / Research and development
LCI method principle: Attributional
LCI method approaches: Consequential
Generated by: Shikang Kang, 908798159@qq.com
Owner: 天工LCI数据工作小组
Review: Dependent internal review by 天工LCI数据工作小组
Amounts: no units in this file; such an amount is in the reference unit of its flow, which a separate flow dataset defines
copyright: false
licenseType: Free of charge for all users and uses

## General comment
选取8条露头剖面对川西北地区下震旦统陡山沱组、上震 旦统灯三段、下寒武统筇竹寺组、下志留统龙马溪组、中泥盆统、中二叠统茅口组、上二叠统龙潭 组/吴家坪组和大隆组8套海相烃源岩进行了系统的有机地球化学分析，探讨了该区天然气勘探潜 力。

## Geography
川西北地区四川盆地

## Time period
自20世纪40年代至今，川西北地区天然气 勘探持续不断

## Technology and included processes
基于上述烃源岩厚度和有机碳的分析数据，对 川西北地区8套烃源岩总生气强度进行了评价

## Technical purpose
四川盆地北西部海相烃源岩的有机地球化学分析数据集是为地质和地球化学研究人员以及能源行业设计的，用于评估天然气勘探潜力。该数据包括对不同地质构造中有机质丰度、类型及成熟度的评估，可用于识别具有较大厚度和广泛分布的高质量烃源岩区域，为未来天然气勘探和开采活动指示有前景的区域。

## Reference product
- natural gas: 6.5e9; input; min 1.3e10; max 4e9; uniform; missing unimportant
  总生气强度

## Inputs
- natural gas: 20; min 10; max 30; uniform; missing unimportant
  总体厚度

## Outputs
- natural gas: 0.0108; min 0.0104; max 0.0112; uniform; missing unimportant
  等效镜质体反射率，范围取均值

## Data selection and combination
烃源岩有机质丰度 、烃源岩有机质类型 、烃源岩有机质成熟度

## Data treatment and extrapolations
通过对川西北地区各套烃源岩地球化学及烃 源岩纵横向厚度展布分析，下寒武统筇竹寺组、上 二叠统龙潭组和大隆组发育高有机质丰度的优质 烃源岩，并且具有厚度大、分布广特征征，

## Use advice
使用此数据集的用户在解释有机地球化学分析时应考虑区域地质背景。该数据特别适用于四川盆地西北部地区，未经进一步地理空间分析不应外推至其他区域。用户应考虑数据收集中使用的方法论，包括露头剖面的选择以及确定有机质特征的技术。用户必须将此数据与地质和地球物理数据整合以得出关于天然气潜力的可靠结论。

## Review details
清单： 内部审查通过几个迭代步骤完成，涉及原始数据验证、原始数据记录、代表性、完整性、与 ISO 14040 和 14044 有关的建模的一致性。

## Data sources
- 胡国艺;贺飞;米敬奎;袁懿琳;郭谨豪; 川西北地区海相烃源岩地球化学特征、分布规律及天然气勘探潜力. 天然气地球科学 319–333 (2021).
