# 熟料生产;熟料

Dataset: ILCD process, Unit process, black box
Geography: ZZ-SD-CN
Classification: Unit processes / Materials production / Other mineralic materials
Generated by: #REF!, ysqsophia@gmail.com
Owner: 天工LCI数据工作小组
Review: Dependent internal review by 天工LCI数据工作小组
Amounts: no units in this file; such an amount is in the reference unit of its flow, which a separate flow dataset defines
copyright: false
licenseType: Free of charge for all users and uses

## General comment
传统熟料生产。

## Geography
山东申丰水泥集团有限公司

## Technical purpose
该数据集描述了山东申丰水泥集团有限公司的传统熟料生产过程。这一过程是水泥制造的核心部分，其中熟料是生产各种类型水泥的主要成分。因此，它在建筑行业中至关重要，用于制造混凝土、砂浆和其他建筑材料。

## Model description
定义了两个功能单元，分别为1吨熟料和生产1吨熟料所需的食物垃圾和残余废物数量。系统边界包括煤粉制备、生料制备和熟料煅烧。

## Reference product
- clinker: 1000
  熟料

## Inputs
- limestone, crushed, for mill: 1353.4
  石灰石
- sandstone: 101.905
  砂岩
- shale: 75.555
  页岩
- iron, powder: 26.941
  铁粉
- hard coal; 26.3 MJ/kg: 125
  煤炭
- Electricity: 219.02
  电力。各阶段的耗电量是根据水泥生产的电力消耗指标进行计算的(Wang, 2013)。背景过程数据来自GaBi数据库：electricity production, “CN: Electricity grid mix PE”。

## Outputs
- carbon dioxide (fossil): 760.538
  CO2。E_(CO_2 )=E_"coal" +E_(CaCO_3 ), E_coal=NCV×FC×CC×OF×44/10, E_(C"a" CO_3 )=(FR_1-FR_10)×44/56+(FR_2-FR_20)×44/40. 其中，E_(CO_2 )表示水泥窑炉的CO2排放量（t），E_"coal"表示煤燃烧的CO2排放量（t），E_(CaCO_3 )表示原材料的碳酸盐分解引起的CO2排放量（t）， NCV是煤炭的低位热值（19.570 GJ/t），FC是煤炭的消耗量（t），CC是煤炭单位热值的碳含量（0.0261 t C/GJ），OF是煤炭的碳氧化率（98%），FR1是熟料中CaO的含量（%），FR10是熟料中非碳酸盐分解产生的CaO的含量（%），FR2是熟料中MgO的含量（%），FR20是熟料中非碳酸盐分解产生的MgO的含量（%），44/56和44/40分别是CO2和CaO、MgO之间的分子量转换因子。FR_10=(FS_10)/((1-L)×F_"c" ), FR_20=(FS_20)/((1-L)×F_"c" ). 其中，Fc是熟料中非碳酸盐形式的煤灰含量的转换因子（1.04），FS10是生料中非碳酸盐形式的CaO含量（%），FS20是生料中非碳酸盐形式的MgO含量（%）。FS_10=(∑_"n" ▒〖(m_n×r_10n)〗)/m, FS_20=(∑_"n" ▒〖(m_n×r_20n)〗)/m.其中，mn是第n个除石灰石外的原材料的质量（kg），r10n是第n个除石灰石外的原材料中的CaO含量（%），r20n是第n个除石灰石外的原材料中的MgO含量（%），m是熟料消耗量（kg）。
- sulfur oxides: 0.411575
  SOx。P_(SO_2 )=64/80×"m"×SO_3 (1-X)×〖10〗^3, 其中 P_(SO_2 ) 表示水泥窑中的SO2排放量（千克），64/80是SO2与SO3的分子量比，m是熟料消耗量（吨），SO3是生料中的SO3含量（%），X是生料中的SO3吸收率（88%）。
- Nitrogen oxides: 1.325
  NOx。P_(NO_x )=(R_Y×16+R_L×7)×m_coal×〖10〗^(-3)，其中 P_(NO_x ) 表示水泥窑中的NOx排放量（千克），R_L和R_Y分别是旋转窑和预煅器中使用的燃料比例（分别为0.6和0.4），m_coal是熟料生产中的煤炭消耗量（千克）。

## Data selection and combination
首先假定原材料消耗比例，然后根据公式计算煤的消耗量、煤灰掺入率、生料配比、点火后生料配比、熟料配比以及熟料质量参数，包括石灰饱和度系数（KH）、硅酸盐模数（SM）和铝酸盐模数（IM）。熟料质量参数为KH=0.89±0.02，SM=2.5±0.1，IM=1.5±0.1。用公式计算了湿物料的数量。各阶段的电力消耗按水泥生产的电力消耗指数计算。

## Use advice
在使用此数据集时，用户应注意特定的熟料质量参数（KH、SM 和 IM），因为这些会影响可以生产的水泥的质量和类型。此外，由于系统边界排除了废水的考虑，因为废水排放量很少，任何需要在生产中分析水的使用和处理的评估都应相应调整数据。方法论的考虑还应包括特定的能源消耗指标，以及过程中涉及的材料的计算，如原材料、煤炭、煤灰的比例，以及食品垃圾和剩余垃圾的管理。此外，理解功能单元在将此数据应用于环境影响评估以及与其他生产方法或设施比较熟料生产效率和排放时将至关重要。

## Review details
清单： 内部审查通过几个迭代步骤完成，涉及原始数据验证、原始数据记录、代表性、完整性、与 ISO 14040 和 14044 有关的建模的一致性。

## Data sources
- Xuemin Liang, Wenling Dang, Guangling Yang, & Yueling Zhang. (2023). Environmental feasibility evaluation of cement co-production using classified domestic waste as alternative raw material and fuel: A life cycle perspective. Journal of Environmental Management 326, 116726.
