# 土壤修复;原位修复;热脱附;工程实施

Dataset: ILCD process, Unit process, single operation
Geography: HEN-CN
Classification: Other Services / Repair and maintenance
Generated by: Zhang Jinying, zhangjy@caep.org.cn
Owner: Tiangong LCI Data Working Group
Review: Dependent internal review by Tiangong LCI Data Working Group
Amounts: no units in this file; such an amount is in the reference unit of its flow, which a separate flow dataset defines
licenseType: Free of charge for all users and uses

## General comment
This soil remediation process, specifically in-situ thermal desorption, is intended for cleaning contaminated soil in high risk areas. The process, spanning approximately 200 days, is divided into two main parts: (1) Thermal desorption, which includes heating, construction of extraction wells, installation of thermal desorption equipment, and the heating and desorption operations as a unit process (single operation).

## Reference product
- materials: 30413; article inperiodical

## Inputs
All rows: article inperiodical
- Natural gas, at consumer EU-27: 766514
- Electricity: 1.296e6
- Diesel: 38.806
- water: 115
- iron: 310265
- Concrete: 2270
- cement: 1513
- heavy fuel oil: 6.162

## Use advice
When using this LCA data set, users should take into consideration the specific conditions of the remediation site, such as soil composition and contamination level. It is essential to understand that the effectiveness and environmental impact of the thermal desorption process may vary based on these conditions. Furthermore, the boundary conditions for the data should include the entire operational cycle and assume that the end-of-life stage includes a restoration phase to return the site to a natural or pre-determined state post-remediation.

## Review details
Inventory: The internal review was done by several iteration steps concerning raw data validation, raw data documentation, representativity, completeness and consistency of modelling with regard to ISO 14040 and 14044.
