# 水泥生产;水泥, 复合硅酸盐水泥, 42.5MPa;高掺灰渣干法;混合固废

Dataset: ILCD process, Unit process, black box
Geography: WH-HUB-CN
Reference year: 2005
Classification: Materials production / Other mineralic materials
Generated by: 杨思琪, ysqsophia@gmail.com
Owner: 天工LCI数据工作小组
Review: Dependent internal review by 天工LCI数据工作小组
Amounts: no units in this file; such an amount is in the reference unit of its flow, which a separate flow dataset defines
copyright: false
licenseType: Free of charge for all users and uses

## General comment
高掺灰渣干法生产工艺的数据来自武汉华新水泥宜都有限公司技改后的工业指标，其生产的42.5等级硅酸盐复合水泥中各种工业废渣掺入量达到50%以上（其中矿渣和粉煤灰的掺入量不低于40%）。

## Geography
武汉华新水泥宜都有限公司

## Technology and included processes
高 掺 灰 渣干 法 生 产 工 艺主 要 是 参考华新 水泥宜 都 有 限 公司 的 技 改 指 标 其 生产 的 42 . 5 等 级硅 酸 盐 复 合 水 泥 中 各种 工 业废渣掺 入 量 达 到 50 % 以 上 ( 其 中矿 渣和 粉 煤 灰 的 掺 入量 不 低 于 4 0 % ) 。

## Technical purpose
此数据集代表42.5MPa抗压强度的复合硅酸盐水泥生产工艺。该水泥含有高掺量粉煤灰，并掺入矿渣和粉煤灰等混合工业固废，适用于需要该强度等级的一般建筑目的。

## Model description
以1千克28天抗压强度为42.5MPa的水泥所具有的使用性能为功能单位，即IFu=42.5kgMPa。研究范围界定为：原料预处理一生料粉磨一生料煅烧一熟料粉磨一水泥均化一水泥储存。

## Reference product
- cement, portland-composite cement, 42.5MPa: 1000
  42.5等级硅酸盐复合水泥

## Inputs
- limestone, crushed, for mill: 786.4
  石灰石
- gypsum stone (CaSO4-dihydrate): 45.1
  石膏
- ash: 200
  粉煤灰
- blast furnace slag: 200
  原文献是矿渣（即高炉矿渣）
- hard coal: 88.472
  原始数据为0.0822kg标准煤，这里换算为硬煤，换算公式为1kg硬煤=0.929kg标准煤。
- electricity, medium voltage: 370.8
  电力

## Outputs
- particles (> PM10): 0.15
  粉尘，未标明粒径，按PM>10处理。
- sulfur dioxide: 0.000562
  二氧化硫。考虑到国内水泥厂运行的实际情况和未来很长时间的发展趋势，本次评价采用实测数据的统计平均值。
- Nitrogen oxides: 0.004627
  氮氧化物。考虑到国内水泥厂运行的实际情况和未来很长时间的发展趋势，本次评价采用实测数据的统计平均值。
- carbon dioxide: 559.1
  二氧化碳。考虑到国内水泥厂运行的实际情况和未来很长时间的发展趋势，本次评价采用实测数据的统计平均值。

## Use advice
该数据集的用户需注意，数据反映了与华新水泥宜都有限公司技术改革指标相关的特定工艺途径和环境性能。当评估环境影响并将数据应用于相似的工业环境时，应考虑高掺量粉煤灰内容（超过50%的工业废渣混合掺入量，至少40%包含矿渣和粉煤灰）。此处定义的功能单元为1千克的水泥具有的28天抗压强度42.5MPa的使用性能，这对比较生命周期评估研究至关重要。研究范围包括从原料预处理到水泥存储的所有阶段；因此，用户在使用该数据进行水泥相关产品的生命周期评估时，应包括所有这些阶段。

## Review details
清单： 内部审查通过几个迭代步骤完成，涉及原始数据验证、原始数据记录、代表性、完整性、与 ISO 14040 和 14044 有关的建模的一致性。

## Data sources
- 曹晓润. (2005). 低环境负荷型水泥的生态环境评价 [硕士, 武汉理工大学].
