# 稀土生产;金属钕生产;原位浸出;钕铁硼（NdFeB）磁铁

Dataset: ILCD process, Unit process, single operation
Geography: NMG-CN
Reference year: 2014
Classification: Unit processes / Materials production / Metals and semimetals
Functional unit: The functional unit is a 1 kg NdFeB magnet
LCI method principle: Attributional
LCI method approaches: Allocation - market value; Allocation - mass
Generated by: 汪涛, twang@iue.ac.cn
Owner: 天工LCI数据工作小组
Review: Dependent internal review by 天工LCI数据工作小组
Amounts: no units in this file; such an amount is in the reference unit of its flow, which a separate flow dataset defines
copyright: false
licenseType: Free of charge for all users and uses

## General comment
通过这个工业过程生产的钕铁硼（NdFeB）磁铁，是用于需要高强度永磁体的应用。这些磁铁因其出色的磁性能，通常被用于各种技术设备，如硬盘驱动器、风力涡轮机、电动车辆和扬声器。

## Geography
Bayan Obo (China)

## Technology and included processes
所有三个矿床生产 Nd 和 Pr 的基本过程都是相同的。 Nd 和 Pr 是相同的，除了最后的溶剂萃取步骤 (SX5)，其中两者被分离。

## Reference product
- neodymium: 1; calculated
  Bayan Obo

## Inputs
- Electricity: 37.44; calculated
  Bayan Obo: energy demand, amounts of electrolyte, anodes and cathodes are estimated from literature
- Neodymium fluoride: 0.048, 0.0003 (2 entries); calculated
  Neodymium fluoride. Bayan Obo: energy demand, amounts of electrolyte, anodes and cathodes are estimated from literature
- Lithium fluoride: 0.0044; calculated
  lithium fluoride. Bayan Obo: energy demand, amounts of electrolyte, anodes and cathodes are estimated from literature
- particles (> PM10),particles (> PM10),particles (>PM10): 0.00037; calculated
  (same comment as for Electricity)
- Neodymium oxide: 1.13; calculated
  Neodymium oxide. Bayan Obo: energy demand, amounts of electrolyte, anodes and cathodes are estimated from literature
- tungsten: 0.0027; calculated
  (same comment as for Electricity)
- Graphite (anode and melting pot): 0.17; calculated
  Graphite (anode and melting pot). Bayan Obo: energy demand, amounts of electrolyte, anodes and cathodes are estimated from literature
- Fire proof bricks: 0.09; calculated
  Fire proof bricks. Bayan Obo: energy demand, amounts of electrolyte, anodes and cathodes are estimated from literature
- transport in t*km,transport in t*km: 0.19; software or database
  Bayan Obo: calculated by www.google.de/maps

## Outputs
- Waste (solid): 0.217; calculated
  Bayan Obo: melting pot, tungsten cathode, graphite anode
- carbon dioxide (fossil): 0.055; calculated
  原文未区分bio和fossil，根据专家判断此处为fossil
- carbon monoxide,carbon monoxide (fossil): 0.211; calculated
  原文未区分bio和fossil，根据专家判断此处为fossil
- HFC-116: 1.2e-5; calculated
  Bayan Obo: assumption: 10 % of the CF4 value were emitted as C2F6
- particles (> PM10),particles (> PM10),particles (>PM10): 0.052; calculated
  Bayan Obo
- FC-14: 0.00012
  Bayan Obo: based on PCF emissions of aluminum electrolysis
- hydrogen fluoride: 4e-5; calculated
  Bayan Obo: based on mass balance

## Deviations from the LCI method approaches
In this study, an allocation method based on the market prices of REOs28 is considered. To estimate uncertainties that refer to the allocation method, a mass-based allocation is undertaken as a sensitivity analysis

## Use advice
在使用钕和镨的稀土生产过程数据集制造NdFeB磁铁时，请注意，分配方法是基于稀土氧化物（REOs）的市场价格。对于关心方法学一致性的用户，考虑使用基于质量的分配进行敏感性分析，以估计分配方法对不确定性的影响。在解释数据时，需考虑这种分配方法及Nd和Pr被分离的特定最终溶剂提取步骤（SX5）。数据按功能单元定义，即每1公斤NdFeB磁铁。

## Review details
清单： 内部审查通过几个迭代步骤完成，涉及原始数据验证、原始数据记录、代表性、完整性、与 ISO 14040 和 14044 有关的建模的一致性。

## Data sources
- Marx, J., Schreiber, A., Zapp, P. & Walachowicz, F. Comparative Life Cycle Assessment of NdFeB Permanent Magnet Production from Different Rare Earth Deposits. ACS Sustainable Chem. Eng. 6, 5858–5867 (2018).
