# 水泥生产;水泥, 硅酸盐水泥

Dataset: ILCD process, Unit process, black box
Geography: CN
Reference year: 1998
Classification: Unit processes / Materials production / Other mineralic materials
Generated by: #REF!, ysqsophia@gmail.com
Owner: 天工LCI数据工作小组
Review: Dependent internal review by 天工LCI数据工作小组
Amounts: no units in this file; such an amount is in the reference unit of its flow, which a separate flow dataset defines
copyright: false
licenseType: Free of charge for all users and uses

## General comment
研究对象为硅酸盐水泥，原料采用石灰石、粘土及石膏，1吨水泥料耗：石灰石1.3t、粘土0.3t、石膏50kg，不考虑工业废渣的利用。

## Technical purpose
该数据集描述了硅酸盐水泥的生产过程，该水泥主要用于建筑行业。硅酸盐水泥是混凝土制作的基础成分，在建设基础设施（例如建筑物、桥梁和公路）中发挥着至关重要的作用。它在混凝土混合中作为粘合剂，通常包括骨料和水。这个工业过程对于生产满足各种建筑项目标准要求的混凝土至关重要。

## Model description
功能单位为1m^3标准混凝土所用水泥重量。1m^3标准混凝土配比为：270kg水泥、60kg飞灰、1850kg集料。研究范围：水泥制造。

## Reference product
- cement, common portland cement: 1000
  硅酸盐水泥

## Inputs
- limestone, crushed, for mill: 1300
  石灰石
- clay: 300
  粘土
- gypsum stone (CaSO4-dihydrate): 50
  石膏
- Electricity: 443.867
  电耗。水泥生产能耗数据来自文献，燃煤热值以5500kcal/kg计，固定碳以50%计。电力生产污染物数据是按我国发电能耗平均值0.424kg标煤／kWh，折合为热值24244kJ／kg燃煤计算。
- hard coal; 26.3 MJ/kg: 204.407
  煤耗（即原煤耗）。水泥生产能耗数据来自文献，燃煤热值以5500kcal/kg计，固定碳以50%计。

## Outputs
- carbon dioxide (fossil): 885.185
  CO2。燃煤CO2由固定碳计算而来原料CO2按碳酸钙Cao含量为50%计算得到。
- carbon monoxide (fossil): 0.0114815
  CO。由于缺乏来源，其它污染数据参考电厂燃煤按能耗换算得到。
- hydrocarbons (unspecified): 0.0274074
  CxHy。由于缺乏来源，其它污染数据参考电厂燃煤按能耗换算得到。
- Nitrogen oxides: 1.53333
  NOx。NOx、SO2量由建材行业平均排放因子计算。
- sulfur dioxide: 0.355556
  SO2。NOx、SO2量由建材行业平均排放因子计算。
- particles (> PM10): 40
  固体废物（即粉尘）。水泥生产固体废物以水泥产量4%计。未标明粒径，按PM>10处理。

## Use advice
在使用此数据集进行生命周期评估时，请注意，水泥生产过程中排除了工业废物的利用。在代表使用的原材料的真实性质和输入比例时应格外注意，尤其是生产1吨水泥需要1.3吨石灰石、0.3吨粘土和50公斤石膏。在进行生命周期评估计算时，应将功能单位设定为1立方米标准混凝土所用的水泥重量，要考虑到混凝土混合物包括270公斤水泥、60公斤飞灰和1850公斤骨料的配比。为了准确评估环境影响，用户应严格将研究范围限定在水泥制造，不包括下游使用阶段或潜在的回收利用。

## Review details
清单： 内部审查通过几个迭代步骤完成，涉及原始数据验证、原始数据记录、代表性、完整性、与 ISO 14040 和 14044 有关的建模的一致性。

## Data sources
- 刘顺妮. (2003). 水泥-混凝土体系环境影响评价及其应用研究 [博士, 武汉理工大学].
