# 牛肉生产 ; 肉牛生产

Dataset: ILCD process, Unit process, single operation
Geography: ZY-GS-CN
Reference year: 2009
Classification: Unit processes / Materials production / Food and renewable raw materials
Functional unit: 1kg of beef is a functional unit (FU), and the system boundaries of beef production include fertilizer production, feed crop (wheat, corn, soybean) cultivation, and beef cattle feeding stage.
Generated by: 杨瑞, 1632707028@qq.com
Owner: 天工LCI数据工作小组
Review: Dependent internal review by 天工LCI数据工作小组
Amounts: no units in this file; such an amount is in the reference unit of its flow, which a separate flow dataset defines
copyright: false
licenseType: Free of charge for all users and uses

## General comment
规模肉牛养殖场存栏量一般在 1000 头左右，架子牛体重一般为 350~400kg， 育肥期一般在三到四个月，出栏时体重在 500~550kg

## Geography
作者对甘肃省张掖市前进牧业石岗墩牧场调查得到出栏肉牛的出栏平均体 重为 500kg，每头肉牛平均每天饮水 20~30kg，取平均值 25kg，出肉率为体重的 48%左右。

## Technology and included processes
通过 LCA 评价这四种畜产品，从原材料生产到最终产品产 出全过程的各种资源消耗、产品投入、环境排放，在同一种评价模型中评价四种 畜产品，定性、定量地评估单位畜产品生产对某一环境影响类型的影响程度、以 及对环境综合影响，最终分别得到生产 1kg 牛肉、1kg 牛奶、1kg 猪肉、1kg 鸡 蛋对环境的影响指标，通过分析比较四种畜产品生产对环境的负荷，为我国畜牧 业养殖结构和畜产品生产结构调整提供建议。并且通过在张掖市前进牧业实地调 研，借鉴前进牧业合作社发展模式，探讨我国草地农业发展模式。

## Technical purpose
牛肉生产工业流程通常涉及大规模操作，平均养牛场规模约1000头牛。这些肉牛通常在架子系统上饲养，育肥期开始时体重大约为350至400公斤，育肥期持续三到四个月。到出售市场时，这些架子牛平均体重为500至550公斤。这种类型的牛肉生产通常用于商业性肉类分销，为当地和更大规模市场供应牛肉。

## Reference product
- beef: 1; measured
  牛肉

## Inputs
- water: 15.2; measured
- maize grain: 13.75; measured
  玉米
- wheat: 1.31; measured
  小麦
- soybean: 0.94; measured
  大豆

## Outputs
- manure: 18.25; measured
  粪便

## Use advice
在使用这份牛肉生产的生命周期评估（LCA）数据时，请考虑甘肃省张掖市石岗墩牧场先进肉牛生产的具体情境。功能单位定义为1千克牛肉，系统边界包括化肥生产、种植饲料作物（如小麦、玉米和大豆）以及肉牛喂养阶段。应该考虑每头牛的平均日水耗，以及预期的出肉率，具体为每天水消耗25千克和基于牛体重的48%出肉率。建议在生命周期影响评估中纳入这些细节，确保对指定牛肉生产过程的环境影响进行全面分析。

## Review details
清单： 内部审查通过几个迭代步骤完成，涉及原始数据验证、原始数据记录、代表性、完整性、与 ISO 14040 和 14044 有关的建模的一致性。

## Data sources
- 魏云. 基于生命周期评价的禽畜产品环境影响评价及对策探讨. (兰州大学, 2016).
