# Glass production ; laminated glass ; heating and pressurizing

Dataset: ILCD process, Unit process, single operation
Geography: SX-ZJ-CN
Reference year: 2004
Classification: Materials production / Glass and ceramics
Generated by: He xiaxia, 18616148319@163.com
Owner: Tiangong LCI Data Working Group
Review: Dependent internal review by Tiangong LCI Data Working Group
Amounts: no units in this file; such an amount is in the reference unit of its flow, which a separate flow dataset defines
copyright: false
licenseType: Free of charge for all users and uses

## Reference product
- Glass (formed & finished): 250000; measured

## Inputs
- electricity mix: 1488.96; measured
- Glass (formed & finished): 250160; measured
  Laminated glass rough products

## Outputs
- cullet float glass: 160; measured

## Review details
Inventory: The internal review was done by several iteration steps concerning raw data validation, raw data documentation, representativity, completeness and consistency of modelling with regard to ISO 14040 and 14044.

## Data sources
- 年产5600吨钢化玻璃及250吨夹层玻璃生产线建设项目环境影响报告
