# 湿蒸法棉布染整加工;印染棉布;冷堆

Dataset: ILCD process, Unit process, single operation
Geography: SZ-JS-CN
Reference year: 2012
Classification: Unit processes / Materials production / Organic chemicals
Generated by: 段颖凡, 1300925579@qq.com
Owner: 天工LCI数据工作小组
Review: Dependent internal review by 天工LCI数据工作小组
Amounts: no units in this file; such an amount is in the reference unit of its flow, which a separate flow dataset defines
copyright: false
licenseType: Free of charge for all users and uses

## General comment
冷堆是湿蒸法染整中的一个阶段，它是在染色完成后进行的一个处理步骤。是指将染色后的布料在低温条件下（相对于蒸汽定色时的高温）进行堆积或沉淀。这个过程旨在使染色效果更为牢固，提高颜色的稳定性。

## Geography
本研究选取江苏省某印染企业为重点调研对象，该企业位于长三角经济圈中的常熟。

## Technical purpose
所描述的棉布染整过程指的是纺织制造中使用的湿蒸法，特别是用于棉质织物的处理。这个过程通常用于提高棉布的颜色和整理特性，用于各种纺织产品。它主要用于生产服装、家用纺织品和装饰布料中的高质量印染棉料。

## Reference product
- Cotton Fabric: 167; measured

## Inputs
- Electricity: 82.9; measured
- Crude coal: 27.1; calculated
- Cleaned coal: 67.2; calculated
- Fuel Oil: 0.579; calculated
- heavy fuel oil: 0.174; calculated
- Diesel: 0.796; calculated
- Coke Oven Gas: 1.06; calculated
- natural gas: 0.0136; calculated
- Hydrogen peroxide: 50; measured
- Amylase: 83.3; measured
- Stabilizer: 54.2; measured
- river water: 5160; measured
- freshwater: 1.29; measured

## Outputs
- carbon dioxide (fossil): 28; calculated
- carbon monoxide (fossil): 0.0678; calculated
- sulfur dioxide: 0.0238; calculated
- methane (fossil): 3.53e-5; calculated
- Nitrogen oxides: 0.138; calculated
- nitrous oxide: 3.3e-5; measured
- particles (> PM10): 0.221; calculated
- ammonia: 1.27e-5; measured
- non-methane volatile organic compounds: 0.00144; measured
- waste water - untreated: 3830; measured
- chemical oxygen demand: 4.36; calculated
- Suspended solids, unspecified,Suspended solids, unspecified: 0.471; calculated
- lead: 2.13e-6; calculated
- mercury: 4.48e-8; calculated
- fluorine: 4.03e-7; calculated
- cadmium: 7.9e-8; calculated
- arsenic: 1.82e-6; calculated

## Use advice
在使用此数据集进行生命周期评估（LCA）时，必须考虑技术适用性，包括地区环境，因为数据特定于位于江苏省长三角经济区常熟的纺织企业。确保包括特有于湿蒸法的能源和水使用量以及相关的处理化学品。在适当的情况下，应计算染色和整理阶段之间的环境影响分配。应使用地区电力网格混合情况以准确评估能源相关影响。

## Review details
清单： 内部审查通过几个迭代步骤完成，涉及原始数据验证、原始数据记录、代表性、完整性、与 ISO 14040 和 14044 有关的建模的一致性。

## Data sources
- 朱亚楠. 棉布连续轧染工艺生命周期环境影响评价. (南京大学, 2012).
