# 水泥生产;水泥, 普通硅酸盐水泥, 42.5MPa;新型干法;混合固废

Dataset: ILCD process, Unit process, black box
Geography: CN
Reference year: 2004
Classification: Unit processes / Materials production / Other mineralic materials
Generated by: #REF!, ysqsophia@gmail.com
Owner: 天工LCI数据工作小组
Review: Dependent internal review by 天工LCI数据工作小组
Amounts: no units in this file; such an amount is in the reference unit of its flow, which a separate flow dataset defines
copyright: false
licenseType: Free of charge for all users and uses

## General comment
假设稳定碎石所用水泥为P·O 42.5硅酸盐水泥。水泥生产采用新型干法生产工序。原料采用石灰石、粘土及石膏等。生产过程的能源消耗包括各生产工序的电耗和煤耗。污染物则包括颗粒物、SO2、NOX、CO2等。

## Technical purpose
利用新型干法生产的P·O 42.5硅酸盐水泥旨在用于建筑材料行业中稳定碎石的应用。它适用于要求42.5 MPa抗压强度的高强度应用场合。水泥由石灰石、粘土、石膏组成，并结合了混合固体废物，展示了在工业过程中对环境的考虑。

## Model description
功能单元为1t P·O 42.5硅酸盐水泥。

## Reference product
- cement, ordinary portland cement, 42.5MPa: 1000
  P.O.42.5硅酸盐水泥

## Inputs
- limestone, crushed, for mill: 1073.7
  石灰石
- clay: 216.8
  粘土
- gypsum stone (CaSO4-dihydrate): 51.1
  石膏
- iron, powder: 28.5
  铁粉
- ash: 98
  粉煤灰
- blast furnace slag: 137.6
  矿渣
- Electricity: 350.64
  电耗
- hard coal; 26.3 MJ/kg: 116
  煤耗
- Diesel oil: 0.0002
  柴油。运输水泥原料假设采用5t自卸汽车，5t柴油车运输1km的耗油量为0.2L，运输距离假设1km。

## Outputs
- carbon dioxide (fossil): 781
  CO2
- Nitrogen oxides: 1.53
  NxO
- methane (fossil): 3.414
  CH4

## Use advice
在使用此数据集进行生命周期评估（LCA）时，需要包括每个生产步骤的能源消耗（电力和煤炭）。计算颗粒物、SO2、NOX和CO2等排放物。在利用混合固体废物时，确保输入和排放的适当分配。在LCA模型中准确反映特定的生产方法，即新型干法。数据集的功能单元是1吨P·O 42.5硅酸盐水泥。建模时，确保系统边界定义清晰，并考虑能源供应和废物管理实践的区域差异。

## Review details
清单： 内部审查通过几个迭代步骤完成，涉及原始数据验证、原始数据记录、代表性、完整性、与 ISO 14040 和 14044 有关的建模的一致性。

## Data sources
- 杜丽. (2012). 基于生命周期评价方法半刚性基层施工过程中温室气体排放分析研究 [硕士, 长安大学].
