# 熟料煅烧;熟料;普通回转窑, 湿法长窑

Dataset: ILCD process, Unit process, single operation
Geography: CN
Classification: Unit processes / Materials production / Inorganic chemicals
Generated by: #REF!, ysqsophia@gmail.com
Owner: 天工LCI数据工作小组
Review: Dependent internal review by 天工LCI数据工作小组
Amounts: no units in this file; such an amount is in the reference unit of its flow, which a separate flow dataset defines
copyright: false
licenseType: Free of charge for all users and uses

## General comment
以常见的普通回转窑为研究对象。

## Technical purpose
本数据集描述的普通回转窑煅烧工艺用于生产水泥熟料。该工业过程通常被水泥行业用于煅烧步骤，这是将原料转换成水泥熟料的关键环节。此类窑炉适用于大规模生产，并且已知可用于干法和湿法水泥制造过程。

## Model description
功能单元为1吨水泥熟料。研究范围：水泥煅烧。

## Reference product
- clinker: 1000
  熟料

## Inputs
- limestone, crushed, for mill: 1201.8
  石灰石
- clay: 267.8
  粘土
- iron, powder: 31
  铁粉
- hard coal; 26.3 MJ/kg: 241.7
  燃煤。能耗数据来自文献，燃煤热值以5500kcal/kg计，固定碳以50%计。
- Electricity: 210.096
  电。能耗数据来自文献。

## Outputs
- carbon dioxide (fossil): 954.73
  CO2。燃煤CO2由固定碳计算而来，原料CO2按碳酸钙Cao含量为50%计算得到。
- carbon monoxide (fossil): 9.75
  CO。CO排放按废气浓度算得。
- sulfur dioxide: 2.1647
  SO2。NOx、SO2量由建材行业平均排放因子计算。
- Nitrogen oxides: 3.278
  NOx。NOx、SO2量由建材行业平均排放因子计算。
- hydrocarbons (unspecified): 0.041
  CxHy。由于缺乏来源，其它污染数据参考电厂燃煤按能耗换算得到。

## Use advice
涵盖普通回转窑熟料生产工艺的数据集特定于水泥煅烧过程，并旨在用于生命周期评估（LCA）中的环境影响评定。用户应注意，这些数据反映了特定的技术配置，可能不适用于其他类型的窑炉或不同的操作设置。在使用这些数据时，用户应确保它与评估的技术和地理背景相匹配，并考虑可能适用的任何燃料组合、原材料组成或环境法规的变化。

## Review details
清单： 内部审查通过几个迭代步骤完成，涉及原始数据验证、原始数据记录、代表性、完整性、与 ISO 14040 和 14044 有关的建模的一致性。

## Data sources
- 刘顺妮. (2003). 水泥-混凝土体系环境影响评价及其应用研究 [博士, 武汉理工大学].
