# 探井地质设计 ; 维宁区块不同构造带;剖面精细化研究

Dataset: ILCD process, Unit process, single operation
Geography: BJ-CN
Reference year: 2009
Classification: Other Services / Engineering and consulting
LCI method principle: Attributional
LCI method approaches: Consequential
Generated by: 康诗康, 908798159@qq.com
Owner: 天工LCI数据工作小组
Review: Dependent internal review by 天工LCI数据工作小组
Amounts: no units in this file; such an amount is in the reference unit of its flow, which a separate flow dataset defines
copyright: false
licenseType: Free of charge for all users and uses

## General comment
针对维宁区块不同构造带压力系统差异，综合多项 资料开展三个压力剖面精细化研究，在此基础上，采用自上而下井身结构设计方法，对南阿雅什及维尼构造带的井身结构分别进行优化，旨在为该探区优快钻井提供技术保障。

## Geography
数据研制地点

## Time period
数据搜集时间

## Technology and included processes
综合岩石力学实验以及测井、油气 测试、MDT 地层压力测试、地层完整性试验等资料，考虑维宁区块不同构造带地层压力体系差异，分别建立了南阿雅什构造带以及维尼构造带精细三个压力剖面，据此进一步优化形成了适合不同构造带的探井井身结构及套管程序体系。

## Technical purpose
该数据集代表了维宁区块不同构造带油气勘探和钻井中使用的地质和工程方法。这包括使用岩石力学、测井和地层压力测试数据，特别针对南阿雅什和维尼构造带，采用自上而下的方法优化井身结构设计，实现高效准确钻达预定深度和地质目标。

## Reference product
- process steam from natural gas: 1898; input; log-normal; article inperiodical
  Ø340mm技套1898m,数据为分布，量中填写的数据为取平均（取中值）的结果

## Inputs
- process steam from natural gas: 0.96; log-normal; article inperiodical
  平均钻井生产时效,数据为分布，量中填写的数据为取平均（取中值）的结果

## Data selection and combination
基于测井等资料建立了维宁区块南阿雅什构造带以 及维尼构造带三个压力剖面，并经测试资料、MDT资料、地层 完整性测试资料等反复校核及验证，最终形成了维宁区块精 细三个压力剖面

## Data treatment and extrapolations
勘探区块地质认识总体较浅，井身结构设计应注重钻井成功率。为此，选用自上而下设计方法并结合套管强度校 核，使上部大尺寸套管尽量下深，以保证钻达目的层位，并有利于避免小井眼完钻

## Use advice
数据用户在应用数据集概述的井身结构设计时，应考虑不同构造区地层压力系统之间的差异。数据源自详细的岩石力学实验、测井和地层压力测试，应根据维宁区块特定地质条件来定制钻井参数和套管程序。使用时应涉及一个针对额外测试数据的验证过程，以确保模型的可靠性及其在实际钻井操作中的适用性。应特别注意设计以确保钻井成功率，并避免小井眼完井问题。

## Review details
清单： 内部审查通过几个迭代步骤完成，涉及原始数据验证、原始数据记录、代表性、完整性、与 ISO 14040 和 14044 有关的建模的一致性。

## Data sources
- 沈海超;张华卫;刘畅;曲洪娜; 亚北极海域萨哈林维宁区块探井井身结构优化研究. 钻采工艺 96–98 (2016).
