# 水泥生产;水泥, 普通硅酸盐水泥

Dataset: ILCD process, Partly terminated system
Geography: CN
Classification: Materials production / Other mineralic materials
LCI method principle: Other
Generated by: 杨思琪, ysqsophia@gmail.com
Owner: 天工LCI数据工作小组
Review: Dependent internal review by 天工LCI数据工作小组
Amounts: no units in this file; such an amount is in the reference unit of its flow, which a separate flow dataset defines
copyright: false
licenseType: Free of charge for all users and uses

## General comment
选择硅酸盐系列水泥为研究对象，计算生产水泥过程的碳排放。

## Technical purpose
该工艺生产的普通硅酸盐水泥用于一般建筑目的，包括基础设施、建筑物以及作为混凝土、砂浆和灌浆料的基本成分。适用于需要高强度的众多建筑应用。

## Model description
选择硅酸盐系列水泥为研究对象，工业废弃物不作资源消耗计算，主要考查从原材料的开采、生料的制备、熟料的烧成、粉磨、均化、包装和运输等过程所产生的直接碳排放和能源消耗。假定与水泥生产有关的所有原材料均用载重为5t的柴油汽车运输，且平均运输距离为100km，其他相关影响不考虑。

## Reference product
- cement, ordinary portland cement: 1000
  普通硅酸盐水泥

## Inputs
- limestone, crushed, for mill: 1300
  石灰石
- clay: 300
  粘土
- iron ore: 30
  铁矿石
- gypsum stone (CaSO4-dihydrate): 50
  石膏
- electricity, medium voltage: 435.237
  电耗
- hard coal: 100.831
  原文是热耗（即煤耗）。原始数据为2745.617MJ热耗，这里换算为硬煤，换算公式为1kg硬煤=27.23MJ热耗。
- diesel: 46.6099
  柴油汽车运输能耗。假定与水泥生产有关的所有原材料均用载重为5t的柴油汽车运输，且平均运输距离为100km，其他相关影响不考虑。

## Outputs
- carbon dioxide: 870.306
  CO2

## Data selection and combination
来自水泥生产企业统计数据。

## Use advice
使用此LCA数据集时，请确保评估的范围仅包括水泥生产过程的直接碳排放。不要计算原材料运输或其他间接活动的碳排放。工业废弃物不计入资源消耗计算。如果数据集用于评估除上述之外的影响，请谨慎使用，因为数据集未考虑运输和额外的环境影响。

## Review details
清单： 内部审查通过几个迭代步骤完成，涉及原始数据验证、原始数据记录、代表性、完整性、与 ISO 14040 和 14044 有关的建模的一致性。

## Data sources
- 陈乔. (2014). 建筑工程建设过程碳排放计算方法研究 [硕士, 长安大学].
