# 炼铁;铁水;高炉炼铁（D01）

Dataset: ILCD process, Unit process, single operation
Geography: CN
Reference year: 1998
Classification: Materials production / Metals and semimetals
Generated by: 付翔, 1162850692@qq.com
Owner: 天工LCI数据工作小组
Review: Dependent internal review by 天工LCI数据工作小组
Amounts: no units in this file; such an amount is in the reference unit of its flow, which a separate flow dataset defines
copyright: false
licenseType: Free of charge for all users and uses

## General comment
来自表 4-17 D01 钢厂生产吨材环境负荷编目表

## Time period
论文提到钢铁企业环境总体数据为1998年的吨钢环境基础数据。

## Technical purpose
来自高炉D01工艺生产的铁水主要用于制钢。它是制造钢材的必要中间产品，并且是各个钢铁行业领域的重要投入。

## Reference product
- Molten Iron: 1065; measured
  铁水

## Inputs
All rows: measured
- Energy, geothermal, converted: 14698.6
- water: 54474
- Sinter: 1751
  烧结矿
- Metallurgical ash: 173
  冶金白灰
- coke,Coke: 489
  焦炭

## Outputs
All rows: measured
- Dust (unspecified, from stack): 7.891
- Hydrocarbons, aliphatic, alkanes, unspecified: 0.002154
  石油类
- Suspended solids, unspecified: 0.513255
- chemical oxygen demand: 0.213927
- Dust (unspecified, from stack): 55.833
  集尘
- Spoil (deposited, hibernating in ground, non elementary flow): 582.502

## Use advice
使用高炉D01炼铁过程的数据集时，必须确保该数据对应于1998年生产的钢材，如表4-17 D01钢厂生产吨材环境负荷编目所提供。应注意自1998年以来钢铁行业技术变革可能对数据相关性的影响。当年的吨钢环境基线数据应用于比较目的，并且应考虑过程中任何随后的改进或变化。

## Review details
清单： 内部审查通过几个迭代步骤完成，涉及原始数据验证、原始数据记录、代表性、完整性、与 ISO 14040 和 14044 有关的建模的一致性。

## Data sources
- 周和敏. 钢铁材料生产过程环境协调性评价研究. (北京工业大学, 2001).
