# 稀土浸出及无机预选;稀土;原位浸出;钕铁硼（NdFeB）磁铁

Dataset: ILCD process, Unit process, single operation
Geography: NMG-CN
Reference year: 2014
Classification: Materials production / Inorganic chemicals
Functional unit: The functional unit is a 1 kg NdFeB magnet
LCI method principle: Attributional
LCI method approaches: Allocation - market value; Allocation - mass
Generated by: 汪涛, twang@iue.ac.cn
Owner: 天工LCI数据工作小组
Review: Dependent internal review by 天工LCI数据工作小组
Amounts: no units in this file; such an amount is in the reference unit of its flow, which a separate flow dataset defines
copyright: false
licenseType: Free of charge for all users and uses

## General comment
该数据集描述了在中国白云鄂博矿进行的稀土元素浸出和无机预选工艺流程，特别是针对钕铁硼（NdFeB）磁铁的生产。该过程涉及稀土原位浸出，随后通过溶剂萃取分离钕（Nd）和镨（Pr）。钕铁硼磁铁是包括电动车、风力涡轮机和电子设备在内的各类高科技产品中的关键组件，因为它们具有强大的磁性能。

## Geography
Bayan Obo (China)

## Technology and included processes
所有三个矿床生产 Nd 和 Pr 的基本过程都是相同的。 Nd 和 Pr 是相同的，除了最后的溶剂萃取步骤 (SX5)，其中两者被分离。

## Reference product
- RE chloride solution: 115; article inperiodical
  RE chloride solution. Bayan Obo: input for next process: Solvent extraction

## Inputs
- sulphuric acid: 7.58; article inperiodical
  Bayan Obo: based on annual demand
- hydrogen chloride: 6.32; calculated
  Bayan Obo: own calculation based on Xu
- Ammonium bicarbonate: 7.3; calculated
  Ammonium bicarbonate. Bayan Obo: calculated amount for a pH value adjustment to 4
- hydrated lime dry slaked: 4.92; calculated
  Bayan Obo: used for precipitation, calculation based on Xu
- Electricity: 0.9756; calculated
  Bayan Obo: used for treatment of wastewater filtrate precipitation, stoichiometric calculation based on wastewater concentration
- Water: 256.4; calculated
  Bayan Obo: estimation based on energy demand of solvent extraction
- transport in t*km,transport in t*km: 0.56; calculated
  Bayan Obo: own calculation, based on Xu and mass and humidity of REE carbonate for the leaching processes and on solubility of NH4HCO3 for precipitation

## Outputs
- Sludge: 6.97; article inperiodical
  Bayan Obo: Ecoinvent process (RER: aluminium hydroxide factory) adapted to lifetime and throughput
- waste water - treated: 153; calculated
  Bayan Obo: own calculation based on Xu
- ammonium: 6.12; calculated
  Bayan Obo: own calculation based on Xu
- sulfate: 1.15; calculated
  Bayan Obo: own calculation based on Xu
- carbon dioxide: 1.179; article inperiodical
  Bayan Obo: emitted during HCl leaching, stoichiometric calculation

## Deviations from the LCI method approaches
In this study, an allocation method based on the market prices of REOs28 is considered. To estimate uncertainties that refer to the allocation method, a mass-based allocation is undertaken as a sensitivity analysis

## Use advice
用户应将数据专门用于钕铁硼磁铁的生命周期评价（LCA）。所描述的基本过程适用于获取Nd和Pr的所有三个矿床，并且只在最后的溶剂萃取(SX5)步骤上有所不同。在本研究中，考虑了基于稀土氧化物（REOs）市场价格的分配方法。灵敏度分析应包括基于质量的分配，以确定市场价格分配方法的稳健性。分析的功能单元被定义为1千克的钕铁硼磁铁。

## Review details
清单： 内部审查通过几个迭代步骤完成，涉及原始数据验证、原始数据记录、代表性、完整性、与 ISO 14040 和 14044 有关的建模的一致性。

## Data sources
- Marx, J., Schreiber, A., Zapp, P. & Walachowicz, F. Comparative Life Cycle Assessment of NdFeB Permanent Magnet Production from Different Rare Earth Deposits. ACS Sustainable Chem. Eng. 6, 5858–5867 (2018).
