# 土壤原位修复;土壤生物通风;到场的设备和材料

Dataset: ILCD process, Unit process, single operation
Geography: CA
Reference year: 2007
Classification: Unit processes / Other Services / Repair and maintenance
Generated by: 王宁, wang_ning@caep.org.cn
Owner: 天工LCI数据工作小组
Review: Dependent internal review by 天工LCI数据工作小组
Amounts: no units in this file; such an amount is in the reference unit of its flow, which a separate flow dataset defines
copyright: false
licenseType: Free of charge for all users and uses

## General comment
将所需材料运输至现场

## Geography
The contaminated area was located 600 m from a river shore in the northern part of the prov-ince of Quebec， Canada.

## Technology and included processes
消耗柴油汽油将设备与材料运输到项目现场

## Technical purpose
该土壤修复工艺，即土壤生物通风法，旨在对邻近敏感生态系统（例如河岸）的污染场地进行净化。所述设备和材料仅用于原位处理，即在不将土壤从现场移走的情况下进行处理。它特别适用于加拿大魁北克省北部的位置描述等场所，那里的污染区域需要特定场所的修复，并且不会因迁移材料而造成干扰。

## Reference product
- Equipment and Materials Arriving on Site: 1; estimated
  到达现场的材料和设备

## Inputs
- Diesel: 0.5; estimated
  将所需材料和设备运至现场所需要的柴油

## Use advice
在使用此生命周期评估数据集时，用户必须考虑到土壤修复项目的地点特定性质。数据是为接近水体的污染区域和已定义的现场运输距离量身定制的。必须关注与运输相关的能源消耗，此处假设为柴油汽油，并注意材料使用的效率。如果条件在距离、运输类型或环境敏感性方面有显著不同，用户应相应调整数据。在没有为不同情景进行适当调整的情况下，不应将此数据普遍化。

## Review details
清单： 内部审查通过几个迭代步骤完成，涉及原始数据验证、原始数据记录、代表性、完整性、与 ISO 14040 和 14044 有关的建模的一致性。

## Data sources
- Cadotte, M., Deschênes, L. & Samson, R. Selection of a remediation scenario for a diesel-contaminated site using LCA. Int J Life Cycle Assess 12, 239–251 (2007).
