# 生料制备;生料, 硅酸盐水泥生料;新型干法, ≥4000 t/d

Dataset: ILCD process, Unit process, single operation
Geography: CN
Reference year: 2019
Classification: Materials production / Other mineralic materials
Generated by: 杨思琪, ysqsophia@gmail.com
Owner: 天工LCI数据工作小组
Review: Dependent internal review by 天工LCI数据工作小组
Amounts: no units in this file; such an amount is in the reference unit of its flow, which a separate flow dataset defines
copyright: false
licenseType: Free of charge for all users and uses

## General comment
新型干法制备水泥生料。

## Technical purpose
此数据集涉及生料制备过程，具体为使用新型干法生产硅酸盐水泥生料，产能在每天等于或超过4000吨。描述的过程对于生产硅酸盐水泥熟料至关重要，是生产硅酸盐水泥的关键中间环节。这一工业过程通常适用于大规模水泥生产设施。

## Model description
LCA 系统边界为生料制备单元过程。

## Reference product
- raw meal: 1000
  普通硅酸盐水泥生料

## Inputs
- iron, powder: 32.5
  铁粉。上游数据来源：CLCD-China-ECER 0.8.1。
- electricity, medium voltage: 79.2
  电力。上游数据来源：CLCD-China-ECER 0.8.1。
- limestone, crushed, for mill: 824.8
  石灰石。上游数据来源：CLCD-China-ECER 0.8.1。
- clay: 142.7
  粘土。上游数据来源：CLCD-China-ECER 0.8.1。

## Outputs
- Clean gas: 857
  废气[排放到大气]
- particles (> PM10): 0.059
  总颗粒物[排放到大气]，未标明粒径，按PM>10处理。

## Deviations from the LCI method approaches
采用亿科环境 eFootprint 软件系统，结合 CLCD 质量评估方法建立了水泥生料生命周期模型，并计算得到 LCA 结果。

## Data selection and combination
生料制备阶段涉及的各原材料的清单数据均由背景数据库提供。

## Use advice
在使用此数据集进行水泥生料制备生命周期评估（LCA）时，请注意，数据集基于国际标准ISO140系列推荐的剪切标准。用户应在其LCA模型中包含构成总原材料重量超过1%的所有主要原材料和构成总重量超过0.1%的任何高纯度物质。忽略的材料总质量不应超过总原料投入量的5%。任何对LCA结果贡献微不足道的环境排放数据可能被省略。还应考虑从LCA模型中排除用作原材料的低价值废料的上游数据，如尾矿。

## Review details
清单： 内部审查通过几个迭代步骤完成，涉及原始数据验证、原始数据记录、代表性、完整性、与 ISO 14040 和 14044 有关的建模的一致性。

## Data sources
- 李畅. (2020). 江西省某铜尾矿资源化过程生命周期评价研究 [硕士, 江西理工大学].
