# 传统湿法回收废旧动力电池生产镍钴锰酸锂

Dataset: ILCD process, Unit process, single operation
Geography: CN
Reference year: 2015
Classification: Unit processes / End-of-life treatment / Material recycling
Functional unit: 1 000 kg of lithium nickel cobalt manganese oxide (ternary material) as a functional unit.
Generated by: 胡志康, hzk2503593129@163.com
Owner: 天工LCI数据工作小组
Review: Dependent internal review by 天工LCI数据工作小组
Amounts: no units in this file; such an amount is in the reference unit of its flow, which a separate flow dataset defines
copyright: false
licenseType: Free of charge for all users and uses

## General comment
该方法包括预处理、碱洗、浸出、除杂、沉淀、烧结工序。

## Technical purpose
该工业过程用于回收废旧动力电池中的有价值材料，生产镍钴锰酸锂（LNCMO），这是制造新锂离子电池的关键组分，特别是用于电动汽车和便携式电子设备的电池。

## Reference product
- Ternary cathode material: 1000; measured
  镍钴锰酸锂（三元材料）

## Inputs
All rows: measured
- Battery: 3330
  废旧动力电池
- Sulfuric acid(98%): 3660
  H2SO4（98%）
- Hydrochloric acid (30%): 133.08
  盐酸（30%）
- sodium hydroxide: 7260
  氢氧化钠（30%）
- Sodium carbonate: 69.86
  碳酸钠
- Ammonia (28%): 373.35
  氨水（28%）
- 2-ethylhexyl hydrogen -2-ethylhexylphosphonate: 6.66
  P507 萃取剂
- Kerosene: 16.27
  煤油
- Hydrogen peroxide: 1220
  双氧水
- freshwater: 46580
  工业用水
- Lithium carbonate: 402.51
  碳酸锂
- Electricity: 27924
  电能
- natural gas,natural gas: 465.79
  天然气

## Outputs
All rows: measured
- Water,Water: 33270
  废水
- Ammonia Nitrogen: 0.19962
  氨氮
- nickel: 0.013308
  镍
- carbon dioxide (fossil): 224
  二氧化碳（原文未区分bio和fossil，根据专家判断此处为fossil）
- Other Solid Waste: 1170
  残渣和灰烬
- Plastic (unspecified),Plastic (unspecified): 133.08
  塑料 PP
- copper: 332.7
  铜
- iron: 598.86
  钢铁

## Data selection and combination
数据来源于实地调研和作者计算。

## Use advice
使用此数据集时，确保生命周期评估准确反映回收过程的具体条件，包括预处理、碱洗、浸出、除杂、沉淀和烧结阶段相关的任何排放和能耗。此外，在建模系统边界时，包括动力电池的使用终端阶段，并考虑用回收的镍钴锰酸锂（LNCMO）替代原材料所带来的潜在环境益处。

## Review details
清单： 内部审查通过几个迭代步骤完成，涉及原始数据验证、原始数据记录、代表性、完整性、与 ISO 14040 和 14044 有关的建模的一致性。

## Data sources
- 谢英豪, 余海军, 欧彦楠, & 李长东. 废旧动力电池回收的环境影响评价研究. 无机盐工业 47, 43-46+61 (2015).
