# 锂电池回收传统湿法冶金工艺（工艺 D）

Dataset: ILCD process, Unit process, single operation
Geography: CN
Reference year: 2013
Valid until: 2017
Classification: Unit processes / End-of-life treatment / Material recycling
Functional unit: FU is a typical type of LIB electrode material of 100 kg
Generated by: 马清源, m1120498928@163.com
Owner: 天工LCI数据工作小组
Review: Dependent internal review by 天工LCI数据工作小组
Amounts: no units in this file; such an amount is in the reference unit of its flow, which a separate flow dataset defines
copyright: false
licenseType: Free of charge for all users and uses

## General comment
采用强酸加还原剂对废旧电极材料进行浸出， 特点是价格低，但强酸对于电极中的各种金属浸出没有选择性，随后的分离过程 较为困难，产物纯度较低，造成了一部分有价资源浪费。

## Time period
数据来源于2013-2017

## Technical purpose
该湿法冶金工艺（工艺D）通过使用强无机酸和还原剂浸出锂离子电池（LIB）废旧电极材料。尽管该工艺经济性较高，但在从电极浸出金属时缺乏选择性，导致后续分离阶段挑战性大，最终产品的纯度较低。该数据集描述了此工艺在回收和资源再生行业中的应用，特别是应用于锂离子电池电极材料的回收。因此，工艺D可以作为商业或设施感兴趣的成本效益高但效率不是很高的资源回收方案。

## Reference product
- Electrolyte: 100; input; missing unimportant
  电极浆料

## Inputs
All rows: missing unimportant
- Sulfuric acid: 78.2
- Hydrogen peroxide（25%）: 16
- sodium hydroxide: 5
- water,water: 420
- natural gas,natural gas: 0.00711739
  天然气：8500 kCal
- Electricity: 68.04

## Outputs
All rows: missing unimportant
- Lithium carbonate: 12.5
- Graphite: 17
  石墨粉
- Al/Cu foil: 2.4
- Nickel salt: 14
  镍盐、金属
- Cobalt salt: 17.5
  钴盐、金属
- Manganese salt: 13
  锰盐、金属
- Ternary precursor: 5.3
- sodium sulfate: 57
- Sulfuric acid: 12
- Slags: 3
- carbon dioxide (fossil): 6
  原文未区分bio和fossil，根据专家判断此处为fossil
- sulfur dioxide: 3
- waste water - treated: 400

## Data selection and combination
工艺的投入产出来自文献综述所报道数据的平均结果，体现了“坟墓”到 “摇篮” 的代表性过程。本研究不考虑塑料及金属外壳的回收或处理，人工成本、 工厂建设费用及其对环境的影响亦不包括在此分析中。

## Data treatment and extrapolations
值得注意的是，欧盟的数据并非针对于某个行业的计算，部分进出口数据和回收信息不适合中国的 情况。因此，改进后的 CRMs 评价方法还结合了中国官方数据、文献报道和来自 贸易/行业协会等其它利益集团数据，对主要的 LIB 制造商、回收公司、中国的官方管理机构等利益相关方的数据进行了最佳估计。在数据的时效性方面，CRMs 评估中使用的数据的参考期是基于最近的 4 年平均值（即 2013 年-2016 年）。

## Use advice
工艺D的数据集应在生命周期评估（LCA）中谨慎考虑其局限性而使用。用户需要了解，该过程数据来源于2013年至2017年报告文献数据平均值，可能未包括某些环境影响、劳动力成本和基础设施费用。本研究排除了塑料和金属外壳的回收或处理。此外，数据有地区特异性；它适应于中国情况，可能无法准确反映其他地理环境。数据不应在非其预定行业或地区以外的地方直接使用，未对当地情况进行适当调整不应用。参考数据的基线时段是2013年至2016年的4年平均值，在未来应用中可能需要更新以保证准确性。

## Review details
清单： 内部审查通过几个迭代步骤完成，涉及原始数据验证、原始数据记录、代表性、完整性、与 ISO 14040 和 14044 有关的建模的一致性。

## Data sources
- 宋佳丽. 面向能源金属高效回收的资源关键性评价模型与应用. (天津大学, 2019).
