# 电力生产 ; 火电 ; 上海

Dataset: ILCD process, Unit process, single operation
Geography: SH-CN
Reference year: 2019
Classification: Unit processes / Energy carriers and technologies / Electricity
Generated by: 熊若熙, xiongrx0126@163.com
Owner: 天工LCI数据工作小组
Review: Dependent internal review by 天工LCI数据工作小组
Amounts: no units in this file; such an amount is in the reference unit of its flow, which a separate flow dataset defines
copyright: false
licenseType: Free of charge for all users and uses

## General comment
火电发电包括原煤、洗煤、石油、天然气等十七种化石燃料。该过程只考虑直接发电过程，不考虑上游原材料开采加工和下游消费

## Time period
根据2019年能源统计年鉴数据计算

## Technical purpose
此工业过程描述了上海使用热电方法直接发电的情况，包括原煤、洗煤、石油和天然气等多种化石燃料的燃烧。数据集专门代表了发电厂用于电网供电的电力生产，而不考虑上游燃料提取/处理和终端用户的下游电力消费。

## Reference product
- electricity for thermal power: 3.6; calculated

## Inputs
All rows: calculated
- Raw coal: 0.338049
- Other Washed Coal: 0.00424364
- Coke oven gas: 0.001383
- blast furnace gas: 0.104889
- Converter gas: 0.009812
- Diesel: 2.484e-5
- fuel oil, unspecified: 2.69e-6
- Petroleum Coke: 1.701e-5
- refinery gas: 8.369e-5
- natural gas: 0.024948
- Natural gas, liquefied: 1.029e-5

## Outputs
- carbon dioxide (fossil): 0.768782; calculated
- sulfur dioxide: 0.000122021; calculated
- Nitrogen oxides: 0.000193985; calculated
- particles (> PM10): 2.69371e-5; calculated

## Data treatment and extrapolations
核算方法参考《企业温室气体排放核算方法与报告指南 发电设施》。不同形式发电量及燃料用量来自于《中国能源统计年鉴 2020》中的第三章（能源生产） 和第六章（地区能源平衡表）。用于计算二氧化碳排放因子的低位发热量、单位热值含碳量等燃料参数来自于《2019 年度中国区域电网二氧化碳基准线排放因子 OM 计算说明》、《企业温室气体排放核算方法与报告指南 发电设施》

## Use advice
该LCA数据集的用户应注意，数据基于2019年能源统计年鉴计算，并特定于上海的热电发电设施。数据仅涵盖了发电过程的直接排放，未计算上游和下游排放。因此，用户在应用此数据时应确保排除上游和下游过程，以避免重复计算。另外，在使用这些数据于其他地点时，应考虑区域差异性。应遵循《企业温室气体排放核算方法与报告指南 发电设施》中的指南进行温室气体排放核算。

## Review details
清单： 内部审查通过几个迭代步骤完成，涉及原始数据验证、原始数据记录、代表性、完整性、与 ISO 14040 和 14044 有关的建模的一致性。

## Data sources
- 熊若熙. 中国电力生产和消费二氧化碳与污染物排放因子核算. (清华大学, 2023).
