# 熟料煅烧;熟料, 硅酸盐水泥熟料, 52.5MPa;新型干法

Dataset: ILCD process, Unit process, black box
Geography: CN
Reference year: 2011
Classification: Unit processes / Materials production / Other mineralic materials
Generated by: #REF!, ysqsophia@gmail.com
Owner: 天工LCI数据工作小组
Review: Dependent internal review by 天工LCI数据工作小组
Amounts: no units in this file; such an amount is in the reference unit of its flow, which a separate flow dataset defines
copyright: false
licenseType: Free of charge for all users and uses

## General comment
新型干法生产硅酸盐水泥熟料。2011年，新型干法水泥的比例已占到全国总量的89.0%，还处于上升期，所以基本可以代表全国的水平。

## Technical purpose
该数据集代表了使用新型干法技术生产的硅酸盐水泥熟料。硅酸盐水泥熟料是生产硅酸盐水泥的关键成分，可用于建筑行业。具体适用于强度等级为52.5MPa的熟料，这表示高品质水泥，通常用于需要高结构完整性水平的工程。鉴于这种工艺在中国的主导地位，可以假定它反映了中国高强度水泥应用的国家生产标准。

## Model description
研究只针对通用水泥，选取国内采用新型干法工艺生产1kg强度等级为52.5MPa的水泥熟料（假设全国的平均水平为52.5Mpa）作为功能单位。另外在建立生命周期模型时，还考虑了原料的运输过程。

## Reference product
- clinker, portland cement clinker, 52.5MPa: 1000
  熟料52.5MPa

## Inputs
- hard coal; 26.3 MJ/kg: 156.8
  原煤。其中基准方案的产品投入数据以清洁生产指标体系的III级基准值为基础。
- Electricity: 230.4
  电力。其中基准方案的产品投入数据以清洁生产指标体系的III级基准值为基础。
- limestone, crushed, for mill: 1328
  石灰石。其中基准方案的产品投入数据以清洁生产指标体系的III级基准值为基础。
- tap water: 750
  工业用自来水。其中基准方案的产品投入数据以清洁生产指标体系的III级基准值为基础。
- transport in t*km: 0.0141
  公路运输。其中基准方案的产品投入数据以清洁生产指标体系的III级基准值为基础。
- iron ore: 184.5
  铁矿石。其中基准方案的产品投入数据以清洁生产指标体系的III级基准值为基础。
- clay: 180.9
  粘土。其中基准方案的产品投入数据以清洁生产指标体系的III级基准值为基础。

## Outputs
- carbon dioxide (fossil): 832
  二氧化碳。环境排放主要以排污系数手册、文献调查数据为主。
- Nitrogen oxides: 1.67
  氮氧化物。环境排放主要以排污系数手册、文献调查数据为主。
- sulfur dioxide: 0.21
  二氧化硫。环境排放主要以排污系数手册、文献调查数据为主。

## Data selection and combination
调查国内水泥生产的相关文献，结合水泥行业清洁生产评价指标体系，以及排污系数手册，得到熟料生产、水泥研磨过程的清单数据。

## Use advice
本LCA数据集的用户应注意，信息特定于使用新型干法技术生产1kg强度等级为52.5MPa的硅酸盐水泥熟料。数据可被视为代表2011年中国该过程的全国平均水平。在硅酸盐水泥熟料类型具体被使用的建筑材料的生命周期评估中，请使用此数据集。在生命周期分析中，应注意考虑原材料的运输，并认识到数据集没有覆盖完整的生命周期数据，而是专注于与ECER政策目标相关的清单指标。用户应根据其特定评估的需要，用其他生命周期阶段的具体数据补充本数据集。

## Review details
清单： 内部审查通过几个迭代步骤完成，涉及原始数据验证、原始数据记录、代表性、完整性、与 ISO 14040 和 14044 有关的建模的一致性。

## Data sources
- 何晓雪, 张璐, & 王洪涛. (2014). 基于生命周期节能减排评价方法的水泥行业清洁生产评价指标权重的计算. 化学工程与装备, 4, 208–211.
