# 稀土元素选矿;稀土元素;基线;含稀土元素矿石

Dataset: ILCD process, Unit process, single operation
Geography: NMG-CN
Reference year: 2012
Classification: Unit processes / Materials production / Non-energetic raw materials
Functional unit: Not Mentationed
LCI method principle: Attributional
LCI method approaches: Allocation - market value
Generated by: 汪涛, twang@iue.ac.cn
Owner: 天工LCI数据工作小组
Review: Dependent internal review by 天工LCI数据工作小组
Amounts: no units in this file; such an amount is in the reference unit of its flow, which a separate flow dataset defines
copyright: false
licenseType: Free of charge for all users and uses

## General comment
所述稀土元素（REE）选矿过程旨在从矿石中提取和生产REE。REE是各种高科技和清洁能源应用中不可缺少的组成部分。稀土元素在制造永磁体（如钕铁硼磁体）、电动和混合动力车辆可充电电池、先进陶瓷、电子产品及其他各种高科技应用中至关重要。

## Technology and included processes
使用传统的露天采矿技术（例如钻孔和爆破）从露天矿中回收矿石。该矿蕴藏矿石 7.5 亿吨，稀土品位 4.1%

## Reference product
- Rare Earth Oxides: 1; software or database
  REO

## Inputs
All rows: software or database
- Sodium carbonate: 0.09
  Soda ash
- transport in t*km,transport in t*km: 0.021
  transport, lorry >16t, fleet average
- transport in t*km,transport in t*km: 0.378
  transport, freight, rail
- Sodium silicate: 0.09
- Fatty acid: 0.03
  fatty acids
- heavy fuel oil: 0.97
- process steam: 2.7
- Electricity: 1.2168
- transport in t*km,transport in t*km: 0.15
  transport, coal freight, rail
- Raw ore: 30

## Outputs
All rows: software or database
- Iron ore: 12.5
- water: 0.0275
- unspecified: 1
  Industrial area, built up
- waste heat: 1.22
- uranium-234: 0.022
  air_low population density
- thorium-232: 1
  water unspecified

## Deviations from the LCI method approaches
In this section, we discuss the life cycle inventory (LCI) in detail. Each subsection discusses one process of the LCA. Section 3.1 describes the conventional method of rare earths in China from mineral sources. Section 3.2 describes the production process used to transform neodymium oxide into an NdFeB magnet. Finally, section 3.3 describes two alternative recycling processes that could be used. Detailed information on the LCI, assumptions, and allocation choices can be found in the Supporting Information.

## Use advice
该LCA数据集的用户应特别关注支持信息中提供的方法学假设和分配选择，并确保它们与特定研究的目标和范围相兼容。考虑REE选矿过程的技术适用性与REE预期用途的关系非常重要。用户应注意到钻孔和爆破等传统采矿技术相关的环境影响，并在他们的评估中包括这些影响。此外，在考虑稀土元素的回收替代方案时，用户应计入潜在的环境效益或负担的变化。

## Review details
清单： 内部审查通过几个迭代步骤完成，涉及原始数据验证、原始数据记录、代表性、完整性、与 ISO 14040 和 14044 有关的建模的一致性。

## Data sources
- Sprecher, B. et al. Life Cycle Inventory of the Production of Rare Earths and the Subsequent Production of NdFeB Rare Earth Permanent Magnets. Environ. Sci. Technol. 48, 3951–3958 (2014).
