# 西北（杨凌）小麦-玉米生产 ;小麦种植

Dataset: ILCD process, Unit process, single operation
Geography: XY-SAX-CN
Reference year: 2013
Valid until: 2013
Classification: Unit processes / Materials production / Agricultural production means
Functional unit: 1t
LCI method principle: Attributional
LCI method approaches: Consequential
Generated by: Haoran Zhang, hrzhang@whu.edu.cn
Owner: 天工LCI数据工作小组
Review: Dependent internal review by 天工LCI数据工作小组
Amounts: no units in this file; such an amount is in the reference unit of its flow, which a separate flow dataset defines
copyright: false
licenseType: Free of charge for all users and uses

## General comment
冬小 麦-夏玉米轮作系统生命周期主要包括原材料开采与 运输、农资的生产与运输以及农作物种植三个阶段， 包括煤、石油、天然气、电力等原材料的开采和生产， 土地资源的利用，化肥、农药等农资生产相关的能耗 和污染物排放，包括 CO2、NH3、SO2、CH4、N2O 和 CO 等[11]。与该系统相关的厂房设备、建筑设施、运输工 具的生产和原材料的运输等环节对环境的影响则不 予考虑。

## Geography
杨凌

## Technology and included processes
研究冬小麦-夏玉米轮作体系从原材料开 采加工、运输到农资生产，再到作物种植过程的资源 利用与环境排放是为冬小麦-夏玉米轮作体系全程的 生产和环境管理提供决策依据。农产品生命周期评价 从矿石和能源开采开始，终止于农作物种植输出，包 括农产品和污染物的输出两部分，土地资源是一切生 产活动的基础，直接进入农作系统。本研究以分别生 产农作物 1 t 为评价的功能单元

## Technical purpose
本数据描述了中国西北杨凌地区冬小麦-夏玉米轮作系统的生命周期。该农业过程专门用于培养冬小麦，随后是夏玉米，这是该地区常见的作物轮作方式。该做法有助于土壤肥力管理，并帮助提供该地区的粮食主食。过程包括原材料的开采和运输、农业投入品如化肥和农药的生产和运输，以及最终在土地上种植这些作物。

## Reference product
- wheat: 1000; measured

## Inputs
- arable: 2008.62; measured
- water: 922.81; measured
- Electricity: 35736.6; measured
- Corn Seeds: 39.4; measured

## Outputs
All rows: measured
- carbon monoxide (fossil): 0.46929
- Nitrogen oxides: 3.1848
- sulfide: 2.50289
- carbon dioxide (fossil),carbon dioxide (fossil): 1021.03
- methane (biogenic),methane (biogenic): 0.0351
- nitrous oxide: 0.48018
- ammonium: 10.72
- phosphorus, total: 0.01874
- phosphoric acid: 0.06026
- sodium nitrate: 1.45758
- Insecticide: 0.10372
- heavy metals (unspecified): 0.00148

## Deviations from the LCI method approaches
农产品生命周期评价从矿石和能源开采开始，终止于农作物种植输出，包括农产品和污染物的输出两部分，土地资源是一切生产活动的基础，直接进入农作系统。

## Data selection and combination
研究的数据主要来自2013 年8—9 月的实地调研，分别随机调查富平、杨凌两地各30 户种植户的冬小麦-夏玉米种植情况，

## Data treatment and extrapolations
影响评价由影响分类、特征化、标准化、加权评估4 个步骤组成。

## Use advice
生命周期评价数据的用户应在中国西北地区农业生产的背景下考虑数据，特别是在分析涉及冬小麦和夏玉米轮作的农业系统时。应关注所描述系统的边界，该边界包括原材料开采、运输和作物栽培，但不包括设施和设备生产、基础设施建设以及原材料运输基础设施的环境影响。建议用户在总体环境影响评估中考虑这些排除因素，并在考虑更广泛的环境影响时，不应孤立地使用这些数据。

## Review details
清单： 内部审查通过几个迭代步骤完成，涉及原始数据验证、原始数据记录、代表性、完整性、与 ISO 14040 和 14044 有关的建模的一致性。

## Data sources
- 彭小瑜, 吴喜慧, 吴发启, 等. 陕西关中地区冬小麦-夏玉米轮作系统生命周期评价[J].农业环境科学学报, 2015, 34(4).
