# 地震预测 ; 太原组石灰岩储层 ; 微断层精细刻画技术

Dataset: ILCD process, Unit process, single operation
Geography: EEDS-NMG-CN
Reference year: 1987
Valid until: 2022
Classification: Unit processes / Other Services / Research and development
LCI method principle: Attributional
LCI method approaches: Consequential
Generated by: Shikang Kang, 908798159@qq.com
Owner: 天工LCI数据工作小组
Review: Dependent internal review by 天工LCI数据工作小组
Amounts: no units in this file; such an amount is in the reference unit of its flow, which a separate flow dataset defines
copyright: false
licenseType: Free of charge for all users and uses

## General comment
微断层精细刻画地震处理技术流程由3部分组成：①在层位约束下对原始地震资料进行构造导向滤波处理，并抑制背景噪声的干扰，突出断层断点； ②开展神经网络深度学习，得到深度学习相干体（断层）、曲率体（裂缝），建立从地震数据到微断层的非线性映射关系；③选择优势信息进行加权融合，实现隐蔽性小、微断层精细识别。

## Geography
鄂尔多斯盆地中东部太原组石灰岩

## Time period
20世纪80年代开始勘探

## Technology and included processes
地震处理采用“导向滤波＋人工智能＋关键地震信息融合”相结合的手段，断层预测结果具有更好的连续性、清晰的边界和更高的置信度。

## Technical purpose
该地震处理技术用于地震预测以及太原组石灰岩储层的勘探和特征描述，主要用于地质结构中微断层的识别和绘制。该先进技术对于提高断层预测的清晰度、连续性和置信度至关重要，应用于天然气勘探领域，特别是在鄂尔多斯盆地探测和分析潜在的带小型隐蔽性和微断层的天然气库。

## Reference product
- natural gas: 1.5e9; max 1.5e9; uniform; missing unimportant
  天然气微断层精细刻画面积

## Inputs
- natural gas: 0.022; log-normal; missing unimportant
  发育残余生屑体腔（溶）孔和 藻格架（溶）孔，平均孔隙度为 2.2%

## Data selection and combination
鄂尔多斯盆地太原组石灰岩天然气勘探始于 20 世纪 80 年代，勘探历程可大致分为 3 个阶段。初期勘探阶段为 1987—1999 年， 第二勘探阶段为 2000—2005 年，第三勘探阶段为 2019 年至今

## Data treatment and extrapolations
通过加大盆地中东部太原组石灰岩取心，证实太原组石灰岩发育生屑滩和生物丘有利相带，通过二次测井解释，重新复查气层井 300 余口，结合成藏条件分析， 认为太原组石灰岩具有优越的“三明治”成藏模式。

## Use advice
本数据集的用户在评估模型中应明确考虑微断层精细刻画地震处理技术的特异性。数据应用应将时间勘探阶段作为影响结果可靠性的重要因素。注意通过深度学习建立的微断层和裂缝识别的非线性映射关系；以及结合AI进行地震数据解释的导向滤波使用。对于太原组石灰岩的数据集，关键是要适应和校准LCA模型以符合复杂的“三明治”成藏模式。

## Review details
清单： 内部审查通过几个迭代步骤完成，涉及原始数据验证、原始数据记录、代表性、完整性、与 ISO 14040 和 14044 有关的建模的一致性。

## Data sources
- 刘新社;张涛;黄道军;董国栋;王康乐;付勋勋;赵小会;卢子兴;于洲;荆雪媛;张君莹; 鄂尔多斯盆地中东部太原组石灰岩天然气勘探新突破及勘探方向. 天然气工业 1–11 (2023).
