# 土壤修复;异位修复;土壤填埋;基坑回填;修复后场地

Dataset: ILCD process, Unit process, single operation
Geography: ES
Reference year: 2022
Classification: Other Services / Repair and maintenance
Generated by: 桑春晖, sangch@mail.bnu.edu.cn
Owner: 天工LCI数据工作小组
Review: Dependent internal review by 天工LCI数据工作小组
Amounts: no units in this file; such an amount is in the reference unit of its flow, which a separate flow dataset defines
copyright: false
licenseType: Free of charge for all users and uses

## General comment
原场地内清洁基坑采用3000吨砂土回填，砂土来自于30 km外的采石场

## Technical purpose
该描述的工艺用于土壤修复，特别是异位修复，即从受污染的现场挖出土壤，运输并处理。在这种情况下，使用来自30公里外采石场的清洁砂土回填原场地的基坑，此基坑在移除了污染土壤后产生。该过程适用于存在土壤污染且必须挖除污染土壤的环境恢复项目。

## Reference product
- construction site: 10000; software or database

## Inputs
- Diesel: 112000; software or database
- sand: 3e6; software or database
- transport in t*km: 90000; software or database

## Use advice
在使用此数据集时，请确保由于砂源与修复现场的距离而包括了运输影响。该数据集为单一操作定义，即使用3000吨砂土进行回填。应根据特定项目需求进行调整以反映不同数量。在进行全面评估时，还应考虑到当地环境法规、替代材料的可用性以及在处理后回收挖出的土壤的可能性。

## Review details
清单： 内部审查通过几个迭代步骤完成，涉及原始数据验证、原始数据记录、代表性、完整性、与 ISO 14040 和 14044 有关的建模的一致性。

## Data sources
- Espada et al. Coupling phytoremediation of Pb-contaminated soil and biomass energy production: A comparative Life Cycle Assessment. Science of the Total Environment 840 (2022) 156675
