# Vegetablepowder|Rootsandtubers,potatoes,mustard,leafyvegetables,beans,eggplantsandfruits,squash,onionsandgarlic|Grinding|All sizes / /|蔬菜粉|根茎类、薯类、芥菜类、叶菜类、豆类、茄果类、瓜菜类、葱蒜类|碾磨|所有规模

Dataset: ILCD process, Partly terminated system
Geography: CN
Reference year: 2019
Classification: Materials production / Other mineralic materials
Generated by: The data was created by the Office of the Second National Pollution Source Census of the Ministry of Ecology and Environment, and the data was organized by the TianGong Plan team for ILCD format / 生态环境部第二次全国污染源普查工作办公室创建数据，天工计划团队常慧敏整理数据为ILCD格式
Amounts: no units in this file; such an amount is in the reference unit of its flow, which a separate flow dataset defines
copyright: false

## Technology and included processes
the Technical of end-of-pipe management technology for pollution Vegetable Powderis/
污染物指标颗粒物的末端治理技术是/，末端治理设施实际运行率（k值）计算公式为/

## Reference product
- Vegetable Powder: 1000; calculated
  原文件中描述污染物类别为Product，污染物指标为蔬菜粉，此处对其进行了匹配工作，将其匹配到LCAflow库里面相最符合的流

## Outputs
- particles (PM2.5 - PM10): 3.6, 0.36, 0.18 (3 entries); calculated
  原文件中描述污染物类别为废气，污染物指标为颗粒物，此处对其进行了匹配工作，将其匹配到LCAflow库里面相最符合的流

## Data sources
- 第二次全国污染源普查产排污核算系数手册（试用版）,四级代码1371文件，在完整版文件中第2631页
