# Inorganicpigment|Cinnabar,redclay,andrographis,peacockgreen,calciumcarbonate|Physical method or chemical method|All sizes / /|无机颜料|朱砂、红土、雄黄、孔雀绿、碳酸钙|物理法或化学法|所有规模

Dataset: ILCD process, Partly terminated system
Geography: CN
Reference year: 2019
Classification: Materials production / Other mineralic materials
Generated by: The data was created by the Office of the Second National Pollution Source Census of the Ministry of Ecology and Environment, and the data was organized by the TianGong Plan team for ILCD format / 生态环境部第二次全国污染源普查工作办公室创建数据，天工计划团队常慧敏整理数据为ILCD格式
Amounts: no units in this file; such an amount is in the reference unit of its flow, which a separate flow dataset defines
copyright: false

## Technology and included processes
the Technical of end-of-pipe management technology for pollution Inorganic Pigmentis/，Its Technical efficiency of end-of-pipe management0
污染物指标工业废水量的末端治理技术是/，其效率为0

## Reference product
- Inorganic Pigment: 1000; calculated
  原文件中描述污染物类别为Product，污染物指标为无机颜料，此处对其进行了匹配工作，将其匹配到LCAflow库里面相最符合的流，污染物指标备注为工业废水量

## Outputs
- Waste water: 20800; calculated
  原文件中描述污染物类别为废水，污染物指标为工业废水量，此处对其进行了匹配工作，将其匹配到LCAflow库里面相最符合的流，污染物指标备注为工业废水量
- chemical oxygen demand: 1.54; calculated
  原文件中描述污染物类别为废水，污染物指标为化学需氧量，此处对其进行了匹配工作，将其匹配到LCAflow库里面相最符合的流，污染物指标备注为化学需氧量
- Exhaust gas: 93500; calculated
  原文件中描述污染物类别为废气，污染物指标为工业废气量，此处对其进行了匹配工作，将其匹配到LCAflow库里面相最符合的流，污染物指标备注为工业废气量
- particles (> PM10): 2.565; calculated
  原文件中描述污染物类别为废气，污染物指标为固体颗粒物，此处对其进行了匹配工作，将其匹配到LCAflow库里面相最符合的流，污染物指标备注为固体颗粒物

## Data sources
- 第二次全国污染源普查产排污核算系数手册（试用版）,二级代码26,四级代码2644文件，在完整版文件中第4111页
