# 水泥生产;水泥, 普通硅酸盐水泥, 52.4MPa;湿法长窑;炼铁高炉矿渣

Dataset: ILCD process, Unit process, black box
Geography: CN
Reference year: 2001
Classification: Materials production / Other mineralic materials
Generated by: 杨思琪, ysqsophia@gmail.com
Owner: 天工LCI数据工作小组
Review: Dependent internal review by 天工LCI数据工作小组
Amounts: no units in this file; such an amount is in the reference unit of its flow, which a separate flow dataset defines
copyright: false
licenseType: Free of charge for all users and uses

## General comment
湿法厂属于二级重点企业，工艺过程相对也比较成熟，主要生产过程包括泥浆制备和贮存、原料粉磨、料浆的制备、熟料煅烧等。

## Technology and included processes
湿 法厂 属 于 二 级重 点企 业 ， 工 艺过 程相 对也 比较成 熟 ， 主要 生产过程包 括泥 浆 制备 和贮 存 、 原料粉磨 、 料浆 的制备 、 熟料锻烧 等 ， 其流程 示 意图见 图3.3 一 所 示 。

## Technical purpose
该数据集代表了52.4MPa普通硅酸盐水泥的生产过程。这种水泥通常用于需要高强度材料的各种建设项目，如基础设施建筑、桥梁和住宅结构。湿法工艺和高炉矿渣的使用表明，这种水泥在强调材料回收和废物利用的可持续建筑实践中也可以应用。

## Model description
研究范围界定为由原料进厂、原料预处理、生料粉磨、生料煅烧、熟料粉磨，直至水泥均化、储存为止。未包括矿山开采、运输过程、水泥包装等具体过程。

## Reference product
- cement, ordinary portland cement, 52.4MPa: 1000
  水泥平均标号524号

## Inputs
- limestone, crushed, for mill: 1243.89
  石灰石
- clay: 129.923
  粘土
- iron, powder: 21.472
  铁粉
- gypsum stone (CaSO4-dihydrate): 44.3374
  石膏
- fluorspar: 3.00822
  萤石
- blast furnace slag: 88.8605
  原文献中标记为水渣（即炼铁高炉矿渣）。
- Water (fresh water): 1262.36
  新鲜水
- hard coal: 194.117
  原始数据为75.742kt标准煤，这里换算为硬煤，换算公式为1kg硬煤=0.929kg标准煤。
- electricity, medium voltage: 399.572
  电力

## Outputs
- particles (> PM10): 5.69176
  粉尘，未标明粒径，按PM>10处理。
- particles (> PM10): 0.0256521
  烟尘，未标明粒径，按PM>10处理。
- sulfur dioxide: 0.0574254
  二氧化硫
- Nitrogen oxides: 0.0162439
  氮氧化物
- carbon dioxide: 1073.45
  二氧化碳

## Data treatment and extrapolations
CO2数据处理：根据1个功能单元的CO2排放数据，计算出生产419849 t水泥的CO2排放量。

## Use advice
数据集用户应考虑以下方法论建议：CO2排放量计算对应于生产419,849吨水泥，不同的生产量应进行相应的缩放调整。此数据的研究范围省略了某些过程，如矿山开采、运输和水泥包装；因此，如果用户的研究需要，必须单独包括这些活动。应用此数据时，建议关注特定地方关于废物使用和环境影响的法规。此数据的技术适用性应与所描述的相对成熟的湿法长窑工艺保持一致。

## Review details
清单： 内部审查通过几个迭代步骤完成，涉及原始数据验证、原始数据记录、代表性、完整性、与 ISO 14040 和 14044 有关的建模的一致性。

## Data sources
- 狄向华. (2001). 材料环境协调性评价的标准流程方法研究 [硕士, 北京工业大学].
