# 市政污泥处理与处置;湿污泥 含水率80%;好氧发酵

Dataset: ILCD process, Unit process, single operation
Geography: QHD-HEB-CN
Classification: Unit processes / End-of-life treatment / Waste water treatment
Functional unit: The system boundary is defined as the transport of wet sludge (80% moisture content) to the sludge treatment or disposal point to form a complete process route.
Generated by: 金思甜, 2331276@tongji.edu.cn
Owner: 天工LCI数据工作小组
Review: Dependent internal review by 天工LCI数据工作小组
Amounts: no units in this file; such an amount is in the reference unit of its flow, which a separate flow dataset defines
copyright: ['opt4ROkqig']
licenseType: Free of charge for all users and uses

## General comment
在整个工艺路线中，各环节的占地面积、能耗、温室气体、气体污染物排放均纳入环境影响评价范畴之内。

## Technology and included processes
据精确核算，智能好氧发酵工艺涉及的机械设备包 括匀翻机、鼓风机、混料机、皮带机等。

## Technical purpose
所描述的市政污泥处理与处置工艺适用于含水率高（80%）的湿污泥管理。该工艺采用好氧发酵技术处理污泥，适用于市政污水处理厂，旨在稳定和减少湿污泥的体积，然后进行最终处置或潜在的土壤改良用途。

## Reference product
- Sludge: 1000; input; estimated
  1t湿污泥( 含水率为 80% )

## Inputs
- Electricity: 103.68; measured
- Diesel: 0.22; measured

## Outputs
- ammonia: 0.0032; measured
- hydrogen sulfide: 0.011; measured
- carbon dioxide (biogenic): 42; measured
  原文未区分biogenic和fossil，根据专家判断此处为biogenic。

## Use advice
使用此数据集时，用户应注意系统边界限定为含80%水分的湿污泥运输至处理或处置点。在使用好氧发酵进行污泥处理的特定地方情境中确保数据的适用性。此外，在模拟生命周期影响时，应考虑与污泥运输相关的排放，及好氧发酵过程减少污泥质量和体积的效率。

## Review details
清单： 内部审查通过几个迭代步骤完成，涉及原始数据验证、原始数据记录、代表性、完整性、与 ISO 14040 和 14044 有关的建模的一致性。

## Data sources
- 刘洪涛,郑海霞,陈俊,等. 城镇污水处理厂污泥处理处置工艺生命周期评价[J]. 中国给水排水,2013,29(6):11-13. DOI:10.3969/j.issn.1000-4602.2013.06.003.
