# 硅矿石开采 ; 硅矿 ; 露天开采

Dataset: ILCD process, Unit process, single operation
Geography: GS-CN
Reference year: 2013
Classification: Unit processes / Materials production / Non-energetic raw materials
Functional unit: 1 kg solar grade multi-Si
LCI method principle: Attributional
LCI method approaches: Allocation
Generated by: 杨锦锋, yjfzfshn@163.com
Owner: 天工LCI数据工作小组
Review: Dependent internal review by 天工LCI数据工作小组
Amounts: no units in this file; such an amount is in the reference unit of its flow, which a separate flow dataset defines
copyright: false
licenseType: Free of charge for all users and uses

## General comment
多晶硅

## Geography
甘肃省硅矿开采企业较多，且开采技术较为先进，在国内硅矿开釆企业中具有较好的代表性

## Time period
文章发表

## Technology and included processes
企业主要生产工艺是利用小型潜孔钻机进行穿孔，采用中深孔多排微差爆破法进行矿石开采，对爆堆中较大块矿石进行粉碎，较小的矿石采用挖掘机，装入汽车运至临时堆场，在临时堆场进行破碎和选矿，最终将符合规格的桂石储存待售

## Technical purpose
此数据集涉及露天开采二氧化硅含量在98.02%到98.52%之间的硅矿石。该开采材料适用于生产太阳能级多晶硅（多晶Si），多晶硅是太阳能电池板中光伏电池的关键材料。

## Reference product
- quartz sand: 9e7; measured
  硅矿石

## Inputs
- freshwater: 1.0185e7; measured
  水
- Explosive: 5e6; measured
  炸药
- Gasoline: 36000; measured
  汽油、柴油
- Electricity: 1.944e6; measured
  电能

## Outputs
All rows: measured
- carbon monoxide,carbon monoxide (fossil): 374364
  CO
- sulfur dioxide: 855690
  二氧化硫
- Nitrogen oxides: 615027
  氮氧化物
- hydrogen sulfide: 427845
  硫化氢
- ammonia: 227292
  氨气
- particles (> PM10),particles (>PM10): 14727
  粉尘
- industrial waste (unspecified): 6000
  固体废弃物

## Deviations from the LCI method approaches
以太阳能级多晶硅为研究对象，运用 LCA的评价方法，定量计算国内普遍生产水平下，太阳能级多晶硅生命周期过程的资源、能源投入和环境排放值

## Data selection and combination
根据企业生产过程的数据资料收集整理

## Use advice
在使用此数据集进行太阳能级多晶硅的生命周期评估（LCA）时，应确保方法论与甘肃省所代表的先进采矿技术一致。抽丝剥茧式精确建模提取及随后的处理步骤，包括中深孔多排微差爆破、粉碎和选矿，以正确评估环境影响。应特别注意数据的代表性，并根据企业的实际生产水平计算能源消耗和排放。

## Review details
清单： 内部审查通过几个迭代步骤完成，涉及原始数据验证、原始数据记录、代表性、完整性、与 ISO 14040 和 14044 有关的建模的一致性。

## Data sources
- 何洋. 太阳能级多晶硅的生命周期评价. (西南交通大学, 2013).
