# 水泥生产;水泥, 普通硅酸盐水泥;新型干法, 5000 t/d;纯低温余热发电技术;混合固废

Dataset: ILCD process, Unit process, black box
Geography: CN
Classification: Materials production / Other mineralic materials
Generated by: 杨思琪, ysqsophia@gmail.com
Owner: 天工LCI数据工作小组
Review: Dependent internal review by 天工LCI数据工作小组
Amounts: no units in this file; such an amount is in the reference unit of its flow, which a separate flow dataset defines
copyright: false
licenseType: Free of charge for all users and uses

## General comment
配备有5000t/d新型干法水泥熟料生产线，采用先进的强化型悬浮预热器五级窑外分解技术以及立式原料磨、配有辊压机的大型球磨机等先进的水泥生产设备。案例采用了纯低温余热发电技术。来自于冷机的窑头废气用于加热AQC（Air Quenching Cooler）锅炉，来自于预热器的窑尾废气用于加热锅炉，通过高效余热锅炉将废气中的热能转化为过热蒸汽，推动蒸汽发电机组发电。

## Geography
东北两座水泥厂

## Technical purpose
本数据集描述了现代水泥生产流程的技术应用。此方式生产的普通硅酸盐水泥适用于各种建筑工程，包括建筑物、桥梁和道路的建设。生产过程中融入了先进设备和技术，例如采用了强化型悬浮预热器五级窑外分解系统，立式原料磨，以及配备辊压机的大型球磨机。这表明了一个专为大规模生产设计的高效水泥制造厂，其日产水泥熟料达到5000吨。此外，工厂采用了纯低温余热发电技术，这是一项环保特性，旨在回收和转换生产过程中的废热为电能。

## Model description
系统边界为水泥厂水泥生产系统。

## Reference product
- cement, ordinary portland cement: 1000
  水泥产品

## Inputs
- limestone, crushed, for mill: 1150
  石灰石
- clay: 191.111
  粘土
- ash: 123.333
  粉煤灰
- copper slag: 30.6111
  铜矿渣
- gypsum stone (CaSO4-dihydrate): 70
  石膏
- blast furnace slag: 58.8889
  矿渣
- hard coal: 150.722
  烟煤。年耗煤用能=(2.713E+8)kg×(2.1502E+7)J/kg(平均低位热值)=(5.83E+15)J
- electricity, medium voltage: 290.6
  总耗电量。年耗电能=（1.453E+8）kWh×（3.60E+6）J/kWh=（5.23E+14）J。
- tap water: 983.516
  总水量

## Outputs
- particles (> PM10): 0.441209
  粉尘，未标明粒径，按PM>10处理。
- nitrogen dioxide: 2.45604
  NO2
- sulfur dioxide: 0.653846
  SO2
- carbon dioxide: 409.341
  CO2
- electricity, medium voltage: 122.4
  年发电量。年发电能=（6.12E+7）kwh×（3.60E+6）J/kWh=（2.20E+14）J。在水泥熟料嫩烧过程中，从窑头冷机和窑尾预热器排出的废气中蕴含着大量的热量，其中400C以下的低温废气所含的热量占水泥熟料烧总耗热量的三分之一左右。余热发电技术通过回收这一部分的余热，可以节约大量的资源、能源，并且不会对环境产生二次污染，因此，余热发电技术已成为水泥行业的新兴技术，是实现其减污、降耗、增效以及可持续发展的有效途径。

## Use advice
在使用本数据集进行生命周期评估（LCA）时，请确保生产系统和边界与数据集保持一致，具体涵盖中国东北两家水泥厂使用新型干法生产的普通硅酸盐水泥。数据使用者在影响评估中应考虑先进技术工艺、余热回收和发电情况。此数据集只适应于采用高能效措施的大规模水泥生产场景。使用者需要注意，包括或排除纯低温余热发电技术可能会显著影响环境影响评定的结果。

## Review details
清单： 内部审查通过几个迭代步骤完成，涉及原始数据验证、原始数据记录、代表性、完整性、与 ISO 14040 和 14044 有关的建模的一致性。

## Data sources
- 邵帅. (2016). 基于Emergy和Em-LCA的水泥企业可持续发展水平评价 [硕士, 大连理工大学].
