# 干法制砂;砂石筛分;振动筛筛分

Dataset: ILCD process, Unit process, single operation
Geography: HAIN-CN
Reference year: 2020
Classification: Unit processes / Materials production / Other mineralic materials
Generated by: 崔航, Cuihang0716@163.com
Owner: 天工LCI数据工作小组
Review: Dependent internal review by 天工LCI数据工作小组
Amounts: no units in this file; such an amount is in the reference unit of its flow, which a separate flow dataset defines
copyright: false
licenseType: Free of charge for all users and uses

## General comment
对不同粒径的砂石进行筛分

## Technical purpose
干法制砂和振动筛筛分工艺用于将砂石分级和排序成不同粒径。这个工业操作通常用于建筑行业，用于生产对混凝土、沥青和其他建筑材料至关重要的各种骨料。

## Reference product
- gravel: 41870; measured

## Inputs
- gravel: 41870; measured
- Electricity: 360; measured

## Use advice
在使用这个数据集进行生命周期评估时，请确保LCA的范围与干法制砂工艺的操作参数相匹配。考虑地理、技术和时间相关的代表性。系统边界应包括原材料提取等上游过程。除非研究目标包括这些方面，否则不包括运输等过程。注意目标应用中砂石的潜在回收利用，并相应调整库存。

## Review details
清单： 内部审查通过几个迭代步骤完成，涉及原始数据验证、原始数据记录、代表性、完整性、与 ISO 14040 和 14044 有关的建模的一致性。

## Data sources
- 陵水海岛混凝土有限公司干法制砂项目
