# 电力生产 ; 火电 ; 浙江

Dataset: ILCD process, Unit process, single operation
Geography: ZJ-CN
Reference year: 2019
Classification: Unit processes / Energy carriers and technologies / Electricity
Generated by: 熊若熙, xiongrx0126@163.com
Owner: 天工LCI数据工作小组
Review: Dependent internal review by 天工LCI数据工作小组
Amounts: no units in this file; such an amount is in the reference unit of its flow, which a separate flow dataset defines
copyright: false
licenseType: Free of charge for all users and uses

## General comment
火电发电包括原煤、洗煤、石油、天然气等十七种化石燃料。该过程只考虑直接发电过程，不考虑上游原材料开采加工和下游消费

## Time period
根据2019年能源统计年鉴数据计算

## Technical purpose
该工业过程描述了中国浙江地区使用原煤、洗煤、石油和天然气等化石燃料进行热电生产的过程。数据集关注直接发电阶段，适用于对浙江地区火电站产生的电能进行生命周期评估。

## Reference product
- electricity for thermal power: 3.6; calculated

## Inputs
All rows: calculated
- Raw coal: 0.382277
- Other Washed Coal: 0.00556688
- hard coal briquettes: 0.00149514
- Gangue, in ground: 0.00796593
- Coke oven gas: 0.002481
- blast furnace gas: 0.044621
- Converter gas: 0.005499
- Diesel: 1.426e-5
- natural gas: 0.000642

## Outputs
- carbon dioxide (fossil): 0.661256; calculated
- sulfur dioxide: 0.000112897; calculated
- Nitrogen oxides: 0.00017546; calculated
- particles (> PM10): 2.2349e-5; calculated

## Data treatment and extrapolations
核算方法参考《企业温室气体排放核算方法与报告指南 发电设施》。不同形式发电量及燃料用量来自于《中国能源统计年鉴 2020》中的第三章（能源生产） 和第六章（地区能源平衡表）。用于计算二氧化碳排放因子的低位发热量、单位热值含碳量等燃料参数来自于《2019 年度中国区域电网二氧化碳基准线排放因子 OM 计算说明》、《企业温室气体排放核算方法与报告指南 发电设施》

## Use advice
用户在使用该数据集时应遵循《企业温室气体排放核算方法与报告指南 发电设施》中概述的方法。重要的是要注意，数据集不包括上游的原材料提取和加工，也不包括下游的电力消费。鉴于数据基于2019年的统计数据，用户在将数据应用于未来场景或不同时间框架时必须小心。可能需要进行调整，以考虑技术发展或燃料组合的变化。提供的二氧化碳排放因子是使用数据集涵盖的年份和地区特定的燃料参数计算的。

## Review details
清单： 内部审查通过几个迭代步骤完成，涉及原始数据验证、原始数据记录、代表性、完整性、与 ISO 14040 和 14044 有关的建模的一致性。

## Data sources
- 熊若熙. 中国电力生产和消费二氧化碳与污染物排放因子核算. (清华大学, 2023).
