# 水泥生产;水泥, 粉煤灰硅酸盐水泥, 44.6MPa;干法预分解窑;粉煤灰

Dataset: ILCD process, Unit process, black box
Geography: CN
Reference year: 2001
Classification: Materials production / Other mineralic materials
Generated by: 杨思琪, ysqsophia@gmail.com
Owner: 天工LCI数据工作小组
Review: Dependent internal review by 天工LCI数据工作小组
Amounts: no units in this file; such an amount is in the reference unit of its flow, which a separate flow dataset defines
copyright: false
licenseType: Free of charge for all users and uses

## General comment
干法预分解窑生产水泥。采用新型干法预分解技术，主要生产设施为一条日产熟料2000吨窑外分解生产线，设计能力为年产水泥70万吨工艺流程。

## Technology and included processes
干法B厂水泥生产采用新型干法预分解技术，主要生产设施为一条日产 熟料2000吨窑外分解生产线,设计 能力为年产水泥70万吨工艺流程与干法A厂大致相同。 该厂生产工艺布局合理，主机设备以国产为主，关键部件从国外引进 ，整条生产线自动化控制程度达到90年代初国际先进水平。出厂水泥合格率和一等品率、富裕标号率、袋重合格率 、 均匀性合格率等 一 直保持100%。1998年上半年，干法B厂生产的普425号、普525号水泥通过国家产品认证中心的产品认证. ， 下 半年计 量 确 认 体 系通 过ISO10012现场审核 。

## Technical purpose
此数据集描述了使用干法预分解窑技术生产44.6MPa强度的硅酸盐粉煤灰水泥的过程。所生产的水泥适用于建筑目的，旨在用于需要高强度水泥的大型土木工程项目和建筑中。这些包括高层建筑、桥梁、道路和其他基础设施。

## Model description
研究范围界定为由原料进厂、原料预处理、生料粉磨、生料煅烧、熟料粉磨，直至水泥均化、储存为止。未包括矿山开采、运输过程、水泥包装等具体过程。

## Reference product
- cement, portland fly-ash cement, 44.6MPa: 1000
  水泥平均标号446号

## Inputs
- limestone, crushed, for mill: 1199.08
  石灰石
- sandstone: 0.0082496
  砂岩
- iron, powder: 28.5861
  铁粉
- gypsum stone (CaSO4-dihydrate): 52.917
  石膏
- ash: 159.373
  粉煤灰
- Water (fresh water): 402.239
  新鲜水
- hard coal: 139.857
  原始数据为93.882kt标准煤，这里换算为硬煤，换算公式为1kg硬煤=0.929kg标准煤。
- electricity, medium voltage: 396.406
  电力

## Outputs
- particles (> PM10): 0.0188322
  粉尘，未标明粒径，按PM>10处理。
- particles (> PM10): 0.00844125
  烟尘，未标明粒径，按PM>10处理。
- sulfur dioxide: 0.00930531
  二氧化硫
- Nitrogen oxides: 0.0150381
  氮氧化物
- carbon monoxide: 0.0135564
  一氧化碳
- carbon dioxide: 886.733
  二氧化碳
- Water (groundwater from technosphere, waste water): 157.581
  原文是工业废水（即水泥生产废水）。

## Data treatment and extrapolations
CO2数据处理：根据1个功能单元的CO2排放数据，计算出生产722168 t水泥的CO2排放量。

## Use advice
在应用此LCA数据时，用户应注意数据集具体针对每日产出2000吨熟料的干法预分解水泥生产线，年产水泥量为70万吨。使用这些数据时，确保其与所涉建设项目的范围对齐，并遵循其技术和产能规范。请考虑所描述的生产过程不包括水泥的采矿、运输和包装。因此，如果项目需要全生命周期评估，则需要额外获取并纳入这些被排除阶段的数据。最后，数据集中的排放数据与特定生产量有关，因此对于不同的生产量，排放数据应相应调整。

## Review details
清单： 内部审查通过几个迭代步骤完成，涉及原始数据验证、原始数据记录、代表性、完整性、与 ISO 14040 和 14044 有关的建模的一致性。

## Data sources
- 狄向华. (2001). 材料环境协调性评价的标准流程方法研究 [硕士, 北京工业大学].
