# Frozencephalopodproducts|Freshcephalopods|Morphological processing + washing + freezing|All sizes / /|冻头足类制品|鲜头足类|形态处理+冲洗+冷冻|所有规模

Dataset: ILCD process, Partly terminated system
Geography: CN
Reference year: 2019
Classification: Materials production / Other mineralic materials
Generated by: The data was created by the Office of the Second National Pollution Source Census of the Ministry of Ecology and Environment, and the data was organized by the TianGong Plan team for ILCD format / 生态环境部第二次全国污染源普查工作办公室创建数据，天工计划团队常慧敏整理数据为ILCD格式
Amounts: no units in this file; such an amount is in the reference unit of its flow, which a separate flow dataset defines
copyright: false

## Technology and included processes
the Technical of end-of-pipe management technology for pollution phosphorus, totalisFloating separation + SBR，Its Technical efficiency of end-of-pipe management50，The formula for calculating the actual operation rate (k-value) of the end-of-pipe treatment facility is /
污染物指标总磷的末端治理技术是上浮分离+SBR类，其效率为50，末端治理设施实际运行率（k值）计算公式为k=污水治理设施耗电量（千瓦时/年）/污水治理设施运行时间（小时/年）/污水治理设施总功率（千瓦）

## Reference product
- cephalopod: 1000; calculated
  原文件中描述污染物类别为Product，污染物指标为冻头足类制品，此处对其进行了匹配工作，将其匹配到LCAflow库里面相最符合的流

## Outputs
All rows: calculated
- Waste water: 31000
  原文件中描述污染物类别为废水，污染物指标为工业废水量，此处对其进行了匹配工作，将其匹配到LCAflow库里面相最符合的流
- chemical oxygen demand: 48.759, 39.0072, 29.2554, 7.31385, 0.97518, 7.31385, 7.31385, 60.948, 48.7584, 36.5688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 (13 entries)
  原文件中描述污染物类别为废水，污染物指标为化学需氧量，此处对其进行了匹配工作，将其匹配到LCAflow库里面相最符合的流
- Ammonia Nitrogen: 1.928, 1.7352, 1.5424, 0.3856, 0.3856, 0.03856, 0.482, 2.169, 1.928, 0.482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 (12 entries)
  原文件中描述污染物类别为废水，污染物指标为氨氮，此处对其进行了匹配工作，将其匹配到LCAflow库里面相最符合的流
- Nitrogen, organic bound: 4.21, 3.789, 3.368, 1.684, 0.9683, 1.684, 1.263, 5.263, 4.2104, 2.1052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 (12 entries)
  原文件中描述污染物类别为废水，污染物指标为总氮，此处对其进行了匹配工作，将其匹配到LCAflow库里面相最符合的流
- phosphorus, total: 0.699, 0.6291, 0.4194, 0.3495, 0.10485, 0.3495, 0.3495, 0.874, 0.7866, 0.5244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 (14 entries)
  原文件中描述污染物类别为废水，污染物指标为总磷，此处对其进行了匹配工作，将其匹配到LCAflow库里面相最符合的流

## Data sources
- 第二次全国污染源普查产排污核算系数手册（试用版）,四级代码1361文件，在完整版文件中第2586页
