# 运输到场的材料和设备;土壤原位修复;气相抽提;材料运输

Dataset: ILCD process, Unit process, single operation
Geography: KR
Reference year: 2011
Classification: Unit processes / Other Services / Repair and maintenance
Generated by: 张建宾, zhangjb@caep.org.cn
Owner: 天工LCI数据工作小组
Review: Dependent internal review by 天工LCI数据工作小组
Amounts: no units in this file; such an amount is in the reference unit of its flow, which a separate flow dataset defines
copyright: false
licenseType: Free of charge for all users and uses

## General comment
场地1000 m3 TPH污染土壤修复所需材料和药剂共计99.8吨，总运输距离30公里

## Technical purpose
所述工艺涉及使用SVE（土壤蒸汽抽提）系统对场地的1000立方米TPH污染土壤进行修复。所有必需的材料和试剂合计99.8吨，需要运输到现场，总距离为30公里。该过程专门用于解决TPH（总石油烃）污染等烃类污染的现场土壤原位修复项目。

## Reference product
- Equipment and Materials Arriving on Site: 99800; measured

## Inputs
- transport in t*km: 2994; measured

## Use advice
数据集用户应注意，此过程数据包含了特定体积TPH污染土壤修复所必需的材料和试剂的运输和应用。与材料运输相关的能源消耗以及SVE系统的操作能耗应纳入LCA中。用户必须考虑数据集边界，包括所有与土壤修复单一过程操作相关的主要原材料和必要的能源消耗。

## Review details
清单： 内部审查通过几个迭代步骤完成，涉及原始数据验证、原始数据记录、代表性、完整性、与 ISO 14040 和 14044 有关的建模的一致性。

## Data sources
- Jeong, S.-W. & Suh, S.-W. Assessment of Environmental Impacts and CO 2 Emissions from Soil Remediation Technologies using Life Cycle Assessment - Case Studies on SVE and Biopile Systems -. Journal of Korean Society of Environmental Engineers 33, 267–274 (2011).
