# 平均稀土氧化物生命周期清单;稀土元素;南方七省（原地浸出）;含稀土矿石

Dataset: ILCD process, Unit process, single operation
Geography: CN
Reference year: 2012
Valid until: 2014
Classification: Unit processes / Materials production / Non-energetic raw materials
Functional unit: 1 kg REO at 100% purity
LCI method principle: Attributional
LCI method approaches: Allocation - mass
Generated by: 汪涛, twang@iue.ac.cn
Owner: 天工LCI数据工作小组
Review: Dependent internal review by 天工LCI数据工作小组
Amounts: no units in this file; such an amount is in the reference unit of its flow, which a separate flow dataset defines
copyright: false
licenseType: Free of charge for all users and uses

## General comment
该数据集描述的稀土氧化物（REO）旨在用于需要高纯度的应用领域。这些可能包括生产高强度磁体、特种合金、陶瓷、电子产品和玻璃抛光化合物。由于数据集指定了“南方七省”地点并提及“原地浸出”，它表明REO采用了这种对环境影响较小的开采方法，这是该地区矿业能力的特点。

## Geography
南方七省

## Technology and included processes
LCA 模型是使用 eBalance Professional 4.7（IT & Knowledge for Environment，四川，中国）构建的。我们选择构建归因模型，因为它更符合我们的研究目标，尽管我们采用了贡献性方法来进行情景敏感性分析。使用 CML2002 方法评估生命周期环境影响（CML 2015）。根据建议的 LCA 实践（Hauschild 等，2013）和之前确定的行业环境危害，选择了 11 个中点影响类别。

## Reference product
- Rare Earth Oxides: 1; calculated
  REO

## Inputs
- Ammonium sulfate: 9.07; measured
- sulphuric acid: 1.16; calculated
- Ammonium bicarbonate: 4.78; measured
- Lime: 3.37; calculated
- Hydrochloric acid: 10; measured
- phosphoric acid: 0.004; measured
- ammonia: 11; software or database
- Kerosene: 0.01; measured
- Sodium carbonate: 1.05; measured
- Charcoal: 0.04; measured
- water: 893.8; calculated
- Electricity: 44.496; calculated

## Outputs
All rows: calculated
- Spray mold: 1.08
  Ammonium chloride
- ammonia: 0.219
- sulfur dioxide: 0.029
- carbon dioxide (fossil): 1.235
  原文未区分bio和fossil，根据专家判断此处为fossil
- Ammonium sulfate: 7.5

## Deviations from the LCI method approaches
The LCI is first described individually for the three REO production chains, followed by a section on metal refining. Aggregated modeling data are also included for the industry average REO production in tabular form (Tables 1, 2, and 3). A more in-depth description of the processes, LCI, and modeling data used for the entire study (including metal refining) is available in section 1 in supporting information S1 on the Web.

## Use advice
该LCA数据集的用户应采用归因方法准确地模拟REO生产的环境影响，并记住中点影响类别。在应用情景敏感性分析时，应考虑贡献方法。必须使用CML2002方法评估生命周期环境影响。重要的是要注意，数据集代表了“南方七省”多个生产链的平均值，因此特定矿井或方法的个别结果可能会有所不同。在模型中包括回收应根据最新的REO回收实践和专家建议谨慎考虑。为了得到全面的结果，建议用户参考网络上支持信息S1中提供的详细过程和LCI数据，并且需要单独考虑金属精炼阶段。

## Review details
清单： 内部审查通过几个迭代步骤完成，涉及原始数据验证、原始数据记录、代表性、完整性、与 ISO 14040 和 14044 有关的建模的一致性。

## Data sources
- Lee, J. C. K. & Wen, Z. Rare Earths from Mines to Metals: Comparing Environmental Impacts from China’s Main Production Pathways: Environmental Impacts of Rare Earths in China. Journal of Industrial Ecology 21, 1277–1290 (2017).
