# 页岩气生产;场地准备阶段;道路维修和建设

Dataset: ILCD process, Unit process, black box
Geography: SC-CN
Reference year: 2014
Valid until: 2016
Classification: Systems / Construction
Generated by: 洪溥, 15695258655@163.com
Owner: 天工LCI数据工作小组
Review: Dependent internal review by 天工LCI数据工作小组
Amounts: no units in this file; such an amount is in the reference unit of its flow, which a separate flow dataset defines
licenseType: Free of charge for all users and uses

## General comment
所描述的工业过程属于页岩气开采的场地准备阶段，包括道路维修和施工活动。数据集专门用于中国四川和重庆地区集中的页岩气开采的生命周期评估计算。这些过程数据可以应用于环境影响评估、政策制定和这些地区页岩气开采项目的优化。

## Geography
我国页岩气开采工作目前集中在四川及重庆地区，选取四川及重庆的数据进行LCA计算。

## Time period
原始数据时间介于2014-2016之间

## Reference product
- Road: 2200; min 22; max 7664; uniform; measured
  场地准备阶段--道路维修及新建道路的长度

## Inputs
- gravel: 163000; min 12000; max 359000; uniform; measured
  场地准备阶段--道路维修所用碎石
- Diesel: 1050; min 50; max 2877; uniform; measured
  场地准备阶段--道路维修和施工所用设备及碎石等运输

## Use advice
在使用这个数据集进行LCA计算时，重要的是确保研究的地理范围与所提供的数据相匹配，因为这些数据是四川和重庆地区的代表性数据。原始数据的时间范围在2014-2016年之间，因此，2016年之后技术、规章或现场条件的任何重大变化都可能需要更新数据。此处使用的黑箱单元过程方法如果用于详细的环境影响分析，则可能需要额外的数据来完全透明化输入和输出。应考虑技术适应性和可能需要的区域特定校准。

## Review details
清单： 内部审查通过几个迭代步骤完成，涉及原始数据验证、原始数据记录、代表性、完整性、与 ISO 14040 和 14044 有关的建模的一致性。

## Data sources
- Wang, J., Liu, M., McLellan, B. C., Tang, X. & Feng, L. Environmental impacts of shale gas development in China: A hybrid life cycle analysis. Resources, Conservation and Recycling 120, 38–45 (2017).
