# 电力生产 ; 火电 ; 青海

Dataset: ILCD process, Unit process, single operation
Geography: QH-CN
Reference year: 2019
Classification: Unit processes / Energy carriers and technologies / Electricity
Generated by: 熊若熙, xiongrx0126@163.com
Owner: 天工LCI数据工作小组
Review: Dependent internal review by 天工LCI数据工作小组
Amounts: no units in this file; such an amount is in the reference unit of its flow, which a separate flow dataset defines
copyright: false
licenseType: Free of charge for all users and uses

## General comment
火电发电包括原煤、洗煤、石油、天然气等十七种化石燃料。该过程只考虑直接发电过程，不考虑上游原材料开采加工和下游消费

## Time period
根据2019年能源统计年鉴数据计算

## Technical purpose
该数据集代表了青海地区使用多种化石燃料进行火电发电，包括原煤、洗煤、石油和天然气。它特别用于分析火力发电厂中的直接发电过程。这些数据对于需要评估发电效率和环境影响的行业至关重要，特别是专注于能源生产和可持续性的行业。

## Reference product
- electricity for thermal power: 3.6; calculated

## Inputs
- Raw coal: 0.44653; calculated
- Diesel: 2.88e-5; calculated
- natural gas: 0.000192; calculated

## Outputs
- carbon dioxide (fossil): 0.821871; calculated
- sulfur dioxide: 0.000142115; calculated
- Nitrogen oxides: 0.000223345; calculated
- particles (> PM10): 2.6859e-5; calculated

## Data treatment and extrapolations
核算方法参考《企业温室气体排放核算方法与报告指南 发电设施》。不同形式发电量及燃料用量来自于《中国能源统计年鉴 2020》中的第三章（能源生产） 和第六章（地区能源平衡表）。用于计算二氧化碳排放因子的低位发热量、单位热值含碳量等燃料参数来自于《2019 年度中国区域电网二氧化碳基准线排放因子 OM 计算说明》、《企业温室气体排放核算方法与报告指南 发电设施》

## Use advice
使用该数据集的用户应注意，其基于2019年能源统计年鉴计算，并且特别适用于青海的火电发电，不考虑上游原材料开采加工或者下游电力消费。数据集应用于火力发电厂直接排放范围内的生命周期评估(LCA)。温室气体(GHG)排放核算的方法遵循《企业温室气体排放核算方法与报告指南 发电设施》。用户必须参照该指南进行准确的排放核算，并确保与其他数据集的可比性。在应用该数据集时，还建议查阅《中国能源统计年鉴2020》中关于能源生产和地区能源平衡表的详细数据。

## Review details
清单： 内部审查通过几个迭代步骤完成，涉及原始数据验证、原始数据记录、代表性、完整性、与 ISO 14040 和 14044 有关的建模的一致性。

## Data sources
- 熊若熙. 中国电力生产和消费二氧化碳与污染物排放因子核算. (清华大学, 2023).
