# Wastewatertreatmentplant|/|Wastewatertreatmentvolume|Wastewater treatment|All sizes / 污水处理场|/|污水处理量|污水处理|所有规模

Dataset: ILCD process, Partly terminated system
Geography: CN
Reference year: 2019
Classification: Materials production / Other mineralic materials
Generated by: The data was created by the Office of the Second National Pollution Source Census of the Ministry of Ecology and Environment, and the data was organized by the TianGong Plan team for ILCD format / 生态环境部第二次全国污染源普查工作办公室创建数据，天工计划团队常慧敏整理数据为ILCD格式
Amounts: no units in this file; such an amount is in the reference unit of its flow, which a separate flow dataset defines
copyright: false

## Technology and included processes
the Technical of end-of-pipe management technology for pollution Wastewater FlowisMembrane separation，Its Technical efficiency of end-of-pipe management95
污染物指标挥发性有机物的末端治理技术是膜分离法，其效率为95，末端治理设施实际运行率（k值）计算公式为k=工艺废气净化装置运行时间/正常生产时间

## Reference product
- Wastewater Flow: 1; input; calculated
  原文件中描述污染物类别为Product，污染物指标为污水处理量，此处对其进行了匹配工作，将其匹配到LCAflow库里面相最符合的流，污染物指标备注为挥发性有机物

## Outputs
- volatile organic compound: 0.002205, 0.00882, 0.00441, 0.00441, 0.006615, 0.00882, 0.00441, 0.006615, 0.01323, 0.01323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 (12 entries); calculated
  原文件中描述污染物类别为废气，污染物指标为挥发性有机物，此处对其进行了匹配工作，将其匹配到LCAflow库里面相最符合的流，污染物指标备注为挥发性有机物

## Data sources
- 第二次全国污染源普查产排污核算系数手册（试用版）,二级代码25,四级代码2511文件，在完整版文件中第4090页
