# 染料制造 ; 还原靛蓝

Dataset: ILCD process, Unit process, black box
Geography: CN
Reference year: 2021
Classification: Unit processes / Materials production / Organic chemicals
Functional unit: the production of 1 ton indigo
Generated by: 玲俐, calinly@163.com
Owner: 天工LCI数据工作小组
Review: Dependent internal review by 天工LCI数据工作小组
Amounts: no units in this file; such an amount is in the reference unit of its flow, which a separate flow dataset defines
copyright: false
licenseType: Free of charge for all users and uses

## General comment
无流程图

## Geography
本手册仅用于《国民经济行业分类》（GB/T 4754-2017）中 2645 染料制造行业使用系数法核算工业污染物产生量和排放量的工业企 业。

## Time period
手册印发日期

## Technical purpose
本工业过程描述的是还原靛蓝的生产，这种颜料通常用于纺织行业，特别是牛仔布的染色。该过程通常位于遵守国家行业分类代码2645（染料制造）的工业环境中。

## Model description
末端治理技术平均去除效率（%）：1）COD-物理处理法+好氧生物处理法+厌氧生物处理法：90%；2）总氮-物理处理法+好氧生物处理法+厌氧生物处理法：65%；3）氨氮-物理处理法+化学处理法+好氧生物处理法+厌氧生物处理法：70%；4）颗粒物-旋风除尘+袋式除尘+湿法除尘：95%；5）二氧化硫-石灰石/石膏法：75%；6）氮氧化物-选择性催化还原法（SCR）：70%。

## Reference product
- indigo: 1000; software or database
  靛蓝

## Outputs
All rows: software or database
- Exhaust gas: 124000
  工业废气量
- waste water - untreated: 80000
  工业废水
- chemical oxygen demand: 320
  化学需氧量
- nitrogen, total (excluding N2): 52
  总氮
- Ammonia Nitrogen: 26
  氨氮
- particles (PM10): 10
  颗粒物
- sulfur dioxide: 0.22
  二氧化硫
- nitrogen dioxide: 0.84
  氮氧化物
- industrial waste (unspecified): 40
  一般工业固废
- hazardous waste (unspecified): 10
  危险废物（染料废物HW12）

## Use advice
在使用此还原靛蓝染料制造过程的数据集时，重要的是要考虑到信息是为通过特定于代码2645的系数方法计算工业污染物定制的。该数据应用于在环境管理系统中有效模拟排放和去除效率，并整合提供的污染控制技术平均去除效率。请注意，该数据集不包括有关能源、水、原材料投入或运输的数据；因此，如果需要进行完整的生命周期评估研究，必须额外收集这些方面的数据。

## Review details
清单： 内部审查通过几个迭代步骤完成，涉及原始数据验证、原始数据记录、代表性、完整性、与 ISO 14040 和 14044 有关的建模的一致性。

## Data sources
- 生态环境部.2645染料制造行业系数手册.(2021).
