# 土壤修复;原位修复;电修复;长期监测;在线监测结果

Dataset: ILCD process, Unit process, single operation
Geography: KR
Reference year: 2014
Classification: Unit processes / Other Services / Repair and maintenance
Generated by: 浩骅, wangyp@caep.org.cn
Owner: 天工LCI数据工作小组
Review: Dependent internal review by 天工LCI数据工作小组
Amounts: no units in this file; such an amount is in the reference unit of its flow, which a separate flow dataset defines
copyright: false
licenseType: Free of charge for all users and uses

## General comment
系统监控

## Technology and included processes
场地中污染物的在线实时监测

## Technical purpose
此工业过程用于通过电修复方法进行土壤原位修复。它涉及将电流应用到受污染的场地以去除污染物。该过程包括污染物的长期监测和在线监测，以确保持续评估修复效果。它通常用于土壤污染对环境和健康构成风险并且传统的挖掘和场外处理不可行或不切实际的情况。

## Reference product
- Online monitoring results: 1; measured

## Inputs
- Electricity: 720; measured
  Equipment etc

## Outputs
- Greenhouse Gases: 90; measured
- Nitrogen oxides: 0.239; measured
- SOx: 0.326; measured

## Use advice
数据使用者在将此数据集成到生命周期评估中时，必须考虑原位电修复土壤修复过程的方法论边界。应特别注意长期和在线监测组件的具体情况，因为它们可能会影响对环境绩效的整体评估。必须考虑此过程可以处理的污染物范围以及修复生命周期内的能耗。数据用户应确保在其生命周期评估模型中正确分配所有主要原材料和能源消耗的输入输出流。

## Review details
清单： 内部审查通过几个迭代步骤完成，涉及原始数据验证、原始数据记录、代表性、完整性、与 ISO 14040 和 14044 有关的建模的一致性。

## Data sources
- Kim, DH., Yoo, JC., Hwang, BR. et al. Environmental assessment on electrokinetic remediation of multimetal-contaminated site: a case study. Environ Sci Pollut Res 21, 6751–6758 (2014).
