# 多晶硅光伏电池生产 ; 多晶硅光伏电池，光伏电池效率为 12.7% ; 集成方法

Dataset: ILCD process, Unit process, black box
Geography: ZJ-CN
Reference year: 2016
Classification: Unit processes / Materials production / Other materials
Functional unit: In this study, 1 kWp multi-Si PV cell production was selected as the functional unit.
LCI method principle: Attributional
LCI method approaches: Allocation
Generated by: 杨锦锋, yjfzfshn@163.com
Owner: 天工LCI数据工作小组
Review: Dependent internal review by 天工LCI数据工作小组
Amounts: no units in this file; such an amount is in the reference unit of its flow, which a separate flow dataset defines
copyright: false
licenseType: Free of charge for all users and uses

## General comment
多晶硅

## Geography
本研究使用了2010年浙江省多晶硅、太阳能电池玻璃、光伏晶圆和电池生产的现场数据(即原材料、能源、存储、直接排放和废弃物处理)

## Time period
文章发表

## Technical purpose
多晶硅光伏电池生产数据集的技术应用是理解和运用制造多晶硅光伏电池的环境影响，这些电池通常用于太阳能板中，将阳光转换为电能。这些电池的效率为12.7％，适用于对经济性和适度效率具有重要考虑的太阳能发电安装。

## Reference product
- Solar Module,Solar Module,Solar Module: 1000; software or database
  multi-Si PV cell(Multi-Si PV cell production)

## Inputs
All rows: software or database
- Electricity: 5244.84
  Electricity (Multi-Si PV cell production)
- Heavy oil: 0.02688
  Heavy oil (Multi-Si PV cell production)
- Diesel oil: 1.76
  Diesel(Multi-Si PV cell production)
- Hydrogen: 1.8
  Hydrogen(Multi-Si PV cell production)
- sodium: 8.73
  Sodium(Multi-Si PV cell production)
- aluminium: 10.82
  Aluminum powder(Multi-Si PV cell production)
- Lime: 2.03
  Lime(Multi-Si PV cell production)
- quartz sand: 18.76
  Quartz sand(Multi-Si PV cell production)
- fluorspar: 48.79
  Fluorite(Multi-Si PV cell production)
- Sulfuric acid: 65.06
- Oleum: 23.36
- sodium hydroxide: 26.88
  NaOH
- Organic Chemistry: 14.43
  Organic chemicals
- Limestone: 5.87
  Lime stone
- sodium nitrate: 1.17
  Sodium nitrate
- sodium sulfate: 0.53
  Mirabilite
- Glass for recovery (shards): 48.53
  Reused broken glass
- Silver Paste: 0.09234
  Silver paste
- TPT film: 9.83
- Phosphorus Oxychloride: 0.0208
  Phosphorus oxychloride
- nitrogen: 10.57
  Nitrogen
- Ammonia: 0.00254
- Terpineol: 0.00609
- Soft water: 1140
  Softened water
- Triethylaluminium: 0.55
  Triethyl aluminum
- water: 6.69
  Water
- Polyfoam: 24.24
- Silicon nitride: 0.01522
- Lactic acid: 0.06827
- Steel Wire,Cable: 4.09
  steel wire
- Hydrochloric acid: 0.5
  Hydrochloric acid (38%)
- Hydrofluoric acid: 2.77
  Hydrofluoric acid (40%)
- Nitric acid: 0.95
  Nitric acid(70%)
- Silicon carbide,Silicon carbide: 14.2
  Silicon carbide
- Silica sand: 59.68
- Aluminum hydroxide: 1.25
- dolomite: 13.12
  Dolomite
- Antimony(III) oxide: 0.19
  Antimony trioxide
- aluminium: 0.42
  Aluminum paste
- Ethylene-vinyl acetate copolymer,Ethylene-vinyl acetate copolymer,Ethylene-vinyl acetate copolymer: 18.95
  EVA film
- aluminium: 24.85
  Aluminum bar
- Silane: 0.00051
- oxygen: 9.59e-5
  Oxygen
- Ethanol: 1.53

## Outputs
All rows: software or database
- processed water to groundwater, regionalized, CN: 2.33
  Wastewater
- waste incineration of municipal solid waste (MSW): 23750
  Solid waste Incineration
- municipal solid waste deposition: 8.58
  Solid waste Landfill
- toluene: 0.03301
  Toluene
- fluoride: 0.00194
  Fluoride
- Nitrogen oxides: 0.0349
- hydrogen chloride: 0.00034
  Hydrogen chloride
- chlorine: 3e-5
  Chlorine
- Silicon carbide,Silicon carbide: 0.00169
  Silica
- Ethylene glycol dimethyl ether: 0.07147
  Glycol dimethyl ether (二乙二醇二甲醚)
- particles (PM2.5 - PM10): 0.03103
  Particulates
- sulfur dioxide: 0.05935
  Sulfur dioxide
- particles (> PM10),particles (>PM10): 0.00045
  Lampblack gas
- ammonia: 5e-5
  Ammonia
- non-methane volatile organic compounds: 0.00635
  Non-methane volatile organic compounds

## Deviations from the LCI method approaches
本研究旨在通过生命周期评估，探讨中国多晶硅光伏电池的环境效应。

## Data selection and combination
本研究使用了2010年浙江省多晶硅、太阳能玻璃、光伏晶圆和电池生产的现场数据(即原材料、能源、存储、直接排放和废弃物处理)

## Use advice
使用此数据的用户应遵守确保在多晶硅光伏电池生产的生命周期评估中包括所有相关过程的方法论指南。应特别关注系统边界、关于1 kWp多晶硅光伏电池生产功能单元的假设、直接排放的整合以及废物管理实践。用户还必须注意，该数据是浙江省特定的，并反映了2010年的情况，可能需要针对其他地区或时间情景进行调整。

## Review details
清单： 内部审查通过几个迭代步骤完成，涉及原始数据验证、原始数据记录、代表性、完整性、与 ISO 14040 和 14044 有关的建模的一致性。

## Data sources
- Hong, J., Chen, W., Qi, C., Ye, L. & Xu, C. Life cycle assessment of multicrystalline silicon photovoltaic cell production in China. Solar Energy 133, 283–293 (2016).
