# Highpuritybismuth|Bismuth-containingmaterials|Fireprocesscruderefining+fireprocessrefining|All sizes / /|高纯铋|含铋物料①|火法粗炼+火法精炼|所有规模

Dataset: ILCD process, Partly terminated system
Geography: CN
Reference year: 2019
Classification: Materials production / Other mineralic materials
Generated by: The data was created by the Office of the Second National Pollution Source Census of the Ministry of Ecology and Environment, and the data was organized by the TianGong Plan team for ILCD format / 生态环境部第二次全国污染源普查工作办公室创建数据，天工计划团队常慧敏整理数据为ILCD格式
Amounts: no units in this file; such an amount is in the reference unit of its flow, which a separate flow dataset defines
copyright: false

## Technology and included processes
the treatment technology for the pollution of bismuthdidn't offered
污染物指标工业废气量的末端治理技术未说明，末端治理设施实际运行率（k值）计算公式为k=废气治理设施年正常运行时间（小时）/企业年正常生产时间（小时），①含铋物料包括铅阳极泥、氧化铋渣、铋精矿等。

## Reference product
- bismuth: 1000; calculated
  原文件中描述污染物类别为Product，污染物指标为高纯铋，此处对其进行了匹配工作，将其匹配到LCAflow库里面相最符合的流，污染物指标备注为工业废气量

## Outputs
- Exhaust gas: nan; calculated
  原文件中描述污染物类别为废气，污染物指标为工业废气量，此处对其进行了匹配工作，将其匹配到LCAflow库里面相最符合的流，污染物指标备注为工业废气量
- Nitrogen oxides: 8.5, 8.5 (2 entries); calculated
  原文件中描述污染物类别为废气，污染物指标为氮氧化物，此处对其进行了匹配工作，将其匹配到LCAflow库里面相最符合的流，污染物指标备注为氮氧化物
- sulfur dioxide: 14.342, 14.342 (2 entries); calculated
  原文件中描述污染物类别为废气，污染物指标为二氧化硫，此处对其进行了匹配工作，将其匹配到LCAflow库里面相最符合的流，污染物指标备注为二氧化硫
- particles (PM2.5 - PM10): 2.4055, 2.4055, 24.055, 24.055, 1.9244 (5 entries); calculated
  原文件中描述污染物类别为废气，污染物指标为颗粒物，此处对其进行了匹配工作，将其匹配到LCAflow库里面相最符合的流，污染物指标备注为颗粒物

## Data sources
- 第二次全国污染源普查产排污核算系数手册（试用版）,四级代码3219文件，在完整版文件中第5060页
