# Soil and groundwater remediation;Ex-situ;groundwater pump and treat; operation

Dataset: ILCD process, Unit process, single operation
Geography: CA
Reference year: 2007
Classification: Other Services / Repair and maintenance
Generated by: Wang Ning, wang_ning@caep.org.cn
Owner: Tiangong LCI Data Working Group
Review: Dependent internal review by Tiangong LCI Data Working Group
Amounts: no units in this file; such an amount is in the reference unit of its flow, which a separate flow dataset defines
licenseType: Free of charge for all users and uses

## General comment
Consumption of electricity to operate extraction wells and wastewater disposal facilities

## Geography
The contaminated area was located 600 m from a river shore in the northern part of the prov-ince of Quebec， Canada.

## Technical purpose
The industrial process described is used for the remediation of contaminated soil and groundwater. Specifically, it involves the operation of an ex-situ groundwater 'pump and treat' system, which is utilized for the extraction and subsequent treatment of contaminated groundwater. This process is typical for environmental cleanup projects where soil or groundwater has been contaminated by industrial activities or accidental spills. In this case, the application is pertinent to a contaminated area situated 600 meters from a river shore in the northern part of the province of Quebec, Canada.

## Reference product
- Remediated groundwater: 4.2705e6

## Inputs
- Electricity: 6.701e7; article inperiodical
  消耗电力是抽出-处理系统运行
- contaminated groundwater: 4.2705e6

## Use advice
Users applying this data set must pay attention to the specific context and geographical location indicated, as the process efficiency and application can vary based on local conditions. It is important to ensure that this data set matches the user's intended geographical scope and contamination scenarios. Additionally, when modeling the use phase behavior, users should include the consumption of electricity for the pump and treat system. Only apply this data to scenarios with similar environmental and operational conditions to those described in the dataset to maintain accuracy and relevance.

## Review details
Inventory: The internal review was done by several iteration steps concerning raw data validation, raw data documentation, representativity, completeness and consistency of modelling with regard to ISO 14040 and 14044.
