# 农田修复;原位修复;钝化修复;后端处置;样品检测

Dataset: ILCD process, Unit process, single operation
Geography: NJ-YN-CN
Classification: Other Services / Repair and maintenance
Generated by: 肖萌, xiaomeng@mail
Owner: 天工LCI数据工作小组
Review: Dependent internal review by 天工LCI数据工作小组
Amounts: no units in this file; such an amount is in the reference unit of its flow, which a separate flow dataset defines
licenseType: Free of charge for all users and uses

## General comment
稳定化修复的后端处置阶段，采用火焰原子吸收光谱法进行样品检测。

## Geography
云南省怒江州受铅锌矿污染某耕地土壤 污染修复工程

## Technical purpose
该工程过程适用于云南省怒江州铅锌矿污染耕地土壤的修复。覆盖面积为16公顷，使用稳定化技术在后端处置阶段确保作物中Cd和Pb浓度符合标准要求，并且土壤中有效态Cd和Pb浓度降低超过70%。过程包括原位修复和固化/稳定化修复方法，并通过火焰原子吸收光谱法对样品进行测试，以验证修复的有效性。

## Reference product
- Soil Sample: 1000; input; measured
  运输到场检测的样土

## Inputs
- calcium chloride: 0.5; measured
- Electricity: 2880; measured

## Outputs
- Soil complete test: 1000; measured
  检测完成的土壤

## Use advice
数据集使用者需注意，此数据覆盖的修复过程特别适应于云南省铅锌矿区重金属污染的农田条件。所应用的稳定化技术应该根据区域参数、作物类型和污染水平进行具体分析。用户在将此数据集应用到不同地区或污染场景时，需要调整程序细节和预期成果。另外，修复的有效性应该通过文档中记录的火焰原子吸收光谱法进行验证，确保作物和土壤中Cd和Pb浓度符合标准。

## Review details
清单： 内部审查通过几个迭代步骤完成，涉及原始数据验证、原始数据记录、代表性、完整性、与 ISO 14040 和 14044 有关的建模的一致性。

## Data sources
- 肖萌 et al. 农田污染钝化修复环境影响定量评估方法与案例分析. 中国环境科学 43, 3571–3581 (2023).
