# 水泥生产;水泥, 普通硅酸盐水泥, 42.5MPa;新型干法, 2000 t/d;粉煤灰

Dataset: ILCD process, Unit process, black box
Geography: CN
Reference year: 2005
Classification: Unit processes / Materials production / Other mineralic materials
Generated by: #REF!, ysqsophia@gmail.com
Owner: 天工LCI数据工作小组
Review: Dependent internal review by 天工LCI数据工作小组
Amounts: no units in this file; such an amount is in the reference unit of its flow, which a separate flow dataset defines
copyright: false
licenseType: Free of charge for all users and uses

## General comment
两条2000t/d新型干法生产线。

## Time period
2005-2006年

## Technology and included processes
两条2000t/d新型干法生产线

## Technical purpose
所描述的工业过程为使用新型干法生产42.5MPa的普通硅酸盐水泥，该过程涉及两条每日2000吨的生产线。该类型的水泥主要用于建筑行业，用于创造需要高强度和耐久性的混凝土结构和产品。它适用于包括建筑物、桥梁、高速公路和其他基础设施项目在内的广泛应用。

## Model description
选取1吨28天抗压强度为42.5MPa的42.5#普通硅酸盐水泥所具有的使用性能为一个功能单元，32.5#水泥则按照1:1.25的比例换算为42.5#水泥，即看成1个单位的32.5#水泥与1.25个单位的42.5#水泥具有类似的环境影响。研究范围为生料制备、熟料煅烧及水泥粉磨，其余的则排除在系统边界之外，主要涉及的原料消耗有石灰石、粘土质原料、石膏等、消耗的能源有煤、电力及一定量的燃料油，并对外排放粉尘及二氧化碳、二氧化硫等环境污染性气体。

## Reference product
- cement, ordinary portland cement, 42.5MPa: 1000
  42.5普通硅酸盐水泥

## Inputs
- limestone, crushed, for mill: 1270
  石灰石
- clay: 70.4
  粘土质原料
- iron, powder: 25.1
  铁质矫正原料
- gypsum stone (CaSO4-dihydrate): 57.9
  石膏
- ash: 139
  粉煤灰
- Electricity: 388.8
  电力
- hard coal; 26.3 MJ/kg: 134
  原煤
- heavy fuel oil: 0.0455
  原文献是燃料油（即重油）

## Outputs
- carbon dioxide (fossil): 798
  CO2。由于没有完善的监测机制和统计制度，调研数据表中某些企业在污染物排放上的填写存在很多不足，集中表现为二氧化碳、二氧化硫、氮氧化物及一氧化碳等排放数量缺失。对于生命周期评价而言，主要污染物排放物的数量缺失严重影响了评价的精度，因此需要采用一定的估算方法进行估算。采用当前通用的或是有关文献中关于水泥生产污染物排放的研究，对几种主要污染物的排放数量予以估算，以弥补调研数据的不足。
- carbon monoxide (biogenic),carbon monoxide (biogenic): 4.17
  CO。由于没有完善的监测机制和统计制度，调研数据表中某些企业在污染物排放上的填写存在很多不足，集中表现为二氧化碳、二氧化硫、氮氧化物及一氧化碳等排放数量缺失。对于生命周期评价而言，主要污染物排放物的数量缺失严重影响了评价的精度，因此需要采用一定的估算方法进行估算。采用当前通用的或是有关文献中关于水泥生产污染物排放的研究，对几种主要污染物的排放数量予以估算，以弥补调研数据的不足。
- Nitrogen oxides: 1.34
  NOx。由于没有完善的监测机制和统计制度，调研数据表中某些企业在污染物排放上的填写存在很多不足，集中表现为二氧化碳、二氧化硫、氮氧化物及一氧化碳等排放数量缺失。对于生命周期评价而言，主要污染物排放物的数量缺失严重影响了评价的精度，因此需要采用一定的估算方法进行估算。采用当前通用的或是有关文献中关于水泥生产污染物排放的研究，对几种主要污染物的排放数量予以估算，以弥补调研数据的不足。
- sulfur dioxide: 1.25
  SO2。由于没有完善的监测机制和统计制度，调研数据表中某些企业在污染物排放上的填写存在很多不足，集中表现为二氧化碳、二氧化硫、氮氧化物及一氧化碳等排放数量缺失。对于生命周期评价而言，主要污染物排放物的数量缺失严重影响了评价的精度，因此需要采用一定的估算方法进行估算。采用当前通用的或是有关文献中关于水泥生产污染物排放的研究，对几种主要污染物的排放数量予以估算，以弥补调研数据的不足。
- particles (> PM10): 1.25
  粉尘，未标明粒径，按PM>10处理。

## Sampling procedure
主要调研2004~2007年其材料生产的环境负荷信息，将每年可考察的一条材料生产线或多条生产线作为研究对象。经统计，总计调研了115家建材企业，共234个研究对象。具体而言，水泥行业37家企业，其中新型干法企业32家，立窑企业5家，共96个研究对象。

## Use advice
所提供的数据集代表使用新型干法生产42.5#普通硅酸盐水泥的环境影响，基于1吨具有28天抗压强度为42.5MPa的水泥的性能以及32.5#水泥的比例影响。建议用户在使用此类型水泥的项目中应用此数据进行生命周期评估，根据项目中使用的具体数量和类型的水泥调整值。研究范围包括生料制备、熟料煅烧、水泥粉磨，而排除系统边界外的其他阶段，如运输和安装。它还包括原材料消耗和能源使用，考虑粉尘、CO2和SO2等排放。用户应注意将32.5#水泥转换为42.5#水泥的方法论以供评估之用。

## Review details
清单： 内部审查通过几个迭代步骤完成，涉及原始数据验证、原始数据记录、代表性、完整性、与 ISO 14040 和 14044 有关的建模的一致性。

## Data sources
- 张群. (2009). 材料生命周期分析网络数据库的研究与开发 [硕士, 北京工业大学].
