# 市政污泥处理与处置;湿污泥 含水率70%-75%;与煤混烧发电

Dataset: ILCD process, Unit process, single operation
Geography: CN
Classification: Unit processes / End-of-life treatment / Waste water treatment
Functional unit: The life cycle study boundary starts from the wet sludge (moisture content is about 70% ~ 75%) after mechanical compression and dewatering in the sewage treatment plant to the final disposal functional unit adopts 1t wet sludge after mechanical compression.
Generated by: 金思甜, 2331276@tongji.edu.cn
Owner: 天工LCI数据工作小组
Review: Dependent internal review by 天工LCI数据工作小组
Amounts: no units in this file; such an amount is in the reference unit of its flow, which a separate flow dataset defines
copyright: ['opt4ROkqig']
licenseType: Free of charge for all users and uses

## General comment
本文对 25ＭＷ混烧发电系统进行分析，以 130ｔ/h蒸发量的循环流化床系统进行污泥掺烧发电，利用锅炉排烟的热量对污泥进行直接干燥处理。

## Technology and included processes
烟气进口温度 160℃，烟气出口 温度 85℃，烟气量为 173000m³/h。采用干料返混干燥系统将湿污泥（70.5％水分含量）干燥到 30％水分含量左右排出干燥系统，然后进入锅炉与煤进行掺烧发电，锅炉效率 85．58％，污泥处理量达到 10.49ｔ/h，干燥处理 后干化污泥产量为 4.42ｔ/h。为保证炉内燃烧稳定，燃烧温度控制在 900～950℃，干化污泥与煤掺烧质量比率为 20∶80。

## Technical purpose
描述的工业处理过程涉及市政污泥的处理和处置。该过程专门处理来自污水处理设施的湿污泥，水分含量为70%-75%。这种废物在共同燃烧前要经过干燥和机械压缩处理与煤炭共同焚烧,以此方法生成电力。 主要应用于废物转能源的厂家,用于将湿污泥转换为可利用的能源，从而服务于废物管理和能源生产部门。

## Reference product
- Sludge: 1000; input; estimated
  1t湿污泥（水分含 量在 70％ ～75％左右 ）

## Inputs
- hard coal; 26.3 MJ/kg: 1685; measured

## Outputs
All rows: measured
- carbon monoxide (fossil): 0.21
  原文未区分biogenic和fossil，根据专家判断此处为fossil。
- carbon dioxide (fossil): 175.09
  原文未区分biogenic和fossil，根据专家判断此处为fossil。
- Nitrogen oxides: 6.19801
- sulfur oxides: 0.53477
- hydrogen chloride: 0.10707
- Flue dust: 0.24
  烟尘
- Electricity: 219.816

## Use advice
使用这个市政污泥处理与处置生命周期评估数据集的用户应该承认从污水处理厂经过机械压缩脱水的湿污泥到最终处置的边界限制。功能单位是机械压缩后的1吨湿污泥的量，这意味着所有的计算和分析应该规范到这一数量。应用此数据时，应考虑与共同焚烧排放、污泥运输以及任何上游处理影响相关的方法论一致性。由于污水污泥特性的多样性，可能需要对数据进行地方性调整。还应注意共同焚烧过程中的规章制度和环境影响。

## Review details
清单： 内部审查通过几个迭代步骤完成，涉及原始数据验证、原始数据记录、代表性、完整性、与 ISO 14040 和 14044 有关的建模的一致性。

## Data sources
- 廖艳芬,漆雅庆,马晓茜.城市污水污泥焚烧处理环境影响分析[J].环境科学学报,2009,29(11):2359-2365.DOI:10.13671/j.hjkxxb.2009.11.015.
