# 煤矿开采;提升运出矿井;储存煤炭

Dataset: ILCD process, Unit process, single operation
Geography: CN
Reference year: 2005
Classification: Unit processes / Energy carriers and technologies / Energetic raw materials
Generated by: 尹琳琳, yinlinlin0623@163.com
Owner: 天工LCI数据工作小组
Review: Dependent internal review by 天工LCI数据工作小组
Amounts: no units in this file; such an amount is in the reference unit of its flow, which a separate flow dataset defines
licenseType: Free of charge for all users and uses

## General comment
矿后活动瓦斯排放量指煤炭提升运出矿井后在 储存、运输、堆放过程中排出的瓦斯量，即残存于煤中的瓦斯含量。

## Geography
1994年矿后活动瓦斯排放量。矿后活动瓦斯排放量指煤炭提升运出矿井后在储存、运输、堆放过程中排出的瓦斯量即残存于煤中的瓦斯含量。我国对高瓦斯和突出矿井煤的残 存瓦斯量进行过专题研究各种不同变质程度煤的残存瓦斯含量各有不同。

## Technology and included processes
矿后活动瓦斯排放量:煤炭提升运出矿井后在储存、运输、堆放过程中排放的瓦斯量。

## Technical purpose
该数据集描述了煤炭开采后抽提活动相关的排放，包括煤炭的储存、运输和堆放。可用于评估煤炭作为主要能源或在多种应用中作为材料如电力生成、钢铁生产、以及作为冶金过程中还原剂的生命周期中的环境影响。

## Reference product
- Hard coal, at consumer EU-27: 2.09121e10; uniform; measured
  晋城市1994年的煤炭产量为20.9121Mt(百万吨)。

## Inputs
- Hard coal, at consumer EU-27: 2.09121e10; uniform; estimated
  文献中没有说明煤炭的投入量，假设：煤炭的投入量:产出量=1:1

## Outputs
- methane (fossil): 2.09121e7; uniform; calculated
  晋城市矿后活动煤炭的瓦斯排放量1994年为20.91Ｍｍ3(百万立方米)(瓦斯排放系数1m3/t*煤炭产量20.9121Mt所得结果)；原文未区分bio和fossil的流，根据专家判断此处为fossil。

## Use advice
在使用此数据集进行生命周期评估时，用户应考虑所评估煤炭的具体特性，如其瓦斯含量和变质程度，因为这些因素可能会显著影响排放因子。重要的是确保研究的地理和技术范围反映出所评估矿井的条件。此外，在将此数据应用于生命周期模型时，应明确定义后续煤炭使用（例如，燃烧或化学加工）的包含或排除，以避免排放的双重计算。

## Review details
清单： 内部审查通过几个迭代步骤完成，涉及原始数据验证、原始数据记录、代表性、完整性、与 ISO 14040 和 14044 有关的建模的一致性。

## Data sources
- 程建军. 煤矿瓦斯排放现状及利用. 煤矿开采 24–26 (2007).
