# 太阳能级多晶硅铸锭

Dataset: ILCD process, Unit process, single operation
Geography: CN
Reference year: 2017
Classification: Energy carriers and technologies / Other non-renewable fuels
Functional unit: In this paper, a 1 kWp solar PV system consisting of five 200 Wmodules made of 54 multi-Si cells, each with a size of 156*156 mm2 and 16% efficiency, was used as the primary study object
LCI method principle: Attributional
LCI method approaches: Allocation
Generated by: 杨锦锋, yjfzfshn@163.com
Owner: 天工LCI数据工作小组
Review: Dependent internal review by 天工LCI数据工作小组
Amounts: no units in this file; such an amount is in the reference unit of its flow, which a separate flow dataset defines
copyright: false
licenseType: Free of charge for all users and uses

## General comment
多晶硅

## Geography
2011-2016年中国太阳能光伏产业生命周期环境影响评价

## Time period
文章发表

## Technology and included processes
在石英坩埚中对太阳能级多晶硅进行熔融、凝固和退火处理后，可生产出铸锭

## Technical purpose
本工艺所描述的太阳能级多晶硅铸锭过程是用于制造多晶硅电池的关键步骤，这些电池是组装太阳能光伏模块的主要组成部分。再将这些模块组合起来，创建能将太阳能转换为电能的太阳能光伏系统。在此案例中，铸锭用于生产1千瓦峰值（kWp）太阳能光伏系统的电池，该系统由五个200瓦模块组成，每个模块包含54片尺寸为156*156毫米、效率为16%的多晶硅电池。该过程适用于太阳能行业，特别是在2011至2016年期间中国太阳能光伏产业生命周期环境影响评估的背景下。

## Reference product
- Multi-Si ingot: 5.6014; article inperiodical
  multi-Si ingot (Multi-Si ingot)

## Inputs
All rows: article inperiodical
- Solar grade multi-Si: 5.6519
- electricity: 199.968
  Electricity
- argon: 10.752
  Argon
- fluorine: 0.2599
  hydrofluoric acid (49%)
- sodium hydroxide: 0.0482
  Sodium hydroxide

## Outputs
- hydrogen fluoride: 0.0056; article inperiodical
  Hydrogen fluoride

## Deviations from the LCI method approaches
基于中国太阳能光伏生命周期评价的现有文献(Fu 等，2015; He，2013; Hong 等，2016; Li 和 Yu，2014; Li 和 Chang，2012; Liang，2012; Yang 等，2015; Yu 等，2017; Xie 等，2015) ，得到了一份生命周期清单

## Use advice
在使用本研究得出的生命周期清单（LCI）数据时，用户应确保所捕获的特定过程真实反映了2011至2016年间中国生产适用于太阳能的多晶硅铸锭的环境影响情况，如参考文献所记录。应考虑到2016年后可能发生的技术变化，这些变化可能会改变影响评估结果。必须考虑包括或排除回收过程以及在所研究系统中对特定使用阶段行为建模等方法论假设。用户还应核实数据与任何更新的国家或国际标准和法规的一致性，这些标准和法规与太阳能光伏系统制造相关。

## Review details
清单： 内部审查通过几个迭代步骤完成，涉及原始数据验证、原始数据记录、代表性、完整性、与 ISO 14040 和 14044 有关的建模的一致性。

## Data sources
- Xu, L., Zhang, S., Yang, M., Li, W. & Xu, J. Environmental effects of China’s solar photovoltaic industry during 2011–2016: A life cycle assessment approach. Journal of Cleaner Production 170, 310–329 (2018).
