# ReactiveAdhesives|Polyurethane,epoxyresin,cyanoacrylate,modifiedacrylate,neoprenepolyacrylate,hardenerplasticizer,thinner,filler,auxiliary|Polymerization, physical mixing|All sizes / /|反应型胶黏剂|聚氨酯、环氧树脂、氰基丙烯酸酯、改型丙烯酸酯、氯丁橡胶聚丙烯酸酯、固化剂增塑剂、稀释剂、填料、助剂|聚合反应、物理混合|所有规模

Dataset: ILCD process, Partly terminated system
Geography: CN
Reference year: 2019
Classification: Materials production / Other mineralic materials
Generated by: The data was created by the Office of the Second National Pollution Source Census of the Ministry of Ecology and Environment, and the data was organized by the TianGong Plan team for ILCD format / 生态环境部第二次全国污染源普查工作办公室创建数据，天工计划团队常慧敏整理数据为ILCD格式
Amounts: no units in this file; such an amount is in the reference unit of its flow, which a separate flow dataset defines
copyright: false

## Technology and included processes
the Technical of end-of-pipe management technology for pollution Reactive Adhesiveis/，Its Technical efficiency of end-of-pipe management0
污染物指标工业废气量的末端治理技术是/，其效率为0

## Reference product
- Reactive Adhesive: 1000; calculated
  原文件中描述污染物类别为Product，污染物指标为反应型胶黏剂，此处对其进行了匹配工作，将其匹配到LCAflow库里面相最符合的流，污染物指标备注为工业废气量

## Outputs
- Exhaust gas: 4300; calculated
  原文件中描述污染物类别为废气，污染物指标为工业废气量，此处对其进行了匹配工作，将其匹配到LCAflow库里面相最符合的流，污染物指标备注为工业废气量
- volatile organic compound: 0.5056, 0.6004, 0.3871 (3 entries); calculated
  原文件中描述污染物类别为废气，污染物指标为挥发性有机物，此处对其进行了匹配工作，将其匹配到LCAflow库里面相最符合的流，污染物指标备注为挥发性有机物

## Data sources
- 第二次全国污染源普查产排污核算系数手册（试用版）,四级代码2669文件，在完整版文件中第4111页
