# 硫酸钴生产 ; 电池级硫酸钴 ; 湿法 ; 新疆省镍铜钴矿

Dataset: ILCD process, Unit process, single operation
Geography: XJ-CN
Reference year: 2020
Classification: Unit processes / Materials production / Inorganic chemicals
Generated by: 孙鑫, xs389@cornell.edu
Owner: 天工LCI数据工作小组
Review: Dependent internal review by 天工LCI数据工作小组
Amounts: no units in this file; such an amount is in the reference unit of its flow, which a separate flow dataset defines
licenseType: Free of charge for all users and uses

## General comment
此处使用了中国钴的主要产地新疆某企业在矿石开采和选矿阶段的实际操作数据。钴精炼阶段的数据来自实验。精炼数据采用了中国东南部一家钴精炼厂 2019 年的年度运行数据。该公司是中国五大钴精炼厂之一。本研究选择的技术是湿法冶金精炼，这与所有五个项目一致。该技术作为国际主流炼钴技术已在多篇论文中提及。中国基于工艺的生命周期清单数据库提供了二级数据支持，以确保与中国现状保持一致。一些化学品（如 Z-200、O-乙基二硫代碳酸钾、羧甲基纤维素、黄原酸丁酯、气浮丁胺、P204 和 P507）的生产数据不可用。因此，Ecoinvent 数据库被用来弥补数据缺失的缺口。中国的现状（如废物处理、运输和能源）被用来调整欧洲的数据，以减少欧洲的区域化效应。

## Technology and included processes
系统边界被描述为硫酸钴生产过程中的所有活动。"从摇篮到终点 "生命周期评估研究包括从矿石开采到选矿、初级提取和精炼过程的所有相关生命周期阶段。所选矿址位于中国新疆省，是一个钴含量为 0.04% 的镍铜钴矿。钴矿石经过选矿工艺精选后，精矿的钴含量可达到 0.3%。采用浮选法进行三次筛选后，钴精矿的标准（即钴含量 9.69%）即可达到。钴精矿将通过精炼工艺制成各种形式的精炼钴产品。钴精炼采用湿法冶金技术，主要包括球磨、浸出、除铁、P204 萃取、P507 萃取、回萃和蒸发结晶等工序。

## Technical purpose
该数据集代表电池级硫酸钴的生产，电池级硫酸钴常用于制造锂离子电池，这些电池广泛用于电动车辆、便携式电子产品和能量存储系统。硫酸钴通过湿法冶金工艺从位于新疆省的镍铜钴矿中生产。

## Reference product
- Cobalt Sulfate: 1000; measured

## Inputs
All rows: measured
- industrial area: 22.23
- cobalt: 210
- transport in t*km: 1530.6
- sodium carbonate: 860
- Limestone: 50
- sodium hydroxide: 400
- Kerosene: 5.13
- Electricity: 41488.2
- Natural gas, at consumer EU-27: 71.11
- water: 104140
- Light fuel oil: 41.73
- steel rebar: 840
- Hard coal, at consumer EU-27: 2650
- to urban, discontinuously built: 1.32
- Isopropyl Ethyl Thionocarbamate: 2.57
- O-ethyl potassium carbonodithioate: 2.57
- Sodium hydrosulfide: 7.35
- Butylamine aerofloat: 8.75
- Sulfuric acid: 380
- hydrogen chloride: 1190
- Ammonia (28%): 7.6
- Ammonium bicarbonate: 240
- Calcium Oxide: 510
- Carboxymethyl cellulose: 10.3
- Butyl xanthate: 150
- Sodium Hydrosulphite: 110.91
- Sodium sulfide: 12.45
- Oxalic acid: 18.98
- Copper extractant: 1.01
- Disooctyl Phosphate (P204): 0.6
- 2-ethylhexyl hydrogen -2-ethylhexylphosphonate: 1.2

## Outputs
All rows: measured
- waste water - untreated: 14940
- municipal solid waste deposition: 4.39
- waste incineration of municipal solid waste (MSW): 1.06
- Suspended solids, unspecified: 0.04201
- chemical oxygen demand: 0.0733
- decane: 0.00413
- nickel: 0.00133
- arsenic: 0.00958
- mercury: 0.00029
- cobalt: 0.00038
- copper: 7e-5
- manganese: 0.00452
- zinc: 6e-5
- sulfide: 1e-5
- carbon dioxide (fossil): 71.66
- particles (PM10): 0.66
- sulfur dioxide: 0.00049
- nitrous oxide: 0.03939
- hydrogen chloride: 0.00167
- hydrogen sulfide: 5.42e-6

## Use advice
在使用此数据进行生命周期评估时，应特别注意数据的区域特异性，因为该过程基于新疆省的矿石提取。用户必须考虑过程的技术适用性，如所使用的湿法冶金方法，并确保其与系统边界内的其他过程保持一致。还应注意是否包括再循环活动，特别是如果评估范围内考虑了二次材料（回收钴）。

## Review details
清单： 内部审查通过几个迭代步骤完成，涉及原始数据验证、原始数据记录、代表性、完整性、与 ISO 14040 和 14044 有关的建模的一致性。

## Data sources
- Zhang, T. et al. Cradle-to-gate life cycle assessment of cobalt sulfate production derived from a nickel–copper–cobalt mine in China. Int J Life Cycle Assess 26, 1198–1210 (2021).
