# 炼铁;铁水;高炉炼铁（Z08）

Dataset: ILCD process, Unit process, single operation
Geography: CN
Reference year: 1998
Classification: Materials production / Metals and semimetals
Generated by: 付翔, 1162850692@qq.com
Owner: 天工LCI数据工作小组
Review: Dependent internal review by 天工LCI数据工作小组
Amounts: no units in this file; such an amount is in the reference unit of its flow, which a separate flow dataset defines
copyright: false
licenseType: Free of charge for all users and uses

## General comment
来自表 4-16 Z08 钢厂生产吨材环境负荷编目表

## Time period
论文提到钢铁企业环境总体数据为1998年的吨钢环境基础数据。

## Technical purpose
该工业过程的技术应用是利用高炉生产铁水，这是炼钢的关键初步步骤。这个高温过程包括将铁矿石还原为铁水（生铁），并为各种钢铁产品的大规模生产奠定基础。

## Reference product
- Molten Iron: 1061; measured
  铁水

## Inputs
All rows: measured
- Energy, geothermal, converted: 15068.8
- water: 33556
- Sinter: 1869
  烧结矿
- Metallurgical ash: 57.2
  冶金白灰
- coke,Coke: 635.5
  焦炭

## Outputs
All rows: measured
- Dust (unspecified, from stack): 0.095
  烟尘
- Dust (unspecified, from stack): 1.856
- sulfur dioxide: 0.013
- cyanide: 5.9e-5
- phenol: 3.2e-5
  挥发酚
- Hydrocarbons, aliphatic, alkanes, unspecified: 0.013652
  石油类
- Suspended solids, unspecified: 0.263149
- chemical oxygen demand: 0.14262
- Dust (unspecified, from stack): 49.612
  集尘
- Spoil (deposited, hibernating in ground, non elementary flow): 658.032

## Use advice
此数据的使用者应考虑数据的技术特性，该数据涉及的是以代码Z08标识的高炉（BF）方法，此方法来源于1998年钢铁生产的环境负荷编目。此数据可能不代表当前或其他替代的铁和钢生产技术。使用者在将此数据应用到当代不同的技术环境或在模拟钢铁生产过程的环境影响时，应评估是否需要进行调整。

## Review details
清单： 内部审查通过几个迭代步骤完成，涉及原始数据验证、原始数据记录、代表性、完整性、与 ISO 14040 和 14044 有关的建模的一致性。

## Data sources
- 周和敏. 钢铁材料生产过程环境协调性评价研究. (北京工业大学, 2001).
