# 稀土磁选;稀土;原位浸出;钕铁硼(NdFeB)磁铁

Dataset: ILCD process, Unit process, single operation
Geography: NMG-CN
Reference year: 2014
Classification: Materials production / Non-energetic raw materials
Functional unit: The functional unit is a 1 kg NdFeB magnet
LCI method principle: Attributional
LCI method approaches: Allocation - market value; Allocation - mass
Generated by: 汪涛, twang@iue.ac.cn
Owner: 天工LCI数据工作小组
Review: Dependent internal review by 天工LCI数据工作小组
Amounts: no units in this file; such an amount is in the reference unit of its flow, which a separate flow dataset defines
copyright: false
licenseType: Free of charge for all users and uses

## General comment
所描述的稀土磁选和原位浸出工艺用于生产钕铁硼（NdFeB）磁铁。这些磁铁通常用于包括电子设备制造、风力发电机、电动车马达和其他需要强烈永磁材料的高科技应用中。

## Geography
Bayan Obo (China)

## Technology and included processes
所有三个矿床生产 Nd 和 Pr 的基本过程都是相同的。 Nd 和 Pr 是相同的，除了最后的溶剂萃取步骤 (SX5)，其中两者被分离。

## Reference product
- Ore pulp: 724; article inperiodical
  Ore pulp. Bayan Obo: input for next process: Flotation

## Inputs
- Electricity: 0.3276; article inperiodical
  Bayan Obo: calculation based on Selection Guide for Process Equipment3

## Outputs
- Iron oxide: 265.6; article inperiodical
  Iron oxide. Bayan Obo: calculation based on ore concentration and yield
- Niobium oxide: 0.76; article inperiodical
  Niobium oxide. Bayan Obo: calculation based on ore concentration and yield
- tailings (unspecified): 158.7; article inperiodical
  Bayan Obo: estimated by experts from RWTH Aachen University

## Deviations from the LCI method approaches
In this study, an allocation method based on the market prices of REOs28 is considered. To estimate uncertainties that refer to the allocation method, a mass-based allocation is undertaken as a sensitivity analysis

## Use advice
使用本生命周期评估数据进行NdFeB磁铁的生产时，确保考虑基于稀土氧化物（REOs）市场价格的分摊方法。为了更全面地了解环境影响，还应进行基于质量分摊的敏感性分析。此数据集特定于1公斤NdFeB磁铁的功能单元，任何外推应保持等价比率或根据被评估磁铁的实际重量进行调整。

## Review details
清单： 内部审查通过几个迭代步骤完成，涉及原始数据验证、原始数据记录、代表性、完整性、与 ISO 14040 和 14044 有关的建模的一致性。

## Data sources
- Marx, J., Schreiber, A., Zapp, P. & Walachowicz, F. Comparative Life Cycle Assessment of NdFeB Permanent Magnet Production from Different Rare Earth Deposits. ACS Sustainable Chem. Eng. 6, 5858–5867 (2018).
