# 焦化;焦炭;炼焦;干熄焦技术

Dataset: ILCD process, Unit process, single operation
Geography: CN
Classification: Unit processes / Energy carriers and technologies / Hard coal based fuels
Generated by: 付翔, 1162850692@qq.com
Owner: 天工LCI数据工作小组
Review: Dependent internal review by 天工LCI数据工作小组
Amounts: no units in this file; such an amount is in the reference unit of its flow, which a separate flow dataset defines
copyright: false
licenseType: Free of charge for all users and uses

## General comment
所描述的工艺用于通过炼焦和干熄焦（CDQ）技术生产焦炭。这种焦炭主要用作冶炼铁时高炉（BF）中的还原剂和能源，在此之后是基本氧炉（BOF）炼钢过程。在综合钢铁厂，它也用于电弧炉（EAF）生产钢材。

## Geography
The data of the BF-BOF pathway were obtained from the large-scale integrated steel plants in China with an attached coking plant and EAF plant.

## Reference product
- coke,Coke: 342.6; measured
  Coke

## Inputs
All rows: measured
- freshwater,freshwater: 400
- Circulating water: 100
- process steam: 50.7
- compressed air: 3.5
- Coke oven gas: 7.4
  COG
- Blast furnace gas: 290.6
  BFG
- sulphuric acid: 2.9
- Cleaned coal: 384.2
  Clean coal
- Electricity: 43.2

## Outputs
- Coke oven gas: 152.6; measured
  COG
- tar: 13.8; measured
- sulfur: 0.4; measured
- benzene: 3.8; measured

## Use advice
使用此数据集时，将焦炭生产中的排放作为钢铁生产上游过程的一部分是重要的。在评估整个钢铁生产路线时，模型应确保系统边界包括焦化厂和电弧炉（EAF）操作。应考虑不同综合厂之间的技术变异，并且在将此数据集应用到其他地点时必须使用特定于地区的排放因子。

## Review details
清单： 内部审查通过几个迭代步骤完成，涉及原始数据验证、原始数据记录、代表性、完整性、与 ISO 14040 和 14044 有关的建模的一致性。

## Data sources
- The carbon reduction potential of hydrogen in the low carbon transition of the iron and steel industry: The case of China
