# 多晶硅铸锭 ; 多晶硅片 ; 定向凝固法和多线切割

Dataset: ILCD process, Unit process, single operation
Geography: CN
Reference year: 2014
Classification: Unit processes / Materials production / Metals and semimetals
Functional unit: The functional unit selected for this paper is a 1 kWp
LCI method principle: Attributional
LCI method approaches: Allocation
Generated by: 杨锦锋, yjfzfshn@163.com
Owner: 天工LCI数据工作小组
Review: Dependent internal review by 天工LCI数据工作小组
Amounts: no units in this file; such an amount is in the reference unit of its flow, which a separate flow dataset defines
copyright: false
licenseType: Free of charge for all users and uses

## General comment
多晶硅

## Geography
对中国生产的单晶硅和多晶硅光伏系统进行生命周期评价

## Time period
文章发表

## Technology and included processes
国内大多采用的多晶硅锭的制造方法是定向凝固法，硅片的制备多采用多线切割

## Technical purpose
采用定向凝固和多线切割技术的多晶硅铸锭及硅片制备工艺旨在中国生产多晶硅光伏系统。这些系统被用于建设能够发电的太阳能电站。此过程生产的硅片是制造太阳能板的关键组件，适用于商业和住宅的可再生能源解决方案。

## Reference product
- Multi-Si wafer,Multi-Si wafer,Multi-Si wafer: 1; measured
  多晶硅锭及硅片

## Inputs
All rows: measured
- Solar grade multi-Si: 2.74
  太阳能级硅
- Silicon carbide,Silicon carbide: 4.72
  碳化硅
- Quartz Crucible,Quartz Crucible: 0.7
  石英坩埚
- Steel Wire,Cable: 2.67
  钢丝
- argon: 0.75
  氩气
- Polyethylene glycol: 4.2
  聚乙二醇
- Dipropylene glycol monomethyl ether: 0.54
  DMP
- Electricity: 298.8
  电耗

## Outputs
All rows: measured
- carbon dioxide (fossil): 114
  CO2
- carbon monoxide,carbon monoxide (fossil): 0.15
  一氧化碳
- methane (fossil): 0.28
  甲烷
- Nitrogen oxides: 0.5
  氮氧化物
- sulfur dioxide: 0.83
  二氧化硫
- particles (> PM10),particles (>PM10): 1.4
  粉尘
- biological oxygen demand: 0.16
  生物需氧量
- chemical oxygen demand: 0.15
  化学需氧量
- DOC, Dissolved Organic Carbon: 0.05
  DOC
- total organic carbon: 0.05
  TOC

## Deviations from the LCI method approaches
本文的研究目的是对中国生产的单晶硅和多晶硅光伏系统进行生命周期评价，分析废弃处理的方法和不同废弃处理方法对环境的影响

## Data selection and combination
数据方面，这里参考胡润青、刁周玮和Scholten等人的文章

## Use advice
在使用多晶硅锭铸造与硅片制备的生命周期评估(LCA)数据时，用户应确保系统边界定义清晰，并包含所有相关过程，从多晶硅的生产到光伏板的使用寿命结束。应特别注意废弃处理方法的环境影响。评估影响的选定功能单位为1 kWp，用户应统一应用此单位，以保持比较和分析的一致性。建议参考胡润青、刁周玮和Scholten等人的作品，以获取方法学和数据细节的补充信息。

## Review details
清单： 内部审查通过几个迭代步骤完成，涉及原始数据验证、原始数据记录、代表性、完整性、与 ISO 14040 和 14044 有关的建模的一致性。

## Data sources
- 李鹞 & 于随然. 中国光伏系统的生命周期评价. 环境工程 32, 119–124 (2014).
