# 水泥生产;水泥, 硅酸盐水泥;氧气燃烧二氧化碳捕获

Dataset: ILCD process, Unit process, black box
Geography: CN
Reference year: 2008
Classification: Unit processes / Materials production / Other mineralic materials
Generated by: #REF!, ysqsophia@gmail.com
Owner: 天工LCI数据工作小组
Review: Dependent internal review by 天工LCI数据工作小组
Amounts: no units in this file; such an amount is in the reference unit of its flow, which a separate flow dataset defines
copyright: false
licenseType: Free of charge for all users and uses

## General comment
氧燃烧碳捕集与储存（oxy-combustion carbon capture and storage）的水泥生产。对于氧燃烧CO2捕集技术，燃料在几乎纯氧气而非空气中燃烧。这需要一个现场空气分离单元向氧燃烧过程提供氧气。氧燃烧产生的烟气中CO2的浓度较高（约80 mol％，干燥基），因此在相对简单的净化和压缩过程后，烟气可以被输送和储存，而无需进行分离过程。

## Geography
http://documents.ieaghg.org/index.php/s/YKm6B7zikUpPgGA?path=%2F2008

## Technology and included processes
For oxy-combustion CO, capture technology, fuel is burnt in almost pure oxygen rather than airThis requires an on-site ar separation unit (ASU) to deliver oxygen to the oxy-combustion processThe concentration of CO, in the flue gas produced by oxy-combustion is higher (about 80 mol%, dryoasis) than that of post-combustion, so the flue gas can be transported and stored after a relativelsimple purification and compression processes instead of the separation process.

## Technical purpose
本工艺描述的是使用氧燃烧CO2捕获与储存技术的水泥生产过程。该工艺专门用于生产硅酸盐水泥，这是建筑行业中常见的水泥类型，用于多种应用，如制作混凝土、砂浆、灰泥和非特种灌浆。

## Reference product
- cement, portland cement: 1000
  水泥产品。数据来源于IEA温室气体研发计划（IEA GHG）的技术报告《Cement Industry中的CO2捕捉》（2008年）。在线可获取：http://documents.ieaghg.org/index.php/s/YKm6B7zikUpPgGA?path=%2F2008（访问日期：2017年9月5日）。

## Inputs
- hard coal; 26.3 MJ/kg: 72.06
  煤炭。数据来源于IEA温室气体研发计划（IEA GHG）的技术报告《Cement Industry中的CO2捕捉》（2008年）。在线可获取：http://documents.ieaghg.org/index.php/s/YKm6B7zikUpPgGA?path=%2F2008（访问日期：2017年9月5日）。
- Petroleum Coke: 27.09
  石油焦。数据来源于IEA温室气体研发计划（IEA GHG）的技术报告《Cement Industry中的CO2捕捉》（2008年）。在线可获取：http://documents.ieaghg.org/index.php/s/YKm6B7zikUpPgGA?path=%2F2008（访问日期：2017年9月5日）。
- Electricity: 628.416
  电。数据来源于IEA温室气体研发计划（IEA GHG）的技术报告《Cement Industry中的CO2捕捉》（2008年）。在线可获取：http://documents.ieaghg.org/index.php/s/YKm6B7zikUpPgGA?path=%2F2008（访问日期：2017年9月5日）。
- limestone, crushed, for mill: 1256.74
  石灰石。数据来源于IEA温室气体研发计划（IEA GHG）的技术报告《Cement Industry中的CO2捕捉》（2008年）。在线可获取：http://documents.ieaghg.org/index.php/s/YKm6B7zikUpPgGA?path=%2F2008（访问日期：2017年9月5日）。
- ferric oxide: 7.54
  氧化铁。数据来源于IEA温室气体研发计划（IEA GHG）的技术报告《Cement Industry中的CO2捕捉》（2008年）。在线可获取：http://documents.ieaghg.org/index.php/s/YKm6B7zikUpPgGA?path=%2F2008（访问日期：2017年9月5日）。
- gypsum stone (CaSO4-dihydrate): 40
  石膏。数据来源于IEA温室气体研发计划（IEA GHG）的技术报告《Cement Industry中的CO2捕捉》（2008年）。在线可获取：http://documents.ieaghg.org/index.php/s/YKm6B7zikUpPgGA?path=%2F2008（访问日期：2017年9月5日）。

## Outputs
- carbon dioxide (fossil): 465.01
  二氧化碳捕获。数据来源于IEA温室气体研发计划（IEA GHG）的技术报告《Cement Industry中的CO2捕捉》（2008年）。在线可获取：http://documents.ieaghg.org/index.php/s/YKm6B7zikUpPgGA?path=%2F2008（访问日期：2017年9月5日）。
- carbon dioxide (fossil): 282.85
  二氧化碳排放。数据来源于IEA温室气体研发计划（IEA GHG）的技术报告《Cement Industry中的CO2捕捉》（2008年）。在线可获取：http://documents.ieaghg.org/index.php/s/YKm6B7zikUpPgGA?path=%2F2008（访问日期：2017年9月5日）。
- sulfur dioxide: 2.57
  SO2排放。数据是根据IEA温室气体研发计划（IEA GHG）的技术报告设计进行计算的。报告题为《水泥工业中的二氧化碳捕集》（2008年）。在线可获取链接：http://documents.ieaghg.org/index.php/s/YKm6B7zikUpPgGA?path=%2F2008（访问日期：2017年9月5日）。
- nitrogen dioxide: 2.57
  NO2排放。数据是根据IEA温室气体研发计划（IEA GHG）的技术报告设计进行计算的。报告题为《水泥工业中的二氧化碳捕集》（2008年）。在线可获取链接：http://documents.ieaghg.org/index.php/s/YKm6B7zikUpPgGA?path=%2F2008（访问日期：2017年9月5日）。
- particles (PM2.5): 0.0219
  颗粒<2.5um。数据来自ecoinvent数据库，版本为Ecoinvent Database v3。在线可获取链接：http://www.ecoinvent.org/database/ecoinvent-33/ecoinvent-33.html（访问日期：2018年4月15日）。
- particles (> PM10): 0.0052
  颗粒>10um。数据来自ecoinvent数据库，版本为Ecoinvent Database v3。在线可获取链接：http://www.ecoinvent.org/database/ecoinvent-33/ecoinvent-33.html（访问日期：2018年4月15日）。
- particles (PM2.5 - PM10): 0.0072
  颗粒>2.5um，<10um。数据来自ecoinvent数据库，版本为Ecoinvent Database v3。在线可获取链接：http://www.ecoinvent.org/database/ecoinvent-33/ecoinvent-33.html（访问日期：2018年4月15日）。

## Sampling procedure
生产能力设定为每年生产1百万吨水泥，水泥产品中熟料的比例为91%。

## Use advice
在使用此数据集进行生命周期评估时，确保包括现场空气分离单元（ASU）以及烟气的相对简单净化和压缩过程的环境影响。考虑到氧燃烧造成的高CO2浓度，调整系统边界以包括捕获CO2的运输和存储。此数据基于每年1百万吨水泥的生产能力，水泥产品中熟料比例为91%。

## Review details
清单： 内部审查通过几个迭代步骤完成，涉及原始数据验证、原始数据记录、代表性、完整性、与 ISO 14040 和 14044 有关的建模的一致性。

## Data sources
- Jing An, Richard S. Middleton, & Yingnan Li. (2019). Environmental Performance Analysis of Cement Production with CO2 Capture and Storage Technology in a Life-Cycle Perspective. Sustainability 11, 2626.
