# 土壤修复;原位修复;热脱附;尾气处理

Dataset: ILCD process, Unit process, single operation
Geography: HEN-CN
Classification: Other Services / Repair and maintenance
Generated by: Zhang Jinying, zhangjy@caep.org.cn
Owner: Tiangong LCI Data Working Group
Review: Dependent internal review by Tiangong LCI Data Working Group
Amounts: no units in this file; such an amount is in the reference unit of its flow, which a separate flow dataset defines
licenseType: Free of charge for all users and uses

## General comment
This industrial process is applied to on-site remediation of contaminated soil through a thermal desorption technique followed by exhaust gas treatment. The process encompasses the installation and operation of wastewater and exhaust gas treatment equipment as a part of the unit process (singular operation).

## Reference product
- materials: 30413; article inperiodical

## Inputs
All rows: article inperiodical
- Natural gas, at consumer EU-27: 28800
- Electricity: 2.016e6
- Diesel: 8.906
- water: 3477
- iron: 20367
- heavy fuel oil: 0.813

## Use advice
When utilizing this data set for Life Cycle Assessment, it is imperative to ensure that the data pertaining to the thermal desorption and exhaust gas treatment for site remediation are applicable to the specific contaminants and local regulations. This process should be modelled considering the energy consumption and emissions of the treatment equipment. Updates from technological advancements or changes in operational parameters that could affect the assessment's accuracy should be accounted for. Recycling or end-of-life phases for equipment may be excluded or included as per the goal and scope of the LCA study.

## Review details
Inventory: The internal review was done by several iteration steps concerning raw data validation, raw data documentation, representativity, completeness and consistency of modelling with regard to ISO 14040 and 14044.
