# 干法制砂;砂石制砂;制砂机制砂

Dataset: ILCD process, Unit process, single operation
Geography: HAIN-CN
Reference year: 2020
Classification: Unit processes / Materials production / Other mineralic materials
Generated by: 崔航, Cuihang0716@163.com
Owner: 天工LCI数据工作小组
Review: Dependent internal review by 天工LCI数据工作小组
Amounts: no units in this file; such an amount is in the reference unit of its flow, which a separate flow dataset defines
copyright: false
licenseType: Free of charge for all users and uses

## General comment
皮带将粒径较小的碎石输送至制砂机内去生产粗砂

## Technology and included processes
皮带将中碎处理过的碎石输送至制砂机内，生产粗砂

## Technical purpose
所描述的过程指的是使用干法制砂机将小碎石骨料生产成粗砂。通过这种方法生产的粗砂可能用于建筑活动，如制作混凝土、道路建设或其他需要特定粗砂级别的土木工程项目。

## Reference product
- sand: 41870; measured

## Inputs
- gravel: 41870; measured
- Electricity: 144; measured

## Outputs
- Fly ash: 3000; measured

## Use advice
使用此数据集时，用户应确保他们将其应用于需要特定特性粗砂的特定建筑或制造过程中。评估产品的粒度和成分是否满足预期应用的要求至关重要。为了支持全面的生命周期评估，用户还必须考虑干法制砂过程中的能源使用和潜在排放。任何材料的回收或再利用都应被记录并纳入评估中，以确保准确的环境影响评价。

## Review details
清单： 内部审查通过几个迭代步骤完成，涉及原始数据验证、原始数据记录、代表性、完整性、与 ISO 14040 和 14044 有关的建模的一致性。

## Data sources
- 陵水海岛混凝土有限公司干法制砂项目
