# 修复后地下水;地下水异位修复;P&T系统

Dataset: ILCD process, Unit process, single operation
Geography: JS-CN
Reference year: 2022
Classification: Other Services / Repair and maintenance
Generated by: 王宁, wang_ning@caep.org.cn
Owner: 天工LCI数据工作小组
Review: Dependent internal review by 天工LCI数据工作小组
Amounts: no units in this file; such an amount is in the reference unit of its flow, which a separate flow dataset defines
copyright: false
licenseType: Free of charge for all users and uses

## General comment
地下水抽出处理系统的运行，使受污染的地下水得到修复

## Geography
a closed pesticide manufacturing plant located in Jiangsu Province, China.

## Technology and included processes
使用电力驱动地下水抽出处理系统的运行，使受污染的地下水得到修复

## Technical purpose
本工业过程描述的是用于修复受污染地下水的抽水和处理（P&T）系统的运行。该系统通常应用于环境行业，特别是在受有害物质影响的地点，如一家已关闭的农药制造厂进行地下水净化。操作使用电力抽取受污染的地下水，处理以去除污染物，并最终将清洁的水排放回环境或供进一步使用。

## Reference product
- Remediated groundwater: 1184.85; measured

## Inputs
All rows: measured
- Electricity: 80293.6
- contaminated groundwater: 1184.85
- Grout curtains: 25
- Extraction wel: 1
- Air stripping unit,Catalytic oxidation unit: 1
- Air stripping unit: 1
- Granular active carbon unit: 1
- Groundwater sample and TVOC analysis: 6

## Use advice
在使用此数据集时，确保正确模拟抽水和处理系统运行所关联的能耗。考虑地下水中特定污染物和修复过程的效率。从评估中排除与系统运作不直接相关的任何外部水源或排放。根据江苏省或类似地点的地下水修复相关的当地技术变动、能源组合和特定环境法规调整数据。

## Review details
清单： 内部审查通过几个迭代步骤完成，涉及原始数据验证、原始数据记录、代表性、完整性、与 ISO 14040 和 14044 有关的建模的一致性。

## Data sources
- Ding, D. et al. Assessing the environmental impacts and costs of biochar and monitored natural attenuation for groundwater heavily contaminated with volatile organic compounds. Science of The Total Environment 846, 157316 (2022).
