# Electricity/electrical energy + heat energy ; Coal ; Layer burning furnace ; 9~19 MW; NESPS2 / 电能/电能+热能 ; 煤炭 ; 层燃炉 ; 9～19兆瓦 ; 全国第二次污染普查数据

Dataset: ILCD process, Unit process, single operation
Geography: CN
Reference year: 2019
Classification: Reference Parameters / Energy carriers and technologies / Electricity
Generated by: The data was created by the Office of the Second National Pollution Source Census of the Ministry of Ecology and Environment, and the data was organized by the TianGong Plan team for ILCD format / 生态环境部第二次全国污染源普查工作办公室创建数据，天工计划团队常慧敏整理数据为ILCD格式
Owner: Tiangong LCI Data Working Group / 天工LCI数据工作小组
Review: Dependent internal review by Tiangong LCI Data Working Group / 天工LCI数据工作小组
Amounts: no units in this file; such an amount is in the reference unit of its flow, which a separate flow dataset defines
copyright: false
licenseType: Free of charge for all users and uses

## General comment
the Technical of end-of-pipe management technology for pollution sulfur dioxideisOthers (sodium alkali method)，Its Technical efficiency of end-of-pipe management1.7143Sar+94.29

## Technical purpose
该工业过程描述了一个煤炭层燃烧炉，电力输出为9至19兆瓦。它包括用于处理废气末端颗粒物（PM2.5 - PM10）、二氧化硫、氮氧化物和汞的各种污染控制技术。这些对于维护环境标准至关重要，通常用于电力生成设施或工业，其中排放必须根据监管要求进行控制。

## Reference product
- Coal: 1000; input; calculated
  源文件中描述为为煤炭，此处对其进行了匹配工作，将其匹配到LCAflow库里面相最符合的流，污染物指标备注为颗粒物（烟煤）
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