# 水泥生产;水泥, 通用硅酸盐水泥;干法回转窑, 1000-2000 t/d;混合固废

Dataset: ILCD process, Unit process, black box
Geography: GS-CN
Classification: Materials production / Other mineralic materials
Generated by: 杨思琪, ysqsophia@gmail.com
Owner: 天工LCI数据工作小组
Review: Dependent internal review by 天工LCI数据工作小组
Amounts: no units in this file; such an amount is in the reference unit of its flow, which a separate flow dataset defines
copyright: false
licenseType: Free of charge for all users and uses

## General comment
小型干法旋转窑（生产能力在1000吨至2000吨熟料/天之间）。100％的水泥粉尘得到了回收利用。100％的废水在现场得到再利用。

## Geography
金昌水泥（集团）有限责任公司（中国甘肃）

## Technical purpose
此数据集描述了小型干法回转窑生产通用硅酸盐水泥的使用情况，生产能力每天约1000至2000吨熟料。所生产的水泥通常用于建筑目的，因为它约占中国总水泥产量的98%。该过程强调废物最小化原则，实现了100%的水泥粉尘回收和现场废水再利用。

## Model description
以生产1吨普通硅酸盐水泥作为功能单位，该种水泥在中国约占总产量的98%。干法回转窑系统边界。通常考虑三个阶段，即原材料破碎、熟料生成和水泥磨。熟料生成阶段包括均化、预热和预分解以及在窑中的烧成。每个过程都考虑了原材料、能源消耗、道路运输、直接排放（即二氧化碳、二氧化硫、氮氧化物和颗粒物）和基础设施。

## Reference product
- cement, common portland cement: 1000
  普通硅酸盐水泥

## Inputs
- calcium carbonate: 840
  石灰石
- gypsum: 71
  石膏
- water: 3730
  水
- sandstone: 76
  砂岩
- shale: 28
  页岩
- nickel smelter slag: 18
  镍渣
- blast furnace slag: 41
  高炉矿渣
- ash: 208
  粉煤灰
- hard coal; 26.3 MJ/kg: 113
  煤炭
- electricity, medium voltage: 367.524
  电力

## Outputs
- carbon dioxide: 560
  二氧化碳。CO2排放按照公式(Eq.)计算（Wu等，2006年）：E = 3.67a x k x Mcoal x Q + 0.38 x Mlimestone，其中E，a，k，Mcoal，Q和Mlimestone分别表示每吨水泥生产的CO2排放量，煤炭的碳氧化效率（0.93，国家发展和改革委员会，2011年），煤炭的碳排放因子（26.1 x 10-3，国家发展和改革委员会，2011年），每吨水泥生产所需的煤炭质量，煤炭的发热值，以及每吨水泥生产所需的石灰石质量。本研究中考虑的煤炭发热值为24.48 MJ/kg。
- electricity, medium voltage: 0.04
  SO2。大气排放数据来自宏达水泥厂（中国云南）。
- Nitrogen oxides: 0.18
  NOx。大气排放数据来自宏达水泥厂（中国云南）。
- particles (> PM10): 0.16
  颗粒物，未标明粒径，按PM>10处理。大气排放数据来自宏达水泥厂（中国云南）。

## Data selection and combination
对于小规模生产情景，使用了来自中国甘肃省金昌水泥集团有限公司的数据。由于前者缺乏信息，因此直接大气排放数据来源于云南宏达水泥厂。

## Use advice
在使用此数据集进行水泥生产生命周期评价（LCA）时，重要的是确保系统边界定义明确，包括原料破碎、熟料生成和水泥磨阶段。此外，用户应考虑窑内的均化、预热、预分解和烧成过程。必须在模型中包括原材料、能耗、道路运输、直接排放和基础设施的考虑。在将此数据集纳入更广泛评估时，尤其是关于粉尘回收和废水再利用等废物管理实践，必须保持一致的方法论途径。

## Review details
清单： 内部审查通过几个迭代步骤完成，涉及原始数据验证、原始数据记录、代表性、完整性、与 ISO 14040 和 14044 有关的建模的一致性。

## Data sources
- Wei Chen, Jinglan Hong, & Changqing Xu. (2015). Pollutants generated by cement production in China, their impacts, and the potential for environmental improvement. JOURNAL OF CLEANER PRODUCTION, 103, 61–69.
