# 盆地模拟 ; 烃源岩和原油样品 ; 岩石评估热解、GC/GC-MS、镜质体反射率测量和盆地模拟

Dataset: ILCD process, Unit process, single operation
Geography: CN
Reference year: 2023
Classification: Unit processes / Energy carriers and technologies / Energetic raw materials
LCI method principle: Attributional
LCI method approaches: Consequential
Generated by: Shikang Kang, 908798159@qq.com
Owner: 天工LCI数据工作小组
Review: Dependent internal review by 天工LCI数据工作小组
Amounts: no units in this file; such an amount is in the reference unit of its flow, which a separate flow dataset defines
copyright: false
licenseType: Free of charge for all users and uses

## General comment
对岩石评估热解、通过GC/GC-MS、镜质体反射率测量和盆地模拟

## Geography
中国各地区

## Time period
文献发表时间

## Technology and included processes
使用分析技术，如岩石评估热解、GC/GC-MS、镜质体反射率测量和盆地模拟

## Technical purpose
所描述的工业流程的技术应用涉及评估源岩和原油样本的油气生成潜力。具体来说，它用于通过岩石评估热解、气相色谱/气相色谱-质谱联用（GC/GC-MS）、镜质体反射率测量和盆地模拟等方法评价地层中的烃源潜力和成熟度水平。这类分析对于石油行业指导勘探和评估资源提取的可行性至关重要。

## Reference product
- natural gas: 216000; input; max 216000; uniform; calculated
  峰值60mW/m2

## Outputs
- carbon dioxide (biogenic): 4.925e-5; min 1.216e-5; max 4.925e-5; uniform; calculated
  原文未区分bio和fossil，根据专家判断此处为bio。Sokor-2样品的（S2）值范围为12.16-49.25毫克碳氢化合物/克岩石
- methane (fossil): 60; max 60; uniform; calculated
  文献中没有天然气开采量，假设天然气开采过程中投入量：输出量=1:1

## Data selection and combination
结果表明，上白垩统（Donga组和Yogou组）和始新世Sokor-1组具有II/III型和III型干酪根的油气生成潜力。

## Use advice
在生命周期评估的背景下使用此数据集时，建议考虑样品采集的具体地质背景和时间，因为这些因素可能会显著影响分析结果。此外，在比较不同地区或时期的数据时，保持方法论的一致性至关重要。测量中的不确定性以及样品对更大地层的代表性应清晰记录。用户还应了解分析技术的技术适用性和限制，确保数据的适当外推和解释。

## Review details
清单： 内部审查通过几个迭代步骤完成，涉及原始数据验证、原始数据记录、代表性、完整性、与 ISO 14040 和 14044 有关的建模的一致性。

## Data sources
- Moussa, H. A., Bohari, A. D., Ahmed, K. S. & Harouna, M. Thermal maturity evolution and hydrocarbon generation in the Dibeilla oil field, Termit Basin, Eastern Niger: an organic geochemical and basin modeling approach. Arab J Geosci 16, 338 (2023).
