# 水泥生产;水泥, 通用硅酸盐水泥;立窑, <2000 t-cl/d

Dataset: ILCD process, Unit process, black box
Geography: CN
Reference year: 2010
Classification: Materials production / Other mineralic materials
Generated by: 郭静, jingguo92@gmail.com
Owner: 天工LCI数据工作小组
Review: Dependent internal review by 天工LCI数据工作小组
Amounts: no units in this file; such an amount is in the reference unit of its flow, which a separate flow dataset defines
copyright: false
licenseType: Free of charge for all users and uses

## General comment
立窑，市场份额占38.18%；<2000吨-熟料/日，规模份额占38.18%。为反应现阶段中国水泥工业的环境影响，结合近年来中国水泥工业结构调整和发展现状，考虑到水泥生产技术水平的高低以及不同规模水泥企业的差异，将中国水泥工业分为以下四类：大型新型干法（>4000吨-熟料/日）、中型新型干法（2000~4000吨-熟料/日）、小型新型干法（<2000吨-熟料/日）和立窑（<2000吨-熟料/日）。

## Technology and included processes
立窑，市场份额占38.18%；<2000 吨-熟料/日，规模份额占38.18%。为反应现阶段中国水泥工业的环境影响，结合近年来中国水泥工业结构调整和发展现状，考虑到水泥生产技术水平的高低以及不同规模水泥企业的差异，本研究将中国水泥工业分为以下四类：大 型新型干法（>4000 吨-熟料/日）、中型新型干法 （2000~4000 吨-熟料/日）、小型新型干法（<2000 吨-熟料/日）和立窑（<2000 吨-熟料/日）。

## Technical purpose
通过立窑工艺生产的通用硅酸盐水泥主要用于一般建筑目的，如混凝土、砂浆和灰泥的制作。这种类型的水泥被广泛应用于包括住宅、商业和基础设施项目在内的各种建设活动。数据集描述的水泥生产规模以每日生产不足2000吨熟料表征，反映了中小型水泥厂的生产情况。

## Model description
取中国生产1t熟料含量为70%的通用水泥作为功能单元。水泥生产包括生料制备、熟料煅烧和水泥磨粉。

## Reference product
- cement, common portland cement: 1000
  熟料含量为70%的通用水泥。

## Inputs
- limestone, crushed, for mill: 910
  石灰石
- clay: 120
  粘土
- gypsum stone (CaSO4-dihydrate): 50
  石膏
- hard coal; 26.3 MJ/kg: 141.12
  熟料烧成阶段原煤消耗。烧成煤耗按不同生产工艺和规模的吨熟料标煤耗折算。
- hard coal; 26.3 MJ/kg: 3.5
  原料烘干阶段原煤消耗。本研究取烘干原煤耗为3.50kg/t-水泥。
- electricity, medium voltage: 209.16
  烧成电耗。电力消耗按不同生产工艺和规模的综合电耗计算。
- electricity, medium voltage: 118.44
  其他电耗。电力主要用于原料破碎、生料磨、水泥磨、除尘设备等机械的驱动，电力消耗按不同生产工艺和规模的综合电耗计算。

## Outputs
- carbon dioxide: 619.01
  CO2的排放量来自于理论计算，包括两方面：一方面来源于煅烧熟料燃煤的使用，另一方面来源于煅烧石灰石（CaCO3）等原料生成石灰（CaO）过程碳酸盐的分解。
- sulfur dioxide: 0.29
  SO2。SO2、NOx和COD排放量来自于近年中国水泥工业污染源普查统计结果。
- Nitrogen oxides: 0.16
  NOx。SO2、NOx和COD排放量来自于近年中国水泥工业污染源普查统计结果。
- particles (PM2.5): 0.6168
  <PM2.5。本研究根据污染源普查对不同水泥生产工艺和规模的颗粒物产污系数的调查，以及不同水泥生产设备产生的颗粒物比例和除尘技术的应用份额及分级除尘效率，计算功能单元水泥产品的颗粒物分级排放量。
- particles (PM2.5 - PM10): 0.3
  PM2.5-10。本研究根据污染源普查对不同水泥生产工艺和规模的颗粒物产污系数的调查，以及不同水泥生产设备产生的颗粒物比例和除尘技术的应用份额及分级除尘效率，计算功能单元水泥产品的颗粒物分级排放量。
- particles (> PM10): 0.1523
  >PM10。本研究根据污染源普查对不同水泥生产工艺和规模的颗粒物产污系数的调查，以及不同水泥生产设备产生的颗粒物比例和除尘技术的应用份额及分级除尘效率，计算功能单元水泥产品的颗粒物分级排放量。
- chemical oxygen demand: 0.00021
  COD。SO2、NOx和COD排放量来自于近年中国水泥工业污染源普查统计结果。

## Use advice
在进行生命周期评估时，应谨慎应用每日少于2000吨熟料产量的立窑水泥生产数据集。考虑技术适用性，并确保与评估系统的详细范围保持一致，特别是考虑到呈现的市场份额和规模份额。使用者应考虑与这种生产过程相关的特定环境影响，并相应调整评估模型。在生命周期评估研究中应准确反映中国水泥行业内部采用的分类方法—考虑大型、中型和小型新干法—以及确保对近年来行业结构调整和技术发展差异的考虑。

## Review details
清单： 内部审查通过几个迭代步骤完成，涉及原始数据验证、原始数据记录、代表性、完整性、与 ISO 14040 和 14044 有关的建模的一致性。

## Data sources
- 姜睿 & 王洪涛. (2010). 中国水泥工业的生命周期评价. 化学工程与装备, 4, 183–187.
