# 电力生产 ; 火电 ; 河北

Dataset: ILCD process, Unit process, single operation
Geography: HEB-CN
Reference year: 2019
Classification: Unit processes / Energy carriers and technologies / Electricity
Generated by: 熊若熙, xiongrx0126@163.com
Owner: 天工LCI数据工作小组
Review: Dependent internal review by 天工LCI数据工作小组
Amounts: no units in this file; such an amount is in the reference unit of its flow, which a separate flow dataset defines
copyright: false
licenseType: Free of charge for all users and uses

## General comment
火电发电包括原煤、洗煤、石油、天然气等十七种化石燃料。该过程只考虑直接发电过程，不考虑上游原材料开采加工和下游消费

## Time period
根据2019年能源统计年鉴数据计算

## Technical purpose
该数据集描述了河北省火电发电的应用，包括使用原煤、洗煤、石油和天然气等多种化石燃料发电。这一过程特别关注电力的生成，不包括与原材料开采加工相关的上游活动，也不包括下游终端用户的电力消费。该数据集适用于评估电力生成设施相关的温室气体直接排放。

## Reference product
- electricity for thermal power: 3.6; calculated

## Inputs
All rows: calculated
- Raw coal: 0.328252
- Other Washed Coal: 0.00882072
- Gangue, in ground: 0.010969
- Coke oven gas: 0.007217
- blast furnace gas: 0.382394
- Converter gas: 0.045697
- Diesel: 3.556e-5
- fuel oil, unspecified: 1.06e-6
- Petroleum Coke: 3.87e-6
- refinery gas: 5.492e-5
- natural gas: 0.000278

## Outputs
- carbon dioxide (fossil): 1.01824; calculated
- sulfur dioxide: 0.000152338; calculated
- Nitrogen oxides: 0.000260582; calculated
- particles (> PM10): 3.80603e-5; calculated

## Data treatment and extrapolations
核算方法参考《企业温室气体排放核算方法与报告指南 发电设施》。不同形式发电量及燃料用量来自于《中国能源统计年鉴 2020》中的第三章（能源生产） 和第六章（地区能源平衡表）。用于计算二氧化碳排放因子的低位发热量、单位热值含碳量等燃料参数来自于《2019 年度中国区域电网二氧化碳基准线排放因子 OM 计算说明》、《企业温室气体排放核算方法与报告指南 发电设施》

## Use advice
用户在使用该数据时应谨慎，只考虑直接电力生成的排放，而排除上游和下游过程。温室气体排放的核算方法需要参照《企业温室气体排放核算方法与报告指南 发电设施》。用户应将不同化石燃料形式的消耗与《中国能源统计年鉴 2020》中第三章（能源生产）和第六章（地区能源平衡表）所概述的发电量相关联。燃料参数如低位发热量和单位热值含碳量必须以《2019年度中国区域电网二氧化碳基准线排放因子OM计算说明》为基础进行计算。确保应用正确的区域参数以保证数据的准确性和相关性。

## Review details
清单： 内部审查通过几个迭代步骤完成，涉及原始数据验证、原始数据记录、代表性、完整性、与 ISO 14040 和 14044 有关的建模的一致性。

## Data sources
- 熊若熙. 中国电力生产和消费二氧化碳与污染物排放因子核算. (清华大学, 2023).
