# 废旧NCM电池湿法冶金术

Dataset: ILCD process, Unit process, single operation
Geography: CN
Reference year: 2018
Classification: Unit processes / End-of-life treatment / Material recycling
Functional unit: using 1 kWh as the functionalunit
Generated by: 彭菲, pengfei24@email.ncu.edu.cn
Owner: 天工LCI数据工作小组
Review: Dependent internal review by 天工LCI数据工作小组
Amounts: no units in this file; such an amount is in the reference unit of its flow, which a separate flow dataset defines
copyright: false
licenseType: Free of charge for all users and uses

## General comment
首先，将EoL NCM电池拆解和破碎。然后将处理后的电池材料溶于酸碱溶液中，以萃取出部分有价值的金属元素。最后进行除杂和提纯得到Li(NixCoyMn1-x-y)O2。

## Technology and included processes
废电池经过拆解、干热解、破碎、机械分选、酸浸、除铜、除铁、除铝、粗提、细提、碱老化得到三元前驱体。

## Technical purpose
本描述的三元锂电池湿法冶金工艺用于从报废NCM（镍、钴、锰）正极材料中回收有价值的金属。该流程具体实现了Li(NixCoyMn1-x-y)O2化合物的提取和净化，这对于制造新锂离子电池或其他需要高纯度金属氧化物的工业应用至关重要。

## Reference product
- EoL NCM battery: 3.6; input; software or database

## Inputs
All rows: software or database
- Sulphuric acid: 9.54
- sodium hydroxide: 5.79
- Hydrogen peroxide (30%): 3.25
  过氧化氢生产混合物/DE
- Lithium carbonate: 0.39
  碳酸锂，生产混合物/CN
- Electricity: 11.83
- natural gas,natural gas: 6.81

## Outputs
- Carbon dioxide (fossil): 0.18; software or database
  原文未区分bio和fossil，根据专家判断此处为fossil
- copper: 0.04; software or database
- Ni-rich NMC: 2.63; software or database
- aluminium: 0.14; software or database

## Data selection and combination
数据来自多篇论文，难以区分。

## Use advice
使用此生命周期评估数据时，用户应确保方法学边界与其具体应用相对应。注意以1 kWh能量内容比较作为参考基准。该数据源自多篇论文，因此实务者必须确保数据与其上下文的一致性和相关性。可能需要排除与所讨论的特定回收流程不适用的步骤，例如不同电池化学成分的过程，并且用户应在其评估中考虑技术变异和区域实践。

## Review details
清单： 内部审查通过几个迭代步骤完成，涉及原始数据验证、原始数据记录、代表性、完整性、与 ISO 14040 和 14044 有关的建模的一致性。

## Data sources
- Wang, Y. et al. Environmental impact assessment of second life and recycling for LiFePO4 power batteries in China. Journal of Environmental Management 314, 115083 (2022).
