# 电力生产 ; 火电 ; 江西

Dataset: ILCD process, Unit process, single operation
Geography: JX-CN
Reference year: 2019
Classification: Unit processes / Energy carriers and technologies / Electricity
Generated by: 熊若熙, xiongrx0126@163.com
Owner: 天工LCI数据工作小组
Review: Dependent internal review by 天工LCI数据工作小组
Amounts: no units in this file; such an amount is in the reference unit of its flow, which a separate flow dataset defines
copyright: false
licenseType: Free of charge for all users and uses

## General comment
火电发电包括原煤、洗煤、石油、天然气等十七种化石燃料。该过程只考虑直接发电过程，不考虑上游原材料开采加工和下游消费

## Time period
根据2019年能源统计年鉴数据计算

## Technical purpose
该数据集代表了中国江西省直接发电的火电发电过程，包括燃烧原煤、洗煤、石油和天然气等十七种化石燃料。该火电主要用于满足省内的电力需求，可能包括居民、商业和工业能源供应等应用。

## Reference product
- electricity for thermal power: 3.6; calculated

## Inputs
All rows: calculated
- Raw coal: 0.374701
- Other Washed Coal: 0.0128343
- hard coal briquettes: 7.387e-5
- Gangue, in ground: 0.0045782
- Coke: 0.000478
- Coke oven gas: 0.002961
- blast furnace gas: 0.056215
- Converter gas: 0.00273
- Diesel: 3.306e-5
- fuel oil, unspecified: 8.31e-6
- Petroleum Coke: 0.00033819
- refinery gas: 3.155e-5
- natural gas: 2.83e-5

## Outputs
- carbon dioxide (fossil): 0.789762; calculated
- sulfur dioxide: 0.000131134; calculated
- Nitrogen oxides: 0.000211507; calculated
- particles (> PM10): 2.72185e-5; calculated

## Data treatment and extrapolations
核算方法参考《企业温室气体排放核算方法与报告指南 发电设施》。不同形式发电量及燃料用量来自于《中国能源统计年鉴 2020》中的第三章（能源生产） 和第六章（地区能源平衡表）。用于计算二氧化碳排放因子的低位发热量、单位热值含碳量等燃料参数来自于《2019 年度中国区域电网二氧化碳基准线排放因子 OM 计算说明》、《企业温室气体排放核算方法与报告指南 发电设施》

## Use advice
使用此数据集的用户应注意，它仅包括直接电力发电过程，并排除了上游原材料提取和加工以及下游电力消费等活动。数据应当在仅限于直接发电过程的生命周期评估中使用。燃料消费和发电数据应参考2019年能源统计年鉴，方法学指导可以在《企业温室气体排放核算方法与报告指南 发电设施》中找到。二氧化碳排放因素应使用《2019年度中国区域电网二氧化碳基准线排放因子OM计算说明》等指定的额外资源中的低位发热量、单位热值含碳量等参数来计算。确保区域数据准确对应江西省的特定情境至关重要。

## Review details
清单： 内部审查通过几个迭代步骤完成，涉及原始数据验证、原始数据记录、代表性、完整性、与 ISO 14040 和 14044 有关的建模的一致性。

## Data sources
- 熊若熙. 中国电力生产和消费二氧化碳与污染物排放因子核算. (清华大学, 2023).
