# Polyester cotton production|Polyester cotton|Cotton planting

Dataset: ILCD process, Unit process, single operation
Geography: CN
Reference year: 2018
Classification: Materials production / Other mineralic materials
Generated by: Yingfan Duan, 1300925579@qq.com
Review: Dependent internal review by Tiangong LCI Data Working Group
Amounts: no units in this file; such an amount is in the reference unit of its flow, which a separate flow dataset defines
copyright: false

## General comment
假设其原材料均为皮棉，不考虑化纤生产过程的环境影响。

## Inputs
- Water (fresh water): 1e7; article inperiodical
- Pesticide: 8.8; article inperiodical
- Fertilizer: 3437.5; article inperiodical

## Outputs
- Pesticide: 7; article inperiodical
- Fertilizer: 2062.5; article inperiodical

## Review details
Inventory: The internal review was done by several iteration steps concerning raw data validation, raw data documentation, representativity, completeness and consistency of modelling with regard to ISO 14040 and 14044.

## Data sources
- 康宏. 基于LCA的棉印染生产过程改进设计研究. (大连理工大学, 2018).
