# 木浆纸生产|复印纸|制浆

Dataset: ILCD process, Unit process, single operation
Geography: SD-CN
Classification: Materials production / Other mineralic materials
LCI method principle: Attributional
Generated by: Yixiang Gao, 22210740040@m.fudan.edu.cn
Review: Dependent internal review by Tiangong LCI Data Working Group
Amounts: no units in this file; such an amount is in the reference unit of its flow, which a separate flow dataset defines
copyright: false

## Geography
一方面以复印纸为代表的文化纸产量在山东省造纸业产品 总产量中占有重要比重；另一方面结合复印纸生产的实际特点，由于复印纸产品 对硬度和亮度的要求较高，山东省复印纸生产多是采用木浆工艺。因此，选择复 印纸生命周期过程作为研究木浆生产工艺的对象更具有典型性和代表性。

## Inputs
All rows: measured
- hard coal: 6.17
  coal
- natural gas: 18.4
- water: 26.54
- Fuel Oil: 80.33
  Oil
- Wood: 1381.72
  forest
- sodium hydroxide: 18
- hydrogen peroxide: 6
- Sodium sulfide: 1
  sodium sulfide
- sulfuric acid: 12

## Outputs
All rows: measured
- carbon dioxide: 300
  CO2
- Nitrogen oxides: 1.02
  NOx
- sulfur dioxide: 2.27
  SO2
- methane: 0.0166
  CH4
- carbon monoxide: 3.95
  CO
- chemical oxygen demand: 9.45
  COD
- biological oxygen demand: 1.01
  BOD5
- nitrogen, total (excluding N2): 0.15
  TN
- phosphorus, total: 0.0147
  phosphorus
- nitrate: 0.00966
- Total Suspended Particulate: 0.9
  TSP
- Waste solid: 42.9
  Solid Waste
- hazardous waste (unspecified): 0.075
  Hazardous Waste

## Deviations from the LCI method approaches
本文的数据来源主要是深入到泉林纸业实地调研、泉林纸业企业报表、 山东省聊城市统计局统计资料、 聊城市环保局环评材料等。

## Review details
Inventory: The internal review was done by several iteration steps concerning raw data validation, raw data documentation, representativity, completeness and consistency of modelling with regard to ISO 14040 and 14044.

## Data sources
- 葛振香. 基于LCA的山东省造纸业可持续发展研究. (山东师范大学, 2017).
