# 育肥猪生产 ; 化肥生产

Dataset: ILCD process, Unit process, single operation
Geography: LN-CN
Reference year: 2010
Classification: Materials production / Agricultural production means
Functional unit: The evaluation unit was 1000 fattening pigs
Generated by: 杨瑞, 1632707028@qq.com
Owner: 天工LCI数据工作小组
Review: Dependent internal review by 天工LCI数据工作小组
Amounts: no units in this file; such an amount is in the reference unit of its flow, which a separate flow dataset defines
copyright: false
licenseType: Free of charge for all users and uses

## General comment
辽宁省 2010 年玉米、大豆和小麦每公顷产量分 别为 5 497、2 763、4 933 kg。大豆饼折算成大豆的系 数为 1.19，麦麸折算成小麦的系数为 6.67。生产每 公顷玉米需施用氮（N）、磷（P2O5）、钾（K2O）肥（折纯） 分别为 153.9、11.9、2.7 kg，生产每公顷大豆需施用氮 （N）、磷（P2O5）、钾（K2O）肥（折纯）分别为 24.5、2.9、1.2 kg，生产每公顷小麦需施用氮（N）、磷（P2O5）、钾（K2O） 肥（折纯）分别为 136.2、19.1、2.3 kg。

## Geography
辽宁省 2010 年玉米、大豆和小麦每公顷产量分 别为 ···

## Time period
辽宁省2010年玉米、大豆和小麦每公顷产量分别为······

## Technology and included processes
评价内容包括：化肥生产过程中直接气体排放和耗电所产生的间接污染物排放

## Technical purpose
该数据集描述了辽宁省育肥猪生产和化肥生产相关的环境影响，适用于农业和化学行业的环境评估。主要用途包括在这些生产过程中评估全球变暖、环境酸化和富营养化的潜在影响。该数据是改进玉米、大豆和小麦的种植方法以及养猪操作的基础，通过量化每公顷施用的氮、磷、钾肥料。

## Reference product
- pig: 1000; estimated
  作为参考定量，非实际输出

## Inputs
- nitrogen: 10300; calculated
- phosphorus: 1060; calculated
  五氧化二磷
- potassium: 188; calculated
  氧化钾
- Electricity: 64080

## Outputs
All rows: measured
- carbon dioxide (fossil): 127881
- carbon monoxide: 72.83
- nitrogen, total (excluding N2): 492.21
  1氮氧化物
- sulfur oxides: 513.66
  1硫氧化物
- methane: 46.28

## Deviations from the LCI method approaches
本研究以辽宁省规模化育肥猪养殖场为对象，应 用 LCA 方法对育肥猪生产的环境影响进行评估

## Data selection and combination
本文数据来自辽宁省36家规模化育肥猪养殖场调查；并参照《辽宁统计年鉴》提供的相关数据计算出育 肥猪生产过程中全球变暖、环境酸化和富营养化的影 响潜力。

## Use advice
使用者在应用这些数据时需仔细考虑地理及时间的特定性（辽宁省，2010年）。数据不可直接迁移应用到其他地区或时间段。提供的大豆饼和麦麸转换系数应在将这些副产品的重量关联到其相应作物重量时使用。确保正确分配与作物生产和畜牧过程中能源使用相关的环境影响。在模拟化肥生产中直接气体排放和电力消耗的间接污染物排放时，应特别注意方法论上的选择。

## Review details
清单： 内部审查通过几个迭代步骤完成，涉及原始数据验证、原始数据记录、代表性、完整性、与 ISO 14040 和 14044 有关的建模的一致性。

## Data sources
- 刘鸣达, 赵妍, 刘显军, & 王耀晶. 辽宁省育肥猪生产环境影响的生命周期评价. 农业环境科学学报 31, 1250–1255 (2012).
