# 砖块生产 |页岩空心砖生产 |焙烧工艺

Dataset: ILCD process, Unit process, single operation
Geography: GZ-JX-CN
Reference year: 2020
Classification: Materials production / Other mineralic materials
Generated by: Wang xiangjin
Amounts: no units in this file; such an amount is in the reference unit of its flow, which a separate flow dataset defines
copyright: false

## Reference product
- shale hollow brick: 1; measured

## Inputs
- brickbat aggregate: 1450; measured
- electricity mix: 4.152; measured
- Water (fresh water): 21.36; measured

## Outputs
All rows: measured
- fluorine: 22
- particles (> PM10): 218
- sulfur dioxide: 997
- Waste (solid): 49.85
- nitrogen monoxide: 111

## Data selection and combination
采用根据《第一次全国污染源普查工业污染源产排污系数手册 第七分册》中 3131 烧结类砖瓦及建筑砌块制造业产排污系数表的相关数据。

## Sampling procedure
该环评报告的数据来源于工厂的实时数据

## Data sources
- 年产 8000 万块页岩标砖项目环评报告公示
