# 土壤修复;异位修复;生物堆;施工准备;基础设施建设;硬化防渗地面

Dataset: ILCD process, Unit process, single operation
Geography: KR
Reference year: 2011
Classification: Unit processes / Other Services / Repair and maintenance
Generated by: 桑春晖, sangch@mail.bnu.edu.cn
Owner: 天工LCI数据工作小组
Review: Dependent internal review by 天工LCI数据工作小组
Amounts: no units in this file; such an amount is in the reference unit of its flow, which a separate flow dataset defines
copyright: false
licenseType: Free of charge for all users and uses

## General comment
场地内建设600 m2硬化防渗地面，用于场内临时生物堆修复

## Technical purpose
上述工艺包括为土壤异位生物堆修复建造一个600平方米的硬化防渗表面。这种基础设施是为了临时的生物处理被污染土壤的场地准备工作而不可或缺的。硬化地面有助于防止在修复过程中渗漏或污染的扩散。

## Reference product
- Hardened impermeable ground: 600; estimated

## Inputs
All rows: estimated
- Diesel: 0.016
- gravel: 7.8
- sand: 60
- Polyethylene,Polyethylene: 1.2
- polypropylene fibres (PP): 600
- CO2 Welding, Laser Beam Welding, Flux-cored Arc Welding, Gas Metal Arc Welding: 100
- Equipment and Materials Arriving on Site: 1

## Use advice
在使用此数据集进行生命周期评估时，必须包括修复系统标准化报告中详细的所有输入材料和能源消耗。考虑从施工准备到基础设施维护的生物堆修复过程的整个生命周期非常重要。排除任何阶段、材料或能源输入可能导致环境影响评估不完整。

## Review details
清单： 内部审查通过几个迭代步骤完成，涉及原始数据验证、原始数据记录、代表性、完整性、与 ISO 14040 和 14044 有关的建模的一致性。

## Data sources
- Jeong, S.-W. & Suh, S.-W. Assessment of Environmental Impacts and CO 2 Emissions from Soil Remediation Technologies using Life Cycle Assessment - Case Studies on SVE and Biopile Systems -. Journal of Korean Society of Environmental Engineers 33, 267–274 (2011).
