# 铜基混合废物回收;铜渣精矿;矿渣浮选工艺;矿渣浮选

Dataset: ILCD process, Unit process, single operation
Geography: JX-CN
Reference year: 2020
Classification: Materials production / Metals and semimetals
Functional unit: We consider the functional unit of the recycling of copper-based mixed waste to be 1000 kg electrolytic copper.
LCI method principle: Attributional
LCI method approaches: Allocation - market value
Generated by: 王鹏, 2867919560@qq.com
Owner: 天工LCI数据工作小组
Review: Dependent internal review by 天工LCI数据工作小组
Amounts: no units in this file; such an amount is in the reference unit of its flow, which a separate flow dataset defines
copyright: false
licenseType: Free of charge for all users and uses

## General comment
所描述的铜基混合废物回收过程旨在从渣浆废料中回收高价值的铜。通过矿渣浮选工艺得到的铜渣精矿主要用于将含铜量高的二次渣返回到金属回收行业的熔炼阶段。该回收过程通常应用于工业环境中，例如位于中国江西省的金属回收企业，在那里它确保了从冶炼副产品中高效回收铜。

## Geography
中国江西省的一家金属回收企

## Technology and included processes
渣浮选过程中，渣2浮选产生含铜量较高的二次渣，返回熔炼。

## Reference product
- Copper concentrates: 464.4; measured
  Copper slag concentrate 20% Cu需要补充

## Inputs
All rows: measured
- Copper-containing slag: 2932.7
  Copper-containing slag 1需要补充
- sodium sulfate: 1200
- transport in t*km,transport in t*km: 61.7119
  Transport
- turpentine: 0.6
  Turpentine
- Copper-containing slag: 2467.3
  Copper-containing slag 2(20%Cu）需要补充

## Outputs
- Tailings (deposited, hibernating in ground, non elementary flow): 4935.6; measured
  Tailings (deposited)

## Deviations from the LCI method approaches
使用LCA-ReCiPe 2016（Heijungs et al., 2017）表征和归一化方法（中点和端点方法），将生命周期清单转换为多个领域的影响分数。

## Data selection and combination
前台数据和后台数据。

## Data treatment and extrapolations
采用GaBi 9.0软件计算各种铜基混合废物回收工艺单位质量的库存、资源消耗和废物排放量。

## Use advice
为了准确评估铜基混合废物回收的环境影响，LCA数据集的用户应当实施以下方法论指导原则：优先使用前台数据，包括金属回收企业本身的直接测量和计算，以提高LCA建模的精确度。采用GaBi 9.0软件量化每单位质量回收材料的库存、资源消耗和废物排放。应用LCA-ReCiPe 2016生命周期清单特征化和归一化方法，考虑中点和终点影响。评估时应保持功能单元的一致性，将1000公斤电解铜作为回收性能的基准。

## Review details
清单： 内部审查通过几个迭代步骤完成，涉及原始数据验证、原始数据记录、代表性、完整性、与 ISO 14040 和 14044 有关的建模的一致性。

## Data sources
- Zhang, W. et al. Analyzing the environmental impact of copper-based mixed waste recycling-a LCA case study in China. Journal of Cleaner Production 284, 125256 (2021).
