# 稀土浮选;稀土;原地浸出;钕铁硼（NdFeB）磁铁

Dataset: ILCD process, Unit process, single operation
Geography: NMG-CN
Reference year: 2014
Classification: Materials production / Metals and semimetals
Functional unit: The functional unit is a 1 kg NdFeB magnet
LCI method principle: Attributional
LCI method approaches: Allocation - market value; Allocation - mass
Generated by: 汪涛, twang@iue.ac.cn
Owner: 天工LCI数据工作小组
Review: Dependent internal review by 天工LCI数据工作小组
Amounts: no units in this file; such an amount is in the reference unit of its flow, which a separate flow dataset defines
copyright: false
licenseType: Free of charge for all users and uses

## General comment
描述的工艺指的是从中国白云鄂博矿床中提取和生产钕（Nd）和镨（Pr），这些是制造高性能钕铁硼（NdFeB）磁铁的必要组分。这些磁铁通常用于风力涡轮机、电动车电机、硬盘驱动器以及其他需要强力永磁体的电子产品中。

## Geography
Bayan Obo (China)

## Technology and included processes
所有三个矿床生产 Nd 和 Pr 的基本过程都是相同的。 Nd 和 Pr 是相同的，除了最后的溶剂萃取步骤 (SX5)，其中两者被分离。

## Reference product
- RE concentrate: 8.4; article inperiodical
  RE concentrate. Bayan Obo: input for next process, Roasting

## Inputs
- Electricity: 4.2696; article inperiodical
  Bayan Obo: included in milling
- Sodium silicate: 0.206; article inperiodical
  Sodium silicate. Bayan Obo: based on Metsc
- Fatty acid: 0.086; article inperiodical
  Fatty acid. Bayan Obo
- Chemicals, organic: 0.075; article inperiodical
  Chemicals, organic. Bayan Obo: precipitant unknown
- transport in t*km,transport in t*km: 0.134; measured
  Bayan Obo: lorry, organic chemicals 803 km, other chemicals 20 km, lorry, EURO3

## Outputs
- tailings (unspecified): 7132; article inperiodical
  Bayan Obo: calculation from experts of RWTH Aachen University

## Deviations from the LCI method approaches
In this study, an allocation method based on the market prices of REOs28 is considered. To estimate uncertainties that refer to the allocation method, a mass-based allocation is undertaken as a sensitivity analysis

## Use advice
在使用该数据集进行钕铁硼磁铁的生命周期评估时，建议使用基于市场价格的分配方法作为生产Nd和Pr的首选方法。但是，要认识到使用基于质量的分配方法进行敏感性分析以估计与分配过程相关的不确定性的重要性。结果应在研究范围内进行语境化，特别是考虑地理和技术特异性。请记住，功能单位被定义为1公斤的钕铁硼磁铁。

## Review details
清单： 内部审查通过几个迭代步骤完成，涉及原始数据验证、原始数据记录、代表性、完整性、与 ISO 14040 和 14044 有关的建模的一致性。

## Data sources
- Marx, J., Schreiber, A., Zapp, P. & Walachowicz, F. Comparative Life Cycle Assessment of NdFeB Permanent Magnet Production from Different Rare Earth Deposits. ACS Sustainable Chem. Eng. 6, 5858–5867 (2018).
