# 牛奶生产 ; 饲料原料生产阶段

Dataset: ILCD process, Unit process, single operation
Geography: HLJ-CN
Reference year: 2012
Classification: Unit processes / Materials production / Agricultural production means
Functional unit: In this study, the functional unit was set to 1 ton FPCM (fat-protein corrected milk).
Generated by: 杨瑞, 1632707028@qq.com
Owner: 天工LCI数据工作小组
Review: Dependent internal review by 天工LCI数据工作小组
Amounts: no units in this file; such an amount is in the reference unit of its flow, which a separate flow dataset defines
copyright: false
licenseType: Free of charge for all users and uses

## General comment
包括化肥 生产、 玉米、 大豆、小麦和苜猜的种植、 麦鉄和豆粕生产

## Geography
本文采用LCA方法对黑龙江省奶牛场生产系统进行环境影响评估。

## Technology and included processes
奶牛的词料由全价料和粗词料两部分组成，在奶牛词料全价料中以玉 米 、豆粕和麦麸为主， 因此就不考虑其他组成成分。 饲料原料生产阶段主要包括化肥生产阶 段 、农作物种植阶段和豆和、麦麸加工阶段。

## Technical purpose
本工艺在黑龙江省奶牛场生产系统的乳业中应用。涉及的工艺包括生产奶牛的饲料原料，包括化肥生产、玉米、大豆、小麦和紫花苜蓿的栽培。此外，还需生产如麦麸和豆粕等饲料组分。这些组分在配制奶牛全价料和粗料时至关重要，强调在全价料中加入玉米、豆粕和麦麸。此技术过程对于确保奶牛饲料必需的营养成分组成至关重要，旨在生产高质量的脂肪蛋白校正奶（FPCM）。

## Reference product
- milk: 1000; measured
  作为参考定量，非实际输出

## Inputs
- Fertilizer: 358.138; calculated
  种植阶段化肥投入，包括氮磷钾三种肥料

## Outputs
All rows: measured
- nitrous oxide: 0.87297
  作物种植阶段污染排放
- carbon monoxide (fossil): 0.17737
  作物种植阶段污染排放
- nitrogen, total (excluding N2): 2.72178, 0.98011 (2 entries)
  作物种植阶段污染排放
- carbon dioxide (fossil),carbon dioxide (fossil): 415.628
  作物种植阶段污染排放
- sulfur oxides: 1.23076
  作物种植阶段污染排放
- ammonia: 1.80353
  作物种植阶段污染排放
- carbon monoxide (fossil): 4.80858
  豆粕和麦麸加工阶段污染排放
- nitrogen, total (excluding N2): 4.84154
  豆粕和麦麸加工阶段污染排放
- carbon dioxide (fossil),carbon dioxide (fossil): 17.1294
  豆粕和麦麸加工阶段污染排放
- sulfur dioxide: 0.03827
  豆粕和麦麸加工阶段污染排放
- sulfur oxides: 0.027
  豆粕和麦麸加工阶段污染排放
- maize grain: 348.79
- soybean: 211.75
- wheat: 474.92
- alfalfa: 2650
- silage corn: 16290

## Use advice
在使用该数据集进行生命周期评估（LCA）时，用户必须考虑到玉米、豆粕和麦麸在奶牛饲料配方中的重点。应使用1吨FPCM（脂肪-蛋白校正奶）的功能单位作为环境影响评估的基础，确保与奶制品生产相关研究的可比性。在本LCA研究范围内，关键是不必考虑不是奶牛全价料主要成分的其他成分。用户还应当在进行评估时考虑饲料原料生产的各个阶段，包括化肥生产、农作物栽培、以及豆类和麦麸的加工。

## Review details
清单： 内部审查通过几个迭代步骤完成，涉及原始数据验证、原始数据记录、代表性、完整性、与 ISO 14040 和 14044 有关的建模的一致性。

## Data sources
- 曹正纲. 黑龙江省奶牛场生命周期评价. (东北农业大学, 2012).
