# Carbonsteel|steelscrap,iron(lump)，ferroalloyslaggingagent|Converter method|50less than or equal toyieldless than150 t① / /|碳钢|废钢、铁水（块）、铁合金造渣剂|转炉法|50小于等于产量小于150吨①

Dataset: ILCD process, Partly terminated system
Geography: CN
Reference year: 2019
Classification: Materials production / Other mineralic materials
Generated by: The data was created by the Office of the Second National Pollution Source Census of the Ministry of Ecology and Environment, and the data was organized by the TianGong Plan team for ILCD format / 生态环境部第二次全国污染源普查工作办公室创建数据，天工计划团队常慧敏整理数据为ILCD格式
Amounts: no units in this file; such an amount is in the reference unit of its flow, which a separate flow dataset defines
copyright: false

## Technology and included processes
the Technical of end-of-pipe management technology for pollution Medium Carbon Steelis/，Its Technical efficiency of end-of-pipe management0
污染物指标转炉二次烟气废气量的末端治理技术是/，其效率为0，①指单台转炉的公称炉容，单台转炉日产量校核标准为：1500-5000吨；

## Reference product
- Medium Carbon Steel: 1000; calculated
  原文件中描述污染物类别为Product，污染物指标为碳钢，此处对其进行了匹配工作，将其匹配到LCAflow库里面相最符合的流，污染物指标备注为转炉二次烟气废气量

## Outputs
All rows: calculated
- Exhaust gas: 3630
  原文件中描述污染物类别为废气，污染物指标为转炉二次烟气废气量，此处对其进行了匹配工作，将其匹配到LCAflow库里面相最符合的流，污染物指标备注为转炉二次烟气废气量
- particles (PM2.5 - PM10): 0.02904
  原文件中描述污染物类别为废气，污染物指标为转炉二次烟气有组织颗粒物，此处对其进行了匹配工作，将其匹配到LCAflow库里面相最符合的流，污染物指标备注为转炉二次烟气有组织颗粒物
- Exhaust gas: 4800
  原文件中描述污染物类别为废气，污染物指标为一般排放口废气量，此处对其进行了匹配工作，将其匹配到LCAflow库里面相最符合的流，污染物指标备注为一般排放口废气量
- particles (PM2.5 - PM10): nan, nan, nan (3 entries)
  原文件中描述污染物类别为废气，污染物指标为一般排放口颗粒物，此处对其进行了匹配工作，将其匹配到LCAflow库里面相最符合的流，污染物指标备注为一般排放口颗粒物
- Waste water: 86
  原文件中描述污染物类别为废水，污染物指标为废水量，此处对其进行了匹配工作，将其匹配到LCAflow库里面相最符合的流，污染物指标备注为废水量
- chemical oxygen demand: 0.00285
  原文件中描述污染物类别为废水，污染物指标为化学需氧量，此处对其进行了匹配工作，将其匹配到LCAflow库里面相最符合的流，污染物指标备注为化学需氧量
- Petroleum-related waste: 0.00011
  原文件中描述污染物类别为废水，污染物指标为石油类，此处对其进行了匹配工作，将其匹配到LCAflow库里面相最符合的流，污染物指标备注为石油类

## Data sources
- 第二次全国污染源普查产排污核算系数手册（试用版）,四级代码3120文件，在完整版文件中第4111页
