# 市政污泥处理与处置;湿污泥 含水率65%;与一般工业固废混燃发电

Dataset: ILCD process, Unit process, single operation
Geography: JS-CN
Classification: End-of-life treatment / Energy recycling
Functional unit: 1 t wet sludge with a moisture content of 65% was used as the functional unit.
Generated by: 金思甜, 2331276@tongji.edu.cn
Owner: 天工LCI数据工作小组
Review: Dependent internal review by 天工LCI数据工作小组
Amounts: no units in this file; such an amount is in the reference unit of its flow, which a separate flow dataset defines
licenseType: Free of charge for all users and uses

## General comment
该数据集表示含有65%水分的市政污泥的处理与处置过程，其中与一般的工业固体废物共同燃烧用于发电。该数据适用于能源部门生命周期评估中环境影响的建模，特别是在利用废物到能源过程的情况下。此数据的功能是捕捉通过在工业废物处理设施中共处理市政污泥以发电的管理影响。

## Geography
宿迁某工业固废处置配套发电公司

## Reference product
- Sludge: 1000; input; estimated

## Inputs
- Electricity: 113.328; calculated
  生产上游：包括污泥运输及干化与一般工业固废运输及预处理过程。
- Diesel: 8.39; calculated
  生产上游：包括污泥运输及干化与一般工业固废运输及预处理过程。
- water: 74119.3; calculated
  生产过程：主要考虑气体污染物、水体污染物以及固体废弃物的直接或间接排放。
- Diesel: 3.68; calculated
  生产下游主要涉及焚烧后可利用固体废弃物。

## Outputs
- carbon dioxide: 252.8; calculated
  生产上游：包括污泥运输及干化与一般工业固废运输及预处理过程。
- methane: 0.03; calculated
  生产上游：包括污泥运输及干化与一般工业固废运输及预处理过程。
- nitrous oxide: 0.02; calculated
  生产上游：包括污泥运输及干化与一般工业固废运输及预处理过程。
- Nitrogen oxides: 1.03; calculated
  生产上游：包括污泥运输及干化与一般工业固废运输及预处理过程。
- sulfur dioxide: 0.34; calculated
  生产上游：包括污泥运输及干化与一般工业固废运输及预处理过程。
- carbon monoxide: 1.18; calculated
  生产上游：包括污泥运输及干化与一般工业固废运输及预处理过程。
- hydrocarbons (unspecified): 0.11; calculated
  生产上游：包括污泥运输及干化与一般工业固废运输及预处理过程。
- particles (PM10): 0.15; calculated
  生产上游：包括污泥运输及干化与一般工业固废运输及预处理过程。
- Waste (solid): 0.1; calculated
  生产上游：包括污泥运输及干化与一般工业固废运输及预处理过程。
- carbon dioxide: 13722; calculated
  生产过程：主要考虑气体污染物、水体污染物以及固体废弃物的直接或间接排放。
- Nitrogen oxides: 3.44; calculated
  生产过程：主要考虑气体污染物、水体污染物以及固体废弃物的直接或间接排放。
- sulfur dioxide: 2.05; calculated
  生产过程：主要考虑气体污染物、水体污染物以及固体废弃物的直接或间接排放。
- carbon monoxide: 5.43; calculated
  生产过程：主要考虑气体污染物、水体污染物以及固体废弃物的直接或间接排放。
- particles (PM10): 0.88; calculated
  生产过程：主要考虑气体污染物、水体污染物以及固体废弃物的直接或间接排放。
- chemical oxygen demand: 0.93; measured
  生产过程：主要考虑气体污染物、水体污染物以及固体废弃物的直接或间接排放。
- ammonia: 0.02; measured
  生产过程：主要考虑气体污染物、水体污染物以及固体废弃物的直接或间接排放。
- Suspended solids, unspecified: 0.19; measured
  生产过程：主要考虑气体污染物、水体污染物以及固体废弃物的直接或间接排放。
- nitrogen, total (excluding N2): 0.03; measured
  生产过程：主要考虑气体污染物、水体污染物以及固体废弃物的直接或间接排放。
- phosphorus, total: 0.00186; measured
  生产过程：主要考虑气体污染物、水体污染物以及固体废弃物的直接或间接排放。
- Waste (solid): 1093.47; measured
  生产过程：主要考虑气体污染物、水体污染物以及固体废弃物的直接或间接排放。
- carbon dioxide: 11.06; calculated
  生产下游主要涉及焚烧后可利用固体废弃物。
- methane: 0.012; calculated
  生产下游主要涉及焚烧后可利用固体废弃物。
- nitrous oxide: 0.00084; calculated
  生产下游主要涉及焚烧后可利用固体废弃物。
- Nitrogen oxides: 0.045; calculated
  生产下游主要涉及焚烧后可利用固体废弃物。
- sulfur dioxide: 0.015; calculated
  生产下游主要涉及焚烧后可利用固体废弃物。
- carbon monoxide: 0.052; calculated
  生产下游主要涉及焚烧后可利用固体废弃物。
- hydrocarbons (unspecified): 0.0049; calculated
  生产下游主要涉及焚烧后可利用固体废弃物。
- particles (PM10): 0.0064; calculated
  生产下游主要涉及焚烧后可利用固体废弃物。

## Use advice
在使用该数据集进行生命周期评估时，考虑特定区域背景至关重要，因为该过程基于宿迁的工业固体废物处理和发电设施。确保系统边界包括污泥和废物到设施的运输、处理过程以及电力的生成和分配。考虑共燃过程中对空气、水和土壤的任何排放，并包括传统发电被替代的潜在效益。在应用数据时，还应注意污泥处理和废物焚烧之间的分配程序。

## Review details
清单： 内部审查通过几个迭代步骤完成，涉及原始数据验证、原始数据记录、代表性、完整性、与 ISO 14040 和 14044 有关的建模的一致性。

## Data sources
- 周钢,宋涛,马士伟等.不同污泥混燃发电工艺生命周期评价[J].洁净煤技术,2022,28(11):19-29.DOI:10.13226/j.issn.1006-6772.RE22042401.
