# 太阳能级多晶硅生产 | 改良西门子法

Dataset: ILCD process, Unit process, single operation
Geography: CN
Reference year: 2014
Classification: Materials production / Other mineralic materials
Functional unit: The functional unit selected for this paper is a 1 kWp
LCI method principle: Attributional
LCI method approaches: Allocation
Generated by: 杨锦锋, yjfzfshn@163.com
Review: Dependent internal review by Tiangong LCI Data Working Group
Amounts: no units in this file; such an amount is in the reference unit of its flow, which a separate flow dataset defines
copyright: false

## General comment
多晶硅

## Geography
对中国生产的单晶硅和多晶硅光伏系统进行生命周期评价

## Time period
文章发表

## Technology and included processes
改良西门子法

## Reference product
- Solar grade multi-Si: 1; article inperiodical
  太阳能级硅

## Inputs
All rows: article inperiodical
- Metallurgical silicon: 1.4
  工业硅
- Hydrogen: 0.133
  氢气
- chlorine: 1.4
  氯气
- Sodium hydroxide: 0.67
  氢氧化钠
- electricity: 432
  电耗

## Outputs
All rows: article inperiodical
- carbon dioxide: 110
  CO2
- carbon monoxide: 0.28
  一氧化碳
- methane: 0.309
  甲烷
- nitrogen dioxide: 0.766
  氮氧化物
- sulfur dioxide: 1.37
  二氧化硫
- Dust (unspecified, from stack): 2
  粉尘
- Biochemical Oxygen Demand: 0.02
  生物需氧量
- chemical oxygen demand: 0.02
  化学需氧量
- dissolved organic carbon: 0.006
  DOC
- total organic carbon: 0.006
  TOC

## Deviations from the LCI method approaches
本文的研究目的是对中国生产的单晶硅和多晶硅光伏系统进行生命周期评价，分析废弃处理的方法和不同废弃处理方法对环境的影响

## Data selection and combination
物质输入方面，参考胡润青、刁周玮和傅银银的数据

## Review details
Inventory: The internal review was done by several iteration steps concerning raw data validation, raw data documentation, representativity, completeness and consistency of modelling with regard to ISO 14040 and 14044.; Documentation: The review of the documentation was performed by Ecobilan and is in compliance with ISO 14040 and 14044. The data set documentation is correct in view of the appropriateness of the information provided. It includes all relevant information in view of data quality and scope of application of the respective LCI result.

## Data sources
- 李鹞 & 于随然. 中国光伏系统的生命周期评价. 环境工程 32, 119–124 (2014).
