# 生料制备|生料|新型干法, >4000 t/d|二次固废, 粉尘回收

Dataset: ILCD process, Unit process, single operation
Geography: CN
Reference year: 2020
Classification: Materials production / Other mineralic materials
Generated by: 杨思琪
Amounts: no units in this file; such an amount is in the reference unit of its flow, which a separate flow dataset defines
copyright: false

## General comment
新型干法在水泥工业工艺中市场份额占比较大。二次固废复合水泥生料。生料制备过程污染物为颗粒物。

## Model description
以 P·O 42.5 型水泥熟料为研究对象，功能单位与基准流为生产 1.00 吨水泥熟料，基准年为 2020 年。系统边界为生料制备（原料开采、原料预处理及均化、生料粉磨和生料均化）单元过程，实景过程范围从原料预处理及配料到生料均化为止。

## Reference product
- raw meal: 1000
  生料

## Inputs
All rows: article inperiodical
- calcium carbonate: 782.152
  石灰石
- shale: 141.354
  页岩
- sandstone: 61.3616
  砂岩
- blast furnace dust, for recovery: 15.1322
  原文是二次固废，指粉尘回收。袋式收尘器收集到的粉尘经返料系统全部返回生料均化阶段，工艺产出固废可有效循环利用。
- electricity, medium voltage: 49.9778
  电力。电力由电厂输送。

## Outputs
- particles (> PM10): 0.00794092; article inperiodical
  颗粒物。袋式收尘器收集到的粉尘经返料系统全部返回生料均化阶段，工艺产出固废可有效循环利用。未标明粒径，按PM>10处理。

## Deviations from the LCI method approaches
石灰石开采、页岩开采、砂岩开采、铁粉生产、煤开采、电力和自来水生产以及直接排放污染物等数据均来自 CLCD-China-ECER 0.8 数据库中的数据。

## Cut-off and completeness
二次固废属于废弃物，遵循CLCD原则，其生产过程造成的环境负荷应由其上一阶段主产品承担，作熟料原料时可忽略其上游生产数据。
本研究采用亿科环境科技有限公司开发的生命周期基础数据库，研究需符合CLCD取舍原则，详情如下：（一）当原料重量<1%产品重量及含稀贵/高纯度物料重量<0.1%产品重量时，忽略该原料上游生产数据，总共忽略原料总重量≤5%；（二）废弃物或低价值废物作原料时不追溯其上游生产过程；（三）生产设备、厂房、生活设施等在大多数情况下可忽略；（四）不应忽略已选定环境影响类型范围内的已知排放数据。
采用CLCD法作为本研究的数据质量评估方法，此法对水泥熟料LCA模型里的资源消耗和染物排放数据从清单数据来源和算法、年份、所在地及技术代表性等四方面加以评估，获取与数据库匹配带来的不确定度，再关联背景数据库基础不确定度后完成清单不确定度评估，运用解析公式法算出不确定度的传递和累积，最终得到水泥熟料生产过程LCA结果不确定度。

## Data selection and combination
除CO2外，其他数据来源于高安红狮、江西德安万年青等企业报告、水泥行业清洁生产评价指标体系及水泥熟料研究论文等。

## Data sources
- 陆柳鲜. (2022). 江西省多源有色冶炼固废资源化过程生命周期评价研究 [硕士, 江西理工大学].
