# 湿垃圾处理工艺;厌氧发酵生产甲烷

Dataset: ILCD process
Geography: SH-CN
Classification: Unit processes / End-of-life treatment / Energy recycling
Generated by: 陆嘉麒, wilsherelu@foxmail.com
Owner: 天工LCI数据工作小组
Review: Dependent internal review by 天工LCI数据工作小组
Amounts: no units in this file; such an amount is in the reference unit of its flow, which a separate flow dataset defines
copyright: true
licenseType: Free of charge for all users and uses

## General comment
该厌氧发酵工艺专门用于湿有机废物的处理。其主要目的是产生可以捕获并作为生物天然气用于能源生产的甲烷。该工艺适用于垃圾处理设施，尤其是那些处理城市固体废物、食品废物、农业残余物和污水污泥的设施。

## Reference product
- Wet Waste Treatment: 1000; input; measured
  处理1t湿垃圾

## Inputs
All rows: measured
- Electricity: 44
  维修下网电力
- process steam: 44
  蒸汽
- Electricity: 330.084
  耗电量
- water: 0.24
  耗水量
- Gasoline (regular): 0.0053
  汽油
- Diesel: 0.038
  柴油
- carbonate: 0.052
  碳酸盐

## Outputs
All rows: measured
- carbon dioxide (biogenic): 170
  填埋释放二氧化碳 原文未区分bio和fossil，根据专家判断此处为biogenic
- carbon dioxide (fossil): 120
  沼气燃烧＋未完全燃烧二氧化碳
- Biogas Slurry: 800
  沼液
- Biogas residue: 54
  沼渣
- Electricity: 462.6
  产电量

## Use advice
在使用此数据集时，用户应确保系统边界明确划分，特别是关于副产品处理和能源回收的处理。根据地理和季节因素，考虑废物组成和工艺效率可能的变化十分重要。应充分模拟产生的甲烷的废弃物终生阶段，考虑其作为能源来源的捕获和使用以及潜在的排放减缓。如果未包括与收集和将湿废物运输到处理设施相关的上游影响，则应当对其排除进行合理化解释。

## Review details
清单： 内部审查通过几个迭代步骤完成，涉及原始数据验证、原始数据记录、代表性、完整性、与 ISO 14040 和 14044 有关的建模的一致性。

## Data sources
- 上海市市政固废调研结果
