# Electricenergy|Agriculturalandforestrybiomass|Circulating fluidized bed boiler|All sizes / /|电能|农林生物质|循环流化床锅炉|所有规模

Dataset: ILCD process, Partly terminated system
Geography: CN
Reference year: 2019
Classification: Materials production / Other mineralic materials
Generated by: The data was created by the Office of the Second National Pollution Source Census of the Ministry of Ecology and Environment, and the data was organized by the TianGong Plan team for ILCD format / 生态环境部第二次全国污染源普查工作办公室创建数据，天工计划团队常慧敏整理数据为ILCD格式
Amounts: no units in this file; such an amount is in the reference unit of its flow, which a separate flow dataset defines
copyright: false

## Technology and included processes
the Technical of end-of-pipe management technology for pollution Biomass of agriculture and forestryisCalcium spray in furnace，Its Technical efficiency of end-of-pipe management70
污染物指标二氧化硫的末端治理技术是炉内喷钙，其效率为70，末端治理设施实际运行率（k值）计算公式为k=治理设施运行时间（小时）/生物质能发电机组实际运行时间（小时）

## Reference product
- Biomass of agriculture and forestry: 1e7; input; calculated
  原文件中描述污染物类别为Product，污染物指标为农林生物质，此处对其进行了匹配工作，将其匹配到LCAflow库里面相最符合的流，污染物指标备注为二氧化硫

## Outputs
- sulfur dioxide: 2421, 1614, 4035, 1129.8 (4 entries); calculated
  原文件中描述污染物类别为废气，污染物指标为二氧化硫，此处对其进行了匹配工作，将其匹配到LCAflow库里面相最符合的流，污染物指标备注为二氧化硫
- Nitrogen oxides: 5816, 3562.3, 1090.5, 2035.6 (4 entries); calculated
  原文件中描述污染物类别为废气，污染物指标为氮氧化物，此处对其进行了匹配工作，将其匹配到LCAflow库里面相最符合的流，污染物指标备注为氮氧化物
- particles (PM2.5 - PM10): 128100, 1281, 854 (3 entries); calculated
  原文件中描述污染物类别为废气，污染物指标为颗粒物，此处对其进行了匹配工作，将其匹配到LCAflow库里面相最符合的流，污染物指标备注为颗粒物

## Data sources
- 第二次全国污染源普查产排污核算系数手册（试用版）,四级代码4417文件，在完整版文件中第5333页
