# 含稀土矿石的开采，基线;含稀土矿石

Dataset: ILCD process, Unit process, single operation
Geography: NMG-CN
Reference year: 2012
Classification: Unit processes / Materials production / Non-energetic raw materials
Functional unit: Not Mentationed
LCI method principle: Attributional
LCI method approaches: Allocation - market value
Generated by: 汪涛, twang@iue.ac.cn
Owner: 天工LCI数据工作小组
Review: Dependent internal review by 天工LCI数据工作小组
Amounts: no units in this file; such an amount is in the reference unit of its flow, which a separate flow dataset defines
copyright: false
licenseType: Free of charge for all users and uses

## General comment
含稀土矿石的开采过程主要用于提取生产稀土元素所必需的原材料。这些元素对于制造高科技设备、电子产品、清洁能源技术、先进的航空航天部件以及专用磁铁（例如用于NdFeB（钕铁硼）磁铁）至关重要。

## Technology and included processes
使用传统的露天采矿技术（例如钻孔和爆破）从露天矿中回收矿石。该矿蕴藏矿石 7.5 亿吨，稀土品位 4.1%

## Reference product
- Rare Earth Oxides: 1; software or database
  REO

## Inputs
- Electricity: 16.2; calculated
- Iron ore: 1.7e-6; calculated
  recultivation, iron mine
- blasting: 0.0005; software or database
- Diesel oil,diesel oil: 1.25; software or database

## Outputs
All rows: software or database
- water: 0.0034
- unspecified: 0.00012
- iron: 0.3
- cerium: 0.0164
- lanthanum: 0.00984
- neodymium: 0.00541
- praseodymium: 0.00172
- europium: 8.14e-5
- samarium: 0.00041
- gadolinium: 0.000206
- waste heat: 0.00513
- radium-226: 0.01
- thorium-232: 0.0506

## Deviations from the LCI method approaches
In this section, we discuss the life cycle inventory (LCI) in detail. Each subsection discusses one process of the LCA. Section 3.1 describes the conventional method of rare earths in China from mineral sources. Section 3.2 describes the production process used to transform neodymium oxide into an NdFeB magnet. Finally, section 3.3 describes two alternative recycling processes that could be used. Detailed information on the LCI, assumptions, and allocation choices can be found in the Supporting Information.

## Use advice
在使用含稀土矿石开采相关数据集时，确保您的生命周期评估考虑了与露天采矿技术（如钻孔和爆破）相关的特定环境影响。在资源耗尽计算中计入高矿石品位4.1% REO，并且对需要稀土元素的产品一致地应用数据集。关注可能改变过程效率或环境影响的技术转变。复查数据集支持信息中详细的LCI、假设和分摊选择，以确保数据质量和代表性。

## Review details
清单： 内部审查通过几个迭代步骤完成，涉及原始数据验证、原始数据记录、代表性、完整性、与 ISO 14040 和 14044 有关的建模的一致性。

## Data sources
- Sprecher, B. et al. Life Cycle Inventory of the Production of Rare Earths and the Subsequent Production of NdFeB Rare Earth Permanent Magnets. Environ. Sci. Technol. 48, 3951–3958 (2014).
