# Plasticplates,tubesandprofiles|Resin,auxiliaries|Blending-mixing-extrusion|All sizes / /|塑料板、管、型材|树脂、助剂|配料-混合-挤出|所有规模

Dataset: ILCD process, Partly terminated system
Geography: CN
Reference year: 2019
Classification: Materials production / Other mineralic materials
Generated by: The data was created by the Office of the Second National Pollution Source Census of the Ministry of Ecology and Environment, and the data was organized by the TianGong Plan team for ILCD format / 生态环境部第二次全国污染源普查工作办公室创建数据，天工计划团队常慧敏整理数据为ILCD格式
Amounts: no units in this file; such an amount is in the reference unit of its flow, which a separate flow dataset defines
copyright: false

## Technology and included processes
the Technical of end-of-pipe management technology for pollution Plastic sheet, tube, profileis/，The formula for calculating the actual operation rate (k-value) of the end-of-pipe treatment facility is k = annual operating hours of desulfurization facilities / annual operating hours of boilers
污染物指标工业废气量的末端治理技术是/，末端治理设施实际运行率（k值）计算公式为/

## Reference product
- Plastic sheet, tube, profile: 1000; calculated
  原文件中描述污染物类别为Product，污染物指标为塑料板、管、型材，此处对其进行了匹配工作，将其匹配到LCAflow库里面相最符合的流，污染物指标备注为工业废气量

## Outputs
- Exhaust gas: 70000; calculated
  原文件中描述污染物类别为废气，污染物指标为工业废气量，此处对其进行了匹配工作，将其匹配到LCAflow库里面相最符合的流，污染物指标备注为工业废气量
- particles (PM2.5 - PM10): 0.6, 0.06, 0.9, 0.6, 0.3 (5 entries); calculated
  原文件中描述污染物类别为废气，污染物指标为颗粒物，此处对其进行了匹配工作，将其匹配到LCAflow库里面相最符合的流，污染物指标备注为颗粒物
- volatile organic compound: 0.45, 0.675, 0.075, 0.9, 0.9, 0.3, 0.3, 0.45, 1.5 (9 entries); calculated
  原文件中描述污染物类别为废气，污染物指标为挥发性有机物①，此处对其进行了匹配工作，将其匹配到LCAflow库里面相最符合的流，污染物指标备注为挥发性有机物①

## Data sources
- 第二次全国污染源普查产排污核算系数手册（试用版）,二级代码29,四级代码2922文件，在完整版文件中第3308页
