# 粗合成气生产 ; 粗合成气 ; 煤制粗合成气路线 ; 煤

Dataset: ILCD process, Unit process, black box
Geography: ZJ-GD-CN
Reference year: 2018
Classification: Unit processes / Energy carriers and technologies / Energetic raw materials
Functional unit: A functional unit is defined as 14.64 ton of crude syngas product
LCI method principle: Attributional
LCI method approaches: Allocation - mass
Generated by: 任亚楠, renyn15@tsinghua.org.cn
Owner: 天工LCI数据工作小组
Review: Dependent internal review by 天工LCI数据工作小组
Amounts: no units in this file; such an amount is in the reference unit of its flow, which a separate flow dataset defines
copyright: false
licenseType: Free of charge for all users and uses

## General comment
ID11丙烯生产;丙烯;煤制烯烃路线;煤;下属过程2

## Geography
催化裂化路线的案例工厂来自中国石化湛江东兴石油化工有限公司。企业位于广东省湛江市，其催化裂化制烯烃工艺建于2018年，丙烯年产能11.6万吨。

## Time period
工艺建于2018年

## Technical purpose
本数据集描述了通过煤化工工艺生产粗合成气和丙烯。粗合成气是进一步化学合成的初级产品，通常在煤化工行业用于生产多种化学品，包括如丙烯这样的烯烃。生产的丙烯通常用作塑料、包装、纺织和汽车零部件制造工业的原料。这些数据专门针对以煤炭为主要原料、采用催化裂化等方法生产烯烃的过程。

## Model description
考虑了各个子阶段涉及的所有相关投入原材料、能源、电力、蒸汽、水和辅助化学品的消耗，产出考虑了丙烯和副产品(如丙烷脱氢工艺生产的C4产品。采用质量分配法量化产品丙烯和副产品之间的环境负荷。此外，本模型还考虑了各工艺的废物排放。本研究注重于不同丙烯生产工艺的环境影响分析，因此，丙烯烃利用及其产品的报废处理以及、基础设施建设和以及设备维护不在本次评价边界范围之内。

## Reference product
- Crude Syngas: 14640; measured
  粗合成气

## Inputs
All rows: measured
- brown coal; 11.9 MJ/kg: 6950
  碎煤
- oxygen: 4690
  氧气
- Wollastonite: 700
  硅灰石
- sodium hydroxide: 2.54253
  烧碱
- hydrogen chloride gas: 3.66245
  盐酸
- nitrogen: 1462.86
  氮气
- natural gas: 296.01
  燃料气
- process steam: 580
  蒸汽
- freshwater: 11240
  新鲜水
- Electricity: 1759.68
  电

## Outputs
All rows: measured
- carbon dioxide (fossil): 3360
  CO2
- carbon monoxide (fossil): 1.16763
  CO
- methanol: 0.03951
  甲醇
- nitrous oxide: 0.18318
  NOx
- particles (> PM10): 0.13835
  颗粒物
- Dissolved solids: 6.59627
  TDS
- chemical oxygen demand: 0.3042
  COD
- biological oxygen demand: 0.2028
  BOD5
- Suspended solids, unspecified,Suspended solids, unspecified: 0.0507
  SS
- ammonia: 0.2028
  NH3-N
- chloride: 1.12552
  氯离子

## Data selection and combination
丙烯生产工艺详细的投入产出数据来自企业公开的环境影响评价报告，包括原料和辅料投入、能源和资源消耗，以及废气、废水和固体废物的排放。

## Use advice
在生命周期评价（LCA）中，应使用这些数据来评估利用煤制烯烃路径生产丙烯的环境性能。功能单位定义为14.64吨粗合成气产品，以建立一致的比较基础。数据包括原料和辅料的投入、能源和资源的使用，以及包括空气排放、水排放和固体废物生成的输出。用户应使用质量分配法在丙烯和副产品之间分配环境负荷。注意，由于报废处理、基础设施建设及设备维护未包含于此数据集中，所以应将其排除在评价范围之外。本数据集的范围限定为评估生产过程的直接环境影响。

## Review details
清单： 内部审查通过几个迭代步骤完成，涉及原始数据验证、原始数据记录、代表性、完整性、与 ISO 14040 和 14044 有关的建模的一致性。

## Data sources
- 吕琳. 丙烯产品环境负荷及温室气体减排的碳税政策. (大连理工大学, 2022).
