# 土壤修复;原位修复;土壤气相抽提;运行阶段;土壤修复

Dataset: ILCD process, Unit process, single operation
Geography: KR
Reference year: 2011
Classification: Other Services / Repair and maintenance
Generated by: 雷秋霜, leiqs@caep.org.cn
Owner: 天工LCI数据工作小组
Review: Dependent internal review by 天工LCI数据工作小组
Amounts: no units in this file; such an amount is in the reference unit of its flow, which a separate flow dataset defines
copyright: false
licenseType: Free of charge for all users and uses

## General comment
该土壤修复系统旨在现场土壤气相抽提(SVE)操作阶段使用。它是为了通过应用SVE技术从土壤环境中移除易挥发污染物而设计的，作为旨在土壤净化的一系列操作中的单元过程。

## Reference product
- Remediated soil: 1000
  修复后干净土壤

## Inputs
- Electricity: 535493
- contaminated soil: 1000; measured
  污染土壤

## Use advice
在使用此数据集进行生命周期评估时，重要的是只考虑土壤原位修复中土壤气相抽提(SVE)过程的运行阶段。请注意单元过程的边界，并确保上游和下游过程，如设置、拆卸和监测阶段分别核算。如果有的话，应纳入区域特定参数，以匹配当地的环境条件和污染概况。

## Review details
清单： 内部审查通过几个迭代步骤完成，涉及原始数据验证、原始数据记录、代表性、完整性、与 ISO 14040 和 14044 有关的建模的一致性。

## Data sources
- Assessment of Environmental Impacts and CO2 Emissions from Soil Remediation Technologies using Life cycle Assessment - Case Studies on SVE and Biopile Systems
