# 再生铜、原生铜生产;再生铜;收集运输、机械加工（分选拆解、回收）、二次冶炼精炼;废铜

Dataset: ILCD process, Unit process, single operation
Geography: CN
Reference year: 2017
Classification: Unit processes / Materials production / Metals and semimetals
Functional unit: the functional unit is 1 kg secondary copper produced from six types of waste streams in China.
LCI method principle: Attributional
LCI method approaches: Allocation - market value
Generated by: 王鹏, 2867919560@qq.com
Owner: 天工LCI数据工作小组
Review: Dependent internal review by 天工LCI数据工作小组
Amounts: no units in this file; such an amount is in the reference unit of its flow, which a separate flow dataset defines
copyright: false
licenseType: Free of charge for all users and uses

## General comment
这份数据集描述的再生铜和原生铜的回收与生产过程，专门涉及铜废料的收集与运输，随后进行机械加工，包括为回收目的进行分选和拆解，最终进行二次冶炼和精炼。所生产的再生铜用于制造新的铜产品，并在包括建筑、电气和电子行业在内的各种行业中补充铜库存。

## Geography
描述了中国历史（2005-2017）铜废物管理和再生铜生产

## Time period
描述了中国历史（2005-2017）铜废物管理和再生铜生产，

## Technology and included processes
再生铜是由上述EoL废料（旧废料，包括进口废料）和铜产品制造过程中产生的新废料生产的。

## Model description
Ecoinvent 3.4 数据库用于对后台系统进行建模（Moreno Ruiz 等人，2017）。

## Reference product
- Refined copper: 0.92; software or database
  Secondary copper

## Inputs
All rows: software or database
- process steam: 1.58
  steam, in chemical industry_steam production, in chemical industry
- Silica sand,silica sand: 0.0619
  silica sand需要补充
- Lime: 0.0732
  lime
- Light fuel oil: 0.0675
  light fuel oil
- hard coal,hard coal,hard coal: 0.154
  hard coal
- oxygen: 0.0905
- water: 1.16
  tap water
- Copper scrap（Cu 95%）,Copper scrap（Cu 95%）: 1
  copper scrap需要补充
- Electricity: 0.407
  electricity

## Outputs
All rows: software or database
- antimony: 3e-6
  Antimony
- carbon monoxide,carbon monoxide (fossil): 0.002
  Carbon monoxide
- nitrogen dioxide: 0.001
  Nitrogen oxides
- sulfur dioxide: 0.003
  Sulfur dioxide
- zinc: 0.000375
- water: 0.000176

## Deviations from the LCI method approaches
环境影响采用CMLCA 6.0软件进行。

## Data selection and combination
采用库存驱动的 MFA 方法探索了中国历史上报废 (EoL) 铜产品产生的铜废物，该方法根据含铜产品的使用库存和使用寿命进行估算。

## Data treatment and extrapolations
动态 MFA 和前瞻性 LCA 方法相结合，对铜库存流量动态进行建模，

## Use advice
在使用此数据集进行生命周期评估时，用户应考虑中国铜废料管理和再生铜生产（2005-2017年）的历史背景。使用动态物质流分析（MFA）与前瞻性生命周期评估（LCA）方法结合，以理解铜库存流动的动态。利用Ecoinvent 3.4数据库对后台系统进行建模，并使用CMLCA 6.0软件进行环境影响评估。请注意，功能单位是中国六种不同废物流中生产的1公斤再生铜，将此考虑纳入比较生命周期评估研究和工业规划策略中。

## Review details
清单： 内部审查通过几个迭代步骤完成，涉及原始数据验证、原始数据记录、代表性、完整性、与 ISO 14040 和 14044 有关的建模的一致性。

## Data sources
- Dong, D. et al. Assessing China’s potential for reducing primary copper demand and associated environmental impacts in the context of energy transition and “Zero waste” policies. Waste Management 144, 454–467 (2022).
