# 土壤修复;原位修复;电修复;现场调查;现场调查结果

Dataset: ILCD process, Unit process, single operation
Geography: KR
Reference year: 2021
Classification: Unit processes / Other Services / Repair and maintenance
Generated by: 浩骅, wangyp@caep.org.cn
Owner: 天工LCI数据工作小组
Review: Dependent internal review by 天工LCI数据工作小组
Amounts: no units in this file; such an amount is in the reference unit of its flow, which a separate flow dataset defines
copyright: false
licenseType: Free of charge for all users and uses

## General comment
现场土壤质量取样调查，包含钻孔、岩柱运输、取样等过程

## Technical purpose
该数据集描述了一种用于原位土壤修复的工业过程，特别是电修复。它应用于旨在清洁被污染土壤而无需挖掘的环境工程项目中。此方法适用于需要恢复土壤质量以符合环境安全标准的项目。它可以涉及现场调查的各个阶段，包括钻孔和土壤取样。

## Reference product
- Results of on-site investigations: 1; measured

## Inputs
- Polyethylene,Polyethylene: 1.39; measured
  Manual sampling equipment (liner)
- Diesel: 0.0386; measured
  Vehicle (five times, 19.3 km, 10 km/1 L)

## Outputs
- Greenhouse Gases: 320; measured
- Nitrogen oxides: 0.0438; measured
- SOx: 0.000789; measured
- particles (> PM10): 0.00179; measured

## Use advice
在使用此数据集进行生命周期评估时，请确保您包含了与现场调查过程（如钻孔、岩柱运输和土壤采样活动）相关的数据。计算与这些过程相关的所有主要原材料和能源消耗。考虑土壤修复方法的地理特性和技术适用性，以及潜在的环境影响。确保符合界定边界和数据质量要求的方法论指导。

## Review details
清单： 内部审查通过几个迭代步骤完成，涉及原始数据验证、原始数据记录、代表性、完整性、与 ISO 14040 和 14044 有关的建模的一致性。

## Data sources
- Kim, DH., Yoo, JC., Hwang, BR. et al. Environmental assessment on electrokinetic remediation of multimetal-contaminated site: a case study. Environ Sci Pollut Res 21, 6751–6758 (2014).
