# 熟料煅烧;熟料, 硅酸盐水泥熟料;新型干法, ≥4000 t/d;铜尾矿 16%

Dataset: ILCD process, Unit process, single operation
Geography: CN
Reference year: 2019
Classification: Materials production / Inorganic chemicals
Generated by: 杨思琪, ysqsophia@gmail.com
Owner: 天工LCI数据工作小组
Review: Dependent internal review by 天工LCI数据工作小组
Amounts: no units in this file; such an amount is in the reference unit of its flow, which a separate flow dataset defines
copyright: false
licenseType: Free of charge for all users and uses

## General comment
新型干法生产水泥熟料。铜尾矿含量为16%。末端治理：袋式除尘器，效率 85%。

## Technical purpose
本数据集描述的水泥熟料采用日产能超过4000吨的新型干法生产，并且在其组成中加入了16%的铜尾矿。该类型的熟料是波特兰水泥生产的关键成分，波特兰水泥是建筑行业的基础材料，用于建筑、基础设施以及一般建设用途的混凝土、砂浆、灰泥和灌浆材料。

## Model description
LCA 系统边界为熟料煅烧单元过程。

## Reference product
- clinker, portland cement clinker: 1000
  铜尾矿复合水泥熟料

## Inputs
- raw meal: 1420
  铜尾矿复合水泥生料。实景过程数据。
- tap water: 300
  自来水。上游数据来源：CLCD-China-ECER 0.8.1。
- coal, powder: 123.6
  煤粉。上游数据来源：CLCD-China-ECER 0.8.1。
- electricity, medium voltage: 99.396
  电力。上游数据来源：CLCD-China-ECER 0.8.1。

## Outputs
- mercury: 6e-5
  汞[排放到大气]
- ammonia: 0.03964
  氨气[排放到大气]
- particles (> PM10): 0.326
  总颗粒物[排放到大气]，未标明粒径，按PM>10处理。
- fluorene: 0.002551
  氟[排放到大气]
- chemical oxygen demand: 6e-5
  化学需氧量[排放到水体]
- carbon dioxide (fossil): 724.2
  二氧化碳（化石源）[排放到大气]
- Nitrogen oxides: 1.557
  氮氧化物[排放到大气]
- Clean gas: 3927
  废气[排放到大气]
- Water (groundwater from technosphere, waste water): 2
  废水[排放到水体]
- sulfur dioxide: 0.349
  二氧化硫[排放到大气]

## Deviations from the LCI method approaches
采用亿科环境 eFootprint 软件系统，结合 CLCD 质量评估方法建立了水泥熟料生命周期模型，并计算得到 LCA 结果。

## Data selection and combination
主要数据来源：代表企业及供应链实际生产数据。来自企业实际数据和环评报告。

## Use advice
在使用本数据集进行生命周期评估时，应特别注意依据ISO140系列国际标准中建议的材料投入与产品质量相关的 cut-off 准则。包含与排除应遵循以下具体规则：①对于每种普通原材料输入重量低于总工艺材料输入总量的1%或高纯度物质低于总输入重量的0.1%的原材料，其上游生产数据可以忽略，前提是总共忽略的材料不超过总原材料投入的5%。对于系统环境排放数据，在决定其排除之前应计算其对LCA结果的贡献。②可以忽略作为原材料使用的低价值废料（如尾矿）的上游生产数据。使用者需要确保LCA的系统边界包含熟料煅烧单元过程，并相应地应用数据选择原则。

## Review details
清单： 内部审查通过几个迭代步骤完成，涉及原始数据验证、原始数据记录、代表性、完整性、与 ISO 14040 和 14044 有关的建模的一致性。

## Data sources
- 李畅. (2020). 江西省某铜尾矿资源化过程生命周期评价研究 [硕士, 江西理工大学].
