# 稀土焙烧;镝;B/M;含稀土矿石

Dataset: ILCD process, Unit process, single operation
Geography: CN
Reference year: 2010
Valid until: 2019
Classification: Unit processes / Materials production / Metals and semimetals
Functional unit: The goal of this investigation is to compare environmental impacts related to the production of 1 kg Dy (functional unit) from IAC (Southern China), from B/M ore (Bayan Obo), and from an eudialyte deposit (Norra Kärr) using the LCA method
LCI method principle: Attributional
LCI method approaches: Allocation - mass
Generated by: 汪涛, twang@iue.ac.cn
Owner: 天工LCI数据工作小组
Review: Dependent internal review by 天工LCI数据工作小组
Amounts: no units in this file; such an amount is in the reference unit of its flow, which a separate flow dataset defines
copyright: false
licenseType: Free of charge for all users and uses

## General comment
从指定地区稀土焙烧工艺中获得的镝，是制造用于各种高技术应用的高强度永磁体的关键材料，如电动汽车、风力涡轮机和高效电动机。它也被用于核反应堆，以及激光材料和商业照明的生产。

## Geography
华南地区和白云鄂博

## Technology and included processes
本次调查的目的是比较 IAC（中国南方）、B/M 矿石（白云鄂博）和 eudialyte 矿床（Norra Kärr）生产 1 千克镝（功能单位）的环境影响，使用生命周期分析法

## Reference product
- Rare Earth concentrate: 39.1; software or database
  RE concentrate: input for next process: Leaching

## Inputs
- natural gas,natural gas,natural gas: 2.88; calculated
  natural gas(own assumption, see general remarks), calculated with ASPEN PLUS
- Electricity: 9.9; calculated
  electricity mix 2014, based on Krüger.J (2001)
- sulphuric acid: 40.8; calculated
  sulphuric acid, liquid, at plant (adapted with CN: electricity mix 2014), based on Zhang and Edwards (2013)
- hydrated lime dry slaked: 9.38; calculated
  market for lime, hydraulic, for waste water treatment from flue gas cleaning, stoichiometric calculation
- transport in t*km,transport in t*km: 0.816; software or database
  transport, freight, lorry >32 metric ton, EURO3, 20 km

## Outputs
- Sludge: 18.35; software or database
  slag (deposited) [Stockpile goods], from waste water treatment, based on Xu et al. (2008)
- fluoride: 0.00405; software or database
  fluoride [Inorganic emissions to air], Rare Earth Control Standards (MEP, 2011)
- carbon dioxide (fossil): 10.052; calculated
  原文未区分bio和fossil，根据专家判断此处为fossil
- sulfur dioxide: 0.22465; software or database
  sulphur dioxide [Inorganic emissions to air], calculation is based on Rare Earth Control Standards (MEP, 2011)
- sulphuric acid: 0.02021; software or database
  sulphuric acid [Inorganic emissions to air, calculation is based on Rare Earth Control Standards (MEP, 2011)
- particles (PM10): 0.02246; software or database
  dust (PM10) [Particles to air], calculation is based on Rare Earth Control Standards (MEP, 2011)
- Nitrogen oxides: 0.10783; software or database
  nitrogen oxides [Inorganic emissions to air], calculation is based on Rare Earth Control Standards (MEP, 2011)

## Deviations from the LCI method approaches
In this study, an allocation method based on the mass of produced REEs combined with their market prices (based on an international metals market analysis and pricing index company ) are considered, as usual for metals with strongly different prices. As the ores have different compositions, the allocation factor has to be assessed individually for each site.

## Use advice
使用此数据集的用户应注意用于评估与镝生产相关的环境影响的基于质量的分配方法，该方法考虑了不同稀土矿石的多样化市场价格和成分。由于每个矿区的矿石成分都是独特的，所以必须为每个采矿场地单独计算环境影响的分配系数。为了确保生命周期评估结果的准确性，必须定期更新有关国际金属市场价格的输入数据和任何矿石成分的变化。

## Review details
清单： 内部审查通过几个迭代步骤完成，涉及原始数据验证、原始数据记录、代表性、完整性、与 ISO 14040 和 14044 有关的建模的一致性。

## Data sources
- Zapp, P., Marx, J., Schreiber, A., Friedrich, B. & Voßenkaul, D. Comparison of dysprosium production from different resources by life cycle assessment. Resources, Conservation and Recycling 130, 248–259 (2018).
