# 市政污泥处理与处置;干污泥;重力浓缩

Dataset: ILCD process, Unit process, single operation
Geography: CN
Classification: Unit processes / End-of-life treatment / Waste water treatment
Functional unit: The functional unit is the base for the treatment comparison in the life-cycle inventory. The management of one tone of dry sludge (DS) is selected.
Generated by: 金思甜, 2331276@tongji.edu.cn
Owner: 天工LCI数据工作小组
Review: Dependent internal review by 天工LCI数据工作小组
Amounts: no units in this file; such an amount is in the reference unit of its flow, which a separate flow dataset defines
copyright: ['opt4ROkqig']
licenseType: Free of charge for all users and uses

## General comment
根据中国的数据，从中国污泥处理的最佳技术指导中获得了重力浓缩和农业使用过程(即电力消耗、絮凝剂、废水处理和重金属排放)的清单。这些数据包括从中国140个污水处理厂直接收集的数据。

## Technology and included processes
污泥处理处置步骤为重力浓缩、厌氧消化、脱水、农业利用。

## Technical purpose
所描述的工业过程涉及市政污泥处理与处置，特别强调了重力浓缩这一生命周期评价中的单元过程。该过程专门涉及干污泥（DS）的管理，并且通常应用于污水处理厂，用于在进一步的处置或处理步骤之前，通过浓缩与减少污泥含水量。

## Reference product
- Sludge: 1000; input; estimated
  1吨干污泥(DS)

## Inputs
- Electricity: 142.2; missing unimportant
- Polyacrylamide: 4; missing unimportant
  PAM

## Outputs
- waste water - untreated: 3.56; missing unimportant

## Use advice
数据集使用者应将此数据置于使用重力浓缩过程管理一吨干污泥的情景中考虑。与其它生命周期数据进行比较时，确保功能单位一致对齐。该数据可能不反映在效率和环境影响上有所不同的替代处理方法或更新技术。在生命周期评估中应用此数据时，建议考虑本地条件、技术适用性和具体规定。

## Review details
清单： 内部审查通过几个迭代步骤完成，涉及原始数据验证、原始数据记录、代表性、完整性、与 ISO 14040 和 14044 有关的建模的一致性。

## Data sources
- Xu, C., Chen, W. & Hong, J. Life-cycle environmental and economic assessment of sewage sludge treatment in China. Journal of Cleaner Production 67, 79–87 (2014).
