# 生产透辉石光伏组件;透辉石组件1m2;旋转涂层法;碘化铅

Dataset: ILCD process, Unit process, single operation
Geography: US
Classification: Unit processes / Energy carriers and technologies / Electricity
Functional unit: 1 square meter perovskite photovoltaic module
Generated by: 姚玺婧, 15898832265@163.com
Owner: 天工LCI数据工作小组
Review: Dependent internal review by 天工LCI数据工作小组
Amounts: no units in this file; such an amount is in the reference unit of its flow, which a separate flow dataset defines
copyright: false
licenseType: Free of charge for all users and uses

## General comment
The main process steps include substrate glass production, deposition of perovskite layers, deposition of electron transport layers, and packaging.

## Technology and included processes
Spin-coating method: The spin-coating process is relatively simple, and it is the mainstream preparation method of perovskite light-absorbing layer. Firstly, PbX2 was dissolved in solvent and spun on the substrate to form a film; Then PbX2 is soaked in solution or spun on the substrate again to react with PbX2 film to produce perovskite.

## Technical purpose
半透明钙钛矿光伏模块面积为1平方米，设计用于整合到建筑立面或屋顶安装中以生成电力的同时允许部分自然光透过。它主要用于构建与建筑设计相融合的建筑一体化光伏系统（BIPV）。

## Reference product
- Solar Module,Solar Module,Solar Module: 1; log-normal

## Inputs
All rows: log-normal
- nickel: 0.000634
  70纳米HTL
- argon: 0.0757, 0.292 (2 entries)
- oxygen: 0.00021, 0.000292 (2 entries)
- dimethyl formamide: 0.00195
  溶剂
- ethanol: 0.00442
  溶剂
- nitrogen, total (excluding N2): 1.83
  惰性气体吹扫
- aluminium: 1.12e-5
  50纳米的AZO
- zinc oxide: 0.00036
- polyethylene terephthalate (PET) granulate: 0.0617
- Adhesives: 0.0202
- Electricity: 176.171
- Indium Tin Oxide (ITO) coated glass: 1.54; calculated
  基板
- Lead iodide: 0.000824; calculated
- methylammounium iodide: 0.000253; calculated
  190纳米
- Methylammonium Chloride: 1.33e-5; calculated
  10纳米
- [6,6]-phenyl-C61-butyric acid methyl ester: 0.0001; calculated
  50纳米
- Indium Tin Oxide (ITO) coated glass: 0.00308; calculated
  270 nm的电极

## Outputs
All rows: log-normal
- dimethyl formamide: 0.00195
- ethanol: 0.0042
- argon: 0.368
- oxygen: 0.000327
- nitrogen, total (excluding N2): 1.83
- landfill of glas/inert waste: 1.544
  垃圾填埋
- Nickel monoxide: 0.000405; calculated
- Lead iodide: 0.00033; calculated
- methylammounium iodide: 0.000101; calculated
- Methylammonium Chloride: 5.32e-6; calculated
- [6,6]-phenyl-C61-butyric acid methyl ester: 4e-5; calculated
- Aluminum doped Zinc Oxid: 0.000148; calculated

## Use advice
在使用半透明钙钛矿光伏模块的数据集时，确保生命周期评估包含能源生产的特性和由于自然光照可能带来的能效增益。应考虑模块的使用寿命、降解率以及能源回收时间。数据使用者还应考虑基于安装方向和地理位置的性能变化。建议考虑模块生命周期结束时材料的可回收性。

## Review details
清单： 内部审查通过几个迭代步骤完成，涉及原始数据验证、原始数据记录、代表性、完整性、与 ISO 14040 和 14044 有关的建模的一致性。
