# 风轮机的制造 ; 20个2 MW 的风轮机

Dataset: ILCD process, Unit process, black box
Geography: CN
Reference year: 2018
Classification: Unit processes / Energy carriers and technologies / Mechanical energy
Functional unit: The functional unit is 2 MW wind turbine.
LCI method principle: Attributional
LCI method approaches: Allocation
Generated by: 赵云志, ll10088@163.com
Owner: 天工LCI数据工作小组
Review: Dependent internal review by 天工LCI数据工作小组
Amounts: no units in this file; such an amount is in the reference unit of its flow, which a separate flow dataset defines
copyright: false
licenseType: Free of charge for all users and uses

## General comment
所描述的制造过程涉及专为大型风电场设计的风轮机的组装。该过程包括生产20台2兆瓦风轮机，适用于陆上40兆瓦风电场的部署。这些涡轮机的技术用途是通过利用风能发电，向电网供电，并为可持续发展目标做出贡献。

## Geography
本研究选取华北地区某陆上40MW风电场20台2WM风电机组作为研究对象。

## Reference product
- Wind turbine: 20; measured
  20 × 2 MW wind turbine

## Inputs
All rows: measured
- Steel,Steel: 5.928e6
  Ground surface and Underground
- iron: 787000
  Ground surface and Underground
- copper: 48000
- Resin: 200000
- Plastic (unspecified): 48000
- Fiber glass: 486000
- Concrete: 2.328e7

## Deviations from the LCI method approaches
采用基于过程的生命周期评价方法，遵循ISO 14040 [ 33 ]和ISO 14044 [ 34 ]的原则，计算风电机组全生命周期的温室气体排放量。

## Data selection and combination
该风电场投入的物资种类和数量代表了目前我国风电场投入物资种类和数量的平均水平(表2)。用于风电场分析的所有数据都是从调查中获得的。各材料的温室气体排放系数来源于Ga Bi (一个用于LCA的商业软件)数据库。

## Use advice
该LCA数据集的用户应确保正确应用基于过程的生命周期评价方法，并遵循ISO 14040和ISO 14044中概述的标准。必须注意到，作为当前中国风电场的代表，平均输入材料类型和数量需要给予特别关注，使用所提供的具体数据点进行准确的影响评估。温室气体排放因子必须来源于如GaBi这样可靠的数据库以确保适用性和一致性。正确定义功能单元至关重要，即风轮机提供2兆瓦的能力，以确保在LCA研究中的可比性和相关性。

## Review details
清单： 内部审查通过几个迭代步骤完成，涉及原始数据验证、原始数据记录、代表性、完整性、与 ISO 14040 和 14044 有关的建模的一致性。

## Data sources
- Li, Q. et al. Life cycle assessment and life cycle cost analysis of a 40 MW wind farm with consideration of the infrastructure. Renewable and Sustainable Energy Reviews 138, 110499 (2021).
