# 生料制备;生料, 硅酸盐水泥生料;新型干法, ≥4000 t/d;铜尾矿 16%

Dataset: ILCD process, Unit process, single operation
Geography: CN
Reference year: 2019
Classification: Materials production / Other mineralic materials
Generated by: 杨思琪, ysqsophia@gmail.com
Owner: 天工LCI数据工作小组
Review: Dependent internal review by 天工LCI数据工作小组
Amounts: no units in this file; such an amount is in the reference unit of its flow, which a separate flow dataset defines
copyright: false
licenseType: Free of charge for all users and uses

## General comment
新型干法制备水泥生料。铜尾矿含量为16%。

## Technical purpose
所描述的工业过程涉及通过新型干法制备用于生产硅酸盐水泥生料的过程。该系统的处理能力为每天4000吨或更多，生料配比中含有16%的铜尾矿。

## Model description
LCA 系统边界为生料制备单元过程。

## Reference product
- raw meal: 1000
  铜尾矿复合水泥生料

## Inputs
- iron, powder: 30.7
  铁粉。上游数据来源：CLCD-China-ECER 0.8.1。
- electricity, medium voltage: 64.8
  电力。上游数据来源：CLCD-China-ECER 0.8.1。
- limestone, crushed, for mill: 807.1
  石灰石。上游数据来源：CLCD-China-ECER 0.8.1。
- copper slag: 162.2
  铜尾矿。上游数据来源：忽略。

## Outputs
- Clean gas: 814.2
  废气[排放到大气]
- particles (> PM10): 0.039
  总颗粒物[排放到大气]，未标明粒径，按PM>10处理。

## Deviations from the LCI method approaches
采用亿科环境 eFootprint 软件系统，结合 CLCD 质量评估方法建立了水泥熟料生命周期模型，并计算得到 LCA 结果。

## Data selection and combination
生料制备阶段涉及的各原材料的清单数据均由背景数据库提供。

## Use advice
使用此数据集时，请注意生命周期评估（LCA）系统边界限于生料制备单元过程。原材料的数据应来源于可靠的背景数据库以确保准确性。该数据集遵循ISO140系列国际标准中推荐的数据选择和省略规则：当材料重量低于总过程原料输入的1%（高纯度物质为0.1%）时忽略其上游生产数据，并保证忽略的普通原料质量不超过原料投入的5%。对于环境排放数据，在决定排除之前先计算其对LCA结果的贡献。低价值废产品如尾矿可作为原料使用，并忽略其上游数据。

## Review details
清单： 内部审查通过几个迭代步骤完成，涉及原始数据验证、原始数据记录、代表性、完整性、与 ISO 14040 和 14044 有关的建模的一致性。

## Data sources
- 李畅. (2020). 江西省某铜尾矿资源化过程生命周期评价研究 [硕士, 江西理工大学].
