# 生物乙醇 ; 酶生产

Dataset: ILCD process
Geography: GLO
Classification: Unit processes / Energy carriers and technologies / Renewable fuels
Generated by: Jiayi Yuan, jiayi_y@mail.bnu.edu.cn
Owner: 天工LCI数据工作小组
Review: Dependent internal review by 天工LCI数据工作小组
Amounts: no units in this file; such an amount is in the reference unit of its flow, which a separate flow dataset defines
copyright: false
licenseType: Free of charge for all users and uses

## General comment
该数据集所描述的生物乙醇酶生产过程旨在用于生物质转换为生物乙醇燃料，适合在汽车发动机中燃烧。该过程适用于生产可再生和可持续的能源资源，旨在替代或补充传统化石燃料。

## Technology and included processes
通过数据质量评估，从474篇已发表论文的561个数据集中选择了141个具有高完整性和一致性的数据集，并将其分类为由预处理技术确定的8种技术配置。预处理后的技术步骤都是相同的，尽管实际流量和参数值在文献中观察到不同

## Inputs
All rows: uniform; calculated
- calcium chloride: 0.011
- Sulphur oxides (as SO2): 0.028
- ammonia: 0.189
- Electricity: 22.68
- heat: 2.9
  heating
- Cooling water: 59.8
  cooling

## Data selection and combination
在可能的情况下使用了全球数据集，因为该研究不适用于任何特定地区。一种名为“汽车中生物乙醇燃烧”的外部过程的LCI数据来自GREET数据库

## Data treatment and extrapolations
我们通过不确定性传播（蒙特卡罗）、可辨别性分析、全局敏感性分析和场景变化评估了建模结果的鲁棒性。

## Use advice
使用该数据集时，请考虑由生物乙醇生产前处理技术确定的八种技术配置。文献中后续技术步骤是一致的，但实际流程和参数值存在差异。已经使用了全球数据集；因此，如果要应用到具体区域，请相应调整数据。'汽车燃烧生物乙醇'过程已从GREET数据库中整合，必须考虑用于生命周期清单（LCI）比较。在解释建模结果的稳健性时，应用蒙特卡罗模拟和其他分析，如可辨识性、全球敏感性和情景变化，以管理不确定性。

## Review details
清单： 内部审查通过几个迭代步骤完成，涉及原始数据验证、原始数据记录、代表性、完整性、与 ISO 14040 和 14044 有关的建模的一致性。
