# Aluminum powder production ; CN

Dataset: ILCD process
Geography: CN
Classification: Materials production / Metals and semimetals
Generated by: Jiaqi Lu, wilsherelu@foxmail.com
Owner: Tiangong LCI Data Working Group
Review: Dependent internal review by Tiangong LCI Data Working Group
Amounts: no units in this file; such an amount is in the reference unit of its flow, which a separate flow dataset defines
copyright: false
licenseType: Free of charge for all users and uses

## Reference product
- Powdered Aluminium: 1000; missing unimportant
  Aluminum powder products

## Inputs
- aluminium: 1470; missing unimportant
  Aluminum raw materials
- light fuel oil: 0.000647; missing unimportant
  Engine oil (equipment consumption)
- electricity mix: 36.108; missing unimportant
- water: 450; missing unimportant

## Outputs
- sulfur dioxide: 0.00118; missing unimportant
  Sulfur dioxide [emission to atmosphere (unspecified type)]
- Particles (PM0.2 - PM2.5): 0.288; missing unimportant
  Total particulate matter [emitted to the atmosphere (unspecified type)]
- municipal solid waste deposition: 0.642; missing unimportant
  domestic waste
- waste water - untreated: 50; missing unimportant
  Domestic wastewater

## Review details
Inventory: The internal review was done by several iteration steps concerning raw data validation, raw data documentation, representativity, completeness and consistency of modelling with regard to ISO 14040 and 14044.

## Data sources
- 垣曲金华铝粉加工环评报告
