# 生物培养基;地下水原位修复;生物强化修复;生物质培养基制备

Dataset: ILCD process, Unit process, single operation
Geography: SH-CN
Reference year: 2020
Classification: Unit processes / Other Services / Repair and maintenance
Generated by: 肖萌, xiaomeng@mail
Owner: 天工LCI数据工作小组
Review: Dependent internal review by 天工LCI数据工作小组
Amounts: no units in this file; such an amount is in the reference unit of its flow, which a separate flow dataset defines
copyright: false
licenseType: Free of charge for all users and uses

## General comment
CHC+ISB用于场地修复，在施工准备阶段，制备生物质培养基。

## Geography
The aquifer in a certain area in Shanghai, China, is uniformly contaminated with chlorinated volatile organic compounds (CVOCs), with a surface area of 20,000 m2 and a depth of 50 m, with the water table located at a depth of 30 m.

## Technical purpose
通过CHC+ISB工艺制备的生物培养基专为地下水原位修复中的生物强化修复应用设计。它在场地修复项目中使用，以便促进含水层中氯代挥发性有机化合物（CVOCs）的分解。

## Reference product
- Biological Medium: 523.53; measured
  Biological medium（生物培养基），数据来源于文章补充材料Table S9. The materials used in the operation phase of CHC+ISB

## Inputs
- Tap Water: 1.32705e6; measured
- Saccharum officinarum: 2.76183e6; software or database
  Sugarcane（甘蔗）
- triethylamine: 7860; software or database
- Calcium carbonate (> 63 microns): 17420; software or database
- ethanol: 4430; software or database
- Fodder yeast: 49140; software or database
  Fodder yeast（饲料酵母）
- process steam from heavy fuel oil: 102540; software or database
- process steam from light fuel oil: 138280; software or database
- Electricity: 39895.2; software or database
- sodium hydroxide: 143990; software or database

## Use advice
在使用此数据集进行环境评估时，应考虑当地场地特征和特定污染物确保准确的边界条件。需要考虑污染深度，物质分布和地下水位深度。准确地建模生物修复过程的有效性，同时考虑生物质培养基的制备和特定于场地要求的应用。

## Review details
清单： 内部审查通过几个迭代步骤完成，涉及原始数据验证、原始数据记录、代表性、完整性、与 ISO 14040 和 14044 有关的建模的一致性。

## Data sources
- Ni, Z. et al. Comparative Life-Cycle Assessment of Aquifer Thermal Energy Storage Integrated with in Situ Bioremediation of Chlorinated Volatile Organic Compounds. Environ. Sci. Technol. 54, 3039–3049 (2020).
