# 熟料煅烧;熟料;悬浮预热器窑, 旋风预热器窑

Dataset: ILCD process, Unit process, single operation
Geography: CN
Classification: Unit processes / Materials production / Other mineralic materials
Generated by: #REF!, ysqsophia@gmail.com
Owner: 天工LCI数据工作小组
Review: Dependent internal review by 天工LCI数据工作小组
Amounts: no units in this file; such an amount is in the reference unit of its flow, which a separate flow dataset defines
copyright: false
licenseType: Free of charge for all users and uses

## General comment
以常见的悬浮预热器窑为研究对象。

## Technical purpose
该数据集涉及使用悬浮预热器窑和旋风预热器窑生产水泥熟料的过程，这是水泥行业中常用的工业热处理设备。该数据集代表的材料通常用作制造水泥的中间产品。

## Model description
功能单元为1吨水泥熟料。研究范围：水泥煅烧。

## Reference product
- clinker: 1000
  熟料

## Inputs
- limestone, crushed, for mill: 1216.5
  石灰石
- clay: 273.7
  粘土
- iron, powder: 25.5
  铁粉
- hard coal; 26.3 MJ/kg: 183.3
  燃煤。能耗数据来自文献，燃煤热值以5500kcal/kg计，固定碳以50%计。
- Electricity: 297.18
  电。能耗数据来自文献。

## Outputs
- carbon dioxide (fossil): 854.45
  CO2。燃煤CO2由固定碳计算而来，原料CO2按碳酸钙Cao含量为50%计算得到。
- carbon monoxide (fossil): 4.5
  CO。CO排放按废气浓度算得。
- sulfur dioxide: 0.2409
  SO2。NOx、SO2量由建材行业平均排放因子计算。
- Nitrogen oxides: 1.8482
  NOx。NOx、SO2量由建材行业平均排放因子计算。
- hydrocarbons (unspecified): 0.0311
  CxHy。由于缺乏来源，其它污染数据参考电厂燃煤按能耗换算得到。

## Use advice
在使用这个数据集进行水泥熟料生产时，必须考虑所使用的具体窑技术——悬浮预热器窑或旋风预热器窑。确保您的应用与水泥煅烧相关，并且将1吨水泥熟料的功能单位适当地缩放并应用于您的评估框架。在选择系统边界时，特别要考虑是否包括研磨、混合和水泥生产中其他精加工过程等后续过程。

## Review details
清单： 内部审查通过几个迭代步骤完成，涉及原始数据验证、原始数据记录、代表性、完整性、与 ISO 14040 和 14044 有关的建模的一致性。

## Data sources
- 刘顺妮. (2003). 水泥-混凝土体系环境影响评价及其应用研究 [博士, 武汉理工大学].
