# 水泥生产;水泥, 普通硅酸盐水泥, 42.5MPa;新型干法回转窑, 2000 t-cl/d;矿渣

Dataset: ILCD process, Unit process, black box
Geography: SC-CN
Reference year: 2007
Classification: Unit processes / Materials production / Other mineralic materials
Generated by: #REF!, ysqsophia@gmail.com
Owner: 天工LCI数据工作小组
Review: Dependent internal review by 天工LCI数据工作小组
Amounts: no units in this file; such an amount is in the reference unit of its flow, which a separate flow dataset defines
copyright: false
licenseType: Free of charge for all users and uses

## General comment
四川省某水泥生产企业原有的一条F4.0x58m，以石灰石为主要原料，日产2000吨水泥熟料的新型干法回转窑水泥生产线生产的石灰石水泥。

## Geography
四川省某水泥生产企业

## Technical purpose
该数据集代表使用新型干法回转窑技术生产的水泥，具体为42.5MPa强度等级的普通硅酸盐水泥。生产线每天生产2000吨水泥熟料，主要原料为石灰石。该水泥适用于要求高强度水泥的多种建设目的，包括基础设施和建筑工程。

## Model description
1个功能单位为42.5千克普通硅酸盐水泥，即1Fu=1kgP·O42.5普通硅酸盐水泥。研究范围从生料制备、熟料锻烧及粉磨到水泥储存为止，主要考虑水泥生产工艺过程产生的环境影响。

## Reference product
- cement, ordinary portland cement, 42.5MPa: 1000
  石灰石水泥。P.O42.5普通硅酸盐水泥。

## Inputs
- limestone, crushed, for mill: 933.7
  石灰石。汽车运输，15km。
- sandstone: 151.2
  砂岩。汽车运输，15km。
- mudstone, unprocessed: 68.72
  泥岩。汽车运输，30km。
- gypsum stone (CaSO4-dihydrate): 33.24
  石膏。汽车运输，45km。
- iron, powder: 41.19
  铁粉。汽车运输，190km。
- blast furnace slag: 74.09
  矿渣。汽车运输，15km。
- hard coal; 26.3 MJ/kg: 134.6
  煤。汽车运输，34km。
- Electricity: 469.08
  电

## Outputs
- carbon dioxide (fossil): 855.9
  CO2。只涉及生产阶段（计算）。
- sulfur dioxide: 0.053
  SO2。只涉及生产阶段（实测）。
- Nitrogen oxides: 2.2
  NOx。只涉及生产阶段（实测）。
- particles (> PM10): 3.045
  粉尘。只涉及生产阶段（计算：除尘处理后的数据除以除尘效率）。未标明粒径，按PM>10处理。

## Sampling procedure
以一条F4.0x58m，以石灰石为主要原料日产2000吨水泥熟料的新型干法回转窑水泥生产线生产的石灰石水泥为研究对象。

## Use advice
使用此生命周期评估(LCA)数据集时，请考虑从原料准备到水泥存储的完整生命周期。重点关注生产过程中产生的环境影响，包括排放和资源消耗。功能单元定义为42.5千克普通硅酸盐水泥。在与其他数据进行比较或评估影响时，确保功能单元的一致使用，并考虑地理特点，因为该数据基于四川省的生产线。

## Review details
清单： 内部审查通过几个迭代步骤完成，涉及原始数据验证、原始数据记录、代表性、完整性、与 ISO 14040 和 14044 有关的建模的一致性。

## Data sources
- 王超. (2007). 电石渣水泥和石灰石水泥生命周期评价的比较研究 [硕士, 西南交通大学].
