# 湿蒸法棉布染整加工;印染棉布;退浆

Dataset: ILCD process, Unit process, single operation
Geography: SZ-JS-CN
Reference year: 2012
Classification: Unit processes / Systems / Textiles, furnitures and other interiors
Generated by: 段颖凡, 1300925579@qq.com
Owner: 天工LCI数据工作小组
Review: Dependent internal review by 天工LCI数据工作小组
Amounts: no units in this file; such an amount is in the reference unit of its flow, which a separate flow dataset defines
copyright: false
licenseType: Free of charge for all users and uses

## General comment
退浆是印染过程中的一个关键步骤，指的是去除布料上的浆料残留。浆料是在织造过程中为了增强纤维的刚性而添加的一种物质。在印染完成后，为了使布料更柔软、透气且符合设计要求，需要进行退浆处理。这通常包括浸泡布料以去除浆料，使其更具舒适性和适用性。

## Geography
本研究选取江苏省某印染企业为重点调研对象，该企业位于长三角经济圈中的常熟。

## Technical purpose
本数据集代表湿蒸法棉布染整加工过程中的退浆操作，专门针对印染棉布。研究关注的是位于江苏省长三角经济圈内常熟的一家印染企业。此数据与纺织行业环境影响评估相关，并可用于了解该地区棉布加工的环境足迹。

## Reference product
- Cotton Fabric: 167; measured

## Inputs
- Electricity: 200; measured
- Crude coal: 236; calculated
- Cleaned coal: 585; calculated
- Fuel Oil: 5.04; calculated
- heavy fuel oil: 1.52; calculated
- Diesel: 6.93; calculated
- Coke Oven Gas: 9.24; calculated
- natural gas: 0.118; calculated
- sodium chloride: 50; measured
- Amylase: 13.3; measured
- Penetrant: 5; measured
- river water: 31900; measured
- freshwater: 3.13; measured

## Outputs
- carbon dioxide (fossil): 64.9; calculated
- carbon monoxide (fossil): 0.158; calculated
- sulfur dioxide: 0.0575; calculated
- methane (fossil): 2.81e-5; calculated
- Nitrogen oxides: 0.305; calculated
- nitrous oxide: 2.63e-5; measured
- particles (> PM10): 0.532; calculated
- ammonia: 1.01e-5; measured
- non-methane volatile organic compounds: 0.00114; measured
- waste water - untreated: 32000; measured
- chemical oxygen demand: 36.5; calculated
- Suspended solids, unspecified,Suspended solids, unspecified: 3.92; calculated
- lead: 5.15e-6; calculated
- mercury: 1.08e-7; calculated
- fluorine: 9.74e-7; calculated
- cadmium: 1.91e-7; calculated
- arsenic: 4.41e-6; calculated

## Use advice
本数据集的用户应将数据专门用于棉布染整过程的生命周期评估研究，重点是退浆步骤。需要注意的是，数据具有地区特定性，仅代表长三角经济圈，并不一定适用于其他地区。用户应考虑技术适用性，例如操作规模和当地执行的环境法规，并应考虑自数据收集以来技术或实践方面的变化。

## Review details
清单： 内部审查通过几个迭代步骤完成，涉及原始数据验证、原始数据记录、代表性、完整性、与 ISO 14040 和 14044 有关的建模的一致性。

## Data sources
- 朱亚楠. 棉布连续轧染工艺生命周期环境影响评价. (南京大学, 2012).
