# 光伏电池封装胶膜（EVA）分离;光伏电池封装胶膜

Dataset: ILCD process, Unit process, single operation
Geography: CN
Classification: Unit processes / Materials production / Plastics
Generated by: 王楠, 1209824595@qq.com
Owner: 天工LCI数据工作小组
Review: Dependent internal review by 天工LCI数据工作小组
Amounts: no units in this file; such an amount is in the reference unit of its flow, which a separate flow dataset defines
copyright: false
licenseType: Free of charge for all users and uses

## General comment
EVA分离过程隔离乙烯-醋酸乙烯共聚物，以便进一步用于生产光伏面板、制造粘合剂以及创建各种消费品，如体育设备。

## Reference product
- Laminate,Laminate: 745.833; input; software or database
  层压件

## Inputs
- Electricity: 128.52; software or database
- nitrogen: 154.22; software or database
- Oxidant: 165.98; software or database
  氧化剂
- Standard coal: 60.7143; software or database
  standard coal

## Outputs
All rows: software or database
- Ethylene-vinyl acetate copolymer,Ethylene-vinyl acetate copolymer,Ethylene-vinyl acetate copolymer: 45.9
  EVA
- Glass for recovery (shards): 665
- Multi-Si solar cell,Multi-Si solar cell,Multi-Si solar cell: 38.91
- Backsheet: 14.5
  背板
- municipal solid waste deposition: 96.75
- carbon dioxide: 32.25
- methane: 50.69
- nitrogen dioxide: 30.94
- sulfur dioxide: 51.17

## Use advice
使用此数据集时，请考虑分离过程的范围，包括特定的能源消耗、与分离技术相关的排放以及过程中潜在的EVA损失。评估EVA分离过程在其整个生命周期中的环境影响，同时考虑EVA使用后的潜在回收和可重复使用场景。

## Review details
清单： 内部审查通过几个迭代步骤完成，涉及原始数据验证、原始数据记录、代表性、完整性、与 ISO 14040 和 14044 有关的建模的一致性。

## Data sources
- Li, J. et al. Life cycle analysis of the economic costs and environmental benefits of photovoltaic module waste recycling in China. (2023).
