# 铜生产;原生铜;火法冶金;硫化铜精矿

Dataset: ILCD process, Unit process, single operation
Geography: CN
Reference year: 2010
Classification: Unit processes / Materials production / Metals and semimetals
Functional unit: Functional unit: 1 kg copper
LCI method principle: Attributional
LCI method approaches: Allocation - market value
Generated by: 王鹏, 2867919560@qq.com
Owner: 天工LCI数据工作小组
Review: Dependent internal review by 天工LCI数据工作小组
Amounts: no units in this file; such an amount is in the reference unit of its flow, which a separate flow dataset defines
copyright: false
licenseType: Free of charge for all users and uses

## General comment
通过火法冶金过程从硫化铜精矿生产的原生铜通常用于多种应用，包括电线电缆、屋面和管道材料、工业机械部件以及电子产品，原因是它具有高导电性、耐用性和延展性。此数据集代表的数据对于在中国运营或将铜进口到中国的企业相关，可以适用于这些用途的环境影响评估。

## Geography
本研究包括进口铜数据以及代表中国平均情况而非典型企业的统计数据，对三种铜生产路线的每个组成过程进行统计，特别是前台过程中的能源和资源使用以及后台过程中的电力生产。

## Time period
2010年至2050年中国铜需求预测。

## Reference product
- Refined copper: 1; software or database

## Inputs
All rows: software or database
- Electricity: 5.94
- Diesel: 1.23
- Limestone: 1.11
- sulphuric acid: 0.0111
- natural gas; 44.1 MJ/kg: 0.0444
- oxygen: 0.263
- Xanthate: 0.0167
  Xanthate需要补充
- Heavy fuel oil (1.0 wt.% S): 0.0205
- copper sulfide ore: 110
  Environmental resources ;Copper ore
- Imported-copper concentrate: 2.41
- molybdenum: 2.64
  Molybdenum ore
- water: 1.17
  Water

## Outputs
All rows: software or database
- molybdenum: 0.00411
  Molybdenum concentrate
- Sulfidic tailing: 97
  Sulfidic tailing需要补充
- sulfur dioxide: 0.445, 0.228 (2 entries)
  Sulfur dioxide
- sulphuric acid: 1.2
  Sulfuric acid
- waste water - untreated: 0.00568
  Waste water
- carbon dioxide (fossil): 5.88
  Carbon dioxide
- antimony: 4.49e-9
  Antimony
- carbon monoxide,carbon monoxide (fossil): 2.94e-8
  Carbon monoxide
- particles (PM2.5 - PM10): 0.0114
  Particulates
- water: 0.0652
- zinc: 4.26e-6

## Deviations from the LCI method approaches
使用 CMLCA 6.0 软件和 CML2001 影响类别进行生命周期环境影响

## Data selection and combination
数据来源总结如表2和表3 后台系统中与铜生产相关的电力生产和其他流程的数据来自ecoinvent v3.4数据库，

## Data treatment and extrapolations
Ecoinvent v3.4 数据库-从摇篮到大门

## Use advice
使用此数据集的用户应注意，数据代表的是中国的平均情况，而不是特定企业的情况，意图用于生命周期评估。该数据应与CMLCA 6.0软件一同使用，并以CML2001影响类别为考量。它包括2010年至2050年的中国铜需求预测，因此最相关的是该时间框架内的时效性分析。用户应参考表2和表3中的总结数据以获取详细信息。在使用此数据时，应特别注意前台过程分析（铜生产中的能源和资源使用）和后台过程分析（来自生命周期起点到门的ecoinvent v3.4数据库导出的与铜生产相关的电力生产）之间的方法学差异。

## Review details
清单： 内部审查通过几个迭代步骤完成，涉及原始数据验证、原始数据记录、代表性、完整性、与 ISO 14040 和 14044 有关的建模的一致性。

## Data sources
- Dong, D., Van Oers, L., Tukker, A. & Van Der Voet, E. Assessing the future environmental impacts of copper production in China: Implications of the energy transition. Journal of Cleaner Production 274, 122825 (2020).
