# 稀土浮选;镝;B/M;含稀土矿石

Dataset: ILCD process, Unit process, single operation
Geography: CN
Reference year: 2010
Valid until: 2019
Classification: Unit processes / Materials production / Non-energetic raw materials
Functional unit: The goal of this investigation is to compare environmental impacts related to the production of 1 kg Dy (functional unit) from IAC (Southern China), from B/M ore (Bayan Obo), and from an eudialyte deposit (Norra Kärr) using the LCA method
LCI method principle: Attributional
LCI method approaches: Allocation - mass
Generated by: 汪涛, twang@iue.ac.cn
Owner: 天工LCI数据工作小组
Review: Dependent internal review by 天工LCI数据工作小组
Amounts: no units in this file; such an amount is in the reference unit of its flow, which a separate flow dataset defines
copyright: false
licenseType: Free of charge for all users and uses

## General comment
通过稀土浮选工艺从含稀土矿石中获得的镝主要用于制造永磁体，这是现代电子设备的必要组件，例如混合动力汽车的电机、风力涡轮以及硬盘驱动器。此外，镝的独特属性使其适用于核反应堆和激光材料。

## Geography
华南地区和白云鄂博

## Technology and included processes
本次调查的目的是比较 IAC（中国南方）、B/M 矿石（白云鄂博）和 eudialyte 矿床（Norra Kärr）生产 1 千克镝（功能单位）的环境影响，使用生命周期分析法

## Reference product
- Rare Earth concentrate: 32.1; calculated
  RE concentrate. input for next process: Roasting

## Inputs
- Electricity: 16.272; calculated
  Electricity mix 2014
- Sodium silicate: 0.789
  Sodium silicate, spray powder, 80 %
- Fatty acid: 0.329
  fatty acid, from vegetable oil
- Chemicals organic,Chemicals, organic: 0.273
  chemical, organic. Precipitant unknown
- transport in t*km,transport in t*km: 0.511
  Transport, freight, lorry >32 metric ton, EURO3, organic chemicals 803 km, other chemicals 20 km

## Outputs
- tailings (unspecified): 2725; calculated
  Mass calculation from experts of RWTH Aachen University (Stark, 05.08.2015)

## Deviations from the LCI method approaches
In this study, an allocation method based on the mass of produced REEs combined with their market prices (based on an international metals market analysis and pricing index company ) are considered, as usual for metals with strongly different prices. As the ores have different compositions, the allocation factor has to be assessed individually for each site.

## Use advice
使用此生命周期评估(LCA)数据的用户应考虑研究中使用的分配方法，当将数据应用到自己的评估中时。基于生产的稀土元素的质量与其市场价格的分配方法，应谨慎应用以确保准确的环境影响评价。用户还应注意特定场所的数据，如矿石成分、技术适用性和地区特定的生态影响。建议重新评估每个场点的分配因素，以保持比较分析的严谨性。

## Review details
清单： 内部审查通过几个迭代步骤完成，涉及原始数据验证、原始数据记录、代表性、完整性、与 ISO 14040 和 14044 有关的建模的一致性。

## Data sources
- Zapp, P., Marx, J., Schreiber, A., Friedrich, B. & Voßenkaul, D. Comparison of dysprosium production from different resources by life cycle assessment. Resources, Conservation and Recycling 130, 248–259 (2018).
