# 湿法制砂;砂石筛分;振动筛筛分

Dataset: ILCD process, Unit process, single operation
Geography: CS-HUN-CN
Reference year: 2020
Classification: Unit processes / Materials production / Other mineralic materials
Generated by: 崔航, Cuihang0716@163.com
Owner: 天工LCI数据工作小组
Review: Dependent internal review by 天工LCI数据工作小组
Amounts: no units in this file; such an amount is in the reference unit of its flow, which a separate flow dataset defines
copyright: false
licenseType: Free of charge for all users and uses

## General comment
对不同粒径的砂石进行筛分

## Technical purpose
本工艺用于筛分不同粒径的砂石。通常，此服务应用于骨料行业，用于建筑材料的分类和准备，这些材料包括用于混凝土、沥青和道路基础的原料。

## Reference product
- gravel: 133333; measured

## Inputs
- gravel: 133333; measured
  筛分所需的骨料
- Electricity: 720; measured
  分筛设备用电量

## Use advice
在将此数据集用于生命周期评估时，用户应考虑到正在处理的特定粒径与砂石的预期用途之间的关系。基于所使用的振动筛的效率和类型，分析能源消耗和潜在排放。还应考虑对筛选出的材料进行回收的可能性，以及处理不同筛分材料的方法论。

## Review details
清单： 内部审查通过几个迭代步骤完成，涉及原始数据验证、原始数据记录、代表性、完整性、与 ISO 14040 和 14044 有关的建模的一致性。

## Data sources
- 年产 60 万吨机制砂建设项目环评报告
