# 砖块生产 ;页岩空心砖生产 ;搅拌过程

Dataset: ILCD process, Unit process, single operation
Geography: GZ-JX-CN
Reference year: 2020
Classification: Unit processes / Materials production / Other mineralic materials
Generated by: 王湘锦, r99rt4@163.com
Owner: 天工LCI数据工作小组
Review: Dependent internal review by 天工LCI数据工作小组
Amounts: no units in this file; such an amount is in the reference unit of its flow, which a separate flow dataset defines
copyright: false
licenseType: Free of charge for all users and uses

## General comment
传统页岩空心砖生产工艺

## Technical purpose
所描述的工艺用于生产页岩空心砖，这种砖在建筑行业中常用于建造住宅和商业结构。这种类型的砖提供耐用性和热绝缘性的平衡，通常因其承重能力和能源效率而被选择。页岩空心砖可用于新建筑的建造和现有建筑的翻新。

## Reference product
- brickbat aggregate: 1550; measured
  搅拌后的砖骨料

## Inputs
All rows: measured
- brickbat aggregate: 1375
- Sludge: 168
- sodium hydroxide: 0.672
- freshwater: 0.00624
- Electricity: 3.7332

## Deviations from the LCI method approaches
环境影响评估报告基于砖的年产量（8000万块砖），出于统计目的，数据已根据其中所述的尺寸规格进行转换，即每吨生产的砖

## Data selection and combination
采用根据《第一次全国污染源普查工业污染源产排污系数手册 第七分册》中 3131 烧结类砖瓦及建筑砌块制造业产排污系数表的相关数据。

## Sampling procedure
该环评报告的数据来源于工厂的实时数据

## Use advice
在使用此数据集进行生命周期评估时，请确保数据准确匹配到指定的生产规模（每年8000万块砖）。如果应用场景与此生产量有偏差，则必须相应地调整数据规模。用户还应该注意根据《第一次全国污染源普查工业污染源产排污系数手册 第七分册》中的排放系数，并将它们应用于具体情境。确认技术特性，如页岩空心砖生产的搅拌过程，是否与评估的建模要求一致，这一点很重要。

## Review details
清单： 内部审查通过几个迭代步骤完成，涉及原始数据验证、原始数据记录、代表性、完整性、与 ISO 14040 和 14044 有关的建模的一致性。

## Data sources
- 年产 8000 万块页岩标砖项目环评报告公示
