# 乙烯生产 ; 乙烯 ; 石脑油路线 ; 石脑油

Dataset: ILCD process, Unit process, black box
Geography: DL-LN-CN
Reference year: 2021
Classification: Materials production / Organic chemicals
Functional unit: Define 1t of industrial grade ethylene product as a functional unit
LCI method principle: Attributional
LCI method approaches: Allocation - mass
Generated by: 任亚楠, renyn15@tsinghua.org.cn
Owner: 天工LCI数据工作小组
Review: Dependent internal review by 天工LCI数据工作小组
Amounts: no units in this file; such an amount is in the reference unit of its flow, which a separate flow dataset defines
copyright: false
licenseType: Free of charge for all users and uses

## General comment
恒力石化化工乙烯项目，150万吨/年乙烯，蒸汽裂解技术

## Geography
大连长兴岛石油化工园区

## Time period
未提及，以文献发表时间代替

## Technology and included processes
石脑油路径制乙烯的模型中采用了典型的蒸汽裂解工艺，乙烯项目的上游动力来源炼化项目动力站，将通过调节蒸汽、发电量满足乙烯项目蒸汽需求，不会导致污染排放增加。乙烯装置规模为年产150万吨，假设工艺装置年操作时间为8000h，蒸汽裂解工艺包括乙烯蒸汽热裂解单元、干气回收单元(简称ROG)、废碱氧化单元(简称WAO)、变压吸附制氢(简称PSA)单元及乙烯低温储罐区。

## Technical purpose
恒力石化使用蒸汽裂解技术生产的高纯度乙烯适用于多种工业应用，比如聚合物（例如聚乙烯、聚氯乙烯）生产、防冻液及溶剂的制造。考虑到其年产能150万吨及其在石化基础原料中的核心作用，这种乙烯特别适合化工行业的大规模工业过程。

## Model description
原料涉及到的石脑油、混合C4、乙烷等均来自上游炼化项目，石脑油溯背景数据库“石脑油市场-全球”。公用工程部分的高压蒸汽和低压蒸汽均依托炼化项目动力站，模型中追溯“化工蒸汽-全球平均”。新鲜水依托炼化项目净水厂，模型中链接“新鲜水—原料流”。电力消耗部分追溯“电力，中压，中国国家电网”。污染物排放部分遵循石油化学工业污染物排放核算原则。

## Reference product
- ethene (ethylene): 1000; measured
  乙烯

## Inputs
All rows: measured
- naphtha: 630
  石脑油
- C4 Hydrocarbon Mixture: 130
  混合C4
- Ethane: 170
  乙烷
- Methane: 150
  甲烷
- Propane: 40
  丙烷
- benzene: 330
  苯
- Cooling water: 290
  工艺冷凝水
- Water (fresh water): 2290
  新鲜水
- Water for industrial use: 1850
  生产用水
- process steam: 50
  高压蒸汽
- Water (desalinated; deionized): 0.8
  除盐水
- electricity mix: 2.808
  电

## Outputs
All rows: measured
- nitrous oxide: 0.48
  NOx
- Dust (unspecified, from stack): 0.06
  颗粒物
- carbon monoxide: 0.28
  CO
- sulfur dioxide: 0.06
  SO2
- volatile organic compound: 0.06
  VOCs
- carbon dioxide: 1.39
  CO2
- water vapour: 118.48
  蒸汽排污
- Water (groundwater from technosphere, waste water): 7.56
  锅炉废水
- Production residues (unspecified): 23.13
  焦油残渣
- Waste Alkaline Liquor: 46.27
  废碱液带水

## Deviations from the LCI method approaches
本研究选择质量分配

## Data selection and combination
石脑油路径制乙烯数据来源于恒力石化企业调研数据。

## Use advice
使用通过石脑油路径生产乙烯的工业过程数据集时，用户需注意上游原材料的来源，如来自具有全球平均背景的炼化项目衍生的石脑油、混合C4和乙烷。还应考虑高压和低压蒸汽的可用性及其影响，净水厂提供的新鲜水，以及来自中国国家电网的电力。污染物排放要按照石油化工行业标准进行核算。本数据集的功能单位定义为1吨工业级乙烯产品，并在研究中使用质量分配。在应用数据进行生命周期分析以准确反映过程的环境影响时，确保妥善评估所有因素至关重要。

## Review details
清单： 内部审查通过几个迭代步骤完成，涉及原始数据验证、原始数据记录、代表性、完整性、与 ISO 14040 和 14044 有关的建模的一致性。

## Data sources
- 赵悦如. 基于生命周期方法的乙烯生产环境影响分析. (大连理工大学, 2021).
