# 市政污泥处理与处置;湿污泥 含水率65%;与烟煤混燃发电

Dataset: ILCD process, Unit process, single operation
Geography: SZ-JS-CN
Classification: End-of-life treatment / Energy recycling
Functional unit: 1 t wet sludge with a moisture content of 65% was used as the functional unit.
Generated by: 金思甜, 2331276@tongji.edu.cn
Owner: 天工LCI数据工作小组
Review: Dependent internal review by 天工LCI数据工作小组
Amounts: no units in this file; such an amount is in the reference unit of its flow, which a separate flow dataset defines
licenseType: Free of charge for all users and uses

## General comment
该工业过程数据代表了含水率为65%的市政污泥通过与烟煤混燃来进行处理和处置，用于电力生成。它是为了评估位于苏州昆山的污泥混燃协同发电设施相关的环境影响而定制的。该过程主要适用于环境服务行业内从废物管理到能源回收的操作。

## Geography
苏州昆山某污泥混燃协同发电公司

## Reference product
- Sludge: 1000; input; estimated
  1 t 含水率 65%湿污泥

## Inputs
- Electricity: 113.328; measured
  生产上游：煤炭开采及运输过程与污泥运输及干化过程。
- water: 747; measured
  生产上游：煤炭开采及运输过程与污泥运输及干化过程。
- Diesel: 8.51; measured
  生产上游：煤炭开采及运输过程与污泥运输及干化过程。
- hard coal; 26.3 MJ/kg: 4.14; measured
  生产上游：煤炭开采及运输过程与污泥运输及干化过程。
- water: 5013; calculated
  生产过程
- hard coal; 26.3 MJ/kg: 446.7; calculated
  生产过程
- Diesel: 0.17; calculated
  生产下游：主要涉及焚烧后可利用固体废弃物。 固体废弃物主要包括锅炉飞灰、底渣与脱硫石膏等， 其中锅炉底渣、脱硫石膏等送至附近建材生产厂家 作原料使用，实现资源化利用。

## Outputs
- carbon dioxide: 37.48; measured
  生产上游：煤炭开采及运输过程与污泥运输及干化过程。
- methane: 0.614; measured
  生产上游：煤炭开采及运输过程与污泥运输及干化过程。
- nitrous oxide: 0.002; measured
  生产上游：煤炭开采及运输过程与污泥运输及干化过程。
- Nitrogen oxides: 0.19; measured
  生产上游：煤炭开采及运输过程与污泥运输及干化过程。
- sulfur dioxide: 0.095; measured
  生产上游：煤炭开采及运输过程与污泥运输及干化过程。
- carbon monoxide: 0.14; measured
  生产上游：煤炭开采及运输过程与污泥运输及干化过程。
- hydrocarbons (unspecified): 0.017; measured
  生产上游：煤炭开采及运输过程与污泥运输及干化过程。
- particles (PM10): 0.019; measured
  生产上游：煤炭开采及运输过程与污泥运输及干化过程。
- chemical oxygen demand: 13.93; measured
  生产上游：煤炭开采及运输过程与污泥运输及干化过程。
- ammonia: 0.027; measured
  生产上游：煤炭开采及运输过程与污泥运输及干化过程。
- Suspended solids, unspecified: 0.19; measured
  生产上游：煤炭开采及运输过程与污泥运输及干化过程。
- nitrogen, total (excluding N2): 0.001; measured
  生产上游：煤炭开采及运输过程与污泥运输及干化过程。
- phosphorus, total: 0.0008; measured
  生产上游：煤炭开采及运输过程与污泥运输及干化过程。
- Waste (solid): 30.02; measured
  生产上游：煤炭开采及运输过程与污泥运输及干化过程。
- carbon dioxide: 1492; calculated
  生产过程
- Nitrogen oxides: 0.52; calculated
  生产过程
- sulfur dioxide: 0.28; calculated
  生产过程
- carbon monoxide: 0.1; calculated
  生产过程
- particles (PM10): 0.052; calculated
  生产过程
- chemical oxygen demand: 0.01; article inperiodical
  生产过程
- ammonia: 0.0006; article inperiodical
  生产过程
- Suspended solids, unspecified: 0.005; article inperiodical
  生产过程
- nitrogen, total (excluding N2): 0.0009; article inperiodical
  生产过程
- phosphorus, total: 8e-5; article inperiodical
  生产过程
- Waste (solid): 238.3; calculated
  生产过程
- carbon dioxide: 0.61; calculated
  生产下游：主要涉及焚烧后可利用固体废弃物。 固体废弃物主要包括锅炉飞灰、底渣与脱硫石膏等， 其中锅炉底渣、脱硫石膏等送至附近建材生产厂家 作原料使用，实现资源化利用。
- methane: 6e-5; calculated
  生产下游：主要涉及焚烧后可利用固体废弃物。 固体废弃物主要包括锅炉飞灰、底渣与脱硫石膏等， 其中锅炉底渣、脱硫石膏等送至附近建材生产厂家 作原料使用，实现资源化利用。
- nitrous oxide: 4e-5; calculated
  生产下游：主要涉及焚烧后可利用固体废弃物。 固体废弃物主要包括锅炉飞灰、底渣与脱硫石膏等， 其中锅炉底渣、脱硫石膏等送至附近建材生产厂家 作原料使用，实现资源化利用。
- Nitrogen oxides: 0.002; calculated
  生产下游：主要涉及焚烧后可利用固体废弃物。 固体废弃物主要包括锅炉飞灰、底渣与脱硫石膏等， 其中锅炉底渣、脱硫石膏等送至附近建材生产厂家 作原料使用，实现资源化利用。
- sulfur dioxide: 0.0008; calculated
  生产下游：主要涉及焚烧后可利用固体废弃物。 固体废弃物主要包括锅炉飞灰、底渣与脱硫石膏等， 其中锅炉底渣、脱硫石膏等送至附近建材生产厂家 作原料使用，实现资源化利用。
- carbon monoxide: 0.002; calculated
  生产下游：主要涉及焚烧后可利用固体废弃物。 固体废弃物主要包括锅炉飞灰、底渣与脱硫石膏等， 其中锅炉底渣、脱硫石膏等送至附近建材生产厂家 作原料使用，实现资源化利用。
- hydrocarbons (unspecified): 0.0002; calculated
  生产下游：主要涉及焚烧后可利用固体废弃物。 固体废弃物主要包括锅炉飞灰、底渣与脱硫石膏等， 其中锅炉底渣、脱硫石膏等送至附近建材生产厂家 作原料使用，实现资源化利用。
- particles (PM10): 0.0003; calculated
  生产下游：主要涉及焚烧后可利用固体废弃物。 固体废弃物主要包括锅炉飞灰、底渣与脱硫石膏等， 其中锅炉底渣、脱硫石膏等送至附近建材生产厂家 作原料使用，实现资源化利用。

## Use advice
应用该数据集进行生命周期评估的用户应仔细考虑该过程的特定技术和地理背景，并确保系统边界和分摊方法等方法论假设与研究目标一致。用户应考虑可能影响排放和资源消耗的区域差异。此外，用户必须调整任何与该工艺的功能单位（1吨含水率为65%的湿污泥）和研究的功能单位之间的差异。应关注混燃相关的潜在排放问题以及过程中使用的污泥与煤炭的相对比例。

## Review details
清单： 内部审查通过几个迭代步骤完成，涉及原始数据验证、原始数据记录、代表性、完整性、与 ISO 14040 和 14044 有关的建模的一致性。

## Data sources
- 周钢,宋涛,马士伟等.不同污泥混燃发电工艺生命周期评价[J].洁净煤技术,2022,28(11):19-29.DOI:10.13226/j.issn.1006-6772.RE22042401.
