# 市政污泥处理与处置;干污泥;混燃

Dataset: ILCD process, Unit process, single operation
Geography: CN
Classification: Unit processes / End-of-life treatment / Waste water treatment
Functional unit: One ton of sludge on a dry basis (1 t-DS) is defined as the functional unit.
Generated by: 金思甜, 2331276@tongji.edu.cn
Owner: 天工LCI数据工作小组
Review: Dependent internal review by 天工LCI数据工作小组
Amounts: no units in this file; such an amount is in the reference unit of its flow, which a separate flow dataset defines
copyright: ['opt4ROkqig']
licenseType: Free of charge for all users and uses

## General comment
选择国内几个典型的污泥处理设施，分别为厌氧消化、堆肥、共燃、热干燥焚烧和水泥生产，进行调查。数据主要来自具体地点的测量，要么通过实地调查，要么通过操作报告。污泥特性基于所调查场地的平均值。

## Technology and included processes
将含水率78%的脱水污泥与煤按24%的比例混合共燃所选电厂为流化床型。污泥和煤在850℃下燃烧，燃烧室排出的废气用于发电。需要20%的发电量来满足输入能源需求;剩下的送进城市电网。

## Technical purpose
该数据集描述了通过混燃进行市政污泥处理与处置的工艺。从该工艺中得到的干污泥主要用于废物能源设施的能量回收，与其他燃料一起共燃。

## Reference product
- Sludge: 1000; input; estimated
  干基 （1 t-DS）

## Inputs
All rows: measured
- Electricity: 26924.4
- Diesel: 2
- hard coal; 26.3 MJ/kg: 18900
  煤
- hydrogen chloride gas: 55.5
- sodium hydroxide: 49.7
- Limestone: 800

## Outputs
- electricity from waste incineration: 134626; measured
- mineral waste (ash): 4700; measured
  燃烧产生的灰

## Use advice
使用此数据时，用户应考虑混燃过程的具体情景。在生命周期评估(LCA)模型中必须一致使用功能单位1吨干污泥（1 t-DS）。应关注能源混合和与混燃过程相关的排放问题。必须考虑废物组成和能源基础设施的区域差异。

## Review details
清单： 内部审查通过几个迭代步骤完成，涉及原始数据验证、原始数据记录、代表性、完整性、与 ISO 14040 和 14044 有关的建模的一致性。

## Data sources
- Dong, J., Chi, Y., Tang, Y., Wang, F. & Huang, Q. Combined Life Cycle Environmental and Exergetic Assessment of Four Typical Sewage Sludge Treatment Techniques in China. Energy Fuels 28, 2114–2122 (2014).
