# 高冰镍生产 ; 镍铜混合精矿 ; 火法 ; 甘肃省镍钴矿

Dataset: ILCD process, Unit process, single operation
Geography: GS-CN
Reference year: 2018
Classification: Unit processes / Materials production / Metals and semimetals
Generated by: 孙鑫, xs389@cornell.edu
Owner: 天工LCI数据工作小组
Review: Dependent internal review by 天工LCI数据工作小组
Amounts: no units in this file; such an amount is in the reference unit of its flow, which a separate flow dataset defines
licenseType: Free of charge for all users and uses

## General comment
此处通过 "从摇篮到终点 "的方法确定了电解镍生产的系统边界。研究了三个阶段，即采矿和选矿阶段、火法冶金阶段和精炼阶段。

## Technology and included processes
鉴于地质和资源特征的复杂性，在采矿过程中采用了胶结回填法提取镍原矿，所选充填材料和粘合剂分别为尾矿和水泥。采矿过程中使用了地下施工机械（如凿岩机、扒渣机、电力机车和收割机）和地面施工机械（如塔式起重机、电焊机和卡车）。在选矿过程中，镍矿石由颚式破碎机、圆振动筛、球磨机、浮选机和浓缩机处理，以获得镍含量约为 8.6% 的镍铜混合精矿。随后，在火法冶金阶段对精矿进行处理，然后利用闪速熔炼技术将镍富集成高镍锍。在这一阶段，混合精矿首先在闪速炉中熔炼，以产生低镍锍，然后转炉将低镍锍吹成高镍锍和炉渣。炉渣被放入电清洗炉中生成低镍锍，然后将生成的材料再次放入转炉中。

## Technical purpose
这种高冰镍生产过程涉及使用镍铜混合精矿通过火法冶金方法。这种高纯度的镍产品主要用于不锈钢、可充电电池和特种合金的制造。它在要求耐腐蚀和高温性能的材料生产中起着至关重要的作用。

## Reference product
- Nickel matte: 1000; measured

## Inputs
All rows: measured
- Nickel concentrate (8.6% Ni): 11794
- water: 30410
- sand: 1370
- Heavy fuel oil (1.0 wt.% S): 20
- oxygen: 1060
- sodium hydroxide: 0.74
- Calcium Oxide: 25.71
- Aluminum oxide (alumina): 0.03
- Sodium sulfide: 9.46
- transport in t*km: 16.67
- Electricity: 1980.5
- Diesel: 13.53
- process steam: 170
- Refractory material: 13.42
- Cathode Material: 13.42
- Polyacrylamide,Polyacrylamide: 1.41

## Outputs
All rows: measured
- particles (PM2.5 - PM10): 0.12
- sulfur dioxide: 0.51
- nitrous oxide: 2.26
- hydrogen sulfide: 0.00113
- sulphuric acid: 0.00038
- nickel: 7.5e-6, 0.00475 (2 entries)
- cadmium: 1.75e-11, 7e-5 (2 entries)
- lead: 8.3e-7, 0.00137 (2 entries)
- arsenic: 7.64e-9, 0.00604 (2 entries)
- mercury: 3.74e-10, 0.00012 (2 entries)
- cobalt: 0.00024
- chromium: 0.00058
- copper: 0.00094
- zinc: 0.07604
- waste water - untreated: 3740
- municipal solid waste deposition: 100
- Hazardous waste (unspec.): 9.37

## Use advice
在将此数据集整合到生命周期评估中时，应特别注意源自新疆省的镍铜钴矿的地理特异性，因为其环境影响可能与其他地区有显著差异。用户还应考虑采矿和浓缩的上游影响，以及与该生产过程相关的回收和废物处理的下游效应。必须明确定义排除标准，以避免重复计算，尤其是在考虑镍行业可能存在的闭环回收时。

## Review details
清单： 内部审查通过几个迭代步骤完成，涉及原始数据验证、原始数据记录、代表性、完整性、与 ISO 14040 和 14044 有关的建模的一致性。

## Data sources
- Bai, Y. et al. Strategies for improving the environmental performance of nickel production in China: Insight into a life cycle assessment. Journal of Environmental Management 312, 114949 (2022).
