# 煤炭洗选|将煤炭、矸石、精煤洗选分离

Dataset: ILCD process, Unit process, black box
Geography: SQ-HEN-CN
Reference year: 2015
Classification: Materials production / Other mineralic materials
Generated by: Linlin Yin, yinlinlin0623@163.com

## Geography
永城矿区的资源 储量和储采比例与省内其他矿区相比具有较高的优势，现共划分 5 个勘探煤矿区、 2 个找煤预测区，永城矿区煤层的赋存较为稳定，开采技术条件也相对简单，可采煤层的倾角 比较平缓，适于机械化开采方式。

## Technology and included processes
煤炭洗选加工过程中包括原煤准备、原煤分选、洗选后的干燥以及脱水和煤 泥水的处理等环节。

## Inputs
- Diesel; uniform; article inperiodical
  2013年新桥煤矿洗煤厂煤炭洗选过程中“柴油”消耗活动水平数据。
- Gasoline (regular); uniform; article inperiodical
  2013年新桥煤矿洗煤厂煤炭洗选过程中“汽油”消耗活动水平数据。
- Electricity; uniform; article inperiodical
  2013年新桥煤矿洗煤厂煤炭洗选过程中“电”消耗活动水平数据。
- water; uniform; article inperiodical
  2013年新桥煤矿洗煤厂煤炭洗选过程中“水”消耗活动水平数据。
