# 土壤修复;异位修复;生物堆;施工准备;材料运输;运输到场的材料和设备

Dataset: ILCD process, Unit process, single operation
Geography: KR
Reference year: 2011
Classification: Other Services / Repair and maintenance
Generated by: 桑春晖, sangch@mail.bnu.edu.cn
Owner: 天工LCI数据工作小组
Review: Dependent internal review by 天工LCI数据工作小组
Amounts: no units in this file; such an amount is in the reference unit of its flow, which a separate flow dataset defines
copyright: false
licenseType: Free of charge for all users and uses

## General comment
场地1000 m3 TPH污染土壤修复所需材料和药剂共计117吨，总运输距离30公里

## Technical purpose
此数据集对应于土壤修复过程。具体而言，它涉及用于恢复被总石油烃（TPH）污染的土壤的异位生物堆处理。覆盖1000立方米受污染土壤的体积，此数据与准备和运输共计117吨的材料和试剂有关，运输距离为30公里。

## Reference product
- Equipment and Materials Arriving on Site: 117000; estimated

## Inputs
- transport in t*km: 3510; estimated

## Use advice
在使用此数据集进行生命周期评估（LCA）时，确保它与评估中的土壤污染具体情况相匹配至关重要。考虑土壤的体积、污染物类型和修复目标。对于与运输相关的排放，仅当提供的总距离与实际项目的物流相一致时使用。如果涉及其他运输方式或距离，请相应调整数据。此数据应用于模拟土壤修复的预处理阶段，包括材料处理和运输。

## Review details
清单： 内部审查通过几个迭代步骤完成，涉及原始数据验证、原始数据记录、代表性、完整性、与 ISO 14040 和 14044 有关的建模的一致性。

## Data sources
- Seung-Woo Jeong, Sangwon Suh. Assessment of Environmental Impacts and CO2 Emissions from Soil Remediation Technologies using Life Cycle Assessment - Case Studies on SVE and Biopile Systems -. 大韓環境工學會誌
