# 沟槽式导水门;10m宽，11m深;原位地下水修复;PRB;漏斗-导水门式PRB

Dataset: ILCD process, Unit process, single operation
Geography: US
Reference year: 2011
Classification: Unit processes / Other Services / Repair and maintenance
Generated by: 张建宾, zhangjb@caep.org.cn
Owner: 天工LCI数据工作小组
Review: Dependent internal review by 天工LCI数据工作小组
Amounts: no units in this file; such an amount is in the reference unit of its flow, which a separate flow dataset defines
copyright: false
licenseType: Free of charge for all users and uses

## General comment
导水门是地下水渗透性反应墙的组成部分之一，隔水漏斗将污染地下水流引导或汇集进入导水门，导水门内填充通过活性材料，用于使流经的地下水得到处置。沟槽式导水门指采用沟槽开挖法安装的导水门。

## Geography
假设的污染场地

## Technical purpose
所述沟槽式导水门用作原位地下水修复的渗透性反应墙（PRB）系统的一部分。具体来说，该设施用于引导被污染地下水流进入填充有反应介质的导水门，以便水流通过时进行处理。10米宽和11米深的配置细节显示其适用于大型环境管理项目，特别是用于受影响现场被污染地下水的控制和修复。

## Reference product
- Trench-based gate: 1; estimated
  Trench-based gate with a width of 10 m and a depth of 11 m

## Inputs
All rows: estimated
- Zero-valent Iron: 139000
  Assume Fe0 is mixed with quartz sand in 1:1 (w:w)
- quartz sand: 139000
  Assume Fe0 is mixed with quartz sand in 1:1 (w:w)
- transport in t*km: 44480, 8577.12 (2 entries)
  Transport distance of the materials to the site is assumed to be 160 km (100 mile)
- Electricity: 483000
  Reactive media construction.
- Steel: 32200
  Gate steel
- cement, unspecified: 907
  Gate cement
- sand: 20500
  Gate sand
- Electricity: 654000
  Gate construction
- quartz sand: 26700
  Backfilling

## Use advice
使用此数据的用户应仔细考虑其在原位地下水修复项目中的预期用途。数据反映了与安装特定尺寸导水门的材料和能源要求相关的输入和输出。用户必须注意，生命周期清单数据是基于假设污染场地的，并且可能需要进行修改，以使数据适应实际的现场条件。应注意导水门预期使用寿命、维护要求，以及场地地下水污染和水文地质特性可能的变化。

## Review details
清单： 内部审查通过几个迭代步骤完成，涉及原始数据验证、原始数据记录、代表性、完整性、与 ISO 14040 和 14044 有关的建模的一致性。

## Data sources
- Mark S. H. Mak and Irene M. C. Lo.Environmental Life Cycle Assessment of Permeable Reactive Barriers: Effects of Construction Methods, Reactive Materials and Groundwater Constituents[J].Environmental Science & Technology 2011, 45, 23, 10148-10154
