# 多晶硅制造 ; 多晶硅 ; 物理冶金工艺

Dataset: ILCD process, Unit process, single operation
Geography: CN
Reference year: 2016
Classification: Unit processes / Materials production / Metals and semimetals
Functional unit: Grid-connected electricity generation from a 1 MWp multi-Si PV system, whose lifespan is 30 years of a 10 MWp power station has been taken as the research object and the functional unit
LCI method principle: Attributional
LCI method approaches: Allocation
Generated by: 杨锦锋, yjfzfshn@163.com
Owner: 天工LCI数据工作小组
Review: Dependent internal review by 天工LCI数据工作小组
Amounts: no units in this file; such an amount is in the reference unit of its flow, which a separate flow dataset defines
copyright: false
licenseType: Free of charge for all users and uses

## General comment
多晶硅

## Geography
该电站位于宁夏中部地区，年平均太阳辐射量约为5955.80 MJ m2 a-1，年平均日照高峰时数为1718h

## Time period
文章发表

## Technology and included processes
在上述工艺中，SoG-Si 的制备采用金属冶金法，这是一种集成的方法，而不是单一的制备方法。为了去除硅中的各种杂质，将几种独立的和随机的有序工艺结合起来进行混合使用

## Technical purpose
通过冶金方法生产的太阳能级多晶硅（SoG-Si）用于建造和运营多晶硅光伏（PV）系统，以实现并网发电。这些系统部署在中国宁夏中部地区等高太阳辐射和日照高峰时数的区域，这有助于太阳能发电。SoG-Si的生产过程结合了几种综合的金属冶金方法，以确保对高效光伏操作所必需的高纯度硅。

## Reference product
- Solar grade multi-Si: 1000; measured
  SoG-Si

## Inputs
All rows: measured
- Electricity: 147921
- Metallurgical silicon: 1227.72
- quartz sand: 41.19
  Quartz sand
- fluorspar: 8.22
  Fluorite powder
- Hydrochloric acid: 356.44
  Hydrochloric acid (31%)
- Hydrofluoric acid: 151.49
  Hydrofluoric acid (55%)
- freshwater: 12376.2
  Fresh water
- Lime: 379.21
- Quartz Crucible,Quartz Crucible: 207.92
  Quartz crucible
- Silicon nitride: 0.97
- Cooling water: 4158.42
  Circulating water

## Outputs
- industrial waste (unspecified): 164.36; measured
  Waste residue
- waste water - untreated: 13162.4; measured
  Waste water
- Calcium fluoride waste: 162.38; measured
  Calcium fluoride
- Waste (solid): 209.69; measured
  Waste quartz crucible

## Deviations from the LCI method approaches
对中国冶金路线多晶硅光伏并网发电系统进行了生命周期评估

## Data selection and combination
调查云南、宁夏工厂

## Use advice
在使用太阳能级多晶硅生产过程的生命周期评估数据时，注意保持LCA方法的一致性。确保研究的边界条件，如地理位置和系统寿命，与项目的具体背景相匹配。该数据集特别适用于与宁夏中部地区有相似太阳辐射的区域内的并网光伏系统。建议准确地模拟光伏系统在其30年寿命期间的发电量和性能，考虑日照高峰时数。使用这些数据时还应考虑循环利用和生命周期末期处理过程，因为它们可能会影响光伏系统的整体环境概况。

## Review details
清单： 内部审查通过几个迭代步骤完成，涉及原始数据验证、原始数据记录、代表性、完整性、与 ISO 14040 和 14044 有关的建模的一致性。

## Data sources
- Yu, Z. et al. Life cycle assessment of grid-connected power generation from metallurgical route multi-crystalline silicon photovoltaic system in China. Applied Energy 185, 68–81 (2017).
