# Octinoxate|Benzeneacetonitrile,ethylchloride|All sizes / /|辛硫磷|苯乙腈、乙基氯化物|所有规模

Dataset: ILCD process, Partly terminated system
Geography: CN
Reference year: 2019
Classification: Materials production / Other mineralic materials
Generated by: The data was created by the Office of the Second National Pollution Source Census of the Ministry of Ecology and Environment, and the data was organized by the TianGong Plan team for ILCD format / 生态环境部第二次全国污染源普查工作办公室创建数据，天工计划团队常慧敏整理数据为ILCD格式
Amounts: no units in this file; such an amount is in the reference unit of its flow, which a separate flow dataset defines
copyright: false

## Technology and included processes
the Technical of end-of-pipe management technology for pollution PhoximisRedox process + chemical precipitation + A2/O process，Its Technical efficiency of end-of-pipe management99.5
污染物指标总氮的末端治理技术是氧化还原法+化学沉淀法+A2/O工艺，其效率为99.5，末端治理设施实际运行率（k值）计算公式为k=治理设施耗电量（千瓦时）/（治理设施运行时数（小时）*治理设施额定功率(千瓦)）

## Reference product
- Phoxim: 1000; calculated
  原文件中描述污染物类别为Product，污染物指标为辛硫磷，此处对其进行了匹配工作，将其匹配到LCAflow库里面相最符合的流，污染物指标备注为总氮

## Outputs
- Nitrogen, organic bound: 0.0525, 3.15, 0.315 (3 entries); calculated
  原文件中描述污染物类别为废水，污染物指标为总氮，此处对其进行了匹配工作，将其匹配到LCAflow库里面相最符合的流，污染物指标备注为总氮
- phosphorus, total: 0.2899, 0.7582, 0.5575 (3 entries); calculated
  原文件中描述污染物类别为废水，污染物指标为总磷，此处对其进行了匹配工作，将其匹配到LCAflow库里面相最符合的流，污染物指标备注为总磷

## Data sources
- 第二次全国污染源普查产排污核算系数手册（试用版）,二级代码26,三级代码263.0文件，在完整版文件中第2936页
