# 华东水稻; 上海水稻生产;耕地

Dataset: ILCD process, Unit process, single operation
Geography: SH-CN
Reference year: 2012
Valid until: 2014
Classification: Unit processes / Materials production / Agricultural production means
Functional unit: 1 t
LCI method principle: Attributional
LCI method approaches: Consequential
Generated by: Haoran Zhang, hrzhang@whu.edu.cn
Owner: 天工LCI数据工作小组
Review: Dependent internal review by 天工LCI数据工作小组
Amounts: no units in this file; such an amount is in the reference unit of its flow, which a separate flow dataset defines
copyright: false
licenseType: Free of charge for all users and uses

## General comment
参照PAS2050规范并结合生命周期评价方法对上海市水稻生产进行了碳足迹评估

## Geography
崇明

## Technology and included processes
主要参照 PAS2050 规范并结合 LCA 方 法进行水稻生产的碳足迹计算。PAS2050 全称“公 众可获 取 的 规 范”( Publicly Available Specification， PAS) ，由英国标准协会( British Standard Institution， BSI) 编制，旨在对产品和服务生命周期内温室气体 排放的评价要求做出明确的规定［19］。

## Technical purpose
该数据集描述了上海水稻生产的碳足迹，重点关注崇明地区的农业实践，如土地准备、施肥、农药使用和收获后水稻的加工。它适用于农业和食品生产领域环境影响评估，特别是针对关心谷物作物（如水稻）碳足迹的用户。

## Reference product
- rice: 1000; measured

## Inputs
- Diesel: 0.00526903; calculated

## Outputs
- carbon dioxide (fossil),carbon dioxide (fossil): 0.0042, 0.003 (2 entries); calculated
  耕地过程中平地作业的柴油消耗导致的CO2排放
- carbon dioxide (fossil),carbon dioxide (fossil): 0.0021; calculated
  耕地过程中耙地作业的柴油消耗导致的CO2排放
- carbon dioxide (fossil),carbon dioxide (fossil): 0.0038; calculated
  耕地过程中旋耕作业的柴油消耗导致的CO2排放
- carbon dioxide (fossil),carbon dioxide (fossil): 0.0003; calculated
  耕地过程中其他作业的柴油消耗导致的CO2排放

## Deviations from the LCI method approaches
主要参照PAS2050 规范并结合LCA方法进行水稻生产的碳足迹计算。PAS2050 全称“公众可获取的规范” ( Publicly Available Specification, PAS)

## Data selection and combination
水稻碳足迹的初级活动水平数据包括田间各项作业活动, 加工存储各项作业活动、深加工与产品包装以及田间温室气体散逸等活动水平数据。

## Data treatment and extrapolations
包括田间作业、稻谷加工、温室气体排放检测

## Use advice
用户应依据PAS2050规范和LCA方法的框架，将此数据应用于农产品生产和作物生产系统内。请注意，该数据不涵盖作物种植过程以后的阶段，如销售、消费者使用、处置和回收。使用该数据时，如果研究范围要求，请确保单独评估与这些后续阶段相关的任何额外环境影响。

## Review details
清单： 内部审查通过几个迭代步骤完成，涉及原始数据验证、原始数据记录、代表性、完整性、与 ISO 14040 和 14044 有关的建模的一致性。

## Data sources
- 曹黎明,李茂柏,王新其,赵志鹏,潘晓华.基于生命周期评价的上海市水稻生产的碳足迹[J].生态学报,2014,34(02):491-499.
