# 牛奶生产 ; 奶牛饲养

Dataset: ILCD process, Unit process, single operation
Geography: ZY-GS-CN
Reference year: 2012
Classification: Unit processes / Materials production / Food and renewable raw materials
Functional unit: 1kg milk as functional unit (FU)
Generated by: 杨瑞, 1632707028@qq.com
Owner: 天工LCI数据工作小组
Review: Dependent internal review by 天工LCI数据工作小组
Amounts: no units in this file; such an amount is in the reference unit of its flow, which a separate flow dataset defines
copyright: false
licenseType: Free of charge for all users and uses

## General comment
奶牛的饲料由粗饲料与精饲料两部分组成，精饲料由玉米、豆粕、和麦麸为 主要原料混合而成，其他成分所占比例较小，所以忽略其他成分。奶牛在不同的 饲养阶段饲料消耗量不同，奶牛生产分为犊牛期、育成期、泌乳期和干奶期四个 时期。

## Geography
根据作者对张掖市前进牧业石岗墩牧场调查得到平均每头奶牛每天耗水 70kg

## Time period
精饲料主要成分（曹正纲，2012）

## Technology and included processes
通过 LCA 评价这四种畜产品，从原材料生产到最终产品产 出全过程的各种资源消耗、产品投入、环境排放，在同一种评价模型中评价四种 畜产品，定性、定量地评估单位畜产品生产对某一环境影响类型的影响程度、以 及对环境综合影响，最终分别得到生产 1kg 牛肉、1kg 牛奶、1kg 猪肉、1kg 鸡 蛋对环境的影响指标，通过分析比较四种畜产品生产对环境的负荷，为我国畜牧 业养殖结构和畜产品生产结构调整提供建议。并且通过在张掖市前进牧业实地调 研，借鉴前进牧业合作社发展模式，探讨我国草地农业发展模式。

## Technical purpose
本奶牛养殖过程描述用于农业运营中的牛奶生产。该数据集代表了牛奶生产所需的投入，着重关注奶牛的喂养和水消耗。饲料是粗饲料和精饲料的混合物，其中精饲料主要由玉米、豆粕和麦麸组成。本数据集与农业部门、奶农和专注于奶牛生命不同阶段（即犊牛期、成长期、泌乳期和干奶期）的乳品制造商相关。

## Reference product
- milk: 1; measured
  牛奶

## Inputs
All rows: measured
- maize grain: 0.34
  玉米
- wheat: 0.46
  小麦
- soybean: 0.21
  大豆
- alfalfa: 2.55
  苜蓿
- silage corn: 15.7
  玉米青贮
- water: 4.2

## Outputs
All rows: measured
- carbon monoxide (fossil): 0.00022
- nitrogen, total (excluding N2): 0.00128
- carbon dioxide (biogenic): 0.56973
- nitrous oxide: 0.00013
- methane (biogenic): 0.01795
- sulfur oxides: 0.00077
- ammonia: 0.00062

## Data selection and combination
曹正纲根据荷斯坦奶牛的四个时期，统计奶牛生产中四个时期精饲料成分，根据作者对张掖市前进牧业石岗墩牧场调查得到平均每头奶牛每天耗水 70kg，再根据曹正纲对奶牛场作物消耗的实地调查与统计，推算出每生产 1kg 牛 奶的农作物消耗量与耗水量

## Use advice
在使用该数据集进行生命周期评估或其他环境影响研究时，请注意：功能单位是基于1kg牛奶生产的。确保准确地对不同喂养阶段及其相关资源消耗进行建模。由于比例小，忽略掉饲料中的次要成分。数据集用户还应考虑地理位置的特殊性（张掖市），因为区域变化可能影响数据的代表性。在未仔细考虑奶牛养殖实践和资源可用性的区域差异的情况下，不要轻率地将数据推广至不同的背景或地点。

## Review details
清单： 内部审查通过几个迭代步骤完成，涉及原始数据验证、原始数据记录、代表性、完整性、与 ISO 14040 和 14044 有关的建模的一致性。

## Data sources
- 魏云. 基于生命周期评价的禽畜产品环境影响评价及对策探讨. (兰州大学, 2016).
