# 电力生产 ; 火电 ; 辽宁

Dataset: ILCD process, Unit process, single operation
Geography: LN-CN
Reference year: 2019
Classification: Unit processes / Energy carriers and technologies / Electricity
Generated by: 熊若熙, xiongrx0126@163.com
Owner: 天工LCI数据工作小组
Review: Dependent internal review by 天工LCI数据工作小组
Amounts: no units in this file; such an amount is in the reference unit of its flow, which a separate flow dataset defines
copyright: false
licenseType: Free of charge for all users and uses

## General comment
火电发电包括原煤、洗煤、石油、天然气等十七种化石燃料。该过程只考虑直接发电过程，不考虑上游原材料开采加工和下游消费

## Time period
根据2019年能源统计年鉴数据计算

## Technical purpose
辽宁省的热电发电过程利用十七种化石燃料，包括原煤、洗煤、石油和天然气，主要用于电力生产。此数据集仅考虑直接电力生成过程，不包括上游原材料的开采加工及下游电力消费。

## Reference product
- electricity for thermal power: 3.6; calculated

## Inputs
All rows: calculated
- Raw coal: 0.571005
- Coke oven gas: 0.000553
- blast furnace gas: 0.035856
- Converter gas: 0.004397
- Diesel: 5.957e-5
- fuel oil, unspecified: 0.0003248
- natural gas: 2.84e-5

## Outputs
- carbon dioxide (fossil): 1.01894; calculated
- sulfur dioxide: 0.000168315; calculated
- Nitrogen oxides: 0.000271568; calculated
- particles (> PM10): 3.53099e-5; calculated

## Data treatment and extrapolations
核算方法参考《企业温室气体排放核算方法与报告指南 发电设施》。不同形式发电量及燃料用量来自于《中国能源统计年鉴 2020》中的第三章（能源生产） 和第六章（地区能源平衡表）。用于计算二氧化碳排放因子的低位发热量、单位热值含碳量等燃料参数来自于《2019 年度中国区域电网二氧化碳基准线排放因子 OM 计算说明》、《企业温室气体排放核算方法与报告指南 发电设施》

## Use advice
在生命周期评估数据使用中，参照《企业温室气体排放核算方法与报告指南 发电设施》。使用《中国能源统计年鉴 2020》中的第三章（能源生产）和第六章（地区能源平衡表）提供的数据。采用《2019年度中国区域电网二氧化碳基准线排放因子计算说明OM》和发电设施报告指南所示的燃料参数，如低位发热量、单位热值含碳量等，以准确计算二氧化碳排放因子。

## Review details
清单： 内部审查通过几个迭代步骤完成，涉及原始数据验证、原始数据记录、代表性、完整性、与 ISO 14040 和 14044 有关的建模的一致性。

## Data sources
- 熊若熙. 中国电力生产和消费二氧化碳与污染物排放因子核算. (清华大学, 2023).
