# 稀土氧化物场地准备;稀土氧化物;离子吸附工艺;离子吸附粘土

Dataset: ILCD process, Unit process, single operation
Geography: CN
Reference year: 2014
Valid until: 2016
Classification: Materials production / Non-energetic raw materials
Functional unit: The functional unit is defined as the production of 1 kg of 90–92% purity mixed REOs by the in-situ leaching method from ion-adsorption clays in southern China.
LCI method principle: Attributional
LCI method approaches: Allocation - market value
Generated by: 汪涛, twang@iue.ac.cn
Owner: 天工LCI数据工作小组
Review: Dependent internal review by 天工LCI数据工作小组
Amounts: no units in this file; such an amount is in the reference unit of its flow, which a separate flow dataset defines
copyright: false
licenseType: Free of charge for all users and uses

## General comment
该过程用于从中国南方的离子吸附粘土中生产混合稀土氧化物（REOs）。这些氧化物随后在电子、可再生能源技术和航空航天等高科技行业中被使用。通过此过程生产的REOs纯度为90-92%，并在制造永磁体、催化转化器及其他需要稀土元素的专门应用中作为关键部件。

## Geography
华南地区

## Technology and included processes
该过程以混合稀土氧化物结束，下游过程（例如溶剂萃取和金属生产）不包括在系统边界内。在某些地点可能会进行进一步处理（例如，将稀土元素分为轻质和组）。

## Reference product
- soil: 1.65; input; min 1.1; max 1.2; uniform; software or database
  Soil removal and hole drilling

## Inputs
- polyvinylchloride resin (E-PVC): 0.096; min 0.092; max 0.1; uniform; software or database
  PVC pipes (Materials/Processes) 原文未备注哪种PVC
- Limestone: 0.005; min 0.005; max 0.004; uniform; article inperiodical
  imestone, crushed, for mill
- plastic pipes: 0.101; min 0.106; max 0.096; uniform; article inperiodical
  Extrusion, plastic pipes

## Deviations from the LCI method approaches
In this study, the material and energy flow data is gathered from Chinese literature and verified through personal communications with Chinese experts working in this industry. These datasets are derived based on attributional modeling (instead of consequential) and for most multi-products processes economic allocation is used. Since the data was collected from different sources

## Use advice
使用此数据集时，请确保系统边界不包括溶剂萃取和金属生产等下游过程。将此数据用于归因建模目的，并对多产品过程应用经济分配。意识到数据来源是多种多样的，包括中国文献和专家沟通。评估的功能单元定为使用原位浸出法从中国南方的离子吸附粘土中生产1公斤纯度为90-92%的混合REOs。根据具体现场情况，加入分离成轻稀土和重稀土元素的进一步处理变量。

## Review details
清单： 内部审查通过几个迭代步骤完成，涉及原始数据验证、原始数据记录、代表性、完整性、与 ISO 14040 和 14044 有关的建模的一致性。

## Data sources
- Vahidi, E., Navarro, J. & Zhao, F. An initial life cycle assessment of rare earth oxides production from ion-adsorption clays. Resources, Conservation and Recycling 113, 1–11 (2016).
