# 氢氧化锂生产 ; 电池级单水氢氧化锂 ; 硫酸锂法 ; 澳大利亚出口锂辉石精矿

Dataset: ILCD process, Unit process, single operation
Geography: SN-SC-CN
Reference year: 2017
Classification: Unit processes / Materials production / Inorganic chemicals
Generated by: 孙鑫, xs389@cornell.edu
Owner: 天工LCI数据工作小组
Review: Dependent internal review by 天工LCI数据工作小组
Amounts: no units in this file; such an amount is in the reference unit of its flow, which a separate flow dataset defines
licenseType: Free of charge for all users and uses

## General comment
将锂辉石精炼浓缩后，就可以生产出锂化合物（氢氧化锂或碳酸锂）。中国主要的正极生产商天齐锂业公司的一份正极厂环境影响评估报告详细说明了生产 1 吨 LiOH-H2O 或 Li2CO3 所需的材料、能源和水的投入。 他们的报告假设澳大利亚西部的精矿为浓度为 6% 的锂辉石。由于我们假定精矿的浓度至少为 5%，因此足以满足此处生产工艺的需要。我们假定，锂辉石从澳大利亚西部沿海运到中国，再用卡车（载重 33 吨）运输 100 英里（161 公里）到锂化合物工厂。请注意，这些运输估算并非针对报告公司，而是针对中国的集中生产地区。

## Geography
遂宁管辖的射洪市

## Technology and included processes
根据天齐公司报告的数据范围，可以对利用锂精矿生产 1 吨 LiOH-H2O 或 Li2CO3 所需的材料、水和能源进行设施级分析。煤炭用于工艺加热，分为用作酸焙烧窑的燃料和蒸汽生产。据天齐公司报告，每生产一吨 LiOH-H2O 需用 12 吨蒸汽，每生产一吨 Li2CO3 需用 16.5 吨蒸汽。还要注意的是，Na2SO4 是这一过程的副产品。我们确定了副产品的数量，但没有为其分配任何负担。

## Technical purpose
通过硫酸锂法生产的电池级单水氢氧化锂主要用于锂离子电池的制造。这类电池是多种应用的核心部分，包括电动汽车、便携式电子设备和能量储存系统。

## Reference product
- Lithium Hydroxide Monohydrate: 1000; measured

## Inputs
All rows: measured
- Spodumene concentrate (6% Li2O): 6420
- freshwater,freshwater: 11.24
- Electricity: 12600
- Sulfuric acid: 1520
- sodium carbonate: 25
- sodium hydroxide: 1180
- hard coal; 26.3 MJ/kg: 32818
  用于直接燃烧加热
- hard coal; 26.3 MJ/kg: 38525
  用于生产蒸汽
- calcium carbonate: 600

## Outputs
- sodium sulfate: 1720; measured

## Use advice
使用此数据集时，应关注来自澳大利亚的锂辉石精矿的地理来源，因为区域差异可能会影响环境影响评估。此外，用户应考虑硫酸锂法的技术特性及在整个氢氧化锂生产生命周期中可能相关的环境负担。数据集的应用边界还应反映在锂离子电池制造的适当情境中，使用电池级单水氢氧化锂的最终用途。

## Review details
清单： 内部审查通过几个迭代步骤完成，涉及原始数据验证、原始数据记录、代表性、完整性、与 ISO 14040 和 14044 有关的建模的一致性。

## Data sources
- Kelly, J. C., Wang, M., Dai, Q. & Winjobi, O. Energy, greenhouse gas, and water life cycle analysis of lithium carbonate and lithium hydroxide monohydrate from brine and ore resources and their use in lithium ion battery cathodes and lithium ion batteries. Resources, Conservation and Recycling 174, 105762 (2021).
