# 芳烃生产 ; 芳烃 ; 石脑油制芳烃路线

Dataset: ILCD process, Unit process, black box
Geography: CN
Reference year: 2022
Classification: Materials production / Organic chemicals
Functional unit: The functional unit is defined as 1 kg aromatics production
LCI method principle: Attributional
LCI method approaches: Allocation - market value
Generated by: 任亚楠, renyn15@tsinghua.org.cn
Owner: 天工LCI数据工作小组
Review: Dependent internal review by 天工LCI数据工作小组
Amounts: no units in this file; such an amount is in the reference unit of its flow, which a separate flow dataset defines
copyright: false
licenseType: Free of charge for all users and uses

## General comment
石脑油芳香化过程包括碳化物形成、烯烃形成、烯烃低聚、异构化和环化以及脱氢。芳香化后，混合物进入相分离器，分离出用作工厂燃料气体的干气。液相进入稳定器分离液化石油气（LPG），剩余液相继续进入精馏塔分离芳烃和重芳烃（C9+）。芳烃是主要产品，液化石油气和重芳烃是副产品。

## Geography
CBMTA 和 OBNTA 工厂的运行数据来自能源专业知识服务系统（PKSSE）中国先进煤化工产业数据库收集和管理的环境影响评估报告。

## Time period
未提及，以文献发表时间代替

## Technical purpose
该工业过程生产的芳烃主要用于化工行业，作为合成各种有机化合物（如塑料、合成纤维、洗涤剂、药物和染料）的关键原料。这些高价值化学品是众多商业和消费产品的核心组成部分。

## Model description
该系统不包括上游原料、材料和能源运输阶段，因为它们对整个系统的影响有限，可以根据生命周期评估框架中的截止标准予以忽略。该系统也不考虑下游芳烃运输和利用阶段，因为其功能被定义为生产芳烃产品。

## Reference product
- Aromatic hydrocarbon: 1; measured
  Aromatics

## Inputs
All rows: measured
- naphtha: 1.46
  Naphatha
- process water: 0.1
  Process water
- Water (fresh water): 0.32
  Supplement water
- ZSM-5 catalyst: 0.00037
- light fuel oil: 2e-5
  Thermal oil
- electricity mix: 0.072
  Electricity
- natural gas: 3.46
  Steam

## Outputs
All rows: measured
- Heavy aromatics: 0.11
- LPG - liquefied petroleum gas: 0.31
  LPG
- Refinery Gas: 1.96
  Dry gas (self-use)
- carbon dioxide: 0.07
  CO2
- Dust (unspecified, from stack): 2e-5
  PM
- volatile organic compound: 0.00024
  VOCs
- sulfur dioxide: 3e-5
  SO2
- nitrous oxide: 0.00012
  NOx

## Deviations from the LCI method approaches
在这里，经济分配是最优的，因为这些产品的化学用途截然不同，但它们具有相同的经济功能，即作为商品出售。

## Data selection and combination
在该系统中，芳烃生产阶段被设定为前景阶段，其大量数据通过现场调查进行监控和收集，而上游原料、材料和能源生产阶段被定义为背景阶段，其数据从成熟的生命周期评估数据库中收集。

## Data treatment and extrapolations
在这里，经济分配是最优的，因为这些产品的化学用途完全不同，但它们具有相同的经济功能，即作为商品出售

## Use advice
在使用这个生命周期评估（LCA）数据集时，基于经济价值分配环境影响到主产品和副产品，因为它们在化学上不同，但在经济上共有作为商品出售的同一功能。由于上游原料、材料和能源的运输阶段对整个系统的影响很小，应从系统中排除，并且也忽略下游芳烃的运输和使用。该数据集的功能单位被定义为生产1千克芳烃。推荐此聚焦方法，因为芳烃生产阶段进行了广泛的现场数据监测和收集。

## Review details
清单： 内部审查通过几个迭代步骤完成，涉及原始数据验证、原始数据记录、代表性、完整性、与 ISO 14040 和 14044 有关的建模的一致性。

## Data sources
- Li, J. et al. Comparative resource-environment-economy assessment of coal- and oil-based aromatics production. Resources Policy 77, 102629 (2022).
