# 熟料煅烧;熟料, 硅酸盐水泥熟料;新型干法, ≥4000 t/d

Dataset: ILCD process, Unit process, single operation
Geography: CN
Reference year: 2019
Classification: Materials production / Other mineralic materials
Generated by: 杨思琪, ysqsophia@gmail.com
Owner: 天工LCI数据工作小组
Review: Dependent internal review by 天工LCI数据工作小组
Amounts: no units in this file; such an amount is in the reference unit of its flow, which a separate flow dataset defines
copyright: false
licenseType: Free of charge for all users and uses

## General comment
新型干法生产水泥熟料。末端治理：袋式除尘器，效率 85%。

## Technical purpose
新型干法生产的硅酸盐水泥熟料，日产量≥4000吨，主要用于混凝土及各种建筑材料的制造。硅酸盐水泥熟料是进行建筑工程、基础设施发展和商业建筑施工中不可或缺的混凝土生产原料。

## Model description
LCA 系统边界为熟料煅烧单元过程。

## Reference product
- clinker, portland cement clinker: 1000
  普通硅酸盐水泥熟料

## Inputs
- coal, powder: 137.4
  煤粉。上游数据来源：CLCD-China-ECER 0.8.1。
- tap water: 300
  自来水。上游数据来源：CLCD-China-ECER 0.8.1。
- raw meal: 1410
  普通硅酸盐水泥生料。实景过程数据。
- electricity, medium voltage: 103.86
  电力。上游数据来源：CLCD-China-ECER 0.8.1。

## Outputs
- mercury: 6e-5
  汞[排放到大气]
- particles (> PM10): 0.389
  总颗粒物[排放到大气]，未标明粒径，按PM>10处理。
- Nitrogen oxides: 1.584
  氮氧化物[排放到大气]
- chemical oxygen demand: 6e-5
  化学需氧量[排放到水体]
- Water (groundwater from technosphere, waste water): 2
  废水[排放到水体]
- fluorene: 0.002551
  氟[排放到大气]
- Clean gas: 3964
  废气[排放到大气]
- sulfur dioxide: 0.385
  二氧化硫[排放到大气]
- carbon dioxide (fossil): 748.1
  二氧化碳（化石源）[排放到大气]
- ammonia: 0.03964
  氨气[排放到大气]

## Deviations from the LCI method approaches
采用亿科环境 eFootprint 软件系统，结合 CLCD 质量评估方法建立了水泥生料生命周期模型，并计算得到 LCA 结果。

## Data selection and combination
主要数据来源：代表企业及供应链实际生产数据。来自企业实际数据和环评报告。

## Use advice
在使用这一水泥熟料生产的LCA数据集时，用户应确保包括熟料煅烧单元过程在内的系统边界建模。研究中考虑的末端治理措施需要特别注意，该末端治理包含效率为85%的袋式除尘器。在原材料贡献计算时，需坚持ISO 140系列标准推荐的取舍原则：对于原料投入重量小于1%（高纯度物质为0.1%）的原材料，忽略上游数据，并排除如尾矿等低价值废料的上游数据。所有普通材料的累计忽略重量不应超过原料投入总重量的5%。此外，如果系统环境排放数据对整体LCA结果的贡献可以忽视，则也可以从分析中省略。

## Review details
清单： 内部审查通过几个迭代步骤完成，涉及原始数据验证、原始数据记录、代表性、完整性、与 ISO 14040 和 14044 有关的建模的一致性。

## Data sources
- 李畅. (2020). 江西省某铜尾矿资源化过程生命周期评价研究 [硕士, 江西理工大学].
