# 废旧LFP电池湿法冶金术

Dataset: ILCD process, Unit process, single operation
Geography: CN
Reference year: 2018
Classification: Unit processes / End-of-life treatment / Material recycling
Functional unit: using 1 kWh as the functionalunit
Generated by: 彭菲, pengfei24@email.ncu.edu.cn
Owner: 天工LCI数据工作小组
Review: Dependent internal review by 天工LCI数据工作小组
Amounts: no units in this file; such an amount is in the reference unit of its flow, which a separate flow dataset defines
copyright: false
licenseType: Free of charge for all users and uses

## General comment
首先，将EoL LFP电池拆解和破碎。然后将处理后的电池材料溶于酸碱溶液中，以萃取出部分有价值的金属元素。最后进行除杂和提纯得到LiFePO4。

## Technology and included processes
经鉴别为含铁元素、锂元素的废旧磷酸铁锂电池需要先放电处理、自然干燥，然后进行热处理，去除隔膜、电解液、粘结剂等，再通过多级破碎分选铜、铝，对于钢壳电池或软包电池再分选出不锈钢或铝塑膜、隔膜等，剩余的正负极材料经浸出、沉淀除杂、萃取提纯得到碳酸锂、磷酸锂、氯化锂等，过程中产生的铁磷渣、碳渣作为副产品回收;回收得到的碳酸锂、磷酸锂、氯化锂和氢氧化锂用于锂电池生产的原料，副产品铁磷渣可以再次合成磷酸铁产品，或者回收得到氢氧化铁和磷酸原料。

## Technical purpose
所描述的湿法冶金工艺用于回收和回收利用锂铁磷酸盐 (LFP) 废旧电池中的有价值金属。过程包括拆解、粉碎废旧电池，通过酸碱溶液中的浸出提取金属，然后通过纯化工序获得高纯度的磷酸铁锂 (LiFePO4)。这种回收的LiFePO4可以用作新锂离子电池的阴极材料。

## Reference product
- EoL LFP battery: 3.6; input; software or database

## Inputs
All rows: software or database
- Lithium carbonate: 0.23
  碳酸锂，生产混合物/CN
- Sulphuric acid: 9.54
  硫酸，生产混合物/EU-28
- sodium hydroxide: 5.79
  氢氧化钠，生产混合物/EU-28
- Hydrogen peroxide (30%): 3.25
  过氧化氢
- Electricity: 11.8
- natural gas,natural gas: 6.24

## Outputs
- carbon monoxide (fossil): 0.18; software or database
- aluminium: 0.14; software or database
- copper: 0.038; software or database
- Lithium Iron Phosphate (LiFePO4): 2.58; software or database

## Data selection and combination
数据来自多篇论文，难以区分。

## Use advice
使用该LFP电池湿法冶金数据集时，用户应考虑由于引用多篇论文中不同的条件和技术所致的金属回收率的变化。数据集的功能单位是1 kWh，这要求用户根据所研究电池的容量调整他们的计算。用户必须考虑数据的技术适用性，特别是与回收材料的效率和纯度相关，以确保其对他们特定的回收过程或生命周期评估的相关性。

## Review details
清单： 内部审查通过几个迭代步骤完成，涉及原始数据验证、原始数据记录、代表性、完整性、与 ISO 14040 和 14044 有关的建模的一致性。

## Data sources
- Wang, Y. et al. Environmental impact assessment of second life and recycling for LiFePO4 power batteries in China. Journal of Environmental Management 314, 115083 (2022).
