# 水泥生产;水泥, 普通硅酸盐水泥, 42.5MPa;湿法回转窑

Dataset: ILCD process, Unit process, black box
Geography: CN
Reference year: 2005
Classification: Materials production / Other mineralic materials
Generated by: 杨思琪, ysqsophia@gmail.com
Owner: 天工LCI数据工作小组
Review: Dependent internal review by 天工LCI数据工作小组
Amounts: no units in this file; such an amount is in the reference unit of its flow, which a separate flow dataset defines
copyright: false
licenseType: Free of charge for all users and uses

## General comment
湿法回转窑生产工艺。原料石灰石经破碎机破碎，原料粘土经破碎、淘洗成浆体，在生料磨的磨头将石灰石、粘土（浆体）、铁粉及适量水喂入磨内进行粉磨。磨制成的生料浆由泥浆泵送入料浆库中，经调配均匀并符合要求后喂入湿法回转窑中煅烧。出窑熟料通过熟料冷却设备冷却后送入熟料储存库，然后与混合材料、石膏按一定的比例混合，经水泥磨粉磨后再入水泥库，通过包装机包装外运出厂或散装出厂。

## Technology and included processes
原 料 石 灰 石经 破 碎机 4 破 碎，原 料 粘 土经 破 碎 、 淘 洗 成 浆 体 ，在 生 料 磨 7 的 磨头将 石 灰 石 、 粘 土 ( 浆体 ) 、 铁粉 及 适 量水 喂 入 磨 内进行 粉 磨 。 磨 制成 的生 料 浆 由泥 浆泵送 入 料 浆库 8 中，经调 配 均 匀 并 符 合要 求 后 喂入 湿 法回转 窑 9 中锻 烧 。 出 窑熟料通 过 熟 料 冷 却 设 备 冷 却 后送 入 熟 料 储存 库，然 后 与混 合 材 料 、 石 膏按 一 定 的 比 例 混 合，经 水 泥 磨 粉 磨 后再入 水 泥 库，通过 包装 机 包装 外运 出 厂 或 散 装 出 厂 。

## Technical purpose
该数据集描述了使用湿法回转窑方法生产的42.5MPa级普通硅酸盐水泥的生产过程。所生产的水泥适用于需要高早期强度增益的建筑应用，如大型基础设施项目、商业建筑和住宅建设。

## Model description
以1千克28天抗压强度为42.5MPa的水泥所具有的使用性能为功能单位，即IFu=42.5kgMPa。研究范围界定为：原料预处理一生料粉磨一生料煅烧一熟料粉磨一水泥均化一水泥储存。

## Reference product
- cement, ordinary portland cement, 42.5MPa: 1000
  P.O. IFu=42.5kg MPa

## Inputs
- limestone, crushed, for mill: 1246.3
  石灰石
- clay: 142.1
  粘土
- gypsum stone (CaSO4-dihydrate): 44.4
  石膏
- hard coal: 194.487
  原始数据为0.1807kg标准煤，这里换算为硬煤，换算公式为1kg硬煤=0.929kg标准煤。
- electricity, medium voltage: 400.32
  电力

## Outputs
- particles (> PM10): 0.3
  粉尘，未标明粒径，按PM>10处理。
- sulfur dioxide: 0.9033
  二氧化硫。考虑到国内水泥厂运行的实际情况和未来很长时间的发展趋势，本次评价采用实测数据的统计平均值。
- Nitrogen oxides: 2.262
  氮氧化物。考虑到国内水泥厂运行的实际情况和未来很长时间的发展趋势，本次评价采用实测数据的统计平均值。
- carbon dioxide: 1127
  二氧化碳。考虑到国内水泥厂运行的实际情况和未来很长时间的发展趋势，本次评价采用实测数据的统计平均值。

## Use advice
在使用该数据集进行生命周期评估（LCA）时，用户必须确保其研究范围与数据集定义的边界匹配，包括原料预处理、原料粉磨、原料煅烧、熟料粉磨、水泥均化和水泥储存。重要的是要注意，数据代表了特定的抗压强度（28天时42.5MPa）和湿法工艺技术。数据使用者在没有进行适当调整的情况下，不应将此信息外推至其他类型的水泥或不同的生产方法。

## Review details
清单： 内部审查通过几个迭代步骤完成，涉及原始数据验证、原始数据记录、代表性、完整性、与 ISO 14040 和 14044 有关的建模的一致性。

## Data sources
- 曹晓润. (2005). 低环境负荷型水泥的生态环境评价 [硕士, 武汉理工大学].
