# 凡纳滨对虾养成及综合利用;凡纳滨对虾加工产品;工厂化养殖与综合利用

Dataset: ILCD process, Unit process, black box
Geography: ZJ-GD-CN
Reference year: 2011
Valid until: 2011
Classification: Unit processes / Materials production / Food and renewable raw materials
Functional unit: 1 ton of white shrimp
LCI method principle: Attributional
LCI method approaches: Allocation
Generated by: 吴康妮, wukangni@xmu.stu.edu.cn
Owner: 天工LCI数据工作小组
Review: Dependent internal review by 天工LCI数据工作小组
Amounts: no units in this file; such an amount is in the reference unit of its flow, which a separate flow dataset defines
copyright: false
licenseType: Free of charge for all users and uses

## General comment
根据凡纳滨对虾养成和综合利用的实际情况，考虑与研究目的和功能单位直接相关的过程，不考虑工厂以外产生环境负荷的各个阶段；数 据采集为2011年年均数 据。功能单位为加工1000kg凡纳滨对虾。 养 殖过程中凡纳滨对虾的 成活率按70%计算，成 品虾规格按70头/kg，则养殖阶段的功能单位为养殖10万尾凡纳滨对虾虾苗。 繁殖阶段按照20%的成活率计算 ，则功能单位为繁殖50万尾无节幼体 。

## Geography
广东省湛江市的A企业，选择其中的对虾虾苗繁育基地、虾苗养殖基地、综合加工利用工厂

## Time period
文献未说明具体采样时间，使用的数据为2011年的年均数据

## Technology and included processes
凡纳滨对虾养殖和综合加工利用技术，具体包括对虾繁殖技术、养殖技术和加工技术。苗种繁育包括对虾种虾培育、交配、产卵、孵化、撇幼、幼体培育、仔虾培育至出池的过程。应建有亲虾池、育苗池、蓄水池、沉淀池、砂滤池、饵料培养池等设施，配备进排水、供气、供电、 供热和除湿等设施，车间管理进出宜设置防疫隔离消毒区域。投喂新鲜的藻类、沙蚕、鱿鱼、乌贼、磷虾等作为饲料。单胞藻培养按照DB33/T 2300的规定执行。 工厂化养殖 养殖池面积以30 m 2～100 m 2为宜，养殖池深度1.5 m，配备蓄水池（或水处理池）2 个以上，供交替 使用，要求总蓄水量达到日高峰换水量2倍以上。建有尾水处理等设施。另可配备在线水质监测、压力 感应、自动投饵、底增氧或纯氧增氧等系统。 使用南美白对虾专用配合饲料投喂，配合饲料应符合GB/T 22919.5的规定。

## Technical purpose
本数据集描述凡纳滨对虾（太平洋白虾）的养殖和综合利用过程，概述了其在工业化虾类养殖和食品产品加工中的使用。数据集的应用目的包括规划和优化虾类养殖设施、发展高效繁育实践，以及在水产养殖行业内创建加工虾产品。该信息非常适用于水产养殖供应链管理、食品加工公司以及海产品行业内的可持续性评估。

## Model description
本研究采用英国ICI公司开发的当量因子法进行特征化,将不同的负荷或排放因子在各形态环境问题中的潜在影响加以分析,并量化成相同的形态或是同单位的大小。采用“目标距离”法，即以当前影响水平与目标水平(标准或能力)之间的距离来衡量环境影响的严重程度，以表示不同类型环境影响的相对贡献或权重

## Reference product
- Litopenaeus vannamei: 1000; measured
  数据采集为2011年年均数据

## Inputs
All rows: measured
- South American White Shrimp Juvenile: 500000
  数据采集为2011年年均数据
- hydrogen chloride gas: 0.15
  数据采集为2011年年均数据
- Formalin: 2.5
  数据采集为2011年年均数据
- Potassium Permanganate: 0.6
  数据采集为2011年年均数据
- chlorine disinfectant: 16.64
  数据采集为2011年年均数据
- EDTA: 0.015
  数据采集为2011年年均数据
- Assorted Feed: 1.5
  数据采集为2011年年均数据
- Artemia: 2.5
  数据采集为2011年年均数据
- enzyme: 1.05
  数据采集为2011年年均数据
- Plastic (unspecified): 20
  数据采集为2011年年均数据
- Water quality improvers: 25
  数据采集为2011年年均数据
- Active Microecological Agent: 8
  数据采集为2011年年均数据
- calcium carbonate: 266
  数据采集为2011年年均数据
- Nitrogenous Fertilizer: 5
  数据采集为2011年年均数据
- Water disinfectant: 0.2
  数据采集为2011年年均数据
- Urea: 3
  数据采集为2011年年均数据
- Fry feed: 1200
  数据采集为2011年年均数据
- superphosphate: 0.5
  数据采集为2011年年均数据
- Probiotics: 0.3
  数据采集为2011年年均数据
- Container: 100
  数据采集为2011年年均数据

## Deviations from the LCI method approaches
本文依据ISO14042国际标准和我国国家标准GB24042-200的规定和建议，对虾养殖和综合利用系统的影响评价分为分类、特殊化和量化三个步骤

## Data selection and combination
数据来自实地调研的年平均值

## Data treatment and extrapolations
文献根据凡纳滨对虾养成及加工全生命周期过程各个阶段的输入清单数据，系统计算了各环节幻境影响。由于对虾养殖过程中存活率波动较大，文献计算出凡纳滨对虾在养殖过程中的存活率为70%，且产虾标准尺寸为70头/kg，因此培养阶段的功能单位为培养10万尾凡纳滨对虾苗。以20%的成活率为基础，功能能单位是50万头无节幼虫的繁殖。

## Sampling procedure
数据采集为2011年年均数据

## Use advice
在使用该数据集进行生命周期评估时，用户必须遵循以下方法论指南：专注于与研究目的和功能单位直接相关的过程，特别是排除工厂外各阶段的环境负担。为了准确反映情况，用户应使用提供的2011年年度平均数据。功能单位定义为加工1000公斤凡纳滨对虾，养殖过程中的成活率为70%，繁殖阶段的成活率为20%。在建模过程中，需要考虑养殖阶段为10万尾凡纳滨对虾虾苗，繁殖阶段为50万尾无节幼体的功能单位。若对不同年份或其他地理位置的数据进行推算时，应谨慎考虑技术、实践和环境条件的潜在变化。

## Review details
清单： 内部审查通过几个迭代步骤完成，涉及原始数据验证、原始数据记录、代表性、完整性、与 ISO 14040 和 14044 有关的建模的一致性。

## Data sources
- 易湘茜, 孙恢礼 & 潘剑宇. 凡纳滨对虾生命周期环境影响模型分析评价研究. 广西科学 21, 306–312 (2014).
