# 底泥修复;原位覆盖;生物炭;材料生产

Dataset: ILCD process, Unit process, black box
Geography: NO
Reference year: 2011
Classification: Other Services / Repair and maintenance
Generated by: 桑春晖, sangch@mail.bnu.edu.cn
Owner: 天工LCI数据工作小组
Review: Dependent internal review by 天工LCI数据工作小组
Amounts: no units in this file; such an amount is in the reference unit of its flow, which a separate flow dataset defines
copyright: false
licenseType: Free of charge for all users and uses

## General comment
用于底泥覆盖填埋的活性炭材料的生产环节。

## Geography
经查询，暂未找到国内有相关研究文献

## Time period
文献中没有明确数据收集的开始时间，以文献发表时间为有效期的开始时间

## Technology and included processes
所用生物炭来自中国的无烟煤化石产品,生产1 kg活性炭，消耗煤1.89 kg，电力0.3774 kwh,运输距离0.905 tkm。

## Technical purpose
该过程生产的活性炭用于沉积物修复项目中的原位覆盖。它设计用来有效地封顶被污染的沉积物，并且通常用于环境工程应用，以防止污染物的扩散。由于该产品能够被广泛地散布在被污染的沉积物场地上，它适用于大规模现场实施。

## Reference product
- Activated Carbon: 4.76e7; calculated

## Inputs
- Coal: 89964, 8.89e7 (2 entries); calculated
- Electricity: 64671.3; calculated
- Road Transport: 43078; calculated

## Data selection and combination
Process inventory data是根据ISO 14040关于LCA.35的规定获得的。基本数据来自特定场地的盆栽实验、中试和供应商处获取，这些数据代表了中国南方的情况。二级数据来自Ecoinvent数据库v2.3，从中选择了地理来源和技术因素最相似的过程。

## Use advice
使用此数据集时，应注意以下方法论的考虑因素：数据集不包括材料的回收利用；因此，如果将对活性炭进行回收，可能需要进行相关数据调整。使用阶段行为在此数据集中没有模型化；因此，用户应根据他们的具体应用场景来包括它。由于缺乏数据收集的具体开始时间，数据集的有效性从文献发表日期开始。因为主要数据反映的是中国南方的条件，当推广到其他地区时，应考虑地理和技术的代表性。二级数据来自Ecoinvent数据库v2.3，选用了地理来源和技术因子最相似的过程。用户应当考虑在有可用的情况下，用更新的数据库或地方化的清单数据更新数据集。

## Review details
清单： 内部审查通过几个迭代步骤完成，涉及原始数据验证、原始数据记录、代表性、完整性、与 ISO 14040 和 14044 有关的建模的一致性。

## Data sources
- Sparrevik et al. Use of Life Cycle Assessments To Evaluate the Environmental Footprint of Contaminated Sediment Remediation. Environ. Sci. Technol. 2011, 45, 10, 4235–4241
