# 砖块生产 ;页岩空心砖生产 ;粉碎过程

Dataset: ILCD process, Unit process, single operation
Geography: GZ-JX-CN
Reference year: 2020
Classification: Unit processes / Materials production / Other mineralic materials
Generated by: 王湘锦, r99rt4@163.com
Owner: 天工LCI数据工作小组
Review: Dependent internal review by 天工LCI数据工作小组
Amounts: no units in this file; such an amount is in the reference unit of its flow, which a separate flow dataset defines
copyright: false
licenseType: Free of charge for all users and uses

## General comment
传统页岩空心砖生产工艺

## Technical purpose
该数据集描述的是生产页岩空心砖的过程，这种砖通常用于建筑墙体、外墙及其他结构要素，由于砖的空心结构，可提供有效的热绝缘。提到的粉碎过程是砖块生产初期阶段的一部分，即将原材料页岩粉碎成细粉，然后形成并烧结成空心砖。

## Reference product
- brickbat aggregate: 1431; measured
  砖粉粗骨料混合物

## Inputs
- brown coal; 11.9 MJ/kg: 330; measured
- shale: 1176; measured
- Electricity: 7.4628; measured

## Outputs
- particles (> PM10),particles (> PM10): 0.05; measured
- Particles (PM0.2 - PM2.5): 0.04; measured

## Deviations from the LCI method approaches
环境影响评估报告基于砖的年产量（8000万块砖），出于统计目的，数据已根据其中所述的尺寸规格进行转换，即每吨生产的砖

## Data selection and combination
采用根据《第一次全国污染源普查工业污染源产排污系数手册 第七分册》中 3131 烧结类砖瓦及建筑砌块制造业产排污系数表的相关数据。

## Sampling procedure
该环评报告的数据来源于工厂的实时数据

## Use advice
使用此生命周期评估（LCA）数据集时，用户必须注意，数据特别适用于页岩空心砖生产中的粉碎过程，并基于3131类别中的烧结砖和建筑块的产排污系数。根据给出的年产量数据（每年8000万块砖）以及每吨生产砖块的转换，必须对数据进行缩放，以确保在生命周期评估中的准确应用。在将数据集应用于全面的LCA模型时，还应注意区分这一高能耗初始加工阶段与后续生产阶段的差别。

## Review details
清单： 内部审查通过几个迭代步骤完成，涉及原始数据验证、原始数据记录、代表性、完整性、与 ISO 14040 和 14044 有关的建模的一致性。

## Data sources
- 年产 8000 万块页岩标砖项目环评报告公示
