# 基于木薯乙醇生产 ; 乙醇 ; 发酵; 木薯

Dataset: ILCD process, Unit process, single operation
Geography: AH-CN
Classification: Energy carriers and technologies / Renewable fuels
Functional unit: The functional unit is 1.7 tonne of ethanol production.
LCI method principle: Attributional
LCI method approaches: Allocation - mass
Generated by: 唐子睿, tangzirui123@gmail.com
Owner: 天工LCI数据工作小组
Review: Dependent internal review by 天工LCI数据工作小组
Amounts: no units in this file; such an amount is in the reference unit of its flow, which a separate flow dataset defines
copyright: false
licenseType: Free of charge for all users and uses

## General comment
本研究对两种替代乙醇生产方案（基于玉米秸秆和基于木薯）的乙烯生产进行了评估。

## Geography
相关生产数据（例如电力、蒸汽、水、化学品、原材料消耗和直接排放）来源于中国安徽省木薯乙醇生产工厂。

## Technology and included processes
本研究包括的过程总结如下：1）木薯生产；2）乙醇和乙烯生产；3）原料干燥；4）公路运输；5）废物处理；6) 材料和煤炭能源生产；7）生产能源回收。

## Technical purpose
本木薯基的乙醇生产过程专为生成乙醇而设计，该乙醇随后可用于乙烯生产。从该过程得到的乙醇可用于生物燃料生产、医药、饮料工业或作为其他工业过程的前体化学品。

## Reference product
- Ethanol: 1700; article inperiodical

## Inputs
All rows: article inperiodical
- Cassava: 4900
- Yeast: 0.11
- Amylase: 0.4
- Glucoamylase: 5.3
- Sulfuric acid: 15.9
- Alkali: 2.7
- Urea: 6.5
- electricity: 1523.88
- process steam: 5000
- water: 9400

## Outputs
- Protein Feed: 430; article inperiodical

## Deviations from the LCI method approaches
进行了基于产品质量的联产品分配。

## Data selection and combination
相关生产数据（例如电力、蒸汽、水、化学品、原材料消耗和直接排放）来源于中国安徽省木薯乙醇生产工厂。2. 玉米秸秆生产、燃煤发电和公路运输过程的相关数据取自参考文献。3. 由于缺乏中国的信息，因此使用了欧洲的化学品生产数据和相关背景数据[26]。

## Use advice
数据使用者在将此数据应用于生命周期评价时，应考虑在中国安徽省基于木薯的乙醇生产的具体背景。联产品分配基于质量，必须在类似评估中一致应用。另外，由于依赖于欧洲的化学品生产和背景数据，当在不同地理环境中应用此数据集时，可能需要进行调整。分配的功能单位为1.7吨乙醇生产，这应指导LCA模型中投入和输出的缩放。

## Review details
清单： 内部审查通过几个迭代步骤完成，涉及原始数据验证、原始数据记录、代表性、完整性、与 ISO 14040 和 14044 有关的建模的一致性。

## Data sources
- Hong, J., Zhang, Y., Xu, X. & Li, X. Life cycle assessment of corn- and cassava-based ethylene production. Biomass and Bioenergy 67, 304–311 (2014).
