# 干法制砂;砂石中碎;圆锥破碎技术

Dataset: ILCD process, Unit process, single operation
Geography: HAIN-CN
Reference year: 2020
Classification: Unit processes / Materials production / Other mineralic materials
Generated by: 崔航, Cuihang0716@163.com
Owner: 天工LCI数据工作小组
Review: Dependent internal review by 天工LCI数据工作小组
Amounts: no units in this file; such an amount is in the reference unit of its flow, which a separate flow dataset defines
copyright: false
licenseType: Free of charge for all users and uses

## General comment
二次破碎、筛分加工（圆锥破碎）

## Technology and included processes
鄂破后通过输送带运至圆锥破碎机进行第二次破碎，破碎后进入振动筛筛分，得到的粒径较小碎石通过输送带进入成品堆场，粒径较大的不合格产品重新回到圆锥破碎机进行破碎，制砂机进入制砂。

## Technical purpose
所述工业过程主要用于生产建筑骨料。具体来说，此干法砂生产过程及二次圆锥破碎技术用于生产适用于混凝土制作、道路建设和其他建筑相关应用的细碎和粗碎石料。该过程有效地按大小对材料进行分类，通过先后使用鄂式破碎机和圆锥破碎机进行更细的粒度减小，然后使用筛分进行尺寸分类。

## Reference product
- gravel: 41870; measured

## Inputs
- gravel: 41870; measured
- Electricity: 1134; measured

## Use advice
在生命周期评估中使用此数据集的用户应考虑干法砂生产及圆锥破碎技术特定的技术顺序和效率影响。重要的是确保通过在评估中包括所有相关的输入和输出（例如电力消耗、机械磨损和操作产生的排放），来保持系统边界的一致性。在共生产情况下分配的方法论选择以及对生产材料结束生命周期的处理需要清晰记录。

## Review details
清单： 内部审查通过几个迭代步骤完成，涉及原始数据验证、原始数据记录、代表性、完整性、与 ISO 14040 和 14044 有关的建模的一致性。

## Data sources
- 陵水海岛混凝土有限公司干法制砂项目
