# 水泥生产;水泥, 复合硅酸盐水泥;新型干法, 4500 t/d;混合固废

Dataset: ILCD process, Unit process, black box
Geography: CN
Reference year: 2012
Classification: Unit processes / Materials production / Other mineralic materials
Generated by: #REF!, ysqsophia@gmail.com
Owner: 天工LCI数据工作小组
Review: Dependent internal review by 天工LCI数据工作小组
Amounts: no units in this file; such an amount is in the reference unit of its flow, which a separate flow dataset defines
copyright: false
licenseType: Free of charge for all users and uses

## General comment
案例企业配备有4500t/d新型干法水泥熟料生产线。

## Geography
东北某水泥厂

## Technical purpose
该工业过程数据描述了采用新型干法生产的复合硅酸盐水泥，日产能力为4500吨，并结合了混合固体废物的利用。该类型的水泥通常用于包括住宅、商业和基础设施建设在内的各种建筑活动，鉴于其多功能性和性能特点。

## Model description
系统边界为水泥厂水泥生产系统。

## Reference product
- cement, portland-composite cement: 1000
  水泥产品

## Inputs
- limestone, crushed, for mill: 1140.24
  石灰石
- shale: 18.4146
  页岩
- silica stone: 17.8049
  硅石
- iron, powder: 31.8293
  铁粉
- gypsum stone (CaSO4-dihydrate): 56.5244
  石膏
- ash: 134.756
  粉煤灰
- blast furnace slag: 215.244
  矿渣
- hard coal; 26.3 MJ/kg: 109.39
  煤炭。年耗煤用能=（1.794E+8）kg×（2.149E+7）J/kg（平均低位热值）=（3.86E+15）J。
- Diesel oil: 4.42683
  柴油。柴油=（7.260E+6）kg×（46.04）MJ/kg（燃烧值）=（3.34E+8）MJ。
- Electricity: 330.585
  总耗电量。年耗电能=（1.506E+8）kWh×（3.60E+6）J/kWh=（5.42E+14）J。
- tap water: 251.22
  原文是总水量，即自来水。

## Outputs
- carbon dioxide (fossil): 896.341
  CO2
- sulfur dioxide: 0.337805
  SO2
- Nitrogen oxides: 1.13415
  NOx
- particles (> PM10): 0.878049
  粉尘，未标明粒径，按PM>10处理。

## Use advice
使用此数据集时，应考虑到中国东北水泥制造的具体区域背景。用户必须注意到在生产过程中混合固体废物的整合可能会影响环境概况。技术范围涵盖了水泥厂界限内的水泥生产系统。在使用此数据进行生命周期评价（LCA）时，确保系统边界和技术假设与研究目标保持一致。特别应关注由于混合固体废物利用所产生的环境影响的分配问题。

## Review details
清单： 内部审查通过几个迭代步骤完成，涉及原始数据验证、原始数据记录、代表性、完整性、与 ISO 14040 和 14044 有关的建模的一致性。

## Data sources
- 邵帅. (2016). 基于Emergy和Em-LCA的水泥企业可持续发展水平评价 [硕士, 大连理工大学].
