# 土壤修复;异位修复;化学氧化;工程实施;土壤清挖;污染土壤

Dataset: ILCD process, Unit process, single operation
Geography: AH-CN
Reference year: 2023
Classification: Other Services / Repair and maintenance
Generated by: 桑春晖, sangch@mail.bnu.edu.cn
Owner: 天工LCI数据工作小组
Review: Dependent internal review by 天工LCI数据工作小组
Amounts: no units in this file; such an amount is in the reference unit of its flow, which a separate flow dataset defines
copyright: false
licenseType: Free of charge for all users and uses

## General comment
污染土壤清挖29437.9 m3

## Geography
安徽省合肥市受重金属和有机物复合污染的钢铁厂地块

## Technology and included processes
修复前，挖运污染土壤

## Technical purpose
本工业过程用于环境修复，专门针对位于安徽省合肥市、受重金属和有机物复合污染的钢铁厂地块。过程包括挖掘受污染土壤，其体积为29437.9立方米，随后进行异位化学氧化处理。这种技术通常应用在环境工程领域，用于清理受污染的土地，使其可以安全地进行再利用或开发。

## Reference product
- contaminated soil: 29437.9; estimated
  清挖出的污染土壤

## Inputs
- Diesel: 4.179; estimated

## Use advice
该数据集的用户应确保在异位土壤修复使用化学氧化处理重金属和有机化合物的正确背景下应用这些信息。在使用这些数据进行生命周期评估或环境影响研究时，用户必须考虑到特定现场条件，根据区域政策要求调整数据，并考虑处理后土壤再利用和废物管理的可能性。在适用的情况下，修复后土壤的回收或再利用应包含在生命周期评估的系统边界内。

## Review details
清单： 内部审查通过几个迭代步骤完成，涉及原始数据验证、原始数据记录、代表性、完整性、与 ISO 14040 和 14044 有关的建模的一致性。

## Data sources
- 桑春晖,杨欣桐,李香兰等.基于SEFA方法的异位土壤修复环境足迹分析——以某钢铁厂为例[J].中国环境科学,2023,43(10):
