# 种植场地;土壤原位修复;植物提取;工程实施;种植

Dataset: ILCD process, Unit process, single operation
Geography: IT
Reference year: 2021
Classification: Unit processes / Other Services / Repair and maintenance
Generated by: 肖萌, xiaomeng@mail
Owner: 天工LCI数据工作小组
Review: Dependent internal review by 天工LCI数据工作小组
Amounts: no units in this file; such an amount is in the reference unit of its flow, which a separate flow dataset defines
copyright: false
licenseType: Free of charge for all users and uses

## General comment
这种原位再生技术利用树木和草本植物来去除各种类型的污染物。有机污染物可以进行生物化学的植物降解，而重金属的植物提取会导致有毒物种在根和叶系统中积累；对于无法提取的污染物，可以进行自由基稳定。

## Geography
The site taken as a reference for the remediation is an area of 712 m2 located in a disused industrial district of Tuscany (Italy), in the past subjected to various productive activities that led to contamination with various metals, some of which potentially toxic such as lead (Pb), arsenic (As) and thallium (Tl). As it is a “site of national interest”, its exact location is considered confidential and cannot be disclosed.

## Technical purpose
该原位土壤修复技术专为被污染的土地设计，特别适用于历史上工业使用的地区，其中的土壤受到有机污染物和如铅(Pb)、砷(As)和铊(Tl)等重金属的污染。其利用树木和草本植物通过植物降解和植物提取进行植物修复，去除或稳定场址内的污染物，无需挖掘和运输受污染的土壤。

## Reference product
- Planting site: 712; measured
  植物种植完成的场地

## Inputs
All rows: measured
- Urea: 14.24
  nitrogen fertilizer
- Phosphorus Pentoxide: 11.39
  肥料-P2O5（phosphoric acid anhydride）
- potassium oxide: 7.12
  肥料-K2O（potassium oxide）
- EDTA: 61
  土壤改良剂-EDTA
- Potassium phosphate: 1261
  土壤改良剂-K3PO4
- Seed of H. annuus: 1.14
  种子-H. annuus
- Seed of L. albus: 14.24
  种子-L. albus
- Seed of B. juncea: 1.14
  种子-B. juncea
- Tap Water: 384.48

## Use advice
在应用此土壤修复过程的LCA数据时，用户应：1) 确保应用场景与参考场地条件相匹配，包括污染物类型和土壤特性。2) 考虑植物修复在他们感兴趣的场地针对特定污染物的效率，因为并非所有污染物都可以有效稳定或提取。3) 注意参考数据集的确切场址位置为机密信息，不得公开。在将数据外推至环境因素不同的不同地点时应格外谨慎。

## Review details
清单： 内部审查通过几个迭代步骤完成，涉及原始数据验证、原始数据记录、代表性、完整性、与 ISO 14040 和 14044 有关的建模的一致性。

## Data sources
- Vocciante, M., De Folly D’Auris, A., Franchi, E., Petruzzelli, G. & Ferro, S. CO2 footprint analysis of consolidated and innovative technologies in remediation activities. J Clean Prod 297, 126723 (2021).
