# Bioethanol ; Ammonia-based

Dataset: ILCD process
Geography: GLO
Classification: Energy carriers and technologies / Renewable fuels
Generated by: 袁嘉翼, jiayi_y@mail.bnu.edu.cn
Owner: 天工LCI数据工作小组
Review: Dependent internal review by 天工LCI数据工作小组
Amounts: no units in this file; such an amount is in the reference unit of its flow, which a separate flow dataset defines
licenseType: Free of charge for all users and uses

## General comment
该生物乙醇通过氨基过程合成。通过这种方法生产的生物乙醇适合作为汽油的可再生燃料替代品。它可以与汽油以不同比例混合，或在灵活燃料汽车中以纯净形式使用。此外，它适用于需要使用清洁燃烧燃料的行业，如运输行业，并且也可以作为化工和制药行业中乙醇是前体的生产原料。

## Inputs
All rows: uniform; missing unimportant
- Electricity: 0
- heat: 2940; min 90.1; max 9310
- Electricity: 500.4; min 51.48; max 3672
- heat: 2380; min 383; max 9300
- Electricity: 417.6; min 121.32; max 1209.6

## Outputs
- heat: 442; max 3010; uniform; missing unimportant

## Use advice
使用该数据集的用户在应用生命周期评估（LCA）方法时应注意这种生物乙醇的具体生产过程。应确保准确核算氨基合成过程特有的能源投入、排放和副产品。重要的是包括生产中使用的生物质的农业投入，并评估其种植的影响。如果数据用于政策制定或比较断言，用户必须遵守相关标准，如ISO 14044，并应核实数据的地理和技术相关性，以确保其适用于特定情况。

## Review details
清单： 内部审查通过几个迭代步骤完成，涉及原始数据验证、原始数据记录、代表性、完整性、与 ISO 14040 和 14044 有关的建模的一致性。
