# 铜基混合废料回收;电解铜;电解工艺;阳极铜

Dataset: ILCD process, Unit process, single operation
Geography: JX-CN
Reference year: 2020
Classification: Unit processes / Materials production / Metals and semimetals
Functional unit: We consider the functional unit of the recycling of copper-based mixed waste to be 1000 kg electrolytic copper.
LCI method principle: Attributional
LCI method approaches: Allocation - market value
Generated by: 王鹏, 2867919560@qq.com
Owner: 天工LCI数据工作小组
Review: Dependent internal review by 天工LCI数据工作小组
Amounts: no units in this file; such an amount is in the reference unit of its flow, which a separate flow dataset defines
copyright: false
licenseType: Free of charge for all users and uses

## General comment
该数据集代表了一种回收铜基混合废料以生产销售的高纯电解铜的工艺。此外，该过程还产生了一些副产品，如用于精炼的残渣电极、用于金银回收的阳极泥，以及也出售的碳酸镍。这个过程通常用于金属回收工业，从废料中回收有价金属，以中国江西省的一个案例为例。

## Geography
中国江西省的一家金属回收企

## Technology and included processes
电解工艺以阳极铜为主要原料，电为主要能源，硫酸、盐酸、明胶、水为辅助原料，生成高纯电解铜可供销售。还生产残渣电极（返回精炼工序）、阳极泥（送金银回收工序）、碳酸镍（出售）等产品。

## Reference product
- Refined copper: 1000; measured
  copper(99%)需要补充

## Inputs
All rows: measured
- Electricity: 900
- Black copper: 1200
  Blister copper
- Glue: 0.1
  Glue需要补充
- hard coal,hard coal,hard coal: 100
  Hard coal
- Hydrochloric acid: 0.07
  Hydrochloric acid(32%)需要补充
- Sulfuric acid(98%): 8.3
  Sulfuric acid(98%) 需要补充resourse
- transport in t*km,transport in t*km: 2.71175
  Transport
- water: 343.5
  Water

## Outputs
- Anode sludge: 15; measured
  Anode sludge需要补充
- Anode copper: 210; measured
  Anode copper需要补充
- Nickel sulfate: 15; measured
  Nickel sulfate需要补充
- water vapour: 329.89; measured
  Water vapor

## Deviations from the LCI method approaches
使用LCA-ReCiPe 2016（Heijungs et al., 2017）表征和归一化方法（中点和端点方法），将生命周期清单转换为多个领域的影响分数。

## Data selection and combination
前台数据和后台数据。

## Data treatment and extrapolations
采用GaBi 9.0软件计算各种铜基混合废物回收工艺单位质量的库存、资源消耗和废物排放量。

## Use advice
该数据集的用户应将其纳入采用GaBi 9.0软件的生命周期评估框架中。在计算铜基混合废料回收产出的每单位质量的电解过程的库存、资源消耗和废物排放时，必须包括前台数据和后台数据。影响评估应采用LCA-ReCiPe 2016方法学对生命周期清单数据进行特征化和归一化。此外，为确保与数据集基准的一致性，数据使用的功能单元应维持在1000公斤电解铜。

## Review details
清单： 内部审查通过几个迭代步骤完成，涉及原始数据验证、原始数据记录、代表性、完整性、与 ISO 14040 和 14044 有关的建模的一致性。

## Data sources
- Zhang, W. et al. Analyzing the environmental impact of copper-based mixed waste recycling-a LCA case study in China. Journal of Cleaner Production 284, 125256 (2021).
