# 稀土酸浸分离;稀土;氟碳铈矿路线;含稀土矿石

Dataset: ILCD process, Unit process, single operation
Geography: NMG-CN
Reference year: 2014
Classification: Materials production / Non-energetic raw materials
Functional unit: The functional unit of this study is the production of 1 kg of the basket REO from each corresponding mineralogical and processing route.
LCI method principle: Attributional
LCI method approaches: Allocation - market value
Generated by: 汪涛, twang@iue.ac.cn
Owner: 天工LCI数据工作小组
Review: Dependent internal review by 天工LCI数据工作小组
Amounts: no units in this file; such an amount is in the reference unit of its flow, which a separate flow dataset defines
copyright: false
licenseType: Free of charge for all users and uses

## General comment
通过所述工业过程提取的稀土元素（REEs）用于多种高科技应用，包括生产强力永磁体、混合动力车辆电池、荧光灯和电子产品。具体来说，应用于氟碳铈矿路线含稀土矿石的酸浸分离过程是分离出用于这些应用的纯稀土化合物的关键步骤。

## Technology and included processes
在这项研究中，对稀土生产系统进行了分析，从采矿到溶剂萃取，其中包含沉淀和煅烧等产品精加工过程

## Reference product
- Rare Earth chloride solution: 1; calculated
  RE Chloride

## Inputs
- Sodium carbonate: 1; calculated
  Soda ash
- transport in t*km,transport in t*km: 0.53, 9.54 (2 entries); calculated
- Hydrochloric acid: 1; calculated
- Rare Earth chloride solution: 1.77; calculated
  RE Chloride

## Outputs
- water: 0.00756; calculated
- Water (sea water from technosphere, waste water): 7.56; calculated

## Deviations from the LCI method approaches
In this study, the REE production system was analyzed from mining up to and including solvent extraction which contains product finishing processes such as precipitation and calcination (Fig. 1). The other categories assessed in the literature review were mineral type, radioactivity, waste treatment, and co-mining. For mineral type, it was noted that the mineralogy accounted for in each study was different, which makes comparison difficult. For radioactivity, we marked with an X those studies which exemplified radioactivity flows in the LCI (if provided). For waste, we distinguished those LCIs which quantified waste treatment flows. For co-mining, since all REE are co-products of each other, this column is meant to highlight the co-products in addition to REE.

## Use advice
在使用此数据集进行生命周期评估时，确保计入矿物学和加工路线的变化，因为它们可能影响稀土生产的环境影响。涉及放射性的研究应包括可用时的放射性流量。由于潜在的环境影响，量化LCI中的废物处理流程至关重要。必须考虑共采矿的方面，突出除REE外获得的共产品。比较的功能单元是从特定矿物学和加工路线生产 1 公斤的REO（稀土氧化物）篮子。

## Review details
清单： 内部审查通过几个迭代步骤完成，涉及原始数据验证、原始数据记录、代表性、完整性、与 ISO 14040 和 14044 有关的建模的一致性。

## Data sources
- Bailey, G. et al. Review and new life cycle assessment for rare earth production from bastnäsite, ion adsorption clays and lateritic monazite. Resources, Conservation and Recycling 155, 104675 (2020).
