# 稀土煅烧;三氟化钕;原位浸出;钕铁硼(NdFeB)磁铁

Dataset: ILCD process, Unit process, single operation
Geography: NMG-CN
Reference year: 2014
Classification: Materials production / Inorganic chemicals
Functional unit: The functional unit is a 1 kg NdFeB magnet
LCI method principle: Attributional
LCI method approaches: Allocation - market value; Allocation - mass
Generated by: 汪涛, twang@iue.ac.cn
Owner: 天工LCI数据工作小组
Review: Dependent internal review by 天工LCI数据工作小组
Amounts: no units in this file; such an amount is in the reference unit of its flow, which a separate flow dataset defines
copyright: false
licenseType: Free of charge for all users and uses

## General comment
本工艺涉及稀土元素的煅烧和提取过程，以生产三氟化钕，这是制造钕铁硼（NdFeB）磁铁的前体。这些磁铁因其高磁力而被广泛应用于各种设备，包括电子设备、风力涡轮机和电动机。

## Geography
Bayan Obo (China)

## Technology and included processes
所有三个矿床生产 Nd 和 Pr 的基本过程都是相同的。 Nd 和 Pr 是相同的，除了最后的溶剂萃取步骤 (SX5)，其中两者被分离。

## Reference product
- Neodymium fluoride: 0.00059; calculated
  Neodymium fluoride. Bayan Obo

## Inputs
- Electricity: 0.00072; article inperiodical
  Bayan Obo: based on analog production of LiF in Ecoinvent process (CN: lithium fluoride production)
- hydrogen fluoride: 0.00042; calculated
  Bayan Obo: used for the production of ammonium bifluoride NH3 g 306 0.18 (1.02 kg NH4F▪HF), stoichiometric calculation
- Ammonia (NH4+, NH3, as N): 0.00018; calculated
  (same comment as for hydrogen fluoride)
- Neodymium oxide: 0.00052; measured
  Neodymium oxide. Bayan Obo: stoichiometric calculation
- transport in t*km,transport in t*km: 2.2e-5; software or database
  Bayan Obo: chemicals 1000 km, Nd2O3 20 km, lorry EURO3

## Outputs
- Ammonium Bifluoride: 0.0001; software or database
  Ammonium Bifluoride. Bayan Obo: stoichiometric calculation with 20 % excess; in the ecobalance software GaBi the decomposition products (NH3 and HF) of NH4F∙HF and NH4F are included, because NH3 and HF are considered in the impact assessment (ReCiPe)
- Ammonium fluoride: 0.00039; software or database
  Ammonium fluoride. Bayan Obo: stoichiometric calculation with 20 % excess; in the ecobalance software GaBi the decomposition products (NH3 and HF) of NH4F∙HF and NH4F are included, because NH3 and HF are considered in the impact assessment (ReCiPe)
- Neodymium oxide: 3e-5; software or database
  Neodymium oxide. Bayan Obo: stoichiometric calculation with 20 % excess; in the ecobalance software GaBi the decomposition products (NH3 and HF) of NH4F∙HF and NH4F are included, because NH3 and HF are considered in the impact assessment (ReCiPe)
- waste water - treated: 8e-5; software or database
  Bayan Obo: stoichiometric calculation with 20 % excess; in the ecobalance software GaBi the decomposition products (NH3 and HF) of NH4F∙HF and NH4F are included, because NH3 and HF are considered in the impact assessment (ReCiPe)

## Deviations from the LCI method approaches
In this study, an allocation method based on the market prices of REOs28 is considered. To estimate uncertainties that refer to the allocation method, a mass-based allocation is undertaken as a sensitivity analysis

## Use advice
在使用此钕铁硼磁铁生命周期评估数据集时，用户应遵循定义的功能单元，即1公斤钕铁硼磁铁。在解释结果时，应考虑基于稀土氧化物（REO）市场价格的分配方法。为了估计与分配方法相关的不确定性，建议用户还应考虑基于质量的分配途径进行敏感性分析。数据集使用者必须考虑到具体的区域生产来源（即中国白云鄂博）和在最终溶剂提取步骤（SX5）中分离Nd和Pr的独特过程。

## Review details
清单： 内部审查通过几个迭代步骤完成，涉及原始数据验证、原始数据记录、代表性、完整性、与 ISO 14040 和 14044 有关的建模的一致性。

## Data sources
- Marx, J., Schreiber, A., Zapp, P. & Walachowicz, F. Comparative Life Cycle Assessment of NdFeB Permanent Magnet Production from Different Rare Earth Deposits. ACS Sustainable Chem. Eng. 6, 5858–5867 (2018).
