# 锂电池回收碱性浸出过程（工艺 F）

Dataset: ILCD process, Unit process, single operation
Geography: CN
Reference year: 2013
Valid until: 2017
Classification: Unit processes / End-of-life treatment / Material recycling
Functional unit: FU is a typical type of LIB electrode material of 100 kg
Generated by: 马清源, m1120498928@163.com
Owner: 天工LCI数据工作小组
Review: Dependent internal review by 天工LCI数据工作小组
Amounts: no units in this file; such an amount is in the reference unit of its flow, which a separate flow dataset defines
copyright: false
licenseType: Free of charge for all users and uses

## General comment
通过采用氨水/铵盐体系 可浸出三元正极材料中的 Li、Ni、Co 而不浸出 Mn 和 Al，选择性好且体系为碱 性，在沉淀法回收产物时可节约碱的用量。

## Time period
数据来源于2013-2017

## Technical purpose
碱性浸出过程（工艺F）在湿法冶金中专门用于从三元正极材料中选择性地提取锂（Li）、镍（Ni）和钴（Co），而不浸出锰（Mn）和铝（Al）。该工艺主要用于从废旧锂离子电池（LIBs）中回收和回收关键金属。鉴于其碱性，该工艺在通过沉淀法回收产品时可节约碱的使用。

## Reference product
- Electrolyte: 100; input; missing unimportant
  电极浆料

## Inputs
All rows: missing unimportant
- Ammonia (25%): 217.7
- Ammonium Chloride: 59.1
  铵盐
- Sodium sulfite: 76.2
- sodium hydroxide: 2
- water,water: 700
- natural gas,natural gas: 2.3
  天然气：8500 kCal，单位：Nm3
- Electricity: 90

## Outputs
All rows: missing unimportant
- Lithium carbonate: 10.6
- Graphite: 18
  石墨粉
- Al/Cu foil: 5.7
- Nickel salt: 13
  镍盐、金属
- Cobalt salt: 15.8
  钴盐、金属
- Manganese salt: 18
  锰盐、金属
- Ternary precursor: 12
- sodium sulfate: 70
- Slags: 5.6
- carbon dioxide (fossil): 7
  原文未区分bio和fossil，根据专家判断此处为fossil
- waste water - treated: 690

## Data selection and combination
工艺的投入产出来自文献综述所报道数据的平均结果，体现了“坟墓”到 “摇篮” 的代表性过程。本研究不考虑塑料及金属外壳的回收或处理，人工成本、 工厂建设费用及其对环境的影响亦不包括在此分析中。

## Data treatment and extrapolations
值得注意的是，欧盟的数据并非针对于某个行业的计算，部分进出口数据和回收信息不适合中国的 情况。因此，改进后的 CRMs 评价方法还结合了中国官方数据、文献报道和来自 贸易/行业协会等其它利益集团数据，对主要的 LIB 制造商、回收公司、中国的官方管理机构等利益相关方的数据进行了最佳估计。在数据的时效性方面，CRMs 评估中使用的数据的参考期是基于最近的 4 年平均值（即 2013 年-2016 年）。

## Use advice
使用此数据集的用户应注意，本分析中不包括塑料和金属外壳的回收或处理，以及人工成本、工厂建设费用及其环境影响。该数据特定于中国的条件，可能不代表其他国家的过程。用户应该考虑时间相关性，因为数据代表2013-2017年的平均水平，并且自那时以来对技术或过程的变化进行调整。各方利益相关者应将此数据与LIB制造商、回收者和官方中国机构的信息整合，以确保全面评估。应用此数据时，重要的是遵守包含“从摇篮到坟墓”过程的方法论建议。

## Review details
清单： 内部审查通过几个迭代步骤完成，涉及原始数据验证、原始数据记录、代表性、完整性、与 ISO 14040 和 14044 有关的建模的一致性。

## Data sources
- 宋佳丽. 面向能源金属高效回收的资源关键性评价模型与应用. (天津大学, 2019).
