# 市政污泥处理与处置;干污泥;农业利用

Dataset: ILCD process, Unit process, single operation
Geography: CN
Classification: Unit processes / End-of-life treatment / Waste water treatment
Functional unit: The functional unit is the base for the treatment comparison in the life-cycle inventory. The management of one tone of dry sludge (DS) is selected.
Generated by: 金思甜, 2331276@tongji.edu.cn
Owner: 天工LCI数据工作小组
Review: Dependent internal review by 天工LCI数据工作小组
Amounts: no units in this file; such an amount is in the reference unit of its flow, which a separate flow dataset defines
copyright: ['opt4ROkqig']
licenseType: Free of charge for all users and uses

## General comment
根据中国的数据，从中国污泥处理的最佳技术指导中获得了重力浓缩和农业使用过程(即电力消耗、絮凝剂、废水处理和重金属排放)的清单。这些数据包括从中国140个污水处理厂直接收集的数据。

## Technology and included processes
污泥处理处置步骤为重力浓缩、厌氧消化、脱水、农业利用。

## Technical purpose
该数据集涉及市政污泥处理与处置过程，其特定最终用途为在农业中使用干污泥。干污泥被用作土壤改良剂和肥料，为提高土壤特性和作物产量提供了一种有益的废物再利用方式。

## Reference product
- Sludge: 1000; input; estimated
  1吨干污泥(DS)

## Outputs
All rows: missing unimportant
- cadmium: 0.005
- mercury: 0.005
- zinc: 0.005
- chromium: 0.6
- nickel: 0.1
- arsenic: 0.075
- lead: 0.3
- copper: 0.25

## Use advice
在使用该数据集进行生命周期评价时，确保您的分析范围包括以处理一吨干污泥（DS）为功能单位的管理。考虑任何地区法规以及对土壤健康和农业生产力的影响。数据应考虑污泥处理的所有阶段，从处理到农业应用，包括能源和化学输入。在评估中注意潜在的环境影响，如排放和养分径流。

## Review details
清单： 内部审查通过几个迭代步骤完成，涉及原始数据验证、原始数据记录、代表性、完整性、与 ISO 14040 和 14044 有关的建模的一致性。

## Data sources
- Xu, C., Chen, W. & Hong, J. Life-cycle environmental and economic assessment of sewage sludge treatment in China. Journal of Cleaner Production 67, 79–87 (2014).
