# 小规模集约化养猪生产;粪肥管理

Dataset: ILCD process, Unit process, single operation
Geography: JS-CN
Reference year: 2010
Classification: Unit processes / End-of-life treatment / Reuse or further use
Functional unit: The functional unit (FU) is defined to be 1000 kg of pig carcass weight (CW) after the process in slaughterhouse.
Generated by: 杨瑞, 1632707028@qq.com
Owner: 天工LCI数据工作小组
Review: Dependent internal review by 天工LCI数据工作小组
Amounts: no units in this file; such an amount is in the reference unit of its flow, which a separate flow dataset defines
copyright: false
licenseType: Free of charge for all users and uses

## General comment
粪便管理系统是指固体粪便(70%的粪便)和液体粪便(30%的粪便被尿液冲走)的分离处理。固体粪便堆肥的同时，液体粪便(浆液)从猪舍流出，进入沼气池消化40天，然后进入室外开放式浆液池储存4个月。之后，固体粪便和消化物的产出可以作为营养物质的有效来源重新利用到附近的农田。

## Geography
在本研究中，关于猪生产不同阶段的材料和能源消耗、饲料组成以及与其他成分混合的主要数据来自对中国江苏省几家养猪场的采访。

## Time period
实地调查(Guo and Wang, 2010)

## Technology and included processes
由于小规模养猪场的管理不善和前沿技术的投资能力(b孟，2019)，堆肥的渗滤液和浆液储存后的排放，包括化学需氧量、生化学的需氧量和磷(P)，是根据中国的指导方针估算的(MEE, 2011)。

## Technical purpose
该数据集描述了小规模集约化养猪生产过程中的粪肥管理系统，其中固态粪便和液态粪便分开处理。固态粪便用于堆肥，而液态粪便经沼气消化后存储在浆液池中。两种形式的粪便最终作为肥料被重新利用于农田。这种粪肥管理系统通常被农场用于通过沼气生产实现养分回收和能源回收的目的。

## Reference product
- pig: 1000; measured
  作为参考定量，非实际输出

## Inputs
- manure: 4360; measured
  猪粪便
- nitrogen: -51.83; measured
  N fertilizer (avoided)
- phosphorus: -15.51; measured
  P fertilizer (avoided)
- potassium: -12.32; measured
  K fertilizer (avoided)

## Outputs
All rows: measured
- methane (biogenic): 24.7
- carbon dioxide (biogenic): 42.83
- ammonia: 4.77
- nitrous oxide: 0.94
- Nitrogenous Matter (unspecified, as N): 4.99
  氮气
- nitrogen monoxide: 0.35
- chemical oxygen demand: 18.23
- biological oxygen demand: 4.33
  Biochemical oxygen demand
- Phosphorus: 0.46

## Deviations from the LCI method approaches
基于LCI结果，使用ReCiPe midpoint (H) 2016方法(Huijbregts et al.， 2016)进行生命周期影响评估(LCIA)，该方法是ReCiPe 2008的更新版本，现在提供具有全球范围代表性的表征因子。六个影响类别主要用于评估主要生命周期环境影响潜力，即全球变暖(GWP)、淡水富营养化(FEP)、陆地酸化(TAP)、淡水生态毒性(FETP)、人类致癌毒性(HTP)和陆地生态毒性(TETP) (Cherubini et al.， 2015;Noyaet al.， 2017)。其中，GWP、FEP和TAP是以往研究中最受关注的影响类别(de Vries和de Boer, 2010;Reckmann et al.， 2013)。

## Use advice
使用此数据的用户在将这些结果推广到其他农场时应保持谨慎，特别是当考虑地理和技术变化时。验证数据与当地条件和法规的相关性是非常重要的，特别是在考虑来自堆肥渗滤液和浆液储存的排放时。用户在将这些数据整合到更广泛的生命周期评估研究中时，应保证系统边界具有可比性。方法论上的建议还包括遵循ReCiPe midpoint (H) 2016方法进行LCIA，并重点关注在先前研究中最关注的影响类别即全球变暖(GWP)、淡水富营养化(FEP)和陆地酸化(TAP)。

## Review details
清单： 内部审查通过几个迭代步骤完成，涉及原始数据验证、原始数据记录、代表性、完整性、与 ISO 14040 和 14044 有关的建模的一致性。

## Data sources
- Liu, X., Cai, Z. & Yuan, Z. Environmental burdens of small-scale intensive pig production in China. Science of The Total Environment 770, 144720 (2021).
