# 土壤修复;原位修复;电修复;修复设施建设;电动修复设施

Dataset: ILCD process, Unit process, single operation
Geography: KR
Reference year: 2014
Classification: Unit processes / Other Services / Repair and maintenance
Generated by: 浩骅, wangyp@caep.org.cn
Owner: 天工LCI数据工作小组
Review: Dependent internal review by 天工LCI数据工作小组
Amounts: no units in this file; such an amount is in the reference unit of its flow, which a separate flow dataset defines
copyright: false
licenseType: Free of charge for all users and uses

## General comment
安装现场准备、关闭和拆卸系统

## Technology and included processes
包括：挖掘、滚动钻孔和安装；人员和设备运输；系统安装。

## Technical purpose
所述工业过程用于使用电处理方法的受污染土壤的原位修复。它涉及电动土壤修复设施的建设和运营。设施过程包括现场准备、挖掘、钻孔和修复系统的安装以及人员和设备的运输。此过程适用于土壤污染构成环境风险的场所，以及电修复可以有效中和或移除污染物而无需将受污染的土壤运离现场的场合。

## Reference product
- Electric restoration facilities: 1; measured

## Inputs
All rows: measured
- Diesel: 0.0799
  Excavator : (0.2 m3 , 5 L/hr, 16 hr/2 days)
- Diesel: 0.0386
  Vehicle (five times, 10 km/1 L)
- Steel: 48
  Anode electrode
- Stainless Steel: 2448
  Cathode electrode
- Polyvinyl chloride: 140.2
  Anode (casing)
- Polyvinyl chloride: 7.6
  Circulation pipe
- polyethylene high density granulate (PE-HD): 25
  Anode and cathode
- polyethylene low density foil(PE-LD): 112
  Electrolyte tank (2 m3 , 2 ea)
- Electricity: 1440
  Equipment and etc
- Tap Water: 1
  Equipment and etc
- Polyethylene,Polyethylene: 25.1
- Results of on-site investigations: 1

## Outputs
- Greenhouse Gases: 16130; measured
- Nitrogen oxides: 1.48; measured
- SOx: 0.779; measured
- particles (> PM10): 0.0922; measured

## Use advice
使用此数据集时，确保数据与正在处理的具体场地特征和污染物一致至关重要。电修复过程的效果可能会根据土壤类型、污染物特性和浓度水平而有所不同。用户应验证过程与当地法规和指南的兼容性。考虑修复过程的整个生命周期很重要，包括对产生的任何废物的正确处置，以及对环境和当地社区的潜在影响。必须使用能源消耗数据来理解修复过程的完整环境足迹。

## Review details
清单： 内部审查通过几个迭代步骤完成，涉及原始数据验证、原始数据记录、代表性、完整性、与 ISO 14040 和 14044 有关的建模的一致性。

## Data sources
- Kim, DH., Yoo, JC., Hwang, BR. et al. Environmental assessment on electrokinetic remediation of multimetal-contaminated site: a case study. Environ Sci Pollut Res 21, 6751–6758 (2014).
