# 原料气生产;原料气;气化

Dataset: ILCD process, Unit process, single operation
Geography: CN
Classification: Unit processes / Energy carriers and technologies / Other non-renewable fuels
Generated by: 付翔, 1162850692@qq.com
Owner: 天工LCI数据工作小组
Review: Dependent internal review by 天工LCI数据工作小组
Amounts: no units in this file; such an amount is in the reference unit of its flow, which a separate flow dataset defines
copyright: false
licenseType: Free of charge for all users and uses

## General comment
此气化过程用于从煤炭生产原料气，该原料气是钢铁工业中直接还原铁（DR）的主要输入物。该数据集代表了在中国示范的基于煤的直接还原（Coal-DR）过程的生命周期清单（LCI）。

## Geography
The LCI of Coal-DR is obtained, as shown in Table 9, based on the statistics of the demonstration project in China.

## Reference product
- Raw gas: 1306.9; calculated

## Inputs
- freshwater,freshwater: 400; calculated
- oxygen: 307.6; calculated
- lignite: 625.1; calculated
- Electricity: 176.04; calculated

## Outputs
- Slag: 14.8; calculated
- particles (> PM10): 0.4; calculated

## Data treatment and extrapolations
LCI of COG-DR and H-DR routes, which is not scaled-up in China are estimated based on Coal-DR routes combined with literature data from simulations, laboratory tests, and process modeling in Table 9 [49,50]. The LCI of Coal-DR is obtai

## Use advice
数据集使用者应考虑此LCI所捕获的区域生产过程的特异性。数据反映了中国示范项目中特有的直接还原过程，其适用性可能因地点或技术设置而异。COG-DR（焦炉气直接还原法）和H-DR（氢直接还原法）的结果是基于Coal-DR的估算，并应根据区域条件、模拟数据和现有文献进行相应的调整和放缩，以实现准确应用。在估算过程中应注意放缩因子和假设的制定。

## Review details
清单： 内部审查通过几个迭代步骤完成，涉及原始数据验证、原始数据记录、代表性、完整性、与 ISO 14040 和 14044 有关的建模的一致性。

## Data sources
- The carbon reduction potential of hydrogen in the low carbon transition of the iron and steel industry: The case of China
