# Veterinarychemicalrawmaterials|Chemicalrawmaterialsandchemicalproducts,pharmaceuticalintermediates|ChemicalSynthesis|200~1000 t/a / /|兽用化学药品原料药|化学原料及化学制品、医药中间体|化学合成|200~1000吨/年

Dataset: ILCD process, Partly terminated system
Geography: CN
Reference year: 2019
Classification: Materials production / Other mineralic materials
Generated by: The data was created by the Office of the Second National Pollution Source Census of the Ministry of Ecology and Environment, and the data was organized by the TianGong Plan team for ILCD format / 生态环境部第二次全国污染源普查工作办公室创建数据，天工计划团队常慧敏整理数据为ILCD格式
Amounts: no units in this file; such an amount is in the reference unit of its flow, which a separate flow dataset defines
copyright: false

## Technology and included processes
the Technical of end-of-pipe management technology for pollution Veterinary Chemical Drug Raw Materialsis/，The formula for calculating the actual operation rate (k-value) of the end-of-pipe treatment facility is K = normal operation time of wastewater treatment facility (hours/year) / normal production time of enterprises (hours/year)
污染物指标废水量的末端治理技术是/，末端治理设施实际运行率（k值）计算公式为/

## Reference product
- Veterinary Chemical Drug Raw Materials: 1000; calculated
  原文件中描述污染物类别为Product，污染物指标为兽用化学药品原料药，此处对其进行了匹配工作，将其匹配到LCAflow库里面相最符合的流，污染物指标备注为废水量

## Outputs
All rows: calculated
- Waste water: 413.323
  原文件中描述污染物类别为废水，污染物指标为废水量，此处对其进行了匹配工作，将其匹配到LCAflow库里面相最符合的流，污染物指标备注为废水量
- chemical oxygen demand: 650.912, 62.4876, 44.9129, 26.6874 (4 entries)
  原文件中描述污染物类别为废水，污染物指标为化学需氧量，此处对其进行了匹配工作，将其匹配到LCAflow库里面相最符合的流，污染物指标备注为化学需氧量
- Ammonia Nitrogen: 24.312, 2.26102, 2.16377, 1.33716 (4 entries)
  原文件中描述污染物类别为废水，污染物指标为氨氮，此处对其进行了匹配工作，将其匹配到LCAflow库里面相最符合的流，污染物指标备注为氨氮
- phosphorus, total: 2.084, 0.28134, 0.17714, 0.025008 (4 entries)
  原文件中描述污染物类别为废水，污染物指标为总磷，此处对其进行了匹配工作，将其匹配到LCAflow库里面相最符合的流，污染物指标备注为总磷
- Nitrogen, organic bound: 78.89, 23.5881, 16.8825, 2.76115 (4 entries)
  原文件中描述污染物类别为废水，污染物指标为总氮，此处对其进行了匹配工作，将其匹配到LCAflow库里面相最符合的流，污染物指标备注为总氮
- Exhaust gas: 28929
  原文件中描述污染物类别为废气，污染物指标为废气量，此处对其进行了匹配工作，将其匹配到LCAflow库里面相最符合的流，污染物指标备注为废气量
- volatile organic compound: 41.434, 29.0038, 10.3585, 0.497208, 0.41434 (5 entries)
  原文件中描述污染物类别为废气，污染物指标为挥发性有机物，此处对其进行了匹配工作，将其匹配到LCAflow库里面相最符合的流，污染物指标备注为挥发性有机物

## Data sources
- 第二次全国污染源普查产排污核算系数手册（试用版）,二级代码27,三级代码275.0文件，在完整版文件中第3116页
