# Soil and groundwater remediation;Ex-situ;groundwater pump and treat;construction; Treatment facilities

Dataset: ILCD process, Unit process, single operation
Geography: CA
Reference year: 2007
Classification: Other Services / Repair and maintenance
Generated by: Wang Ning, wang_ning@caep.org.cn
Owner: Tiangong LCI Data Working Group
Review: Dependent internal review by Tiangong LCI Data Working Group
Amounts: no units in this file; such an amount is in the reference unit of its flow, which a separate flow dataset defines
copyright: false
licenseType: Free of charge for all users and uses

## General comment
Construction of wastewater disposal facilities using activated carbon, glass, latex

## Geography
The contaminated area was located 600 m from a river shore in the northern part of the prov-ince of Quebec， Canada.

## Technical purpose
The described process is used in the construction of wastewater disposal facilities, specifically designed for soil and groundwater remediation. The remediation technology involves an ex-situ pump and treat system. Materials such as activated carbon, glass, and latex are used in the construction, suggesting the facilities are built for effectively treating contaminated water. This facility is particularly relevant for situations where contamination sources are close to vulnerable water bodies, like the case of the contaminated area near a river shore in Quebec, Canada.

## Reference product
- Treatment facilities: 1; estimated
  在现场建造一套废水处理装置

## Inputs
- Activated Carbon: 530700; estimated
  在现场建造废水处置装置所消耗的活性炭颗粒
- Latex: 52.8; estimated
  在现场建造废水处置装置所消耗的乳胶
- Glass (formed & finished): 6264; estimated
  在现场建造废水处置装置所消耗的玻璃

## Use advice
Users employing this dataset should consider the specific construction materials used in the treatment facility as part of the environmental impact assessment. The inclusion of recycling or end-of-life scenarios for materials like activated carbon, glass, and latex should be carefully evaluated. Ensure accurate geographical and hydrological data integration, especially because the facility's location relative to water bodies can substantially influence the remediation effectiveness. Users must model the use phase behavior considering the contaminant types and concentrations, as well as the proximity of the contaminated area to the river shore.

## Review details
Inventory: The internal review was done by several iteration steps concerning raw data validation, raw data documentation, representativity, completeness and consistency of modelling with regard to ISO 14040 and 14044.
