# 钢铁产品;钢铁;钢铁生产

Dataset: ILCD process, Unit process, single operation
Geography: NJ-JS-CN
Reference year: 2012
Classification: Unit processes / Materials production / Metals and semimetals
Generated by: 王环宇, wanghuanyu00@126.com
Owner: 天工LCI数据工作小组
Review: Dependent internal review by 天工LCI数据工作小组
Amounts: no units in this file; such an amount is in the reference unit of its flow, which a separate flow dataset defines
copyright: false
licenseType: Free of charge for all users and uses

## General comment
该数据集涉及南京钢铁联合有限公司的钢铁产品生产。所生产的钢材适用于包括建筑、汽车行业、造船、基础设施以及机械和家电制造等广泛的应用范围。

## Geography
南京钢铁联合有限公司

## Reference product
- iron: 1000; measured

## Inputs
All rows: measured
- Coking coal: 318.2
  焦煤
- Coal injection: 318.2
  高炉喷煤
- Coal injection: 318.2
  烧结/转炉用煤
- coke,Coke: 313.8
  焦炭
- Limestone: 2272.7
- dolomite: 2123.1
- Electricity: 3777.48

## Outputs
- carbon dioxide (fossil): 990; measured
  原文未区分bio和fossil，根据专家判断,钢铁生产过程中碳排放源此处为fossil）

## Use advice
使用此数据时，应注意已评估的钢铁生产的特定生命周期阶段。使用者必须考虑技术适用性，如所使用的能源类型、采用的生产过程（例如高炉、电弧炉）以及南京钢铁联合有限公司所遵守的排放标准。在处理多输出过程时确保适当分配，并考虑到可回收性和产品生命末期阶段的潜力。

## Review details
清单： 内部审查通过几个迭代步骤完成，涉及原始数据验证、原始数据记录、代表性、完整性、与 ISO 14040 和 14044 有关的建模的一致性。
