# 再生铜;精炼铜;火法精炼和电解精炼;废铜

Dataset: ILCD process, Unit process, single operation
Geography: CN
Reference year: 2018
Classification: Unit processes / Materials production / Metals and semimetals
Functional unit: The production of 1000 kg of refined copper (99.99% cathode copper) was selected as the FU in this paper” (Chen 等, 2019, p. 36)
LCI method principle: Attributional
LCI method approaches: Allocation - market value
Generated by: 王鹏, 2867919560@qq.com
Owner: 天工LCI数据工作小组
Review: Dependent internal review by 天工LCI数据工作小组
Amounts: no units in this file; such an amount is in the reference unit of its flow, which a separate flow dataset defines
copyright: false
licenseType: Free of charge for all users and uses

## General comment
所描述的过程涉及通过火法精炼和电解精炼技术利用铜废料生产精铜。这种纯度为99.99%的精炼铜可用于需要高导电性和耐蚀性的各种行业，如电线、电路和高质量屋顶材料的制造。

## Geography
本研究主要通过对生产工艺和典型企业的调查，收集了原铜生产的资源、能源消耗和污染数据。

## Technology and included processes
两项技术的系统边界均覆盖了主要生产流程，包括原生铜的采矿（采矿和选矿）、冶炼（熔炼和吹炼）、火法精炼和电解精炼，以及再生铜的预处理（拆解和分离）、火法精炼和电解精炼。 ， A

## Reference product
- Refined copper: 1000; measured
  Refined copper 需要补充

## Inputs
- crude oil; 42.3 MJ/kg: 8.78; software or database
  Crude oil (resource)
- hard coal,hard coal,hard coal: 162; software or database
  Hard coal (resource)
- natural gas; 44.1 MJ/kg: 492; software or database
  Natural gas (resource)
- Copper scrap（Cu 95%）,Copper scrap（Cu 95%）: 1860; measured
  Copper scrap需要补充
- freshwater,freshwater: 1400; measured
  Fresh water
- Limestone: 8.46; software or database
- Refractory material: 7.62; measured
  Refractory material需要补充
- Industrial oxygen: 91.4; measured
  Industrial oxygen需要补充
- Sulfuric acid(98%): 6.8; measured
  Sulfuric acid resourse需要补充
- Spray mold: 5.08; measured
  Spray mold需要补充
- sodium hydroxide: 0.04; measured
  Sodium hydroxide
- Sodium chlorate: 0.454; measured
  Sodium chlorite需要补充
- Sodium hypochlorite: 0.374; measured
  Sodium hypochlorite需要补充

## Outputs
All rows: measured
- carbon dioxide (fossil): 278
  carbon dioxide
- sulfur dioxide: 0.783
  Sulfur dioxide
- nitrous oxide: 0.0832
  Nitrogen oxide
- carbon monoxide,carbon monoxide (fossil): 0.366
  Carbon monoxide
- methane (fossil): 1.32
  Methane
- nitrous oxide: 0.00588
  Nitrous oxide
- sulphuric acid: 0.00034
- particles (PM2.5 - PM10): 2.62
- mercury: 0.00142
  Mercury
- lead: 0.00117
  Lead
- zinc: 0.00101
- nickel: 0.000593
  Nickel
- arsenic: 0.000136
  Arsenic
- chemical oxygen demand: 0.231
  Chemical oxygen demand
- biological oxygen demand: 0.00241
  Biochemical oxygen demand需要补充
- Solid suspension: 0.177
  Solid suspension需要补充
- Ammonia Nitrogen: 1.64e-7
  Ammonia nitrogen需要补充
- municipal solid waste deposition: 1330
  Solid waste

## Deviations from the LCI method approaches
结合我国精炼铜生产特点，本研究选用CML2001方法（2016年修订）进行环境影响核算。

## Data selection and combination
本研究主要通过对生产工艺和典型企业的调查，收集了原铜生产的资源、能源消耗和污染数据。上游数据来自 GaBi (ts Vision) 和 Ecoinvent 数据库

## Data treatment and extrapolations
本研究使用Gabi软件（ts版）作为计算软件，并针对这两种技术建立了模型。

## Use advice
在使用本生命周期评价数据集计算环境影响时，必须遵循CML2001方法（2016年修订）。确保系统边界包括原铜采矿、冶炼、火法精炼、电解精炼和再生铜的预处理、火法精炼及电解精炼。未经相关调整，数据不应外推至不同的生产过程或地理区域。建议按照研究惯例使用Gabi软件（ts版）进行一致的建模和分析。

## Review details
清单： 内部审查通过几个迭代步骤完成，涉及原始数据验证、原始数据记录、代表性、完整性、与 ISO 14040 和 14044 有关的建模的一致性。

## Data sources
- Chen, J. et al. Environmental benefits of secondary copper from primary copper based on life cycle assessment in China. Resources, Conservation and Recycling 146, 35–44 (2019).
