# 水泥生产;水泥, 普通硅酸盐水泥;新型干法, 5000 t/d;混合固废

Dataset: ILCD process, Unit process, black box
Geography: CN
Classification: Unit processes / Materials production / Other mineralic materials
Generated by: #REF!, ysqsophia@gmail.com
Owner: 天工LCI数据工作小组
Review: Dependent internal review by 天工LCI数据工作小组
Amounts: no units in this file; such an amount is in the reference unit of its flow, which a separate flow dataset defines
copyright: false
licenseType: Free of charge for all users and uses

## General comment
配备有5000t/d新型干法水泥熟料生产线，采用先进的强化型悬浮预热器五级窑外分解技术以及立式原料磨、配有辊压机的大型球磨机等先进的水泥生产设备。

## Geography
东北两座水泥厂

## Technical purpose
该水泥生产数据集代表的是每天生产5000吨的普通硅酸盐水泥，采用了新型干法技术制造。这种水泥广泛用于普通建筑工程，包括建筑物、桥梁、道路以及其他基础设施项目。它也可以被用于住宅和商业建设，因为它具有水力性质和强度。混合固废的使用表明了生产过程中的环境考虑，允许在水泥工业内实行废物资源化策略。

## Model description
系统边界为水泥厂水泥生产系统。

## Reference product
- cement, ordinary portland cement: 1000
  水泥产品

## Inputs
- limestone, crushed, for mill: 1142.86
  石灰石
- sandstone: 73.6264
  砂岩
- shale: 54.9451
  页岩
- ash: 107.692
  粉煤灰
- iron, powder: 19.0659
  铁粉
- gypsum stone (CaSO4-dihydrate): 47.8022
  石膏
- blast furnace slag: 38.7912
  矿渣
- hard coal: 134.011
  烟煤。年耗煤用能=(2.439E+8)kg×(2.1477E+7)J/kg(平均低位热值)=(5.24E+15)J
- Electricity: 352.8
  总耗电量。年耗电能=（I.7836E+8）kWh×（3.60E+6）J/kWh=（6.42E+14）J
- tap water: 369.78
  原文是总水量，即自来水。

## Outputs
- particles (> PM10): 0.295604
  粉尘，未标明粒径，按PM>10处理。
- nitrogen dioxide: 1.56593
  NO2
- sulfur dioxide: 0.308
  SO2
- carbon dioxide (fossil): 409.341
  CO2

## Use advice
在使用这个数据集进行生命周期评估（LCA）时，至关重要的是确保评估的技术范围与所描述设施中使用的先进机械和生产技术相一致。在进行环境影响评估时，应考虑以混合固废代替传统原料。数据使用者还必须遵守定义的系统边界，该边界限定在水泥厂的水泥生产系统内。对于与其他生产方法和规模的任何外推或比较，应当应用适当的缩放和标准化技术。同时建议监控更新，因为技术和生产实践可能会发展变化，进而可能影响LCA结果。

## Review details
清单： 内部审查通过几个迭代步骤完成，涉及原始数据验证、原始数据记录、代表性、完整性、与 ISO 14040 和 14044 有关的建模的一致性。

## Data sources
- 邵帅. (2016). 基于Emergy和Em-LCA的水泥企业可持续发展水平评价 [硕士, 大连理工大学].
