# 生产光致发光光伏组件;混合阳离子组件 1m2;旋转镀膜法;碘化铅

Dataset: ILCD process, Unit process, single operation
Geography: US
Classification: Unit processes / Energy carriers and technologies / Electricity
Functional unit: 1 square meter perovskite photovoltaic module
Generated by: 姚玺婧, 15898832265@163.com
Owner: 天工LCI数据工作小组
Review: Dependent internal review by 天工LCI数据工作小组
Amounts: no units in this file; such an amount is in the reference unit of its flow, which a separate flow dataset defines
copyright: false
licenseType: Free of charge for all users and uses

## General comment
The main process steps include substrate glass production, deposition of perovskite layers, deposition of electron transport layers, and packaging.

## Technology and included processes
Spin-coating method: The spin-coating process is relatively simple, and it is the mainstream preparation method of perovskite light-absorbing layer. Firstly, PbX2 was dissolved in solvent and spun on the substrate to form a film; Then PbX2 is soaked in solution or spun on the substrate again to react with PbX2 film to produce perovskite.

## Technical purpose
这种混合阳离子1平方米钙钛矿光伏模块旨在用于太阳能应用，将太阳能转换为电能。它可以集成到各种系统中，如住宅太阳能板、商业光伏阵列和大规模的太阳能农场。由于其特有的材料属性，在多样的气候条件下提供了提升的性能，并适用于太阳辐照度高的地区。

## Reference product
- Solar Module,Solar Module,Solar Module: 1; log-normal

## Inputs
All rows: log-normal
- ethanol: 0.0271, 0.0271 (2 entries)
  清洁溶剂
- acetone: 0.147
  清洁溶剂
- Titanium dioxide, chloride and sulphate processes, >80% TiO2, production mix, at plant: 0.00627
  30纳米的阻挡层
- water: 0.0327
  清洁溶剂
- Titanium dioxide, chloride and sulphate processes, >80% TiO2, production mix, at plant: 0.00113
  200纳米ETL
- ethanol: 0.000216
  TiO2浆料的溶剂
- dimethyl formamide: 0.00164
  混合阳离子混合物的溶剂
- chlorobenzene: 0.000122
  添加剂
- acetonitrile: 0.000263
  HTFSI溶剂
- chlorobenzene: 0.00733
  Spiro OMeTAD溶剂
- copper: 0.00115
  80纳米电极
- argon: 0.0865
- oxygen: 8.65e-5
- polyethylene terephthalate (PET) granulate: 0.0202
- Adhesives: 0.0617
- dimethyl sulfoxide: 0.000479
  混合阳离子混合物的溶剂
- 4-tert-butylpyridine: 0.000178
  添加剂
- Electricity: 265.451
- Fluorine Doped Tin Oxide Coated Glass: 5.04; calculated
- Formamidinium iodide: 0.000412; calculated
- Lead iodide: 0.00116; calculated
- Lead(II) bromide: 0.00163; calculated
- methylammounium iodide: 4.97e-5; calculated
- Spiro-OMeTAD: 0.000485; calculated
- Bis(trifluoromethane)sulfonimide: 5.68e-5; calculated
- FK 209 Co(III) TFSI salt: 1.79e-5; calculated

## Outputs
All rows: log-normal
- ethanol: 0.00589
  BL-TiO2油墨和TiO2浆料的溶剂
- isopropanol: 0.000381
  BL-TiO2油墨的溶剂
- acetone: 0.000184
  BL-TiO2油墨的溶剂
- Titanium dioxide, chloride and sulphate processes, >80% TiO2, production mix, at plant: 0.00079
  废弃TiO2浆料
- dimethyl formamide: 0.00164
  混合阳离子混合物的溶剂
- chlorobenzene: 0.00745
  Spiro OMeTAD溶剂和旋涂废料
- acetonitrile: 0.000263
  HTFSI溶剂
- copper: 0.000573
  废铜
- argon: 0.0865
- oxygen: 8.65e-5
- acetic anhydride: 0.000325
  BL-TiO2油墨的溶剂
- dimethyl sulfoxide: 0.000479
  混合阳离子混合物的溶剂
- 4-tert-butylpyridine: 0.000125
  废4-叔丁基吡啶
- landfill of glas/inert waste: 5.041
  垃圾填埋
- Titanium tetrachloride: 6.03e-5; calculated
- Formamidinium iodide: 0.000288; calculated
- Lead iodide: 0.000811; calculated
- Bis(trifluoromethane)sulfonimide: 0.000114, 3.98e-5 (2 entries); calculated
- Methylamine bromide: 3.48e-5; calculated
- Spiro-OMeTAD: 0.00034; calculated
- FK 209 Co(III) TFSI salt: 1.25e-5; calculated

## Use advice
在使用这些数据进行生命周期评估时，由于太阳辐照度的差异，必须考虑安装地点的地理位置。此外，应明确概述光伏模块生命周期结束时的管理实践，如回收或处置。为了进行准确的建模，用户应考虑光伏模块随时间效率降低和维护要求。

## Review details
清单： 内部审查通过几个迭代步骤完成，涉及原始数据验证、原始数据记录、代表性、完整性、与 ISO 14040 和 14044 有关的建模的一致性。
