# 稀土焙烧;稀土;原位浸出;钕铁硼（NdFeB）磁铁

Dataset: ILCD process, Unit process, single operation
Geography: NMG-CN
Reference year: 2014
Classification: Materials production / Metals and semimetals
Functional unit: The functional unit is a 1 kg NdFeB magnet
LCI method principle: Attributional
LCI method approaches: Allocation - market value; Allocation - mass
Generated by: 汪涛, twang@iue.ac.cn
Owner: 天工LCI数据工作小组
Review: Dependent internal review by 天工LCI数据工作小组
Amounts: no units in this file; such an amount is in the reference unit of its flow, which a separate flow dataset defines
copyright: false
licenseType: Free of charge for all users and uses

## General comment
本数据集涉及稀有土元素的焙烧和原位浸出过程，特别是钕和镨的生产，这些是生产钕铁硼(NdFeB)磁铁的重要组成部分。这些磁铁广泛用于电动马达、风力发电机、硬盘驱动器以及需要强大永磁体的其他电子设备中。

## Geography
Bayan Obo (China)

## Technology and included processes
所有三个矿床生产 Nd 和 Pr 的基本过程都是相同的。 Nd 和 Pr 是相同的，除了最后的溶剂萃取步骤 (SX5)，其中两者被分离。

## Reference product
- Roasted concentrate: 10.2; article inperiodical
  Roasted concentrate. Bayan Obo: input for next process, Leaching

## Inputs
- Natural gas: 0.75; software or database
  Natural gas. Bayan Obo: calculated with ASPEN PLUS
- Electricity: 2.592; article inperiodical
  Bayan Obo
- sulphuric acid: 10.6; article inperiodical
  Bayan Obo
- hydrated lime dry slaked: 2.57; article inperiodical
  Bayan Obo: stoichiometric calculation
- transport in t*km,transport in t*km: 0.26; measured
  Bayan Obo: 20 km, lorry EURO3

## Outputs
- Sludge: 5.02
  Bayan Obo: estimation
- fluoride: 0.00141; article inperiodical
  Bayan Obo: Rare earth control standards
- carbon dioxide: 2605; article inperiodical
  Bayan Obo: stoichiometric calculation and combustion of natural gas
- sulfur dioxide: 58.25; article inperiodical
  Bayan Obo
- sulphuric acid: 5.23; article inperiodical
  Bayan Obo
- Dust (unspecified, from stack): 5.83; article inperiodical
  Bayan Obo
- nitrous oxide: 27.97; article inperiodical
  Bayan Obo

## Deviations from the LCI method approaches
In this study, an allocation method based on the market prices of REOs28 is considered. To estimate uncertainties that refer to the allocation method, a mass-based allocation is undertaken as a sensitivity analysis

## Use advice
在使用这个数据集进行生命周期评价(LCA)时，用户应确保正确应用描述的基于市场价格的Nd和Pr生产分配方法。由于关于分配方法的方法论上的不确定性，建议也使用基于质量的分配进行敏感性分析，以保证结果的一致性和稳健性。此外，LCA从业者应准确地模拟NdFeB磁铁使用阶段的行为，考虑到它们的具体应用和寿命。在这项研究中定义的功能单位是1公斤NdFeB磁铁；用户必须维持这个单位以进行比较目的。

## Review details
清单： 内部审查通过几个迭代步骤完成，涉及原始数据验证、原始数据记录、代表性、完整性、与 ISO 14040 和 14044 有关的建模的一致性。

## Data sources
- Marx, J., Schreiber, A., Zapp, P. & Walachowicz, F. Comparative Life Cycle Assessment of NdFeB Permanent Magnet Production from Different Rare Earth Deposits. ACS Sustainable Chem. Eng. 6, 5858–5867 (2018).
