# 市政污泥处理与处置;湿污泥 含水率80%;干化焚烧

Dataset: ILCD process, Unit process, single operation
Geography: CN
Classification: End-of-life treatment / Other end-of-life services
Functional unit: In this paper, 1 t of 80% sludge with a moisture content is used as the functional unit for calculating environmental impact, resource consumption and economic cost.
Generated by: 金思甜, 2331276@tongji.edu.cn
Owner: 天工LCI数据工作小组
Review: Dependent internal review by 天工LCI数据工作小组
Amounts: no units in this file; such an amount is in the reference unit of its flow, which a separate flow dataset defines
licenseType: Free of charge for all users and uses

## General comment
描述的工艺属于市政污泥的处理与处置。这些污泥具有高含水率80%，需要经过干化后进行焚烧处理。这是一个单元过程（单一操作），能够处理特定水分水平的湿污泥。常用于污水处理厂副产品的管理，并且是在最终处置之前减少污泥体积的关键步骤。

## Reference product
- Sludge: 1000; input; estimated
  1 t 含水率 80%污泥

## Outputs
All rows: calculated
- carbon dioxide: 312
- methane: 0.15
- nitrous oxide: 0.0008
- Nitrogen oxides: 0.38
- sulfur dioxide: 0.52
- carbon monoxide: 0.01
- hydrocarbons (unspecified): 0.005
- particles (PM10): 0.15
- hydrogen sulfide: 8e-5
- hydrogen chloride: 0.03
- 2,3,7,8-tetrachlorodibenzo-p-dioxin: 1e-10
- mercury: 2e-7, 3e-6, 0.0008 (3 entries)
- lead: 4e-6, 0.0002 (2 entries)
- nickel: 0.0001, 7e-5, 0.007 (3 entries)
- cadmium: 2e-6, 1e-5, 0.002 (3 entries)
- zinc: 4e-5, 0.0007, 0.04, 0.4 (4 entries)
- copper: 4e-6, 8e-5, 0.04 (3 entries)
- chromium: 6e-6, 0.0001, 0.06 (3 entries)
- tin: 7e-5, 4e-5, 0.005 (3 entries)
- chemical oxygen demand: 1.5
- nitrogen, total (excluding N2): 0.1
- phosphorus, total: 0.01
- ammonia: 0.07
- Waste (solid): 69.7

## Use advice
在使用该数据集进行生命周期评估时，重要的是要将描述的单元过程作为污泥管理系统内的独立操作。考虑干化和焚烧阶段所需的能源和资源输入，以及过程产生的排放和残余物。用户应确保数据集适用于污泥处理的地理和技术背景，并针对实践或规模上的任何差异进行校正。此外，如果考虑循环利用或处置后的环境影响，这些方面必须单独地整合到整体的生命周期评价框架中。

## Review details
清单： 内部审查通过几个迭代步骤完成，涉及原始数据验证、原始数据记录、代表性、完整性、与 ISO 14040 和 14044 有关的建模的一致性。

## Data sources
- 袁言言,肖军,黄瑛等.基于LCA和AHP的污泥处理技术的综合性能评价[J].环境科学与技术,2015,38(S1):263-268.
