# 稀土HCl浸出;镝;IAC;稀土元素含矿石

Dataset: ILCD process, Unit process, single operation
Geography: CN
Reference year: 2010
Valid until: 2019
Classification: Unit processes / Materials production / Inorganic chemicals
Functional unit: The goal of this investigation is to compare environmental impacts related to the production of 1 kg Dy (functional unit) from IAC (Southern China), from B/M ore (Bayan Obo), and from an eudialyte deposit (Norra Kärr) using the LCA method
LCI method principle: Attributional
LCI method approaches: Allocation - mass
Generated by: 汪涛, twang@iue.ac.cn
Owner: 天工LCI数据工作小组
Review: Dependent internal review by 天工LCI数据工作小组
Amounts: no units in this file; such an amount is in the reference unit of its flow, which a separate flow dataset defines
copyright: false
licenseType: Free of charge for all users and uses

## General comment
所描述的稀土HCl浸出工艺专门用于从含稀土元素(REE)的矿石中提取镝(Dy)。该过程用于生产高强度磁铁、电子组件和各种镝基材料的行业。

## Geography
华南地区和白云鄂博

## Technology and included processes
本次调查的目的是比较 IAC（中国南方）、B/M 矿石（白云鄂博）和 eudialyte 矿床（Norra Kärr）生产 1 千克镝（功能单位）的环境影响，使用生命周期分析法

## Reference product
- Leaching solution: 6730; min 2660; max 10800; uniform; calculated
  Leaching solution. input for next Process: Filtrate precipitation, average

## Inputs
- Electricity: 8.964; calculated
  Based on in situ leaching coppe
- Ammonium sulfate: 51.065; min 11.12; max 91.01; uniform; calculated
  Ammonium sulfate. average
- Geometry: 3.78; calculated
  Values are based on geometry of injection holes
- transport in t*km,transport in t*km: 78.475; min 18.26; max 138.69; uniform; software or database
  320 km, average

## Outputs
- Drilling sludge: 285.1; software or database
  Drilling sludge. sludge is deposited, dissolved solids analog ore composition and drilling mud integrated in GaBi.
- ammonium: 64.91; min 12.85; max 116.97; uniform; calculated
  includes also NH4HCO3 excess from filtrate precipitation, average
- sulfate: 171.82; min 33.37; max 310.27; uniform; calculated
  includes also NH4HCO3 excess from filtrate precipitation,average

## Deviations from the LCI method approaches
In this study, an allocation method based on the mass of produced REEs combined with their market prices (based on an international metals market analysis and pricing index company ) are considered, as usual for metals with strongly different prices. As the ores have different compositions, the allocation factor has to be assessed individually for each site.

## Use advice
在使用有关此稀土HCl浸出工艺的数据集进行环境影响评估时，重要的是要应用基于REE产量质量和市场价格的分配方法。必须充分注意每个地点矿石的独特组成，需要对分配因子进行单独评估。此数据集应与生命周期分析方法一致使用，以准确比较不同来源的镝生产的环境影响。

## Review details
清单： 内部审查通过几个迭代步骤完成，涉及原始数据验证、原始数据记录、代表性、完整性、与 ISO 14040 和 14044 有关的建模的一致性。

## Data sources
- Zapp, P., Marx, J., Schreiber, A., Friedrich, B. & Voßenkaul, D. Comparison of dysprosium production from different resources by life cycle assessment. Resources, Conservation and Recycling 130, 248–259 (2018).
