# 饮用水生产;反渗透，螺旋缠绕

Dataset: ILCD process, Unit process, single operation
Geography: US
Reference year: 2022
Classification: Unit processes / Materials production / Water
Functional unit: 1 t drinking water
Generated by: 陆嘉麒, wilsherelu@foxmail.com
Owner: 天工LCI数据工作小组
Review: Dependent internal review by 天工LCI数据工作小组
Amounts: no units in this file; such an amount is in the reference unit of its flow, which a separate flow dataset defines
copyright: false
licenseType: Free of charge for all users and uses

## General comment
该数据集描述的饮用水生产过程采用反渗透技术，特别是采用螺旋缠绕配置。产生的高品质水水质适于饮用，可用于需要高纯度饮用水的住宅、商业和工业场所。

## Reference product
- drinking water: 1000; measured
  饮用水

## Inputs
- Reverse Osmosis Component: 9.61e-5; measured
  RO组件
- Electricity: 28.944; measured
  过程电耗
- freshwater: 1310; measured
  原水

## Use advice
在使用该数据集进行生命周期评估时，用户应确保评估系统的边界包括特定于反渗透过程的能源和物料输入。还必须考虑反渗透膜的终生处理以及与其处置相关的环境影响。建议考虑可能属于整个生产过程一部分的任何水预处理或后处理阶段。

## Review details
清单： 内部审查通过几个迭代步骤完成，涉及原始数据验证、原始数据记录、代表性、完整性、与 ISO 14040 和 14044 有关的建模的一致性。

## Data sources
- DuPont. Product Data Sheet
