# 土壤原位修复;土壤生物通风;注气井

Dataset: ILCD process, Unit process, single operation
Geography: CA
Reference year: 2007
Classification: Unit processes / Other Services / Repair and maintenance
Generated by: 王宁, wang_ning@caep.org.cn
Owner: 天工LCI数据工作小组
Review: Dependent internal review by 天工LCI数据工作小组
Amounts: no units in this file; such an amount is in the reference unit of its flow, which a separate flow dataset defines
copyright: false
licenseType: Free of charge for all users and uses

## General comment
使用聚氯乙烯、膨润土、石英砂、碎石、柴油等建造注入井

## Geography
The contaminated area was located 600 m from a river shore in the northern part of the prov-ince of Quebec， Canada.

## Technology and included processes
使用聚氯乙烯、膨润土、混凝土、石英砂、碎石、柴油等建造注入井

## Technical purpose
此工艺用于原位土壤修复的注气井建设，特别是土壤生物通风。建造注气井时使用了包括聚氯乙烯（PVC）、膨润土、石英砂、碎石和柴油在内的材料。这些注气井在环境工程中用于通过注入空气或其它化合物来激活污染物的生物降解，从而治疗受污染的土壤。

## Reference product
- injection well: 1; estimated
  建造好的通风井

## Inputs
All rows: estimated
- Diesel: 0.38
  使用柴油建造通风井
- cement, unspecified: 12.6
  使用混凝土建造通风井
- bentonite: 612
  使用膨润土建造通风井
- sand: 218
  使用石英砂建造通风井
- gravel: 62.5
  使用碎石建造通风井
- Polyvinyl chloride: 199
  使用聚氯乙烯建造通风井

## Use advice
用户应确保在将此数据集应用于土壤修复项目的生命周期评估时保持方法论的严谨性。重要的是要考虑地理特征（加拿大魁北克省北部）并在其他地方应用时调整数据以适应当地条件。在分析中必须考虑构建注气井所涉及的所有材料（PVC、膨润土、石英砂、碎石、柴油）。此外，应区分并分别评估注气井的建设和运行阶段的环境影响。

## Review details
清单： 内部审查通过几个迭代步骤完成，涉及原始数据验证、原始数据记录、代表性、完整性、与 ISO 14040 和 14044 有关的建模的一致性。

## Data sources
- Cadotte, M., Deschênes, L. & Samson, R. Selection of a remediation scenario for a diesel-contaminated site using LCA. Int J Life Cycle Assess 12, 239–251 (2007).
