# Antimonyconcentrate|Crudelead-antimonyalloy|Volatileblowingfurnaceblowing-Reflectionfurnacerefining|All sizes / /|精锑|粗铅锑合金|挥吹炉吹炼-反射炉精炼|所有规模

Dataset: ILCD process, Partly terminated system
Geography: CN
Reference year: 2019
Classification: Materials production / Other mineralic materials
Generated by: The data was created by the Office of the Second National Pollution Source Census of the Ministry of Ecology and Environment, and the data was organized by the TianGong Plan team for ILCD format / 生态环境部第二次全国污染源普查工作办公室创建数据，天工计划团队常慧敏整理数据为ILCD格式
Amounts: no units in this file; such an amount is in the reference unit of its flow, which a separate flow dataset defines
copyright: false

## Technology and included processes
the Technical of end-of-pipe management technology for pollution arsenicisElectrostatic precipitation，Its Technical efficiency of end-of-pipe management98
污染物指标砷的末端治理技术是静电除尘，其效率为98，末端治理设施实际运行率（k值）计算公式为k=废气治理设施年运行时间（小时）/企业年正常生产时间（小时）

## Reference product
- antimony: 1000; calculated
  原文件中描述污染物类别为Product，污染物指标为精锑，此处对其进行了匹配工作，将其匹配到LCAflow库里面相最符合的流，污染物指标备注为工业废水量

## Outputs
All rows: calculated
- Waste water: 3960
  原文件中描述污染物类别为废水，污染物指标为工业废水量，此处对其进行了匹配工作，将其匹配到LCAflow库里面相最符合的流，污染物指标备注为工业废水量
- chemical oxygen demand: 0.047358, 0.023679, 0.039465, 0.0142074 (4 entries)
  原文件中描述污染物类别为废水，污染物指标为化学需氧量，此处对其进行了匹配工作，将其匹配到LCAflow库里面相最符合的流，污染物指标备注为化学需氧量
- Ammonia Nitrogen: 0.002745, 0.00244, 0.0025925, 0.001525 (4 entries)
  原文件中描述污染物类别为废水，污染物指标为氨氮，此处对其进行了匹配工作，将其匹配到LCAflow库里面相最符合的流，污染物指标备注为氨氮
- Nitrogen, organic bound: 0.006732, 0.005984, 0.006358, 0.00374 (4 entries)
  原文件中描述污染物类别为废水，污染物指标为总氮，此处对其进行了匹配工作，将其匹配到LCAflow库里面相最符合的流，污染物指标备注为总氮
- Mercury: 2.79e-8, 2.232e-8, 1.86e-8, 7.44e-9 (4 entries)
  原文件中描述污染物类别为废水，污染物指标为汞，此处对其进行了匹配工作，将其匹配到LCAflow库里面相最符合的流，污染物指标备注为汞
- cadmium: 1.485e-5, 1.188e-5, 9.9e-6, 3.96e-6 (4 entries)
  原文件中描述污染物类别为废水，污染物指标为镉，此处对其进行了匹配工作，将其匹配到LCAflow库里面相最符合的流，污染物指标备注为镉
- lead: 6e-5, 4.8e-5, 4e-5, 1.6e-5 (4 entries)
  原文件中描述污染物类别为废水，污染物指标为铅，此处对其进行了匹配工作，将其匹配到LCAflow库里面相最符合的流，污染物指标备注为铅
- arsenic: 8.85e-5, 7.08e-5, 5.9e-5, 2.36e-5 (4 entries)
  原文件中描述污染物类别为废水，污染物指标为砷，此处对其进行了匹配工作，将其匹配到LCAflow库里面相最符合的流，污染物指标备注为砷
- Exhaust gas: 48385
  原文件中描述污染物类别为废气，污染物指标为工业废气量，此处对其进行了匹配工作，将其匹配到LCAflow库里面相最符合的流，污染物指标备注为工业废气量
- Nitrogen oxides: 1.26
  原文件中描述污染物类别为废气，污染物指标为氮氧化物，此处对其进行了匹配工作，将其匹配到LCAflow库里面相最符合的流，污染物指标备注为氮氧化物
- sulfur dioxide: 1.806, 1.0836, 0.5418 (3 entries)
  原文件中描述污染物类别为废气，污染物指标为二氧化硫，此处对其进行了匹配工作，将其匹配到LCAflow库里面相最符合的流，污染物指标备注为二氧化硫
- particles (PM2.5 - PM10): 0.6096, 30.48, 1.2192 (3 entries)
  原文件中描述污染物类别为废气，污染物指标为颗粒物，此处对其进行了匹配工作，将其匹配到LCAflow库里面相最符合的流，污染物指标备注为颗粒物
- mercury: 0.00011, 0.0055, 0.00022 (3 entries)
  原文件中描述污染物类别为废气，污染物指标为汞，此处对其进行了匹配工作，将其匹配到LCAflow库里面相最符合的流，污染物指标备注为汞
- cadmium: 2.7e-6, 0.000135, 5.4e-6 (3 entries)
  原文件中描述污染物类别为废气，污染物指标为镉，此处对其进行了匹配工作，将其匹配到LCAflow库里面相最符合的流，污染物指标备注为镉
- lead: 6.1e-6, 0.000305, 1.22e-5 (3 entries)
  原文件中描述污染物类别为废气，污染物指标为铅，此处对其进行了匹配工作，将其匹配到LCAflow库里面相最符合的流，污染物指标备注为铅
- arsenic: 0.00079, 0.0395, 0.00158 (3 entries)
  原文件中描述污染物类别为废气，污染物指标为砷，此处对其进行了匹配工作，将其匹配到LCAflow库里面相最符合的流，污染物指标备注为砷

## Data sources
- 第二次全国污染源普查产排污核算系数手册（试用版）,四级代码3215文件，在完整版文件中第5020页
