# 生物基甲醇生产; 甲醇 ; 秸秆气化; 秸秆

Dataset: ILCD process, Unit process, single operation
Geography: JS-CN
Classification: Energy carriers and technologies / Renewable fuels
Functional unit: The functional unit for the evaluation of the life cycle is 1000 kg of biomethanol.
LCI method principle: Attributional
LCI method approaches: Allocation - market value
Generated by: 唐子睿, tangzirui123@gmail.com
Owner: 天工LCI数据工作小组
Review: Dependent internal review by 天工LCI数据工作小组
Amounts: no units in this file; such an amount is in the reference unit of its flow, which a separate flow dataset defines
copyright: false
licenseType: Free of charge for all users and uses

## General comment
所提出的互连流化床气化技术类似于循环流化床，在旋风分离器之后具有额外的鼓泡流化床。 循环流化床设计用于燃烧空气； 生物质气化鼓泡流化床通入蒸汽。 避免气化和燃烧过程之间的直接接触； 气化所需的热量是通过床层颗粒（如沙子、催化剂）的循环来实现的。 一部分生物质在鼓泡流化床中迅速热解并与蒸汽一起气化，产生合成气，包括H2、CO等。

## Geography
本文研究的生物质是来自中国江苏省的秸秆。

## Technology and included processes
整个系统可以看作是三个子系统的组合，即气化子系统，将生物质转化为粗合成气； 净化子系统，去除粗合成气中所含的杂质； 以及合成系统，将生物质合成气转化为液态甲醇。

## Technical purpose
此数据集代表基于秸秆作为原料，通过生物基甲醇生产的工业过程。这里采用的互连流化床技术类似于循环流化床，并在旋风分离器后增加了鼓泡流化床。所产生的液态甲醇意在作为可再生能源或化工中间体在各种工业应用中使用。它可以作为化石燃料的替代品或用于合成其他化学品。

## Reference product
- Methanol: 1; article inperiodical

## Inputs
- Straw: 3.25; article inperiodical
  In this case, energy are provided by combustion of flue gas, hot/cold process fluid

## Outputs
All rows: article inperiodical
- carbon dioxide (fossil): 1.83
- carbon monoxide: 0.00112
- methane: 0.000234
- nitrous oxide: 0.000928
- sulfur dioxide: 0.000524
- particles (PM10): 0.00093

## Deviations from the LCI method approaches
分配给稻草的环境影响系数计算公式为： 式中，Krs 为分配给稻草的环境影响系数； MFrs为稻草产量与稻粒产量之比，取0.9； Prs为稻草价格，为250元/吨； Prg为稻谷价格，为1540元/吨。

## Data selection and combination
在此步骤中获得并定义生命周期的数据收集和假设。 生产上下游过程中化肥农药需求量、运输能源消耗量、污染物排放量等数据来源于文献和中国国家统计数据。

## Data treatment and extrapolations
对于生产过程，稻草消耗量和排放量的盘查数据均来自上述生物甲醇生产系统的Aspen Plus模拟。

## Use advice
在使用这个数据集进行生命周期评价（LCA）时，用户应计算专门分配给稻草的环境影响系数。考虑特定技术参数，如秸秆与稻谷产量的比例，以及江苏省区域经济因素，如秸秆和稻谷价格是很重要的。数据必须与过程中的净化和合成子系统集成，以进行完整评估。生命周期评价的功能单位应与指定的1000千克生物基甲醇单位一致。确保所引用的上下游过程，包括排放数据的来源与LCA的目标和范围相符。在没有适当调整的情况下避免直接外推到不同的地理或技术背景。

## Review details
清单： 内部审查通过几个迭代步骤完成，涉及原始数据验证、原始数据记录、代表性、完整性、与 ISO 14040 和 14044 有关的建模的一致性。

## Data sources
- Xiao, J., Shen, L., Zhang, Y. & Gu, J. Integrated Analysis of Energy, Economic, and Environmental Performance of Biomethanol from Rice Straw in China. Ind. Eng. Chem. Res. 48, 9999–10007 (2009).
