# 变电站的建设和运营;电压等级110/10kV，规划容量3×50MVA变电站;全户内布置方式

Dataset: ILCD process, Partly terminated system
Geography: NJ-JS-CN
Reference year: 2021
Valid until: 2071
Classification: Energy carriers and technologies / Electricity
LCI method principle: Other
Generated by: 王宇轩, wyx135230@163.com
Owner: 天工LCI数据工作小组
Review: Dependent internal review by 天工LCI数据工作小组
Amounts: no units in this file; such an amount is in the reference unit of its flow, which a separate flow dataset defines
copyright: false
licenseType: Free of charge for all users and uses

## General comment
该文献采用生命周期计算碳足迹的方法，明确了该110kV变电站方案生命周期筹建阶段，建设阶段，运行阶段和报废阶段四个阶段的碳排放源，确定了碳排放因子和工程数据，计算出了各个阶段的碳足迹。

## Geography
作者未在文献中明确说明，选择作者所在的电力公司的地理位置

## Time period
文献中未明确说明数据集的起始时间，采用文献发表的时间为有效期始。该项目寿命按50年记，因此以50年作为有效时间段

## Technology and included processes
建设阶段：本期建设 2×50 MVA变压器。 110 kV 出线本期 4 回 ( 其中两回备用 )，远景4回； 本期采用单母线分段接线，远景接线型式不变 ；采用无氟环保型 G I S。10 k V出线本期 24 回，采用单母线三分段接线 ；远景36回，采用单母线四分段接线 ；采用中置柜，配真空断路器。本期两台主变各配置 1 组 4 Mvar 并联电容器和 1 组 6 Mvar 并联 电抗器。设钢结构配电楼 1 座，配电楼局部地下一层、局部两层。根据规划要求，围墙不设置实体围墙，采用绿植隔离，场地敷设草坪。运行阶段：均采用的是环保型新产品，站内无含 SF6 的电气设备，采用绿植隔离，场地敷设草坪。

## Technical purpose
此110/10kV 3×50MVA变电站旨在支持城市发展或工业区的中高压电力传输和分配。它用于将高压电力输送级别转换为适合分配和终端使用的电压级别。全户内布置指的是所有设备都位于建筑物内部，从而得到环境的额外保护。该变电站还配备了不使用SF6的环保型GIS (气体绝缘开关设备)系统，非常适合环境法规严格的地区使用。

## Reference product
- Transformer Substation: 1; measured
  全户内布置方式，电压等级110/10kV，规划容量3×50MVA变电站

## Inputs
All rows: measured
- pre-cast concrete: 28.175
- Cast-In-Place Concrete: 1146
- Steel sections: 5000
- Transformer: 4.60225e6
  原数据为机电设备，包括变压器，开关柜，GIS等，da.tiangong.world中查不到该信息。本期建设主要为2×50MVA变压器，因此选择变压器为输入流
- Hardware: 2.12687e6
  金属结构
- Electricity: 284400
  建设阶段电的输入流
- Diesel: 800
- Electricity: 57600
  运行阶段一年的用电量

## Outputs
- carbon dioxide: 0; calculated
  筹建阶段碳足迹：变电站筹建阶段的碳足迹主要来源于场地清理，由于本工程项目位于市中心，建设场地上无任何障碍物需移除或迁建，因此该项目可不计筹建阶段的碳足迹。
- carbon dioxide: 4.32874e6; calculated
  建设阶段碳足迹
- carbon dioxide: 544965; calculated
  运行阶段碳足迹，该项目按50年寿命记，变电站消耗电力碳足迹633.680tCO2，忽略树木、草坪生长期，绿植降碳量为88.715tCO2
- carbon dioxide: 432874; calculated
  报废阶段碳足迹，工程项目报废阶段的碳足 迹按其建设阶段碳足迹的 10% 作简化处理

## Data selection and combination
碳足迹因子的取值按照中国区域电网基准线排放因子、中国电网企业温室气体排放核算方法与报告指 南 ( 试行 ) 和其他有关研究成果取值。相关I/O flow的量通过咨询相关施工单位，结合运检单位历史数据取得

## Use advice
本生命周期评估数据集的使用者应确保将其专门应用于室内中高压变电站的建设和运营，尤其是采用了非SF6 GIS等环保技术的变电站。使用这些数据进行外推时，应确保妥善考虑区域特定性，例如当地的碳排放因素和技术适用性。在建设阶段模型中，应体现变压器的规划数量、母线配置、开关设备类型以及并联电容器和电抗器的引入。应核实服务寿命是否与此数据集中使用的50年有效期相符。在运行阶段评估中，应考虑环保产品的使用、SF6设备的缺失以及运行输入/输出。用户必须在其生命周期评估研究中获取更为最新和特定地点的排放因素。

## Review details
清单： 内部审查通过几个迭代步骤完成，涉及原始数据验证、原始数据记录、代表性、完整性、与 ISO 14040 和 14044 有关的建模的一致性。

## Data sources
- 唐忠达. 110kV变电站生命周期碳排放分析. 电工电气 35–38 (2021).
