# 南美白对虾养殖|南美白对虾成虾|工厂化养殖

Dataset: ILCD process, Unit process, black box
Geography: RZ-SD-CN
Classification: Materials production / Other mineralic materials
Generated by: Kangni Wu, wukangni@xmu.stu.edu.cn
Review: Dependent internal review by Tiangong LCI Data Working Group
Amounts: no units in this file; such an amount is in the reference unit of its flow, which a separate flow dataset defines

## General comment
本文研究范围包括从养殖场基础设施建设、虾苗运输、成虾养殖、成虾运往市场、基础设施废弃处置五个阶段。其中饲料生产为成虾养殖阶段是一个环节，是利用鱼粉、大豆、花生、鱼油、面粉、矿物质与粘合剂等生产的配合饲料

## Geography
山东省日照市涛雒镇

## Reference product
- Litopenaeus vannamei: 1000; article inperiodical

## Inputs
All rows: article inperiodical
- Cement: 42.354
- iron: 53
  属于基础设施建设阶段,使用年限20年，该数据为折合一个养殖周期的投入数据
- polyethylene low density foil(PE-LD): 14.6
  属于基础设施建设阶段,使用年限15年，该数据为折合一个养殖周期的投入数据
- transport in t*km: 207.064
  虾苗运输，方式：空运。原文数据为质量*距离=（0.09412t*2200km）
- water: 8.47059e6
  属于成虾养殖阶段
- Electricity: 60504.2
  属于成虾养殖阶段
- Diesel: 9.76
  属于成虾养殖阶段
- fish meal: 411.765
- Soybean: 288.236
- Peanut: 222.353
- Fish Oil: 24.7059
- Flour: 378.824
- Mineral: 49.4118
- Adhesives: 5.7647
- Hydrogen peroxide: 141.18
- Fertilizer paste for aquaculture: 117.65
- Multivitamins: 0.94
- Immunopolysaccharide: 2.35

## Outputs
All rows: article inperiodical
- waste water - untreated: 8.47059e6
- phosphate: 0.091788
- Ammonia (NH4+, NH3, as N): 0.17099
- nitrite: 0.05497
- Chemical Oxygen Demand (COD): 13.2178

## Sampling procedure
时间： 2019 年 6 月份、11 月份。地点：在山东省日照市涛雒镇固定观察点调研，养殖产业的投入产出数据绝大部分来源于对养殖厂以及饲料加工厂负责人的问卷调查，水质监测数据则取自于当地海洋与渔业研究所的固定监测点，成虾运输至市场数据取自于日照市水产品批发市场以及养殖场负责人的调研

## Review details
Inventory: The internal review was done by several iteration steps concerning raw data validation, raw data documentation, representativity, completeness and consistency of modelling with regard to ISO 14040 and 14044.; Documentation: The review of the documentation was performed by Ecobilan and is in compliance with ISO 14040 and 14044. The data set documentation is correct in view of the appropriateness of the information provided. It includes all relevant information in view of data quality and scope of application of the respective LCI result.
