# 稀土铣削;稀土;熔盐电解;钕铁硼磁铁废料

Dataset: ILCD process, Unit process, single operation
Geography: CN
Reference year: 2013
Valid until: 2016
Classification: Materials production / Metals and semimetals
Functional unit: The functional unit of this analysis was chosen as the production of one kg Nd–Pr alloy through extraction from NdFeB magnet scrap
LCI method principle: Attributional
LCI method approaches: Allocation - market value
Generated by: 汪涛, twang@iue.ac.cn
Owner: 天工LCI数据工作小组
Review: Dependent internal review by 天工LCI数据工作小组
Amounts: no units in this file; such an amount is in the reference unit of its flow, which a separate flow dataset defines
copyright: false
licenseType: Free of charge for all users and uses

## General comment
该一步回收工艺旨在从NdFeB磁铁废料中回收稀土金属。它适用于回收行业，特别是专门从事稀土金属回收的公司。提取的Nd-Pr合金用于生产新的NdFeB磁铁，这种磁铁广泛用于电机、发电机等需要强力永磁体的各种应用。

## Technology and included processes
代尔夫特理工大学正在实验室规模上开发一种从废磁铁中提取稀土金属的一步回收工艺。实验中使用未磁化、未涂层的磁体样品。将磁体在惰性气氛下球磨以增加表面积以促进电化学反应，并将粉末插入盐浴中。

## Reference product
- magnet: 1; article inperiodical
  magnet. Pre-treatment steps: Only process variant without milling

## Inputs
- Electricity: 0.1206; min 0.0252; max 0.216; uniform; article inperiodical
  Pre-treatment steps: Ball milling
- argon: 0.4; min 0.2; max 0.6; uniform; article inperiodical
  Pre-treatment steps

## Outputs
- magnet powder, ca 200 micron: 0.95; min 0.9; max 1; uniform; article inperiodical
  magnet powder, ca 200 micron. Pre-treatment steps: Only process variant with milling

## Deviations from the LCI method approaches
The allocation of environmental flows to Nd and Pr was updated. Value allocation was used to share the process impacts from both multi-output stages, reflecting prices from recent years (2013–2016). There are two stages in the primary production of rare earths for which assumptions regarding coproductions are necessary: the beneficiation stage, where concentrated iron ore and rare earth concentrate are separated, and the solvent extraction stage undertaken to separate individual rare earths.

## Use advice
在使用该LCA数据时，用户应注意回收工艺开发的实验室规模上下文。Nd和Pr之间的环境影响分配应反映2013–2016年间市场价格的价值分配。需要考虑来自原生产阶段的共产品，例如在矿石和稀土精矿分离的选矿阶段以及分离单个稀土的溶剂提取过程中。用户应确保他们的模型在估算来自磁铁废料的Nd-Pr合金生产的环境影响时，能够考虑到这些阶段。

## Review details
清单： 内部审查通过几个迭代步骤完成，涉及原始数据验证、原始数据记录、代表性、完整性、与 ISO 14040 和 14044 有关的建模的一致性。

## Data sources
- Schulze, R., Abbasalizadeh, A., Bulach, W., Schebek, L. & Buchert, M. An Ex-ante LCA Study of Rare Earth Extraction from NdFeB Magnet Scrap Using Molten Salt Electrolysis. J. Sustain. Metall. 4, 493–505 (2018).
