# 市政污泥处理与处置;湿污泥 含水率76.2%;填埋

Dataset: ILCD process, Unit process, single operation
Geography: XA-SAX-CN
Classification: Unit processes / End-of-life treatment / Wastewater treatment
Functional unit: The residual sludge sludge of Xi'an No. 3 Sewage Treatment Plant has a moisture content of 76.2% and a functional unit of 1t residual sludge.
Generated by: 金思甜, 2331276@tongji.edu.cn
Owner: 天工LCI数据工作小组
Review: Dependent internal review by 天工LCI数据工作小组
Amounts: no units in this file; such an amount is in the reference unit of its flow, which a separate flow dataset defines
copyright: ['opt4ROkqig']
licenseType: Free of charge for all users and uses

## General comment
烟尘、固体废物和渗滤液的估算基于文献和经验，COD、BOD、氨氮、SS 的环境排放依据《生活垃圾填埋场污染控制标准》水污染物排放浓度限值计算。

## Geography
西安市第三污水处理厂

## Technology and included processes
需要先对污泥进行干燥脱水处理，使用热泵除湿干燥机，假定含水率从76.2%下降到60%。

## Technical purpose
西安市第三污水处理厂的剩余污泥适用于填埋处理。含水率为76.2%的处理废物产品可以在市政固体废物管理中使用，通过控制污染物和减少体积来创造经过处理的填埋材料。

## Reference product
- Sludge: 1000; input; estimated
  1t含水率76.2%的剩余污泥

## Inputs
- Electricity: 6.426; calculated
- Diesel: 0.000238; calculated

## Outputs
All rows: calculated
- carbon dioxide (biogenic): 55.033
  原文未区分biogenic和fossil，根据专家判断此处为biogenic。
- methane (biogenic),methane (biogenic): 24.459
  原文未区分biogenic和fossil，根据专家判断此处为biogenic。
- carbon monoxide (biogenic): 0.0007783
  原文未区分biogenic和fossil，根据专家判断此处为biogenic。
- hydrogen chloride: 0.004047
- hydrogen fluoride: 0.0008094
- hydrogen sulfide: 0.01245
- ammonia: 0.04726
- hydrocarbons (unspecified): 0.1245
- cadmium: 0.0001221
- chromium: 0.004736
- lead: 0.003927
- mercury: 4.189e-5
- zinc: 0.02311
- copper: 0.00545
- nickel: 0.001159
- chemical oxygen demand: 0.00595
- ammonia: 0.00149
  氨氮
- Suspended solids, unspecified,Suspended solids, unspecified,Suspended solids, unspecified: 0.00179
- Non Hazardous non organic waste for disposal (unspecific sludges and dusts): 0.399
  烟尘
- Waste (solid): 595
- biological oxygen demand: 0.00179

## Use advice
使用与含水率76.2%的西安市第三污水处理厂剩余污泥相关的数据时，用户应考虑涉及的具体处理过程以及这些过程可能如何影响当地环境和填埋场运营。数据的功能单位为1吨剩余污泥，必须与预期应用相关联，以确保准确的生命周期评估结果。应注意含水率如何影响总体影响，尤其是在填埋场环境中的甲烷生成情况。

## Review details
清单： 内部审查通过几个迭代步骤完成，涉及原始数据验证、原始数据记录、代表性、完整性、与 ISO 14040 和 14044 有关的建模的一致性。

## Data sources
- 齐星昊. 基于生命周期评价的典型剩余污泥处理方法的环境影响比较研究[D].河南师范大学,2020.
