# 底泥修复;原位覆盖;生物炭;运输

Dataset: ILCD process, Unit process, black box
Geography: NO
Reference year: 2011
Classification: Other Services / Repair and maintenance
Generated by: 桑春晖, sangch@mail.bnu.edu.cn
Owner: 天工LCI数据工作小组
Review: Dependent internal review by 天工LCI数据工作小组
Amounts: no units in this file; such an amount is in the reference unit of its flow, which a separate flow dataset defines
copyright: false
licenseType: Free of charge for all users and uses

## General comment
所用生物炭来自中国的无烟煤化石产品，运输距离20000km。

## Geography
经查询，暂未找到国内有相关研究文献

## Time period
文献中没有明确数据收集的开始时间，以文献发表时间为有效期的开始时间

## Technology and included processes
运输距离20000km。

## Technical purpose
提供的生命周期评估（LCA）数据旨在模拟通过原位覆盖方法使用来自中国化石无烟煤生产的活性炭（AC）对沉积物修复的环境影响。该数据适用于专注于通过评估跨长距离（20000公里）运输和部署覆盖材料作为修复过程的一部分的水体生态复兴的研究。

## Reference product
- Activated Carbon: 4.76e7; calculated

## Inputs
- Road Transport: 9.52e8; calculated

## Data selection and combination
Process inventory data是根据ISO 14040关于LCA.35的规定获得的。基本数据来自特定场地的盆栽实验、中试和供应商处获取，这些数据代表了中国南方的情况。二级数据来自Ecoinvent数据库v2.3，从中选择了地理来源和技术因素最相似的过程。

## Use advice
在使用这份LCA数据时，需注意数据的区域特定性，因为它代表了中国南方的情况。鉴于缺乏本地研究文献，用户在将数据外推到其他区域时必须仔细考虑技术适用性和地理相关性。数据的假定有效期是根据来源的发表时间确定的。运输距离应确认为20000公里，且任何变化都必须相应调整。建议根据最接近的地理和技术相似性，从Ecoinvent数据库2.3版本中选择次级数据。过程作为黑箱单元过程处理，基础数据从特定场地的盆栽实验、中试和供应商处获取。

## Review details
清单： 内部审查通过几个迭代步骤完成，涉及原始数据验证、原始数据记录、代表性、完整性、与 ISO 14040 和 14044 有关的建模的一致性。

## Data sources
- Sparrevik et al. Use of Life Cycle Assessments To Evaluate the Environmental Footprint of Contaminated Sediment Remediation. Environ. Sci. Technol. 2011, 45, 10, 4235–4241
