# 土壤原位修复;土壤生物通风;处理设施

Dataset: ILCD process, Unit process, single operation
Geography: CA
Reference year: 2007
Classification: Unit processes / Other Services / Repair and maintenance
Generated by: 王宁, wang_ning@caep.org.cn
Owner: 天工LCI数据工作小组
Review: Dependent internal review by 天工LCI数据工作小组
Amounts: no units in this file; such an amount is in the reference unit of its flow, which a separate flow dataset defines
copyright: false
licenseType: Free of charge for all users and uses

## General comment
使用乳胶、玻璃、高密度聚乙烯、生物滤池建设地表土壤气处理设施

## Geography
The contaminated area was located 600 m from a river shore in the northern part of the prov-ince of Quebec， Canada.

## Technology and included processes
使用高密度聚乙烯、乳胶、玻璃、生物滤床等建造地表处理设施

## Technical purpose
所述工业过程涉及环境工程应用。它特别用于通过生物通风进行土壤原位修复，旨在处理受污染的土壤而不需要挖掘和运输。使用高密度聚乙烯（HDPE）、乳胶、玻璃和生物滤池建设必需的气体处理设施来支撑生物通风过程。这套装置特别适用于恢复生态平衡和防止污染扩散。它适合处理靠近敏感区域（如河岸）的土壤污染。

## Reference product
- Treatment facilities: 1; input; estimated
  建造好的地表土壤气处理设施

## Inputs
- polyethylene high density granulate (PE-HD): 19; estimated
  使用高密度聚乙烯建造地表土壤气处理设施
- Biofilter: 1015; estimated
  使用生物滤池建造地表土壤气处理设施
- Latex: 1.4; estimated
  使用乳胶建造地表土壤气处理设施
- glass wool: 108; estimated
  使用玻璃建造地表土壤气处理设施

## Use advice
使用此数据集时，用户必须考虑特定现场条件，包括与水体的接近性、土壤组成以及所处理的污染物类型。数据集的相关性在地理和上下文上具体适用于加拿大魁北克省描述的位置，因此可能不会直接适用于环境条件不同的不同区域。数据用户还应将构建的处理设施的使用寿命和维护以及随技术进步可能需要的适应或升级考虑在内。

## Review details
清单： 内部审查通过几个迭代步骤完成，涉及原始数据验证、原始数据记录、代表性、完整性、与 ISO 14040 和 14044 有关的建模的一致性。

## Data sources
- Cadotte, M., Deschênes, L. & Samson, R. Selection of a remediation scenario for a diesel-contaminated site using LCA. Int J Life Cycle Assess 12, 239–251 (2007).
