# 农药制造 ; IDA法-二乙醇胺氧化还原法双甘膦工艺+草甘膦合成

Dataset: ILCD process, Unit process, black box
Geography: CN
Reference year: 2021
Classification: Materials production / Organic chemicals
Functional unit: producing 1 ton glyphosate
Generated by: 玲俐, calinly@163.com
Owner: 天工LCI数据工作小组
Review: Dependent internal review by 天工LCI数据工作小组
Amounts: no units in this file; such an amount is in the reference unit of its flow, which a separate flow dataset defines
copyright: false
licenseType: Free of charge for all users and uses

## General comment
无流程图

## Technical purpose
本数据集描述采用IDA法（亚氨基二乙酸法）结合二乙醇胺还原的双甘膦工艺生产草甘膦的过程。通过这一特定途径合成的草甘膦通常用作广谱系统性除草剂，广泛应用于农业和园艺。草甘膦的纯度和属性可以满足从家用园林到需要大规模除草的工业农业环境等不同市场细分的需求。

## Reference product
- glyphosate: 1000; software or database
  未在flow_list中找到产品glyphosate草甘膦

## Outputs
All rows: software or database
- Exhaust gas: 9830
  废气
- waste water - untreated: 8280
  工业废水
- chemical oxygen demand: 167
  化学需氧量
- Ammonia Nitrogen: 0.71
  氨氮
- nitrogen, total (excluding N2): 12.4
  总氮
- phosphorus, total: 52.2
  总磷
- volatile organic compound: 103
  挥发性有机物
- hazardous waste (unspecified): 36
  危险废物

## Use advice
使用这份生命周期评估数据的用户应当知晓，该数据集主要包含使用IDA过程结合二乙醇胺还原生产1吨草甘膦的污染物排放信息。重要的是要注意，该数据集不包括关于原材料投入、能源消耗、用水量或运输的数据，这对于完成全面的环境影响评估可能是重要的。因此，应另行获取信息以全面解决这些方面的问题。用户在将这些数据应用于LCA模型时，应考虑这些因素，确保对这些缺失数据点进行的任何外推或建模假设都是合理的，并且有据可查。

## Review details
清单： 内部审查通过几个迭代步骤完成，涉及原始数据验证、原始数据记录、代表性、完整性、与 ISO 14040 和 14044 有关的建模的一致性。

## Data sources
- 生态环境部. 263农药制造行业系数手册.pdf. (2021).
