# 生物基氨生产; 氨; 电解; 氮气、氢气

Dataset: ILCD process, Unit process, black box
Geography: CN
Classification: Energy carriers and technologies / Other non-renewable fuels
Functional unit: In this study, the functional unit is defined as 1 kg of H2 carrier produced from coal, natural gas, and renewables.
LCI method principle: Attributional
Generated by: 唐子睿, tangzirui123@gmail.com
Owner: 天工LCI数据工作小组
Review: Dependent internal review by 天工LCI数据工作小组
Amounts: no units in this file; such an amount is in the reference unit of its flow, which a separate flow dataset defines
copyright: false
licenseType: Free of charge for all users and uses

## General comment
基于电解的氨制造技术结合了水电解制氢和哈伯-博世氨合成工艺。

## Geography
研究假设甲醇和合成氨生产厂均位于中国西北部，那里煤炭、天然气和太阳能资源丰富。

## Technology and included processes
在这项工作中，我们选择太阳能光伏（PV）作为分解水产生H2和O2的能源。 太阳能光伏发电可以直接将太阳辐射能转化为电能，因其自身的优势逐渐被视为化石燃料的潜在替代品。

## Technical purpose
通过电解基路线生产的生物基氨旨在用作氢载体，并可用于包括肥料、制冷和工业原料在内的各种应用。该过程结合了水电解制取氢气和哈伯-博世氨合成过程，提供了一种替代传统依赖化石燃料的方法。由于生产位于富含煤炭、天然气和太阳能资源的地区，它利用当地可再生能源（太阳能光伏）进行环保和可持续的生产过程。

## Reference product
- Ammonia: 1000; article inperiodical

## Inputs
All rows: article inperiodical
- electricity: 7200
- Hydrogen: 177
- nitrogen: 822.5
- Ferric oxide: 0.002
- sodium hydroxide: 0.002
- Potassium hydroxide: 0.002

## Data selection and combination
相关数据收集自 Bicer 的研究工作（Bicer et al., 2017）。

## Data treatment and extrapolations
对于基于太阳能光伏的氨生产路线，Bicer等人通过分析基于电解的氨生成过程得出结论，对于理想的Haber-Bosch工艺，将0.177千克氢气与0.823千克氮气结合可以生产1千克氨。

## Use advice
在使用 Bicer 等人（2017）的数据集进行生命周期评估时，确保方法论框架适合计算生物基氨生产的环境影响。考虑能源混合（煤炭、天然气和可再生能源）和地理条件（中国西北部）可能影响该过程环境概况的因素。根据哈伯-博世过程的理想气体比例（对于1千克NH₃，0.177千克H₂与0.823千克N₂）进行精准库存分析。比较的功能单位应为1千克H₂载体（氨），用户应考虑使用可再生太阳能光伏能源的潜在环境益处和与该地区其他能源来源相关的权衡。

## Review details
清单： 内部审查通过几个迭代步骤完成，涉及原始数据验证、原始数据记录、代表性、完整性、与 ISO 14040 和 14044 有关的建模的一致性。

## Data sources
- Zhu, R., Wang, Z., He, Y., Zhu, Y. & Cen, K. LCA comparison analysis for two types of H2 carriers: Methanol and ammonia. Int. J. Energy Res. 46, 11818–11833 (2022).
