# 光伏电池封装胶膜（EVA）的热处理;光伏电池封装胶膜;热处理

Dataset: ILCD process, Unit process, single operation
Geography: CN
Classification: Unit processes / Energy carriers and technologies / Heat and steam
Generated by: 王楠, 1209824595@qq.com
Owner: 天工LCI数据工作小组
Review: Dependent internal review by 天工LCI数据工作小组
Amounts: no units in this file; such an amount is in the reference unit of its flow, which a separate flow dataset defines
copyright: false
licenseType: Free of charge for all users and uses

## General comment
玻璃需要重熔，EVA(乙烯醋酸乙烯)需要热处理，铝需要重熔和化学处理，然后才能在模块组装过程中替代原始材料。同时，在多晶硅生产和多硅光伏电池中，硅和银在回收前都需要进行化学处理。

## Technical purpose
乙烯-醋酸乙烯共聚物(EVA)的热处理是制备用于多晶硅光伏(PV)模块组装中EVA的必要过程。经过预处理的EVA与再熔融的玻璃和化学处理的铝及硅一起，被用作替代原始材料制造这些模块。此外，在多晶硅光伏电池的回收过程中，预处理过的EVA对于材料和组件的有效回收至关重要。

## Reference product
- Ethylene-vinyl acetate copolymer,Ethylene-vinyl acetate copolymer,Ethylene-vinyl acetate copolymer: 15.4; input; min 10.1024; max 20.6976; uniform; software or database
  EVA

## Inputs
- nitrogen: 16.2; software or database
- Oxidant: 9.63; software or database
  氧化剂
- Electricity: 10.8; software or database
  单位kw

## Outputs
All rows: software or database
- Ethylene-vinyl acetate copolymer,Ethylene-vinyl acetate copolymer,Ethylene-vinyl acetate copolymer: 12.47
  EVA
- carbon dioxide: 2.71
- nitrogen dioxide: 18.26
- methane: 4.26
- ethene (ethylene): 2.59
- propene (propylene): 1.56

## Data selection and combination
多硅光伏组件的库存数据来源于多个来源:(1)Fu(2013)等文献，其中包含江苏省多家光伏企业的材料库存;Diao和Shi(2011)，其中包含北京两家光伏企业的材料库存;He(2013)，其中包含甘肃和四川四家光伏企业的材料库存。(2)四川(环评-四川，2008)、河南(环评-河南，2009)和重庆(环评-重庆，2008)多硅光伏生产企业环境影响评价报告(eia)。(3)《中国光伏发展市场前瞻与投资展望行业报告(2014)》和《中国多晶硅发展市场前瞻与投资展望行业报告(2014)》。当特定材料有不同的数据源时，应用平均值。

## Use advice
使用多晶硅光伏模块的生命周期评价(LCA)数据集时，如果存在差异，必须对多个数据源提供的值进行平均。考虑来自文献、环境影响评价报告和行业报告的数据。确保根据所考虑的产品生命周期的地理相关性选择适当的环境影响评估。请记住考虑各数据源之间的方法学差异，并应用一致的系统边界。

## Review details
清单： 内部审查通过几个迭代步骤完成，涉及原始数据验证、原始数据记录、代表性、完整性、与 ISO 14040 和 14044 有关的建模的一致性。

## Data sources
- Huang, B. et al. Environmental influence assessment of China’s multi-crystalline silicon (multi-Si) photovoltaic modules considering recycling process. Solar Energy 143, 132–141 (2017).
