# 电力生产 ; 火电 ; 福建

Dataset: ILCD process, Unit process, single operation
Geography: FJ-CN
Reference year: 2019
Classification: Unit processes / Energy carriers and technologies / Electricity
Generated by: 熊若熙, xiongrx0126@163.com
Owner: 天工LCI数据工作小组
Review: Dependent internal review by 天工LCI数据工作小组
Amounts: no units in this file; such an amount is in the reference unit of its flow, which a separate flow dataset defines
copyright: false
licenseType: Free of charge for all users and uses

## General comment
火电发电包括原煤、洗煤、石油、天然气等十七种化石燃料。该过程只考虑直接发电过程，不考虑上游原材料开采加工和下游消费

## Time period
根据2019年能源统计年鉴数据计算

## Technical purpose
本热电发电数据集适用于福建省内使用原煤、洗煤、石油和天然气等十七种化石燃料进行电力生产的设施。该数据仅包括直接发电过程，并不包括上游原材料的开采加工以及下游电力的消费。

## Reference product
- electricity for thermal power: 3.6; calculated

## Inputs
All rows: calculated
- Raw coal: 0.372466
- Gangue, in ground: 0.00515459
- Coke oven gas: 0.002253
- blast furnace gas: 0.105789
- Converter gas: 0.004805
- Diesel: 1.09e-5
- Petroleum Coke: 7.63e-5
- refinery gas: 1.272e-5
- natural gas: 0.000845

## Outputs
- carbon dioxide (fossil): 0.791614; calculated
- sulfur dioxide: 0.000137503; calculated
- Nitrogen oxides: 0.000211146; calculated
- particles (> PM10): 2.87541e-5; calculated

## Data treatment and extrapolations
核算方法参考《企业温室气体排放核算方法与报告指南 发电设施》。不同形式发电量及燃料用量来自于《中国能源统计年鉴 2020》中的第三章（能源生产） 和第六章（地区能源平衡表）。用于计算二氧化碳排放因子的低位发热量、单位热值含碳量等燃料参数来自于《2019 年度中国区域电网二氧化碳基准线排放因子 OM 计算说明》、《企业温室气体排放核算方法与报告指南 发电设施》

## Use advice
在使用这个数据集进行生命周期评估或其他分析目的时，确保您的分析范围与直接电力发电过程相符。排除与上游原材料开采加工及下游电力消费相关的考量。请参照《企业温室气体排放核算方法与报告指南-发电设施》，以保持方法论的一致性。使用《中国能源统计年鉴2020》第三章和第六章的详细燃料消费数据，结合《2019年度中国区域电网二氧化碳基准线排放因子OM计算说明》中的燃料参数，准确计算二氧化碳排放因子。

## Review details
清单： 内部审查通过几个迭代步骤完成，涉及原始数据验证、原始数据记录、代表性、完整性、与 ISO 14040 和 14044 有关的建模的一致性。

## Data sources
- 熊若熙. 中国电力生产和消费二氧化碳与污染物排放因子核算. (清华大学, 2023).
