# 区域勘探 ; 有利含油气区带 ; 物化探普查

Dataset: ILCD process, Unit process, single operation
Geography: SC-CN
Reference year: 2022
Classification: Unit processes / Energy carriers and technologies / Energetic raw materials
LCI method principle: Attributional
LCI method approaches: Consequential
Generated by: Shikang Kang, 908798159@qq.com
Owner: 天工LCI数据工作小组
Review: Dependent internal review by 天工LCI数据工作小组
Amounts: no units in this file; such an amount is in the reference unit of its flow, which a separate flow dataset defines
copyright: false
licenseType: Free of charge for all users and uses

## General comment
从盆地的石油地质调查开始到优选出有利含油气区带的全过程。这是一种从区域出发，最基础的、整体的油气勘探，具有综合性、区域性、整体性的特点，是多工种综合勘探的方式

## Geography
四川盆地

## Time period
文献发表时间

## Technology and included processes
从区域出发，整体地质调查

## Technical purpose
该数据集代表了区域勘探和识别有利含油气区带的过程，重点是综合地球物理和地球化学勘探普查。其实际应用通常限于石油和天然气行业，在这里它用于通知关于确定和评估潜在区域的决策，以供勘探钻探和随后开发气田，例如在四川盆地发现的气田。

## Reference product
- natural gas: 32000; input; min 4000; max 16000; uniform; software or database
  普查测线距

## Outputs
- natural gas: 6.8e8; log-normal
  2021 年，我国在海陆的页岩气探明储量超过 6.8E08m3

## Data selection and combination
从20世纪初期到80年代，国内对于成气的理论主要停留在油生气阶段，此阶段的理论认知限制了我国科研人员在更多条件下发现气藏的可能性

## Data treatment and extrapolations
探明气田位置或者钻探出天然气后，应即时进行目标区域的天然气储量的评价工作。对开采出的天然气进行精确的成分分析，并结合目标区域的条件优化天然气储量的预测评价结果和相关的后续开采方案

## Sampling procedure
基于大数据和超算的虚拟勘探技术、卫星和高空无人机的测控遥感技术等，在近年来的陆基和海基气田的勘探过程中均发挥了重要作用。同时上述技术也为天然气的成长机制的探明提供了有力支持，如帮助探明四川盆地的页岩气的发育关键在于储层流体高压等。同时发展越来越迅速的地球物理技术也为我国的天然气勘探开发和研究工作提供了关键的技术支持

## Use advice
用户应在区域地质调查和勘探活动的背景下应用此数据，考虑成气理论和勘探技术的进步。 方法论建议包括在发现时立即评估气田储备，对天然气进行精确的成分分析，并根据目标区域条件调整开采计划。 用户在解释数据时还应考虑虚拟勘探和遥感技术的最新技术发展。 必须特别考虑储层流体的压力条件，特别是在与四川盆地页岩气开发类似的背景中。

## Review details
清单： 内部审查通过几个迭代步骤完成，涉及原始数据验证、原始数据记录、代表性、完整性、与 ISO 14040 和 14044 有关的建模的一致性。

## Data sources
- 郭田超;刘博;邓明; 天然气勘探开发研究. 山西化工 101–102 (2022)
