# 稀土破碎;稀土;原位浸出;钕铁硼（NdFeB）磁铁

Dataset: ILCD process, Unit process, single operation
Geography: NMG-CN
Reference year: 2014
Classification: Unit processes / Materials production / Non-energetic raw materials
Functional unit: The functional unit is a 1 kg NdFeB magnet
LCI method principle: Attributional
LCI method approaches: Allocation - market value; Allocation - mass
Generated by: 汪涛, twang@iue.ac.cn
Owner: 天工LCI数据工作小组
Review: Dependent internal review by 天工LCI数据工作小组
Amounts: no units in this file; such an amount is in the reference unit of its flow, which a separate flow dataset defines
copyright: false
licenseType: Free of charge for all users and uses

## General comment
此数据集代表了生产钕铁硼 (NdFeB) 磁铁的工业过程，这些磁铁是各种高科技和清洁能源应用中的关键组件，如风力发电机、电动汽车电机和硬盘驱动器。它包括了中国白音敖包地区稀土破碎、原位浸出以及随后的分离工艺，其中钕 (Nd) 和镨 (Pr) 的基本生产技术一直相同，直到溶剂萃取步骤它们被分离。

## Geography
Bayan Obo (China)

## Technology and included processes
所有三个矿床生产 Nd 和 Pr 的基本过程都是相同的。 Nd 和 Pr 是相同的，除了最后的溶剂萃取步骤 (SX5)，其中两者被分离。

## Reference product
- Steel: 0.012; input; calculated
  Steel. Bayan Obo: 0.035 kg/t ore, data estimated by experts from RWTH Aachen University

## Inputs
- Electricity: 2.088; calculated
  Bayan Obo: Value per crushing step; data estimated by experts from RWTH Aachen University, 1.0 kWh/t ore (carbonatite)
- transport in t*km,transport in t*km: 0.00023; measured
  Bayan Obo: 20 km, lorry

## Outputs
- particles (> PM10),particles (> PM10),particles (>PM10): 1.035; calculated
  Bayan Obo: MW calculation is based on Western Regional Air Partnership
- Radioactive dust, waste: 1.496; calculated
  Radioactive dust. Bayan Obo: based on Th232 and U238 activity in the ore

## Deviations from the LCI method approaches
In this study, an allocation method based on the market prices of REOs28 is considered. To estimate uncertainties that refer to the allocation method, a mass-based allocation is undertaken as a sensitivity analysis

## Use advice
使用此数据集的用户应当应用基于稀土氧化物 (REOs) 市场价格的分配方法，如本研究所考虑的，特别是针对1公斤NdFeB磁铁的生产。在模拟生命周期评估时，应注意包括对材料的循环利用情景或排除标准的方法建议。使用基于质量的分配作为灵敏度分析来估计与分配方法相关的不确定性至关重要。在使用此数据进行环境影响分析或比较时，应仔细遵守所提及的技术适用性。

## Review details
清单： 内部审查通过几个迭代步骤完成，涉及原始数据验证、原始数据记录、代表性、完整性、与 ISO 14040 和 14044 有关的建模的一致性。

## Data sources
- Marx, J., Schreiber, A., Zapp, P. & Walachowicz, F. Comparative Life Cycle Assessment of NdFeB Permanent Magnet Production from Different Rare Earth Deposits. ACS Sustainable Chem. Eng. 6, 5858–5867 (2018).
