# 电力生产 ; 火电 ; 广东

Dataset: ILCD process, Unit process, single operation
Geography: GD-CN
Reference year: 2019
Classification: Unit processes / Energy carriers and technologies / Electricity
Generated by: 熊若熙, xiongrx0126@163.com
Owner: 天工LCI数据工作小组
Review: Dependent internal review by 天工LCI数据工作小组
Amounts: no units in this file; such an amount is in the reference unit of its flow, which a separate flow dataset defines
copyright: false
licenseType: Free of charge for all users and uses

## General comment
火电发电包括原煤、洗煤、石油、天然气等十七种化石燃料。该过程只考虑直接发电过程，不考虑上游原材料开采加工和下游消费

## Time period
根据2019年能源统计年鉴数据计算

## Technical purpose
该数据集涉及使用火电在广东生产电力的过程。这包括使用十七种不同类型的化石燃料如原煤、洗煤、石油和天然气。数据特定于直接发电过程。

## Reference product
- electricity for thermal power: 3.6; calculated

## Inputs
All rows: calculated
- Raw coal: 0.322099
- hard coal briquettes: 0.00319929
- Gangue, in ground: 0.00700255
- Coke oven gas: 0.001905
- blast furnace gas: 0.034532
- Converter gas: 0.003058
- Diesel: 5.737e-5
- fuel oil, unspecified: 7.106e-5
- naphtha: 0.00034975
- Petroleum Coke: 0.00104837
- refinery gas: 3.582e-5
- natural gas: 0.022106
- Natural gas, liquefied: 0.00671891

## Outputs
- carbon dioxide (fossil): 0.710971; calculated
- sulfur dioxide: 0.000116837; calculated
- Nitrogen oxides: 0.000186099; calculated
- particles (> PM10): 2.389e-5; calculated

## Data treatment and extrapolations
核算方法参考《企业温室气体排放核算方法与报告指南 发电设施》。不同形式发电量及燃料用量来自于《中国能源统计年鉴 2020》中的第三章（能源生产） 和第六章（地区能源平衡表）。用于计算二氧化碳排放因子的低位发热量、单位热值含碳量等燃料参数来自于《2019 年度中国区域电网二氧化碳基准线排放因子 OM 计算说明》、《企业温室气体排放核算方法与报告指南 发电设施》

## Use advice
使用这些数据的用户应注意，它仅适用于直接发电过程的核算。它不包括对上游原材料开采加工和下游消费的考虑。在应用该数据集进行生命周期评估或碳足迹计算时，应知道数据是基于2019年能源统计年鉴和其他相关中国发电设施温室气体排放核算指南计算的。用户在进行计算时必须运用这些指南中规定的正确方法学方法，并使用提供的排放因子。

## Review details
清单： 内部审查通过几个迭代步骤完成，涉及原始数据验证、原始数据记录、代表性、完整性、与 ISO 14040 和 14044 有关的建模的一致性。

## Data sources
- 熊若熙. 中国电力生产和消费二氧化碳与污染物排放因子核算. (清华大学, 2023).
