# 市政污泥处理与处置;湿污泥 含水率80%;850℃热解

Dataset: ILCD process, Unit process, single operation
Geography: CN
Classification: Unit processes / End-of-life treatment / Wastewater treatment
Functional unit: 1 t of sludge is selected as the functional unit, the moisture content of wet sludge is 80%.
Generated by: 金思甜, 2331276@tongji.edu.cn
Owner: 天工LCI数据工作小组
Review: Dependent internal review by 天工LCI数据工作小组
Amounts: no units in this file; such an amount is in the reference unit of its flow, which a separate flow dataset defines
copyright: ['opt4ROkqig']
licenseType: Free of charge for all users and uses

## General comment
通过实验对不同工况下的污泥热解处理工艺进行相关数据的收集和分配工作，对每一个过程的物质、能量的输入和输出，对环境污染物排放等进行量化。

## Technology and included processes
热解环节管式炉额定功率 4 kW，空载功率 1.4 kW，反应前通入 2~3 分钟氮气以保证无氧环境，氮气流量为 30 ml/min，管式炉升温速率 80 ℃/min，热解终温保持10min。

## Technical purpose
本市政污泥处理与处置过程代表含水率80%湿污泥在850℃下进行的热解单元过程。它通常用于将湿市政污泥转化为更稳定的材料，这些材料可用于能源回收、土壤改良或进一步的化学处理。此过程的功能单位定义为处理1吨市政污泥。

## Reference product
- Sludge: 1000; input; estimated
  1t湿污泥含水率 80%

## Inputs
- Electricity: 2080.01; calculated
- nitrogen: 5.63; calculated

## Outputs
All rows: calculated
- hydrogen: 1.29
- carbon monoxide (biogenic): 22.13
  原文未区分biogenic和fossil，根据专家判断此处为biogenic。
- methane (biogenic),methane (biogenic): 3.37
  原文未区分biogenic和fossil，根据专家判断此处为biogenic。
- non-methane volatile organic compounds: 0.45
- carbon dioxide (biogenic): 21.19
  原文未区分biogenic和fossil，根据专家判断此处为biogenic。
- Heat treatment oil: 69.68
- Semi-coke: 75.76

## Use advice
使用本数据集进行生命周期评估（LCA）时，请确保污泥处理条件与规定的相符（例如，含水率为80％，热解温度为850℃）。在影响评估阶段，考虑潜在产出及其处理方法，如合成气生产、碳素固体利用以及液体废物处理。排除上游过程（如污泥收集和运输）的影响，并包括热解步骤中的任何重要排放。

## Review details
清单： 内部审查通过几个迭代步骤完成，涉及原始数据验证、原始数据记录、代表性、完整性、与 ISO 14040 和 14044 有关的建模的一致性。

## Data sources
- 王久兵. 污泥热解反应机制及其能源化工艺的全生命周期评价研究[D].浙江工业大学,2017.
