# 棉纱生产;棉纱线;纤维获得

Dataset: ILCD process, Unit process, black box
Geography: XJ-CN
Reference year: 2013
Classification: Unit processes / Materials production / Non-energetic raw materials
Generated by: 段颖凡, 1300925579@qq.com
Owner: 天工LCI数据工作小组
Review: Dependent internal review by 天工LCI数据工作小组
Amounts: no units in this file; such an amount is in the reference unit of its flow, which a separate flow dataset defines
copyright: false
licenseType: Free of charge for all users and uses

## General comment
包括原棉的种植与收获和轧棉。

## Geography
新疆某纺织企业目前纺织规模总计6 912头,棉纱生产能力为15 000t/a,厂区占地面积6.67hm2。现有16条转杯纺生产线主要产品为高档OE纱，用于织造生仔布等。棉纱生产过程主要分为开棉、清棉、喂棉、梳棉、并条、纺纱、络筒等阶段，企业现有总资产13 898万元,其中固定资产8 181万元。总负债5 717万元,资产负债率41%。

## Technical purpose
通过此工业流程生产的棉纱线旨在用于纺织品制造，包括制造服装、家用纺织品（如床单和窗帘）以及工业纺织产品的面料。这种高质量的纱线适用于对强度、柔软度和耐用性有要求的各种纺织应用。

## Reference product
- Cotton Yarn: 1; measured

## Inputs
All rows: measured
- Energy, unspecified: 59.8
- Electricity: 12.1
- Non-renewable resources: 1.4
- natural gas: 0.35
- crude oil; 42.3 MJ/kg: 0.53
- hard coal,hard coal: 0.52
- LPG - liquefied petroleum gas: 0.03
- electricity from hydroelectric power plant: 1
- Fertilizer: 0.457
- Pesticide: 0.016
- freshwater: 22200

## Outputs
All rows: measured
- carbon dioxide (biogenic): 4.265
  原文说明此处为农业化肥施用的排放
- methane (biogenic): 0.0076
  原文说明此处为农业活动产生的排放
- sulfur dioxide: 0.004
- Nitrogen oxides: 0.0227
- carbon monoxide (biogenic): 0.0161
  原文说明此处为农业活动产生的排放

## Use advice
代表棉纱生产的此数据集应考虑棉花种植实践的地区差异及其相关的环境影响。重要的是确保系统边界包括从种植园到轧棉厂的所有相关过程。用户应验证数据是否与其生命周期评估案例研究的地理位置相符，以保持准确性，并应考虑技术和能源效率的变化。该数据集不包括随后的纺织品制造流程，如织造或编织，这些应该在生命周期评估中单独考虑。

## Review details
清单： 内部审查通过几个迭代步骤完成，涉及原始数据验证、原始数据记录、代表性、完整性、与 ISO 14040 和 14044 有关的建模的一致性。

## Data sources
- 章媛媛 & 左强. 生命周期评价在纺织企业清洁生产审核中的应用. 新疆环境保护 36, 36–41 (2014).
