# 硅矿开采 ; 硅矿 ; 多排延期爆破技术

Dataset: ILCD process, Unit process, single operation
Geography: CN
Reference year: 2017
Classification: Unit processes / Materials production / Non-energetic raw materials
Functional unit: In this paper, a 1 kWp solar PV system consisting of five 200 Wmodules made of 54 multi-Si cells, each with a size of 156*156 mm2 and 16% efficiency, was used as the primary study object
LCI method principle: Attributional
LCI method approaches: Allocation
Generated by: 杨锦锋, yjfzfshn@163.com
Owner: 天工LCI数据工作小组
Review: Dependent internal review by 天工LCI数据工作小组
Amounts: no units in this file; such an amount is in the reference unit of its flow, which a separate flow dataset defines
copyright: false
licenseType: Free of charge for all users and uses

## General comment
多晶硅

## Geography
2011-2016年中国太阳能光伏产业生命周期环境影响评价

## Time period
文章发表

## Technology and included processes
利用小型井下钻机和炸药，采用多排延时爆破技术，对含有所需矿床的矿源进行分离

## Technical purpose
所描述的工艺用于通过多排延时爆破技术提取硅矿。这种技术是多晶硅生产链的一部分，主要用于制造太阳能光伏系统。具体来说，一个由五个200瓦模块组成的1千瓦峰值太阳能光伏系统，每个模块由54个尺寸为156*156毫米2、效率为16%的多晶硅电池组成，是中国太阳能光伏行业生命周期评估研究的主要研究对象，代表从这个采矿过程中获得的硅的应用。

## Reference product
- quartz sand: 20.2568; measured
  silicon ore

## Inputs
- Explosive: 1.1254; measured
  explosive
- gasoline (regular): 0.0081; measured
  gasoline
- Electricity: 2.77128; software or database
  electricity

## Outputs
All rows: measured
- carbon dioxide (fossil): 0.1324
  carbon dioxide
- sulfur dioxide: 0.1926
- Nitrogen oxides: 0.1384
  oxynitride
- hydrogen sulfide: 0.0963
- ammonia: 0.0512
- particles (> PM10),particles (>PM10): 0.0033
  dust
- mineral treatment residue (unspecified): 0.0014
  solid waste

## Deviations from the LCI method approaches
基于中国太阳能光伏生命周期评价的现有文献(Fu 等，2015; He，2013; Hong 等，2016; Li 和 Yu，2014; Li 和 Chang，2012; Liang，2012; Yang 等，2015; Yu 等，2017; Xie 等，2015) ，得到了一份生命周期清单

## Use advice
在应用2011-2016年中国太阳能光伏产业生命周期清单（LCI）数据集进行环境影响评估时，用户应确保与先前建立的文献中的方法论一致，特别是描述中引用的文献（例如，傅等人，2015; 何，2013; 洪等人，2016等）。在模拟太阳能光伏系统硅生产的环境影响时，必须包括硅矿多排延时爆破技术的具体考虑。此外，准确表征太阳能光伏系统的配置、效率和研究时期对于获得准确结果至关重要。

## Review details
清单： 内部审查通过几个迭代步骤完成，涉及原始数据验证、原始数据记录、代表性、完整性、与 ISO 14040 和 14044 有关的建模的一致性。

## Data sources
- Xu, L., Zhang, S., Yang, M., Li, W. & Xu, J. Environmental effects of China’s solar photovoltaic industry during 2011–2016: A life cycle assessment approach. Journal of Cleaner Production 170, 310–329 (2018).
