# PV cell production ; semiconductor technology

Dataset: ILCD process, Unit process, single operation
Geography: SC-CN
Reference year: 2013
Classification: Materials production / Metals and semimetals
Functional unit: 1 kg solar grade multi-Si
LCI method principle: Attributional
LCI method approaches: Allocation
Generated by: Jinfeng Yang, yjfzfshn@163.com
Owner: Tiangong LCI Data Working Group
Review: Dependent internal review by Tiangong LCI Data Working Group
Amounts: no units in this file; such an amount is in the reference unit of its flow, which a separate flow dataset defines
copyright: false
licenseType: Free of charge for all users and uses

## General comment
Multi-Si

## Geography
A solar cell manufacturer in Sichuan

## Time period
Available online

## Technology and included processes
Semiconductor technology

## Reference product
- Multi-Si solar cell: 1e6; measured
  Solar cells (MW)

## Inputs
All rows: measured
- Multi-Si wafer: 3420
  Polycrystalline silicon wafer
- electricity: 55548
  Power consumption
- Water (fresh water): 1.23654e6
  fresh water
- Silver Paste: 60
  silver paste
- Aluminum Paste: 430
  Aluminum paste
- Ammonia: 40
- Silane: 10
- Phosphorus Oxychloride: 8
  POCl3
- Sodium hydroxide: 195
  NaOH
- Hydrochloric acid: 450
  HCl
- Hydrofluoric acid: 860
  HF
- Nitrogen oxides: 1550
  nitric acid
- oxygen: 113

## Outputs
All rows: measured
- chlorine: 81.23
  Chlorine
- Nitrogen oxides: 26.78
- ammonia: 31.04
  Ammonia
- non-methane volatile organic compounds: 33.4
  TVOC
- hydrogen chloride: 7.29
  HCl
- chloride: 15.89
- fluoride: 83.65
  Fluoride
- nitrogen, total (excluding N2): 49.32
  TN
- chemical oxygen demand: 126.89
  COD
- industrial waste (unspecified): 283
  Solid Waste

## Deviations from the LCI method approaches
In this paper, solar-grade polysilicon is taken as the research object, and the value of resource, energy input and environment emission of solar-grade polysilicon life cycle process at domestic and general production level is calculated quantitatively by using LCA evaluation method

## Data selection and combination
Based on the data collection and organization of the production process of a PV cell manufacturer in Sichuan Province

## Review details
Inventory: The internal review was done by several iteration steps concerning raw data validation, raw data documentation, representativity, completeness and consistency of modelling with regard to ISO 14040 and 14044.

## Data sources
- 何洋. 太阳能级多晶硅的生命周期评价. (西南交通大学, 2013).
