# 水泥生产;水泥, 粉煤灰硅酸盐水泥, 52.5MPa;干法预分解窑;粉煤灰

Dataset: ILCD process, Unit process, black box
Geography: CN
Reference year: 2001
Classification: Materials production / Other mineralic materials
Generated by: 杨思琪, ysqsophia@gmail.com
Owner: 天工LCI数据工作小组
Review: Dependent internal review by 天工LCI数据工作小组
Amounts: no units in this file; such an amount is in the reference unit of its flow, which a separate flow dataset defines
copyright: false
licenseType: Free of charge for all users and uses

## General comment
干法预分解窑生产水泥。采用计算机自动化系统对从原料贮料到水泥贮存的整个水泥生产进行全面控制，主要设备包括生料磨、熟料磨和熟料煅烧设备。熟料煅烧设备由烧煤新型分解炉（NSF）和熟料冷却机组成。NSF系统包括两列四级旋风预热器和一座分解炉（F.F）。

## Technology and included processes
干法A厂采用计算机自动化系统对从原料贮料到水泥贮存的整个水泥生产进行全面控制，主要设备包括生料磨、熟料磨和熟料锻烧设备。熟料锻烧设备由烧煤NSF窑和熟料冷却机组成。NSF系统包括两列四级旋风预热器和一座分解炉(F.F)。

## Technical purpose
该工业过程描述了使用干法预分解窑生产52.5MPa硅酸盐粉煤灰水泥的生产。这种强度等级的水泥用于需要高强度水泥的各种建设项目，包括桥梁、建筑、道路以及住宅建设等基础设施。该过程由计算机自动化系统高度控制，并涉及原料研磨和熟料煅烧的高级设备。

## Model description
研究范围界定为由原料进厂、原料预处理、生料粉磨、生料煅烧、熟料粉磨，直至水泥均化、储存为止。未包括矿山开采、运输过程、水泥包装等具体过程。

## Reference product
- cement, portland fly-ash cement, 52.5MPa: 1000
  水泥平均标号525号

## Inputs
- limestone, crushed, for mill: 1274.77
  石灰石
- sandstone: 0.007784
  砂岩
- iron, powder: 51.9989
  铁粉
- bauxite: 61.2503
  矾土
- gypsum stone (CaSO4-dihydrate): 56.1461
  石膏
- ash: 10.9485
  粉煤灰
- Water (fresh water): 1169.37
  新鲜水
- hard coal: 106.55
  原始数据为155.517kt标准煤，这里换算为硬煤，换算公式为1kg硬煤=0.929kg标准煤。
- electricity, medium voltage: 458.389
  电力

## Outputs
- particles (> PM10): 0.320632
  粉尘，未标明粒径，按PM>10处理。
- particles (> PM10): 0.37466
  烟尘，未标明粒径，按PM>10处理。
- sulfur dioxide: 0.574625
  二氧化硫
- Nitrogen oxides: 0.535697
  氮氧化物
- carbon monoxide: 0.080097
  一氧化碳
- carbon dioxide: 811.3
  二氧化碳
- Water (groundwater from technosphere, waste water): 630.543
  原文是工业废水（即水泥生产废水）。

## Data treatment and extrapolations
CO2数据处理：根据1个功能单元的CO2排放数据，计算出生产1567340 t水泥时的CO2排放量。

## Use advice
使用这些生命周期评估数据时，请确保它与您研究的范围一致。它适用于不考虑矿山开采、运输或包装过程的水泥生产排放和能源消耗评估。在将这些数据应用于定义范围之外的项目时要小心，并在必要时根据特定的区域条件或技术变化重新校准。在计算CO2排放时，请遵循为评估功能单元并扩展到其他生产数量提供的方法论指导。

## Review details
清单： 内部审查通过几个迭代步骤完成，涉及原始数据验证、原始数据记录、代表性、完整性、与 ISO 14040 和 14044 有关的建模的一致性。

## Data sources
- 狄向华. (2001). 材料环境协调性评价的标准流程方法研究 [硕士, 北京工业大学].
