# 湿蒸法棉布染整加工;印染棉布;轧染;活性染料

Dataset: ILCD process, Unit process, single operation
Geography: SZ-JS-CN
Reference year: 2012
Classification: Unit processes / Materials production / Organic chemicals
Generated by: 段颖凡, 1300925579@qq.com
Owner: 天工LCI数据工作小组
Review: Dependent internal review by 天工LCI数据工作小组
Amounts: no units in this file; such an amount is in the reference unit of its flow, which a separate flow dataset defines
copyright: false
licenseType: Free of charge for all users and uses

## General comment
活性染料是一类可与纤维发生共价结合的染料，特别适用于染色棉类纤维。它们通常需要在碱性条件下施加，以确保染料能够充分结合在纤维上，提高染色效果的牢固度。在轧染工序中，调研得出使用活性染料染色的能耗占整个工序能耗的47%。

## Geography
本研究选取江苏省某印染企业为重点调研对象，该企业位于长三角经济圈中的常熟。

## Technical purpose
湿蒸法棉布染整加工主要应用于纺织行业，具体为使用活性染料通过轧染工艺对棉布进行印染处理。该过程涉及烧毛、脱浆、丝光、煮沸、漂白和烘干等能源密集型操作。煤炭在蒸汽与导热油锅炉中的使用，旨在产生所需的蒸汽并维持这些操作所需的更高工作温度。

## Reference product
- Cotton Fabric: 78.3; measured

## Inputs
- Electricity: 449; measured
- Standard coal: 922; measured
- Crude coal: 105; calculated
- Cleaned coal: 260; calculated
- Fuel Oil: 2.24; calculated
- heavy fuel oil: 0.673; calculated
- Diesel oil: 3.08; calculated
- Coke Oven Gas: 4.1; calculated
- natural gas: 0.0526; calculated
- process steam: 2.96e7; measured
- sodium chloride: 800; measured
- sodium carbonate: 160; calculated
- Chemicals (unspecified): 70; measured
  LE-500
- Soap Detergent: 12; measured
- Reactive Dye: 114; measured
- river water: 52100; measured
- freshwater: 2160; measured

## Outputs
- carbon dioxide (fossil): 2670; calculated
- carbon monoxide (fossil): 0.323; calculated
- sulfur dioxide: 2.01; calculated
- methane (fossil): 12.8; calculated
- Nitrogen oxides: 0.723; calculated
- nitrous oxide: 0.0408; measured
- particles (> PM10): 0.954; calculated
- ammonia: 0.000117; measured
- non-methane volatile organic compounds: 0.0162; measured
- waste water - untreated: 54200; measured
- chemical oxygen demand: 61.8; calculated
- Suspended solids, unspecified,Suspended solids, unspecified: 6.65; calculated
- lead: 8.24e-6; calculated
- mercury: 1.73e-7; calculated
- fluorine: 1.56e-6; calculated
- cadmium: 3.06e-7; calculated
- arsenic: 7.05e-6; calculated

## Use advice
在利用该数据集进行生命周期评估时，需根据染色过程中所报告的能耗占总流程能耗的比例（47%）正确分配能源消耗。在计算中考虑两种类型锅炉的煤炭消耗比例，即17:1。重要的是确保通过按照提供的蒸汽使用比例2:1:1:1:1:2评估工艺各步骤中蒸汽的使用情况，以保证系统边界的方法论一致性。此数据应结合江苏省长三角经济圈中常熟地区的区域经济条件进行评估。

## Review details
清单： 内部审查通过几个迭代步骤完成，涉及原始数据验证、原始数据记录、代表性、完整性、与 ISO 14040 和 14044 有关的建模的一致性。

## Data sources
- 朱亚楠. 棉布连续轧染工艺生命周期环境影响评价. (南京大学, 2012).
