# 生料制备;生料;新型干法, >4000 t/d

Dataset: ILCD process, Unit process, single operation
Geography: CN
Reference year: 2020
Classification: Energy carriers and technologies / Heat and steam
Generated by: 杨思琪, ysqsophia@gmail.com
Owner: 天工LCI数据工作小组
Review: Dependent internal review by 天工LCI数据工作小组
Amounts: no units in this file; such an amount is in the reference unit of its flow, which a separate flow dataset defines
copyright: false
licenseType: Free of charge for all users and uses

## General comment
新型干法在水泥工业工艺中市场份额占比较大。生料制备过程污染物为颗粒物。

## Technical purpose
新型干法用于水泥行业中生料的生产，具体用途为生产P·O 42.5型水泥熟料。该工艺设计用于处理每天超过4000吨的生料。其应用针对的是大型水泥制造设施，在生料制备过程中对颗粒物污染控制至关重要。

## Model description
以 P·O 42.5 型水泥熟料为研究对象，功能单位与基准流为生产 1.00 吨水泥熟料，基准年为 2020 年。系统边界为生料制备（原料开采、原料预处理及均化、生料粉磨和生料均化）单元过程，实景过程范围从原料预处理及配料到生料均化为止。

## Reference product
- raw meal: 1000
  生料

## Inputs
- limestone, crushed, for mill: 782.191
  石灰石
- shale: 141.355
  页岩
- sandstone: 61.3713
  砂岩
- iron, powder: 15.0834
  铁粉
- electricity, medium voltage: 57.7873
  电力。电力由电厂输送。

## Outputs
- particles (> PM10): 0.0129523
  颗粒物。袋式收尘器收集到的粉尘经返料系统全部返回生料均化阶段，工艺产出固废可有效循环利用。未标明粒径，按PM>10处理。

## Deviations from the LCI method approaches
石灰石开采、页岩开采、砂岩开采、铁粉生产、煤开采、电力和自来水生产以及直接排放污染物等数据均来自 CLCD-China-ECER 0.8 数据库中的数据。

## Data selection and combination
除CO2外，其他数据来源于高安红狮、江西德安万年青等企业报告、水泥行业清洁生产评价指标体系及水泥熟料研究论文等。

## Use advice
使用此水泥生产新型干法的生命周期评价(LCA)数据时，必须遵守CLCD取舍原则：忽略原料重量小于产品重量1%的上游生产数据；忽略作为原料的废弃物或低价值废物的上游生产；通常可以忽略生产设备、建筑物、生活设施；不应忽略环境影响范围内的已知排放。此数据集来源于CLCD-China-ECER 0.8数据库。在应用此数据时，考虑技术的代表性和具体的地理位置。特别注意库存不确定性评估和使用分析公式计算的不确定性影响，以反映准确的LCA结果。

## Review details
清单： 内部审查通过几个迭代步骤完成，涉及原始数据验证、原始数据记录、代表性、完整性、与 ISO 14040 和 14044 有关的建模的一致性。

## Data sources
- 陆柳鲜. (2022). 江西省多源有色冶炼固废资源化过程生命周期评价研究 [硕士, 江西理工大学].
