# 土壤修复;异位修复;生物堆;工程实施;回填;修复后场地

Dataset: ILCD process, Unit process, single operation
Geography: KR
Reference year: 2011
Classification: Unit processes / Other Services / Repair and maintenance
Generated by: 桑春晖, sangch@mail.bnu.edu.cn
Owner: 天工LCI数据工作小组
Review: Dependent internal review by 天工LCI数据工作小组
Amounts: no units in this file; such an amount is in the reference unit of its flow, which a separate flow dataset defines
copyright: false
licenseType: Free of charge for all users and uses

## General comment
修复后土壤回填至原开挖基坑

## Technical purpose
该过程用于土壤修复，通过异位生物堆处理。这涉及挖掘受污染的土壤，然后在外部进行生物处理以降低污染物。处理后的土壤回填到原始的挖掘坑。它通常适用于污染有机污染物的站点，需要恢复土壤的环境质量，以满足一般或特定的土地利用要求。

## Reference product
- Remedied site: 200; estimated

## Inputs
- Diesel: 0.803; estimated
- Remediated soil: 10000; estimated

## Use advice
在利用该数据集进行LCA分析时，确保包括相关修复系统标准化报告中列出的所有输入材料和能量。计算挖掘土壤的运输和与生物堆处理相关的任何排放。如果处理后的土壤被重新利用，请考虑潜在的好处，如避免使用原始材料。如果修复设施的建设影响不在您的研究范围内，请勿包括其影响。

## Review details
清单： 内部审查通过几个迭代步骤完成，涉及原始数据验证、原始数据记录、代表性、完整性、与 ISO 14040 和 14044 有关的建模的一致性。

## Data sources
- Jeong, S.-W. & Suh, S.-W. Assessment of Environmental Impacts and CO 2 Emissions from Soil Remediation Technologies using Life Cycle Assessment - Case Studies on SVE and Biopile Systems -. Journal of Korean Society of Environmental Engineers 33, 267–274 (2011).
