# Bioethanol ; Fungi

Dataset: ILCD process
Geography: GLO
Classification: Energy carriers and technologies / Renewable fuels
Generated by: 袁嘉翼, jiayi_y@mail.bnu.edu.cn
Owner: 天工LCI数据工作小组
Review: Dependent internal review by 天工LCI数据工作小组
Amounts: no units in this file; such an amount is in the reference unit of its flow, which a separate flow dataset defines
licenseType: Free of charge for all users and uses

## General comment
使用真菌生产的生物乙醇旨在用作可再生能源。它可以与汽油混合，制成用于运输的生物燃料，或者在多燃料车辆中以纯净形式使用。此外，它还可以作为化学合成的原料，用于生产生物可降解塑料、药品和其他生物基产品。

## Inputs
All rows: uniform; missing unimportant
- Electricity: 0
- heat: 376; min 254; max 540
- Electricity: 71.28; max 96.84
- heat: 4230; min 1040; max 5220
- Electricity: 124.2; min 76.68; max 181.08

## Outputs
- heat: 0; uniform; missing unimportant

## Use advice
在使用该数据进行生命周期评估时，用户应考虑真菌栽培的农业实践，包括水和能源等资源投入。应注意在应用数据时，环境影响在生物乙醇和任何副产品之间的潜在分配。根据地理背景，可能需要因气候、程序或技术的变化而对数据进行调整。

## Review details
清单： 内部审查通过几个迭代步骤完成，涉及原始数据验证、原始数据记录、代表性、完整性、与 ISO 14040 和 14044 有关的建模的一致性。
