# 市政污泥处理与处置;湿污泥 含水率76.2%;焚烧

Dataset: ILCD process, Unit process, single operation
Geography: XA-SAX-CN
Classification: End-of-life treatment / Other end-of-life services
Functional unit: The residual sludge sludge of Xi'an No. 3 Sewage Treatment Plant has a moisture content of 76.2% and a functional unit of 1t residual sludge.
Generated by: 金思甜, 2331276@tongji.edu.cn
Owner: 天工LCI数据工作小组
Review: Dependent internal review by 天工LCI数据工作小组
Amounts: no units in this file; such an amount is in the reference unit of its flow, which a separate flow dataset defines
licenseType: Free of charge for all users and uses

## General comment
此数据集描述的是市政污泥处理与处置过程，具体涉及到含水率76.2%的湿污泥的焚烧处理。该过程在西安市第三污水处理厂进行，是管理污水处理厂剩余污泥的关键部分，能够减少体积，并可能消除病原体和有机物。焚烧后产生的灰烬可以用于建筑材料或作为垃圾填埋场的覆盖层等多种应用。

## Geography
西安第三污水处理厂

## Reference product
- Sludge: 1000; input; estimated
  1t含水率76.2%的剩余污泥

## Inputs
- Electricity: 554.508; measured

## Outputs
All rows: measured
- carbon dioxide: 268.35
- Nitrogen oxides: 2.753
- sulfur dioxide: 4.538
- carbon monoxide: 1.035
- methane: 0.01228
- nitrous oxide: 0.01079
- volatile organic compound: 0.0119
- Flue dust: 2.355
- mineral waste (ash): 105.87
- lead: 0.01044
- cadmium: 0.000723
- zinc: 0.065
- copper: 0.01444
- nickel: 0.00144
- chromium: 0.00476

## Use advice
在使用此数据集进行涉及市政污泥处理和处置的产品或服务的生命周期评估(LCA)时，用户应考虑到含有76.2%水分的湿污泥的特定特性。用户必须考虑焚烧过程的环境影响以及随后对残余灰烬的任何使用。必须遵循当地的废物处理规定。任何数据的外推都必须在考虑技术适应性和地理环境的前提下谨慎进行。

## Review details
清单： 内部审查通过几个迭代步骤完成，涉及原始数据验证、原始数据记录、代表性、完整性、与 ISO 14040 和 14044 有关的建模的一致性。

## Data sources
- 齐星昊. 基于生命周期评价的典型剩余污泥处理方法的环境影响比较研究[D].河南师范大学,2020.
