# 粗钢生产;粗钢;连铸（长流程炼钢）

Dataset: ILCD process, Unit process, single operation
Geography: CN
Classification: Unit processes / Materials production / Metals and semimetals
Generated by: 付翔, 1162850692@qq.com
Owner: 天工LCI数据工作小组
Review: Dependent internal review by 天工LCI数据工作小组
Amounts: no units in this file; such an amount is in the reference unit of its flow, which a separate flow dataset defines
copyright: false
licenseType: Free of charge for all users and uses

## General comment
此数据集代表了通过高炉-基本氧炉（BF-BOF）路线（长流程炼钢）生产粗钢的关键过程。它通常用于批量生产钢材，是大型综合钢铁厂采用的主要方法。连铸钢适用于从建筑材料到汽车工业零件的广泛终端使用。

## Geography
The data of the BF-BOF pathway were obtained from the large-scale integrated steel plants in China with an attached coking plant and EAF plant.

## Reference product
- Crude Steel: 1000; measured
  Crude steel

## Inputs
- Molten steel: 1023.4; measured
- freshwater,freshwater: 800; measured
- Electricity: 211.32; measured

## Use advice
该数据集的用户应将BF-BOF连铸工艺的技术细节视为具有集成焦化和电弧炉（EAF）装置的大规模钢铁生产的代表。如果适用，应谨慎处理回收数据，确保与定义的系统边界和当地回收实践保持一致。排放数据应在区域环境法规的背景下进行考虑。

## Review details
清单： 内部审查通过几个迭代步骤完成，涉及原始数据验证、原始数据记录、代表性、完整性、与 ISO 14040 和 14044 有关的建模的一致性。

## Data sources
- The carbon reduction potential of hydrogen in the low carbon transition of the iron and steel industry: The case of China
