# 海水淡化;电渗析，螺旋缠绕

Dataset: ILCD process, Unit process, single operation
Geography: CN
Reference year: 2023
Classification: Energy carriers and technologies / Electricity
Functional unit: 1 t sodium chloride
Generated by: 陆嘉麒, wilsherelu@foxmail.com
Owner: 天工LCI数据工作小组
Review: Dependent internal review by 天工LCI数据工作小组
Amounts: no units in this file; such an amount is in the reference unit of its flow, which a separate flow dataset defines
copyright: false
licenseType: Free of charge for all users and uses

## General comment
此数据集代表使用螺旋缠绕配置的电渗析工艺从海水中提取1吨氯化钠的过程。所得的高纯度盐通常用于要求严格的质量参数的应用中，如食品工业中的人类食用，在制药行业用于医疗用途，或作为化学合成的原料，其中杂质可能会影响反应过程。

## Reference product
- sodium chloride: 1000; article inperiodical
  产品盐

## Inputs
- electricity mix: 215.82; article inperiodical
  过程电耗
- Electrodialysis Component: 0.0167; article inperiodical
  ED 组件
- Water (fresh water): 4085; article inperiodical
  原水

## Outputs
- High-concentration saline wastewater: 817; article inperiodical
  浓水（高含盐废水）
- Deionized Water: 3268; article inperiodical
  淡水(去离子水)

## Use advice
在使用此数据集进行生命周期评估时，请确保评估范围包括电渗析过程的特定能源和物料输入。请注意，数据集假定生产输出为1吨氯化钠，因此对于其他生产量可能需要进行规模调整。在方法上，如果适用，应计算将浓缩卤水副产品恢复到海中的潜在环境影响，并包括对海水或氯化钠产品进行的任何预处理和后处理的影响。

## Review details
清单： 内部审查通过几个迭代步骤完成，涉及原始数据验证、原始数据记录、代表性、完整性、与 ISO 14040 和 14044 有关的建模的一致性。

## Data sources
- Xue, N. et al. Carbon footprint analysis and carbon neutrality potential of desalination by electrodialysis for different applications. Water Res. 232, 119716 (2023).
