# 甲苯生产 ; 甲苯 ; 石脑油路线 ; 石脑油

Dataset: ILCD process, Unit process, black box
Geography: CN
Reference year: 2006
Classification: Unit processes / Materials production / Organic chemicals
Functional unit: A functional unit is defined as 1 ton of toluene product
LCI method principle: Attributional
LCI method approaches: Allocation - mass
Generated by: 任亚楠, renyn15@tsinghua.org.cn
Owner: 天工LCI数据工作小组
Review: Dependent internal review by 天工LCI数据工作小组
Amounts: no units in this file; such an amount is in the reference unit of its flow, which a separate flow dataset defines
copyright: false
licenseType: Free of charge for all users and uses

## General comment
芳烃联合装置，阿罗沙文法工艺

## Geography
对二甲苯生产工艺的运行状况和环境负荷等进行了实地调研和数据采集

## Time period
未提及，以文献发表时间代替

## Technical purpose
通过石脑油路线在芳烃联合装置中使用阿罗沙文法工艺生产的甲苯通常用于合成苯和二甲苯衍生物，这些衍生物是化工行业中各种化学品和聚合物的前体。它也被用作工业溶剂，例如油漆、稀释剂、硅酮密封剂、化学反应物，以及生产药物和炸药。

## Reference product
- toluene: 1; measured
  甲苯

## Inputs
- naphtha: 0.68; measured
  石脑油
- light fuel oil: 0.27; measured
  燃料油
- Electricity: 0.072; measured
  电力

## Outputs
All rows: measured
- waste water - untreated: 0.11
  废水总量
- Oils, unspecified: 1e-5
  石油类
- chemical oxygen demand: 0.00124
  COD
- sulfur dioxide: 0.0018
  SO2
- nitrous oxide: 0.00413
  NOx
- carbon monoxide (fossil): 0.00363
  CO
- carbon dioxide (fossil): 0.74
  CO2
- particles (> PM10): 0.00189
  烟尘

## Deviations from the LCI method approaches
研究采用产品质量作为清单数据的分配原则

## Data treatment and extrapolations
采用质量分配法量化产品和副产品之间的环境负荷

## Use advice
当使用该数据集时，用户必须考虑生产的具体条件，如地理位置、应用技术和环境法规，这些可能与研究中引用的条件不同。质量分配法已用于量化环境负荷，用户在比较采用不同分配方法的数据集时应考虑这一点。确保数据集与预期的生命周期评价的目标和范围一致。为了比较目的，功能单元应保持为1吨甲苯产品。

## Review details
清单： 内部审查通过几个迭代步骤完成，涉及原始数据验证、原始数据记录、代表性、完整性、与 ISO 14040 和 14044 有关的建模的一致性。

## Data sources
- 马骕. 涤纶纺织品的生命周期评价. (东华大学, 2007).
