# 废弃电去离子模块的处理;焚烧与填埋相结合

Dataset: ILCD process, Unit process, single operation
Geography: CN
Reference year: 2022
Classification: End-of-life treatment / Other end-of-life services
Functional unit: 1 item of EDI module
Generated by: 陆嘉麒, wilsherelu@foxmail.com
Owner: 天工LCI数据工作小组
Review: Dependent internal review by 天工LCI数据工作小组
Amounts: no units in this file; such an amount is in the reference unit of its flow, which a separate flow dataset defines
copyright: false
licenseType: Free of charge for all users and uses

## General comment
所描述的工艺数据涉及废弃电去离子（EDI）模块的末端处理。这些模块通常用于需要高纯度水的工业应用的水净化系统，例如发电厂、制药生产和微电子制造。

## Reference product
- Electrodeionization components: 1; input; article inperiodical
  1 wasted EDI module

## Outputs
All rows: article inperiodical
- landfill of ferro metals: 1.2
  废弃钛涂钌电极
- waste incineration of plastics (unspecified) fraction in municipal solid waste (MSW): 4.5
  废弃不锈钢电极
- waste incineration of plastics (unspecified) fraction in municipal solid waste (MSW): 12.71
  废弃EDI外壳（UPVC）
- waste incineration of plastics (unspecified) fraction in municipal solid waste (MSW): 3.82
  废弃EDI外壳（ABS)
- waste incineration of plastics (unspecified) fraction in municipal solid waste (MSW): 3.35
  废弃阴离子交换树脂
- waste incineration of plastics (unspecified) fraction in municipal solid waste (MSW): 2.75
  废弃阳离子交换树脂
- waste incineration of plastics (unspecified) fraction in municipal solid waste (MSW): 1.55
  废弃聚乙烯
- waste incineration of plastics (unspecified) fraction in municipal solid waste (MSW): 3.36
  废弃阴离子交换膜
- waste incineration of plastics (unspecified) fraction in municipal solid waste (MSW): 4.38
  废弃阳离子交换膜
- waste incineration of plastics (unspecified) fraction in municipal solid waste (MSW): 0.71
  废弃环氧树脂胶

## Use advice
在使用这个数据集时，用户应考虑焚烧和填埋处理过程部分的环境影响。数据是特定于中国情境（由'CN'标示），因此可能不能直接适用于其他地区环境而不进行调整以符合当地环境规定和实践。同样重要的是要考虑随时间可能影响EDI模块终端处理措施的技术进步。

## Review details
清单： 内部审查通过几个迭代步骤完成，涉及原始数据验证、原始数据记录、代表性、完整性、与 ISO 14040 和 14044 有关的建模的一致性。

## Data sources
- Yuan, Y. et al. Deduction of carbon footprint for membrane desalination processes towards carbon neutrality: A case study on electrodeionization for ultrapure water preparation. Desalination 559, 116648 (2023).
