# 熟料生产;熟料;垃圾衍生燃料

Dataset: ILCD process, Unit process, black box
Geography: ZZ-SD-CN
Classification: Unit processes / Materials production / Inorganic chemicals
Generated by: #REF!, ysqsophia@gmail.com
Owner: 天工LCI数据工作小组
Review: Dependent internal review by 天工LCI数据工作小组
Amounts: no units in this file; such an amount is in the reference unit of its flow, which a separate flow dataset defines
copyright: false
licenseType: Free of charge for all users and uses

## General comment
根据北京市住房和城乡建设委员会2021年发布的《北京市生活垃圾管理条例》，生活垃圾被分为食品垃圾（Food waste，FW）、其他垃圾（Residual waste，RW）、可回收物和危险废物。将生活垃圾转化为垃圾衍生燃料（Refuse-derived fuel，RDF）作为生产熟料的替代燃料。RW被筛分为两部分。超过尺寸的部分主要包含易燃材料，如纸张、塑料和木材。将它们与5%的石灰粉碎和压缩成为垃圾衍生燃料（RDF CDW），用作水泥窑炉中的替代燃料以取代部分煤。欠尺寸的部分主要由不可燃材料组成，如石灰土、砖、陶瓷、玻璃和金属，经过破碎后进入生料磨。FW与碎石灰预混，然后进入配料系统。它也被用作替代原料。FW不需要干燥，因为它的水分被石灰石预混利用。在情景中，熟料生产使用了石灰石、砂岩、页岩、铁粉、RW欠尺寸和FW作为原材料，以及煤和RDF CDW作为燃料。煤灰和RDF CDW灰也被用作原材料。考虑到熟料质量参数、热替代率（Thermal substitution rate，TSR）和原料中替代品的比例，调整了物料用量。每个阶段的电力消耗根据水泥生产的电耗指标进行计算。

## Geography
山东申丰水泥集团有限公司

## Technology and included processes
In scenario 4, the RW was divided into two parts with a sifter. The oversizemainly contained light combustibles, such as paper, plastic, and wood. They were crushed and compressed with 5% lime (Li, 2017) to make the refuse-derivedfuel (RDF CDW), which was used as an alternative fuel in the cement kiln to replace part of the coal. The undersize mainly consisted of incombustible, such as lime soil, bricks, ceramics, glass, and metals, which were fed into the raw meal mill after being crushed. The FW was pre-homogenized with crushed limestone and then entered into the batching system. It has also been used as the alternative raw material (Cai et al., 2014). There was no drying for FW because its moisture was just utilized by limestone pre-homogenization (Cai et al., 2015). Clinker production in scenario 4 used limestone, sandstone, shale, iron powder, the undersize of RW and FW ( ́ Swiechowski et al., 2020) as raw materials, and used coal and RDFCDW as fuels. Coal ash and RDF CDW ash were also used as raw ma terials. The clinker quality parameters, TSR, and proportion of alternative raw materials in the raw meal were considered as constraint conditions to adjust the material usage (Cai et al., 2015). The power consumption in each stage was calculated based on the electricity consumption index for cement production(Cai et al., 2015; Wang, 2013; Li, 2017).

## Technical purpose
本数据集描述的由城市固体废物制成的垃圾衍生燃料（RDF）用于生产水泥的主要成分之一熟料。该RDF用作替代传统化石燃料例如煤，并主要由纸张、塑料、木材等轻质易燃物组成。市政废物中的不可燃部分，主要包括石灰土、砖、陶瓷、玻璃和金属，被用作熟料生产过程中的替代原料。该RDF的具体使用案例是在山东申丰水泥集团有限公司的水泥窑内，作为利用废物转能方法的一部分。

## Model description
定义了两个功能单元，分别为1吨熟料和生产1吨熟料所需的食物垃圾和残余废物数量。系统边界包括煤粉制备、生料制备和熟料煅烧。

## Reference product
- clinker: 1000
  熟料

## Inputs
- limestone, crushed, for mill: 1329.97
  石灰石
- sandstone: 99.92
  砂岩
- shale: 36.448
  页岩
- iron, powder: 26.678
  铁粉
- biowaste, kitchen and garden waste: 149.302
  食品废物
- Construction waste: 42.982
  剩余废物。法规规定，木材、石灰土、砖块和陶瓷应作为RW进行分类处理。
- hard coal; 26.3 MJ/kg: 87.5
  煤炭
- Electricity: 218.455
  电力。各阶段的耗电量是根据水泥生产的电力消耗指标进行计算的(Wang, 2013)。背景过程数据来自GaBi数据库：electricity production, “CN: Electricity grid mix PE”。
- domestic waste, for incineration: 47.424
  RDFCDW：利用分类后的城市生活垃圾（CDW）制备的垃圾衍生燃料（RDF）。用于熟料生产的替代燃料。计算RDFCDW的热值：本研究考虑的生活垃圾来自城市和农村地区。根据城乡人口比例（分别为61.51%和38.49%）（国家统计局，2020b）和垃圾组成（Li等，2018），可以得到城乡一体化垃圾的组成。经过法规要求的分类后，可以得到可燃和不可燃垃圾的组成。给出了生活垃圾和RDFCDW的组成。使用公式计算了RDFCDW的热值。对于普通国际TSR（Bourtsalas等，2018），选择了RDFCDW的替代率为30%。使用公式计算了RDFCDW的消耗量。LHV=HHV×(1-MC)-MC×44/18×10^3，MC=∑_j▒f_j c_j，HHV=∑_j▒〖Q_j c_j 〗。其中LHV是RDFCDW的低位发热值（kJ/kg），44是水蒸气蒸发的潜热（kJ/mol），18是水的分子量，MC是RDFCDW的水分含量（%），fj是RDFCDW中第j个组分的水分含量（纸张为43.2%，塑料为43.5%，木材为44.2%，石灰为0%），HHV是RDFCDW的高位发热值（kJ/kg），Qj是RDFCDW中第j个组分的热值（纸张为15656 kJ/kg，塑料为39003 kJ/kg，木材为22128 kJ/kg，石灰为0 kJ/kg），cj是RDFCDW中第j个组分的比例（%）。m_(RDF_CDW )=(30%×"q" )/LHV，其中m_(RDF_CDW )是水泥窑中RDFCDW的消耗量（kg），30%是TSR，q是熟料生成的热耗量（kJ/kg）。

## Outputs
- carbon dioxide (fossil): 682.586
  CO2。E_(CO_2 )=E_"coal" +E_(CaCO_3 ), E_coal=NCV×FC×CC×OF×44/10, E_(C"a" CO_3 )=(FR_1-FR_10)×44/56+(FR_2-FR_20)×44/40. 其中，E_(CO_2 )表示水泥窑炉的CO2排放量（t），E_"coal"表示煤燃烧的CO2排放量（t），E_(CaCO_3 )表示原材料的碳酸盐分解引起的CO2排放量（t）， NCV是煤炭的低位热值（19.570 GJ/t），FC是煤炭的消耗量（t），CC是煤炭单位热值的碳含量（0.0261 t C/GJ），OF是煤炭的碳氧化率（98%），FR1是熟料中CaO的含量（%），FR10是熟料中非碳酸盐分解产生的CaO的含量（%），FR2是熟料中MgO的含量（%），FR20是熟料中非碳酸盐分解产生的MgO的含量（%），44/56和44/40分别是CO2和CaO、MgO之间的分子量转换因子。FR_10=(FS_10)/((1-L)×F_"c" ), FR_20=(FS_20)/((1-L)×F_"c" ). 其中，Fc是熟料中非碳酸盐形式的煤灰含量的转换因子（1.04），FS10是生料中非碳酸盐形式的CaO含量（%），FS20是生料中非碳酸盐形式的MgO含量（%）。FS_10=(∑_"n" ▒〖(m_n×r_10n)〗)/m, FS_20=(∑_"n" ▒〖(m_n×r_20n)〗)/m.其中，mn是第n个除石灰石外的原材料的质量（kg），r10n是第n个除石灰石外的原材料中的CaO含量（%），r20n是第n个除石灰石外的原材料中的MgO含量（%），m是熟料消耗量（kg）。
- sulfur oxides: 0.316783
  SOx。P_(SO_2 )=64/80×"m"×SO_3 (1-X)×〖10〗^3, 其中 P_(SO_2 ) 表示水泥窑中的SO2排放量（千克），64/80是SO2与SO3的分子量比，m是熟料消耗量（吨），SO3是生料中的SO3含量（%），X是生料中的SO3吸收率（88%）。
- Nitrogen oxides: 0.9275
  NOx。P_(NO_x )=(R_Y×16+R_L×7)×m_coal×〖10〗^(-3)，其中 P_(NO_x ) 表示水泥窑中的NOx排放量（千克），R_L和R_Y分别是旋转窑和预煅器中使用的燃料比例（分别为0.6和0.4），m_coal是熟料生产中的煤炭消耗量（千克）。

## Data selection and combination
首先假定原材料消耗比例，然后根据公式计算煤的消耗量、煤灰掺入率、生料配比、点火后生料配比、熟料配比以及熟料质量参数，包括石灰饱和度系数（KH）、硅酸盐模数（SM）和铝酸盐模数（IM）。熟料质量参数为KH=0.89±0.02，SM=2.5±0.1，IM=1.5±0.1。用公式计算了湿物料的数量。各阶段的电力消耗按水泥生产的电力消耗指数计算。

## Use advice
使用本数据集的用户应确保在水泥窑替代传统燃料过程中考虑RDF的热值和燃烧特性。需监控并保持熟料的质量参数，如石灰饱和度系数（KH）、硅酸盐模数（SM）和铝酸盐模数（IM）以及热替代率（TSR）在规定的限度内，避免对熟料质量产生不良影响。对于原材料消耗量的计算，尤其是原料中替代原料的比例也至关重要，因为这会影响整个过程的物料用量和能效。用户应根据水泥生产的电力消耗指数计算每个生产阶段的电力消耗，并且认识到该过程中废水的生成量可以忽略不计。环境排放或废物的评估应符合所述系统边界：煤粉制备、生料制备和熟料煅烧。

## Review details
清单： 内部审查通过几个迭代步骤完成，涉及原始数据验证、原始数据记录、代表性、完整性、与 ISO 14040 和 14044 有关的建模的一致性。

## Data sources
- Xuemin Liang, Wenling Dang, Guangling Yang, & Yueling Zhang. (2023). Environmental feasibility evaluation of cement co-production using classified domestic waste as alternative raw material and fuel: A life cycle perspective. Journal of Environmental Management 326, 116726.
