# 玻璃生产 ;有机玻璃单体MMA生产;单体MMA

Dataset: ILCD process, Unit process, single operation
Geography: JX-CN
Classification: Unit processes / Materials production / Glass and ceramics
Generated by: 和夏夏, 18616148319@163.com
Owner: 天工LCI数据工作小组
Review: Dependent internal review by 天工LCI数据工作小组
Amounts: no units in this file; such an amount is in the reference unit of its flow, which a separate flow dataset defines
copyright: false
licenseType: Free of charge for all users and uses

## General comment
甲基丙烯酸甲酯（MMA）单体主要用于生产聚甲基丙烯酸甲酯（PMMA），通常被称为亚克力或有机玻璃。PMMA广泛用于需要透明度和高强度的应用中，如灯具、玻璃的防碎替代品、建筑材料、汽车部件和各种消费品。

## Reference product
- methyl methacrylate: 1000; measured

## Inputs
- Electricity: 476.64; measured
- methyl methacrylate: 997.513; measured
- organic waste (unspecified): 2.487; measured

## Outputs
All rows: measured
- methyl methacrylate: 981.4
- freshwater: 1.5
- methanol: 9.5
- methacrylic acid: 1
- methacrylate: 6
- organic waste (unspecified): 0.6

## Use advice
使用此LCA数据时，用户应确保包括了生产MMA以及其后续聚合成PMMA所需的全部能源。重要的是要考虑上游影响，例如原材料的提取和加工。为了提高准确性，考虑地理位置和技术细节，因为它们会显著影响环境足迹。除非研究特别包括了产品生命周期末端情景，否则排除回收过程。

## Review details
清单： 内部审查通过几个迭代步骤完成，涉及原始数据验证、原始数据记录、代表性、完整性、与 ISO 14040 和 14044 有关的建模的一致性。

## Data sources
- 江西旺达新材料有限公司年产20000吨有机玻璃原料生产项目
