# 水泥生产;水泥, 通用硅酸盐水泥;新型干法窑;钢铁工业固废

Dataset: ILCD process, Unit process, black box
Geography: SD-CN
Reference year: 2012
Classification: Unit processes / Materials production / Other mineralic materials
Generated by: #REF!, ysqsophia@gmail.com
Owner: 天工LCI数据工作小组
Review: Dependent internal review by 天工LCI数据工作小组
Amounts: no units in this file; such an amount is in the reference unit of its flow, which a separate flow dataset defines
copyright: false
licenseType: Free of charge for all users and uses

## General comment
采用新型干法窑工艺，钢铁工业固废作为水泥生产替代原料生产出的水泥产品。

## Geography
山东省代表平均生产水平的典型水泥企业

## Technical purpose
该数据集描述了通用硅酸盐水泥的生产过程，该过程采用新型干法窑，并使用来自钢铁工业的固体废物作为替代原料。由此过程生产的水泥用于各种建筑应用，是建筑、基础设施和其他土木工程项目中混凝土的基本组成部分。

## Model description
1t再生水泥为功能单位；研究的地理范围为山东地区，系统边界是水泥生产所涉及到的全部直接过程，所有关于原料开采、加工、能源生产以及生产设备、运输、销售和使用阶段等辅助环节的资源、能源消耗和环境排放均暂不考虑。

## Reference product
- cement, common portland cement: 1000
  单位通用水泥

## Inputs
- limestone, crushed, for mill: 670
  石灰石
- clay: 120
  粘土
- iron, powder: 27
  铁质校正材料
- gypsum stone (CaSO4-dihydrate): 60
  石膏
- mixed materials, mineral: 200
  混合材料
- Waste, from steel production: 400
  钢铁工业固废。钢铁工业固废含有大量可回收的金属和石灰石等原生矿物。
- hard coal: 92.398
  原煤。煤主要消耗在水泥烧成阶段的供热环节。文献中煤耗按照低位发热值转换成标准煤耗量（0.066t），换算公式为1kg原煤=0.7143kg标准煤。这里换算为原煤进行录入。
- Electricity: 0.225554
  电。电力主要来自火力发电。文献中电耗换算为标准煤（0.051t）。换算公式为1kW·h=0.814kg标准煤。这里换算为电进行录入。

## Outputs
- sulfur dioxide: 0.3
  SO2
- particles (> PM10): 2
  粉尘，未标明粒径，按PM>10处理。
- particles (> PM10): 0.23
  烟尘，未标明粒径，按PM>10处理。
- Nitrogen oxides: 1.11
  NOx
- carbon dioxide (fossil): 427
  CO2。CO2排放量一般不做检测，根据其产生来源，按公式推理计算获得。水泥生产过程中释放出的CO2主要产生于燃煤及水泥生产原料石灰石的分解。E=E1+E2，式中：E为水泥生产过程中CO2排放量（kg）；E1为燃煤过程中CO2排放量（kg）；E2为水泥生产原料石灰石分解产生的CO2排放量（kg）。E1可采用热量碳当量法计算，1J热量释放的CO2量相当于8.494342E-8kg，1kg标准煤相当于2.93E+7J热量（标准煤的热值），则标准煤的质量与热值相乘就是标准煤燃烧所产生的热量，即E1计算公式如式:E1=煤耗（标准煤）×（2.93E+7）×（8.494342E-8）≈煤耗（标准煤）×2.489，E2可根据碳酸钙分解平衡方程式计算，假设1kg石灰石中CaO含量按50%计算，得出CO2排放量估算公式为CaCO3→CaO+CO2↑，E2=石灰石消耗量×（50%xCO2分子量/CaO分子量CO%）

## Data selection and combination
山东省水泥工业在全国占有重要地位，连续十几年处于全国第1位，每年水泥产品占全国的11%～13%，成为名副其实的水泥大省。因此，数据主要来自山东省代表平均生产水平的典型水泥企业的生产数据及地方环保部门监测数据。

## Use advice
使用此数据集的用户应该注意，数据集代表的是山东省典型水泥企业的平均生产水平，并且包括来自当地环境监测的数据。系统边界涵盖了以钢铁工业固体废物为替代原料的水泥生产所涉及的所有直接过程。但是，目前尚未考虑原材料开采、加工、能源生产、生产设备、运输、销售和使用阶段的能源消耗及环境排放的辅助过程。为了获得准确的生命周期评估(LCA)结果，用户应确保这些因素得到单独核算，或确保研究的边界条件与他们的LCA目标兼容。

## Review details
清单： 内部审查通过几个迭代步骤完成，涉及原始数据验证、原始数据记录、代表性、完整性、与 ISO 14040 和 14044 有关的建模的一致性。

## Data sources
- 邓琪 & 陈吉宁. (2012). 钢铁工业固废应用于水泥生产的降耗与减排. 生态环境学报, 21(2), 298–302.
