# 水泥生产;水泥, 未具体说明;混合固废

Dataset: ILCD process, Unit process, black box
Geography: CN
Classification: Unit processes / Materials production / Other mineralic materials
Generated by: #REF!, ysqsophia@gmail.com
Owner: 天工LCI数据工作小组
Review: Dependent internal review by 天工LCI数据工作小组
Amounts: no units in this file; such an amount is in the reference unit of its flow, which a separate flow dataset defines
copyright: false
licenseType: Free of charge for all users and uses

## General comment
磷石膏制备生态水泥。实验室数据。在磷石膏基生态水泥试验中，主要原料主要有以下几种：磷石膏、粉煤灰、消石灰、水泥和早强剂。先将磷石膏放入温度为 45°C烘箱中烘干至恒重以去除磷石膏中的游离自由水，然后将烘干后的磷石膏放到高温电炉中煅烧一定的时间。将煅烧好的磷石膏放入行星式球磨机中球磨 6min，随后将球磨好的磷石膏过 0.08mm 的标准筛。在准备磷石膏的同时，粉煤灰和消石灰也过 0.08mm 的筛子，然后放入干燥箱中烘干。实验中所用的水泥也需要烘干。上述原料预处理完毕后，通过设计好的配比计算配料，然后再将配好的混合料在球磨机中球磨 3min 来混合均匀。混合均匀后的混合料均化 2-3 小时后，称量倒入 JJ-5 型行星式水泥胶砂搅拌机进行搅拌，用 ZS-15 型水泥胶砂振实台振动成型，成型好的水泥试块放置 24h 后脱模，自然养护，达到一定的龄期后进行强度检测。

## Technology and included processes
先将磷石膏放入温度为 45°C烘箱中烘干至恒重以去除磷石膏中的游离自由水，然 后将烘干后的磷石膏放到高温电炉中煅烧一定的时间。将煅烧好的磷石膏放入行星式 球磨机中球磨 6min，随后将球磨好的磷石膏过 0.08mm 的标准筛。在准备磷石膏的同 时，粉煤灰和消石灰也过 0.08mm 的筛子，然后放入干燥箱中烘干。实验中所用的水泥 也需要烘干。上述原料预处理完毕后，通过设计好的配比计算配料，然后再将配好的 混合料在球磨机中球磨 3min 来混合均匀。混合均匀后的混合料均化 2-3 小时后，称量 倒入 JJ-5 型行星式水泥胶砂搅拌机进行搅拌，用 ZS-15 型水泥胶砂振实台振动成型， 成型好的水泥试块放置 24h 后脱模，自然养护，达到一定的龄期后进行强度检测。

## Technical purpose
所述的磷石膏基生态水泥旨在用于实验室环境中的实验和研究。该过程旨在利用磷石膏和粉煤灰等工业副产品，调查可持续建筑材料的生产和应用。一旦该生态水泥的力学属性和可持续性证书完全开发和测试，可以在建筑中使用。

## Model description
实验室开发的 1t 磷石膏基生态水泥作为功能单位。磷石膏基生态水泥研究的系统范围边界界定为磷石膏的煅烧、熟料粉磨和生态水泥制备，最后到水泥储存结束。

## Reference product
- cement, unspecified: 1000
  磷石膏基生态水泥。来自实验室数据。

## Inputs
- phosphogypsum: 340
  磷石膏。来自实验室数据。实验室所用磷石膏由湖北襄樊乾泰化工有限公司提供，颜色呈深灰色，为类似泥沙状混合物，其含水率为21.66%。
- ash: 430
  粉煤灰。来自实验室数据。本实验所使用的粉煤灰来自平顶山，为干排灰。
- hydrated lime dry slaked: 10
  消石灰。来自实验室数据。消石灰是生石灰加水消化后的产物。
- cement, ordinary portland cement, 32.5MPa: 200
  P.O.32.5。来自实验室数据。实验所用水泥为PO32.5普通硅酸盐水泥。
- early strength agent: 20
  早强剂。来自实验室数据。实验所用早强剂为自制复合外加剂。
- hard coal; 26.3 MJ/kg: 100
  煤。来自实验室数据。
- Electricity: 165.6
  电。来自实验室数据。

## Outputs
- carbon dioxide (fossil): 257
  CO2。来自实验室数据。

## Use advice
该数据集代表了磷石膏基生态水泥的实验室规模制备，应在研究与开发的背景下用于生命周期评估（LCA）。用户应注意，过程数据来源于受控的实验室条件，并可能不直接对应于工业规模过程。在放大过程时可能需要调整数据。数据集包括原材料准备的考虑，如干燥和磨碎，以及处理阶段直至但不包括所生产水泥的使用阶段。用户应确保在与其他LCA数据集进行比较时系统边界的一致性，并应在研究范围扩展到水泥储存之外时，纳入产品寿命终结的考虑。

## Review details
清单： 内部审查通过几个迭代步骤完成，涉及原始数据验证、原始数据记录、代表性、完整性、与 ISO 14040 和 14044 有关的建模的一致性。

## Data sources
- 张乐. (2009). 磷石膏基生态水泥的开发及其生命周期评价研究 [硕士, 华中科技大学].
