# 净合成气生产 ; 净合成气 ; 粗合成气净化路线 ; 粗合成气

Dataset: ILCD process, Unit process, black box
Geography: ZJ-GD-CN
Reference year: 2018
Classification: Unit processes / Energy carriers and technologies / Energetic raw materials
Functional unit: A functional unit is defined as 4.82 ton of syngas product
LCI method principle: Attributional
LCI method approaches: Allocation - mass
Generated by: 任亚楠, renyn15@tsinghua.org.cn
Owner: 天工LCI数据工作小组
Review: Dependent internal review by 天工LCI数据工作小组
Amounts: no units in this file; such an amount is in the reference unit of its flow, which a separate flow dataset defines
copyright: false
licenseType: Free of charge for all users and uses

## General comment
ID11丙烯生产;丙烯;煤制烯烃路线;煤;下属过程3

## Geography
催化裂化路线的案例工厂来自中国石化湛江东兴石油化工有限公司。企业位于广东省湛江市，其催化裂化制烯烃工艺建于2018年，丙烯年产能11.6万吨。

## Time period
工艺建于2018年

## Technical purpose
该工艺生产的合成气产品是工业应用的原料，包括但不限于通过煤制烯烃路线生产如丙烯等化学品。中国石化湛江东兴石油化工有限公司的催化裂化制烯烃工艺专为丙烯生产设计，年产能为11.6万吨，可用于需要丙烯作为原材料的各种化学合成操作和制造过程。

## Model description
考虑了各个子阶段涉及的所有相关投入原材料、能源、电力、蒸汽、水和辅助化学品的消耗，产出考虑了丙烯和副产品(如丙烷脱氢工艺生产的C4产品。采用质量分配法量化产品丙烯和副产品之间的环境负荷。此外，本模型还考虑了各工艺的废物排放。本研究注重于不同丙烯生产工艺的环境影响分析，因此，丙烯烃利用及其产品的报废处理以及、基础设施建设和以及设备维护不在本次评价边界范围之内。

## Reference product
- Syngas: 4820; measured
  净化气

## Inputs
All rows: measured
- Crude Syngas: 14640
  粗合成气
- Methanol: 2.83007
  甲醇
- sodium hydroxide: 0.5751
  氢氧化钠
- nitrogen: 1064.68
  低压氮气
- natural gas: 13.8
  燃料气
- process steam: 230
  蒸汽
- freshwater: 2590
  新鲜水
- Electricity: 1544.36
  电

## Outputs
All rows: measured
- sulphur: 50
  液硫
- carbon dioxide (fossil): 5380
  CO2
- carbon monoxide (fossil): 3.90686
  CO
- hydrogen sulfide: 0.01907
  H2S
- nitrous oxide: 0.01846
  NOx
- sulfur dioxide: 0.01943
  SO2
- chemical oxygen demand: 0.35073
  COD
- biological oxygen demand: 0.20976
  BOD5
- Dissolved solids: 0.00138
  TDS

## Data selection and combination
丙烯生产工艺详细的投入产出数据来自企业公开的环境影响评价报告，包括原料和辅料投入、能源和资源消耗，以及废气、废水和固体废物的排放。

## Use advice
在使用此生命周期评估数据集时，请确保考虑到生产合成气和丙烯过程中所涉及各子阶段的所有相关投入，如原材料、能源、电力、蒸汽、水和辅助化学品。特别注意使用质量分配法对主产品和副产品之间的环境负荷进行分配。还应包括每个工艺的废物排放。请注意，此评估不涵盖使用丙烯生产的产品的报废处理，以及基础设施和设备维护。应将4.82吨作为一个功能单元，根据您具体应用所需，将数据按比例放大或缩小。

## Review details
清单： 内部审查通过几个迭代步骤完成，涉及原始数据验证、原始数据记录、代表性、完整性、与 ISO 14040 和 14044 有关的建模的一致性。

## Data sources
- 吕琳. 丙烯产品环境负荷及温室气体减排的碳税政策. (大连理工大学, 2022).
