# Wasteandscrapwire|Wasteplastic,scrapnon-ferrousmetal|Crushing + water separation|All sizes / /|废电线|废塑料、废有色金属|破碎+水选|所有规模

Dataset: ILCD process, Partly terminated system
Geography: CN
Reference year: 2019
Classification: Materials production / Other mineralic materials
Generated by: The data was created by the Office of the Second National Pollution Source Census of the Ministry of Ecology and Environment, and the data was organized by the TianGong Plan team for ILCD format / 生态环境部第二次全国污染源普查工作办公室创建数据，天工计划团队常慧敏整理数据为ILCD格式
Amounts: no units in this file; such an amount is in the reference unit of its flow, which a separate flow dataset defines
copyright: false

## Technology and included processes
the Technical of end-of-pipe management technology for pollution arsenicis/，The formula for calculating the actual operation rate (k-value) of the end-of-pipe treatment facility is /
污染物指标砷的末端治理技术是/，末端治理设施实际运行率（k值）计算公式为/

## Reference product
- landfill of plastic waste: 1000; input; calculated
  原文件中描述污染物类别为Product，污染物指标为废塑料、废有色金属，此处对其进行了匹配工作，将其匹配到LCAflow库里面相最符合的流

## Outputs
All rows: calculated
- chemical oxygen demand: 0.085
  原文件中描述污染物类别为废水，污染物指标为化学需氧量，此处对其进行了匹配工作，将其匹配到LCAflow库里面相最符合的流
- Petroleum-related waste: 0.00492
  原文件中描述污染物类别为废水，污染物指标为石油类，此处对其进行了匹配工作，将其匹配到LCAflow库里面相最符合的流
- cadmium: 9.6e-6
  原文件中描述污染物类别为废水，污染物指标为镉，此处对其进行了匹配工作，将其匹配到LCAflow库里面相最符合的流
- lead: 0.00099
  原文件中描述污染物类别为废水，污染物指标为铅，此处对其进行了匹配工作，将其匹配到LCAflow库里面相最符合的流
- Chromium: 1.82e-5
  原文件中描述污染物类别为废水，污染物指标为铬，此处对其进行了匹配工作，将其匹配到LCAflow库里面相最符合的流
- arsenic: 4.91e-5
  原文件中描述污染物类别为废水，污染物指标为砷，此处对其进行了匹配工作，将其匹配到LCAflow库里面相最符合的流

## Data sources
- 第二次全国污染源普查产排污核算系数手册（试用版）,二级代码42,四级代码4210文件，在完整版文件中第2455页
