# 市政污泥处理与处置;湿污泥 含水率80%;填埋

Dataset: ILCD process, Unit process, single operation
Geography: CN
Classification: Unit processes / End-of-life treatment / Waste water treatment
Functional unit: In this paper, 1 t of 80% sludge with a moisture content is used as the functional unit for calculating environmental impact, resource consumption and economic cost.
Generated by: 金思甜, 2331276@tongji.edu.cn
Owner: 天工LCI数据工作小组
Review: Dependent internal review by 天工LCI数据工作小组
Amounts: no units in this file; such an amount is in the reference unit of its flow, which a separate flow dataset defines
copyright: ['opt4ROkqig']
licenseType: Free of charge for all users and uses

## General comment
污泥填埋会产生大量的渗滤液，渗滤 液中各种成分，特别是重金属会对周边的土壤和水环境产生较大的影响，因填埋场渗滤液数据较难获得， 本文渗滤液的产生量根据文献估算为污泥质量的 5%，各成分含量参考污水处理厂污泥机械压缩产生的滤液。

## Technology and included processes
采用传统填埋工艺，污泥经简单灭菌处理后直接填埋。

## Technical purpose
市政污泥处理和处置的单元过程，适用于湿污泥含水率为80%的填埋作业。该过程是旨在管理和中和市政污水污泥的单元操作，使其适合安全地填埋处置。这包括降低污泥含水率的脱水程序，并为后续的处理或处理阶段做准备。

## Reference product
- Sludge: 1000; input; estimated
  1 t 含水率 80%污泥

## Outputs
All rows: calculated
- carbon dioxide (biogenic): 49.62
  原文未区分biogenic和fossil，根据专家判断此处为biogenic。
- methane (biogenic),methane (biogenic): 14.87
  原文未区分biogenic和fossil，根据专家判断此处为biogenic。
- nitrous oxide: 0.001
- Nitrogen oxides: 0.13
- sulfur dioxide: 0.03
- carbon monoxide (biogenic): 0.02
  原文未区分biogenic和fossil，根据专家判断此处为biogenic。
- hydrocarbons (unspecified): 0.002
- particles (PM10): 0.005
- hydrogen sulfide: 0.006
- ammonia: 0.004
- chemical oxygen demand: 0.13
- nitrogen, total (excluding N2): 0.009
- phosphorus, total: 0.001
- ammonium: 0.006
- mercury: 3e-7, 0.0008 (2 entries)
- lead: 2e-5, 0.04 (2 entries)
- cadmium: 8e-7, 0.002 (2 entries)
- nickel: 6e-6, 0.007 (2 entries)
- zinc: 6e-5, 0.4 (2 entries)
- copper: 7e-6, 0.04 (2 entries)
- chromium: 8e-6, 0.06 (2 entries)
- tin: 0.005, 0.005 (2 entries)
- Waste (solid): 750

## Use advice
在使用本数据集进行生命周期评价时，必须确保分析边界准确反映了含有80%湿度的市政污泥的填埋处置阶段。在评估与填埋过程相关的环境影响、资源消耗和经济成本时，应始终将1吨污泥的功能单位贯穿于整个研究。应考虑任何产生的排放、使用的能量和材料以及直至填埋点的相关活动。应特别注意污泥成分、治理技术、和规章制度的地区差异。

## Review details
清单： 内部审查通过几个迭代步骤完成，涉及原始数据验证、原始数据记录、代表性、完整性、与 ISO 14040 和 14044 有关的建模的一致性。

## Data sources
- 袁言言,肖军,黄瑛等.基于LCA和AHP的污泥处理技术的综合性能评价[J].环境科学与技术,2015,38(S1):263-268.
