# 湿蒸法棉布染整加工;印染棉布;拉幅定型

Dataset: ILCD process, Unit process, single operation
Geography: SZ-JS-CN
Reference year: 2012
Classification: Materials production / Other materials
Generated by: 段颖凡, 1300925579@qq.com
Owner: 天工LCI数据工作小组
Review: Dependent internal review by 天工LCI数据工作小组
Amounts: no units in this file; such an amount is in the reference unit of its flow, which a separate flow dataset defines
copyright: false
licenseType: Free of charge for all users and uses

## General comment
煤被用于蒸汽和导热油锅炉中以分别产生蒸汽和较高的操作温度。根据所调研企业的清洁生产报告，两种类型锅炉煤消耗量比为17:1。烧毛和拉幅定型两个工序需要消耗煤通过导热油锅炉加热汽油以提供油温，假设其耗煤量为1:1。而汽油作为导热介质在相应管道中循环流动，基本无损耗也不产生相应的污染物排放，将汽油生产过程的物料使用和污染物排放情况平均分配到这两个过程中。

## Geography
本研究选取江苏省某印染企业为重点调研对象，该企业位于长三角经济圈中的常熟。

## Technical purpose
湿蒸法棉布染整加工是用于纺织品处理的一种工艺，特别适用于印染棉质材料。过程中的拉幅定型步骤包括拉伸和热定型布料，以达到所需的尺寸稳定性和整理效果。煤炭作为能源在蒸汽和导热油锅炉中使用，用于产生蒸汽以及维持烧毛和拉幅定型等过程所需的高操作温度。

## Reference product
- Cotton Fabric: 167; measured

## Inputs
- Electricity: 967; measured
- Standard coal: 872; measured
- Crude coal: 306; calculated
- Cleaned coal: 758; calculated
- Fuel Oil: 6.53; calculated
- heavy fuel oil: 1.96; calculated
- diesel: 8.98; calculated
- Coke Oven Gas: 12; calculated
- natural gas: 0.153; calculated
- Gasoline (regular): 1400; measured
- Softener: 250; measured
- river water: 3100; measured
- Water (fresh water): 555; measured

## Outputs
- carbon dioxide: 947; calculated
- carbon monoxide: 0.739; calculated
- sulfur dioxide: 4.96; calculated
- methane: 3.2; calculated
- Nitrogen oxides: 1.436; calculated
- nitrous oxide: 0.0102; measured
- Dust (unspecified, from stack): 2.51; calculated
- ammonia: 2.49e-5; measured
- non-methane volatile organic compounds: 0.00357; measured
- waste water - untreated: 1850; measured
- chemical oxygen demand: 2.12; calculated
- Suspended solids, unspecified: 0.282; calculated
- volatile organic compound: 0.265; calculated
- lead: 2.4e-5; calculated
- mercury: 5.05e-7; calculated
- fluorine: 4.55e-6; calculated
- cadmium: 8.91e-7; calculated
- arsenic: 2.06e-5; calculated

## Use advice
在使用此数据集进行生命周期评估时，应根据被调研企业的清洁生产报告，考虑蒸汽和导热油锅炉之间煤炭消耗量的比例为17:1。假设烧毛和拉幅定型的煤炭消耗量相等，这是因为需要通过导热油锅炉加热油。汽油作为在管道中循环的导热介质，基本损耗可以忽略不计，并且不产生污染物排放。将汽油生产过程的物料使用和污染物排放均匀分配到这两个过程中。此单元过程数据基于对位于江苏省长三角经济区中的常熟市某印染企业的案例研究。

## Review details
清单： 内部审查通过几个迭代步骤完成，涉及原始数据验证、原始数据记录、代表性、完整性、与 ISO 14040 和 14044 有关的建模的一致性。

## Data sources
- 朱亚楠. 棉布连续轧染工艺生命周期环境影响评价. (南京大学, 2012).
