# 熟料生产;熟料;新型悬浮预热器

Dataset: ILCD process, Unit process, single operation
Geography: CN
Classification: Materials production / Inorganic chemicals
Generated by: 杨思琪, ysqsophia@gmail.com
Owner: 天工LCI数据工作小组
Review: Dependent internal review by 天工LCI数据工作小组
Amounts: no units in this file; such an amount is in the reference unit of its flow, which a separate flow dataset defines
copyright: false
licenseType: Free of charge for all users and uses

## General comment
在新型悬浮预热器（New suspension preheater，NSP）窑中，生料的研磨和熟料的煅烧紧密地结合成一个完整的程序阶段。此外，在煅烧过程中窑内剩余的热量被用于磨料过程中通过添加煤粉干燥或烘烤原材料。NSP窑是一个高效、生产连续性好、产量高、总能耗低的生产系统。此外，NSP窑的除尘和降噪设备更好，生产系统可以大大减少资源消耗和污染物排放。

## Technology and included processes
Compared with the shaft kiln, the NSP kiln is a production system of high efficiency, good production continuity, high output, and low overall energy consumption. In addition, with better dust collection and noise elimination equipment, the production system of the NSP kiln can greatly reduce the consumption of resources and pollutant emissions.

## Technical purpose
新型悬浮预热器（NSP）窑过程是一种高效的熟料生产系统。它在水泥工业中被用于将原料准备和煅烧成熟料。所产生的熟料是制造不同类型水泥的关键组成部分。该系统结合了一个先进的生产阶段，紧密集成了研磨和煅烧过程。NSP窑特别适合于持续、高产量的生产环境，实现了高水平的产出，同时保持较低的能耗，并通过改进的除尘和降噪设备最小化环境影响。

## Model description
系统边界包括生料的制备阶段（包括磨碎）和产生熟料的煅烧阶段。

## Reference product
- clinker: 1000
  水泥熟料

## Inputs
- limestone, crushed, for mill: 1497.2
  石灰石
- clay: 276.5
  黏土
- iron, powder: 80.8
  铁粉
- Water (fresh water): 45.6
  水（水含量）：输入材料中的水。
- oxygen: 400
  O2
- hard coal; 26.3 MJ/kg: 150
  煤炭

## Outputs
- particles (> PM10): 4
  灰尘，未标明粒径，按PM>10处理。
- carbon dioxide: 799.8
  二氧化碳
- sulfur dioxide: 0.6
  SO2
- Nitrogen oxides: 2.4
  NOx
- water vapour: 45.6
  蒸汽
- Waste, solid, from cement production: 103.9
  其他物质。原文没有指明是什么物质，所以我们假设它是固体废物。

## Use advice
在使用这个数据集时，应注意到指定的系统边界 - 生料的制备阶段（包括磨碎）和产生熟料的煅烧阶段。用户应将这两个阶段包含在他们的生命周期评估中。需要注意的是NSP窑过程的高效率和低能耗；因此，与其他类型的窑比较时，应考虑这些属性。另外，由于先进的除尘和降噪技术，环境影响因素在生命周期评估模型中应相应调整。在磨料阶段使用煤粉进行干燥或烘烤的具体用途也应适当反映。

## Review details
清单： 内部审查通过几个迭代步骤完成，涉及原始数据验证、原始数据记录、代表性、完整性、与 ISO 14040 和 14044 有关的建模的一致性。

## Data sources
- Dan Hu, Zhen Guo, Zhen Wang, & Qiang Xiao. (2015). Metabolism analysis and eco-environmental impact assessment of two typical cement production systems in Chinese enterprises. Ecological Informatics 26, 70–77.
