# 水泥生产 ; 整个风电场

Dataset: ILCD process, Unit process, single operation
Geography: NMG-CN
Reference year: 2017
Classification: Materials production / Other mineralic materials
Functional unit: The functional unit is 1.5 MW wind turbine
LCI method principle: Attributional
LCI method approaches: Allocation
Generated by: 赵云志, ll10088@163.com
Owner: 天工LCI数据工作小组
Review: Dependent internal review by 天工LCI数据工作小组
Amounts: no units in this file; such an amount is in the reference unit of its flow, which a separate flow dataset defines
copyright: false
licenseType: Free of charge for all users and uses

## General comment
该数据集提供了与水泥生产和整个风电场运行相关的信息。它特别适用于分析具有33台国产1.5兆瓦风力涡轮机风电场的环境影响和替代效应，用于可再生能源发电。这些信息可支持与风力发电可持续性相关的研究和开发，特别是在风力装置普遍的内蒙古东北部等地区。

## Geography
风电功率参数的数据来自Wang ( 2012 )。以装有33台国产1.5兆瓦( MW )风电机组的风电场为案例，分析其环境影响及其替代效应。该风电场位于我国风电装机最多的省份- -内蒙古东北部。

## Reference product
- Cement: 1; article inperiodical

## Inputs
- Energy, geothermal, converted: 6.72672; article inperiodical

## Outputs
- carbon dioxide: 604; article inperiodical
- sulfur dioxide: 0.372; article inperiodical
- nitrous oxide: 1.92; article inperiodical
- particles (PM2.5 - PM10): 0.341; article inperiodical

## Deviations from the LCI method approaches
风电的生命周期清单如下所示。生产制造阶段包括风电机组、变电站、电缆的生产，这些设备消耗大量能源，排放污染物( Xue et al . , 2015)。

## Use advice
使用该数据集的用户在将环境影响和替代分析应用到其他地区时应考虑地理特定性。应考虑在评估中包含或排除回收实践的方法学建议，以及对风力涡轮机使用阶段行为的建模。用户应注意，生命周期清单数据覆盖了生产和制造阶段，包括风力涡轮机、变电站和电缆的生产及其相关的能源消耗和排放，详情请参阅Xue等人(2015)的论述。评估的功能单元被定义为1.5兆瓦风力涡轮机。

## Review details
清单： 内部审查通过几个迭代步骤完成，涉及原始数据验证、原始数据记录、代表性、完整性、与 ISO 14040 和 14044 有关的建模的一致性。

## Data sources
- Li, H., Jiang, H.-D., Dong, K.-Y., Wei, Y.-M. & Liao, H. A comparative analysis of the life cycle environmental emissions from wind and coal power: Evidence from China. Journal of Cleaner Production 248, 119192 (2020).
