# 稀土氧化物提取;稀土氧化物;稀土氧化物工艺;白云鄂博

Dataset: ILCD process, Unit process, single operation
Geography: NMG-CN
Reference year: 2014
Classification: Unit processes / Materials production / Non-energetic raw materials
Functional unit: The scope of the LCA is cradle-to-gate and the functional unit was chosen as 1 kg of REO.
LCI method principle: Attributional
LCI method approaches: Allocation - market value; Allocation - exergetic content
Generated by: 汪涛, twang@iue.ac.cn
Owner: 天工LCI数据工作小组
Review: Dependent internal review by 天工LCI数据工作小组
Amounts: no units in this file; such an amount is in the reference unit of its flow, which a separate flow dataset defines
copyright: false
licenseType: Free of charge for all users and uses

## General comment
白云鄂博工艺提取的稀土氧化物（REO）主要用于包括电子、磁铁、光学以及作为汽车和石化行业催化剂等各种高科技领域。这些氧化物是制造智能手机、计算机硬盘、风力涡轮机、混合动力和电动车辆以及LED灯等先进技术产品的必要组分。

## Geography
Bayan Obo (China)

## Technology and included processes
REO 生产的工艺链包括采矿，然后是选矿、煅烧、提取和焙烧阶段，见图 2。REO 生产的第一步是采矿，其中原矿石被爆破并运输以进一步精炼。从白云鄂博矿开采的原矿石由独居石和氟碳铈矿组成。

## Reference product
- chloride: 0.06; calculated

## Inputs
- hydrogen chloride: 1.366; calculated
  Nd2O3
- hydrogen chloride: 0.854; calculated
  Light
- hydrogen chloride: 1.604; calculated
  Medium
- hydrogen chloride: 6.418; calculated
  Heavy

## Outputs
- hydrogen chloride: 0.03; calculated

## Deviations from the LCI method approaches
Life cycle data was obtained from the Ecoinvent database, and mass-based-allocation was performed to partition the environmental impacts among crude ore and REO, as well as allocate the environmental impact among light, medium, heavy, and neodymium REOs. Two alternative allocations schemes, (I) market-based and (II) exegetic-based allocation, were considered as a means to partition the environmental impacts among REOs. The results for market- as well as exergetic-based allocation are provided in the Supporting Information. It is important to note that allocation based on market-value is the preferred method of the metals industry.23 When possible, Chinese-specificlifecycledatawas considered in the analysis; otherwise, European life cycle inventory (LCI) databases were used. The LCA results for REO production presented in this study provide a conservative benchmark for the environmental profile of REE. Furthermore, the LCI and LCA results can be extended/applied to evaluate the production of individual REE and REE-based technologies and products.

## Use advice
使用这一LCA数据集的用户应主要采用金属行业推荐的基于市场价值的分配方法来划分生产的不同REOs之间的环境影响。 此外，应特别注意工艺链内的技术阶段，即采矿、选矿、煅烧、提取和焙烧。 建议用户在中国特定的生命周期数据可用时使用，以精确地反映区域环境影响。 但是，如果没有可用的数据，可以使用欧洲生命周期清单（LCI）数据集作为替代。 当使用数据集评估单个REE或基于REE的技术和产品的生产时，应考虑LCA结果的保守性。

## Review details
清单： 内部审查通过几个迭代步骤完成，涉及原始数据验证、原始数据记录、代表性、完整性、与 ISO 14040 和 14044 有关的建模的一致性。

## Data sources
- Zaimes, G. G., Hubler, B. J., Wang, S. & Khanna, V. Environmental Life Cycle Perspective on Rare Earth Oxide Production. ACS Sustainable Chem. Eng. 3, 237–244 (2015).
