# 采矿和原地浸出;氟碳铈矿路线;IAD

Dataset: ILCD process, Unit process, single operation
Geography: CN
Reference year: 2014
Classification: Energy carriers and technologies / Energetic raw materials
Functional unit: The functional unit of this study is the production of 1 kg of the basket REO from each corresponding mineralogical and processing route.
LCI method principle: Attributional
LCI method approaches: Allocation - market value
Generated by: 汪涛, twang@iue.ac.cn
Owner: 天工LCI数据工作小组
Review: Dependent internal review by 天工LCI数据工作小组
Amounts: no units in this file; such an amount is in the reference unit of its flow, which a separate flow dataset defines
copyright: false
licenseType: Free of charge for all users and uses

## General comment
南方七省的氟碳铈矿路线的采矿和原地浸出过程用于稀有土元素（REEs）的生产。这一特定工艺是所研究的整体稀土生产系统的一部分，对于提取稀土元素至关重要，稀土元素在制造高科技装置、磁铁、合金以及各种工业和消费产品中发挥着重要作用。

## Geography
南方七省

## Technology and included processes
在这项研究中，对稀土生产系统进行了分析，从采矿到溶剂萃取，其中包含沉淀和煅烧等产品精加工过程

## Reference product
- REO: 1; article inperiodical

## Inputs
All rows: article inperiodical
- Digger: 1.15
  excavation, hydraulic digger [allocatable product]
- Limestone: 0.005
- Ammonium sulfate: 8.25, 0.101 (2 entries)
- sulphuric acid: 0.525
- Ammonium bicarbonate: 3.35
- heat: 0.702
- Electricity: 10.5
- Land Transformation: 1.1
- water: 1
- mineral extraction site: 0.0955
- Land Transformation: 895
  to mineral extraction site
- lanthanum: 0.5305
- cerium: 0.062
- praseodymium: 0.109
- neodymium: 0.34
- samarium: 0.0885
- europium: 0.018
- gadolinium: 0.117
  Gadolinium
- gadolinium: 0.0135
  Terbium
- Dysprosium: 0.073
- Yttrium: 0.4315
- kaolinite: 0.765

## Outputs
- sulfate: 6.5; article inperiodical
- ammonia: 0.34; article inperiodical
- carbon dioxide (fossil): 0.46; article inperiodical
- aluminium: 1.88; article inperiodical

## Deviations from the LCI method approaches
In this study, the REE production system was analyzed from mining up to and including solvent extraction which contains product finishing processes such as precipitation and calcination (Fig. 1). The other categories assessed in the literature review were mineral type, radioactivity, waste treatment, and co-mining. For mineral type, it was noted that the mineralogy accounted for in each study was different, which makes comparison difficult. For radioactivity, we marked with an X those studies which exemplified radioactivity flows in the LCI (if provided). For waste, we distinguished those LCIs which quantified waste treatment flows. For co-mining, since all REE are co-products of each other, this column is meant to highlight the co-products in addition to REE.

## Use advice
在使用通过氟碳铈矿路线的稀土元素生产的生命周期评价数据集时，用户应考虑矿物学变异、放射性水平、废物处理实践和共产品产量的差异，因为这些因素可能显著影响环境影响评估。同时，注意方法论途径的不同可能对比较性很重要。给定的功能单元是1公斤一篮子稀土氧化物（REO）的生产;用户必须确保该单元与他们研究的范围一致，并且与预期用途相匹配，以避免评估结果中出现差异。对于生命周期清单（LCI）中的放射性流和废物处理流的包括或排除要特别注意。对于共产品，在您的研究范围内评估相关性和所包含的数量。

## Review details
清单： 内部审查通过几个迭代步骤完成，涉及原始数据验证、原始数据记录、代表性、完整性、与 ISO 14040 和 14044 有关的建模的一致性。

## Data sources
- Bailey, G. et al. Review and new life cycle assessment for rare earth production from bastnäsite, ion adsorption clays and lateritic monazite. Resources, Conservation and Recycling 155, 104675 (2020).
