# Powdereddetergent|Surfactants,causticsoda,sodiumsulfate,etc.|Powder spraying process②|All sizes / /|粉状洗涤剂|表面活性剂、烧碱、硫酸钠等①|喷粉工艺②|所有规模

Dataset: ILCD process, Partly terminated system
Geography: CN
Reference year: 2019
Classification: Materials production / Other mineralic materials
Generated by: The data was created by the Office of the Second National Pollution Source Census of the Ministry of Ecology and Environment, and the data was organized by the TianGong Plan team for ILCD format / 生态环境部第二次全国污染源普查工作办公室创建数据，天工计划团队常慧敏整理数据为ILCD格式
Amounts: no units in this file; such an amount is in the reference unit of its flow, which a separate flow dataset defines
copyright: false

## Technology and included processes
the Technical of end-of-pipe management technology for pollution volatile organic compoundisDirect discharge，The formula for calculating the actual operation rate (k-value) of the end-of-pipe treatment facility is k = annual normal operating hours of wastewater treatment equipment (hours) / annual operating hours of production system (hours)
污染物指标挥发性有机物的末端治理技术是直排，末端治理设施实际运行率（k值）计算公式为/，①由于粉状洗涤剂生产中使用的原料品种较多，系数表单中列举了几种常用原料，实际生产时并不局限于此。②当采用富聚成型、混合搅拌等非高塔喷粉工艺制备粉状洗涤剂核算产排污量用下一个组合系数表。

## Reference product
- Powder Detergent: 1000; calculated
  原文件中描述污染物类别为Product，污染物指标为粉状洗涤剂，此处对其进行了匹配工作，将其匹配到LCAflow库里面相最符合的流，污染物指标备注为工业废水量

## Outputs
All rows: calculated
- Waste water: 600
  原文件中描述污染物类别为废水，污染物指标为工业废水量，此处对其进行了匹配工作，将其匹配到LCAflow库里面相最符合的流，污染物指标备注为工业废水量
- chemical oxygen demand: 0.0452, 0.0339, 0.01582 (3 entries)
  原文件中描述污染物类别为废水，污染物指标为化学需氧量，此处对其进行了匹配工作，将其匹配到LCAflow库里面相最符合的流，污染物指标备注为化学需氧量
- Ammonia Nitrogen: 0.002368, 0.002146, 0.00111 (3 entries)
  原文件中描述污染物类别为废水，污染物指标为氨氮，此处对其进行了匹配工作，将其匹配到LCAflow库里面相最符合的流，污染物指标备注为氨氮
- Petroleum-related waste: 0.0045, 0.00225, 0.0012 (3 entries)
  原文件中描述污染物类别为废水，污染物指标为石油类，此处对其进行了匹配工作，将其匹配到LCAflow库里面相最符合的流，污染物指标备注为石油类
- Nitrogen, organic bound: 0.00249, 0.002241, 0.001328 (3 entries)
  原文件中描述污染物类别为废水，污染物指标为总氮，此处对其进行了匹配工作，将其匹配到LCAflow库里面相最符合的流，污染物指标备注为总氮
- phosphorus, total: 6.5e-5, 5e-5, 3e-5 (3 entries)
  原文件中描述污染物类别为废水，污染物指标为总磷，此处对其进行了匹配工作，将其匹配到LCAflow库里面相最符合的流，污染物指标备注为总磷
- Exhaust gas: 5400
  原文件中描述污染物类别为废气，污染物指标为工业废气量，此处对其进行了匹配工作，将其匹配到LCAflow库里面相最符合的流，污染物类别备注为②当采用富聚成型、混合搅拌等非高塔喷粉工艺制备粉状洗涤剂核算产排污量用下一个组合系数表。，污染物指标备注为工业废气量
- particles (PM2.5 - PM10): nan, 0.1656, 0.138, 0.138 (4 entries)
  原文件中描述污染物类别为废气，污染物指标为颗粒物，此处对其进行了匹配工作，将其匹配到LCAflow库里面相最符合的流，污染物类别备注为②当采用富聚成型、混合搅拌等非高塔喷粉工艺制备粉状洗涤剂核算产排污量用下一个组合系数表。，污染物指标备注为颗粒物
- sulfur dioxide: 0.26
  原文件中描述污染物类别为废气，污染物指标为二氧化硫，此处对其进行了匹配工作，将其匹配到LCAflow库里面相最符合的流，污染物类别备注为②当采用富聚成型、混合搅拌等非高塔喷粉工艺制备粉状洗涤剂核算产排污量用下一个组合系数表。，污染物指标备注为二氧化硫
- Nitrogen oxides: 0.42
  原文件中描述污染物类别为废气，污染物指标为氮氧化物，此处对其进行了匹配工作，将其匹配到LCAflow库里面相最符合的流，污染物类别备注为②当采用富聚成型、混合搅拌等非高塔喷粉工艺制备粉状洗涤剂核算产排污量用下一个组合系数表。，污染物指标备注为氮氧化物
- volatile organic compound: 0.016
  原文件中描述污染物类别为废气，污染物指标为挥发性有机物，此处对其进行了匹配工作，将其匹配到LCAflow库里面相最符合的流，污染物指标备注为挥发性有机物

## Data sources
- 第二次全国污染源普查产排污核算系数手册（试用版）,二级代码26,四级代码2681文件，在完整版文件中第3001页
