# 盆地模拟; 海相碳酸盐岩6000-10000m; 动力学模拟技术

Dataset: ILCD process, Unit process, single operation
Geography: XJ-CN
Reference year: 2022
Classification: Unit processes / Other Services / Research and development
LCI method principle: Attributional
LCI method approaches: Consequential
Generated by: Shikang Kang, 908798159@qq.com
Owner: 天工LCI数据工作小组
Review: Dependent internal review by 天工LCI数据工作小组
Amounts: no units in this file; such an amount is in the reference unit of its flow, which a separate flow dataset defines
copyright: false
licenseType: Free of charge for all users and uses

## General comment
针对塔里木盆地寒武系超深层含油气系统复杂的成藏特征，采用动力学模拟技术探讨了寒武系“源－圈－藏”的 演 化 过 程，揭 示 了超深层含油气系统油气“生 成 －运 移 －聚 集 －调 整 ”的 演 化 历 史

## Geography
塔里木盆地

## Time period
文献发表时间

## Technology and included processes
对台盆区巴楚隆起和塔 北隆起的超深层含油气系统开展成藏动力学模拟，通 过对典型剖面地质条件进行时间设定，来约束各时期油气充注和运移的通道和方向。

## Technical purpose
所述动力学模拟技术用于塔里木盆地寒武系超深层含油气系统的地质科学分析。该技术专门用于理解6000-10000米海相碳酸盐岩中“源-圈-藏”系统油气生成、迁移、聚集及调整的复杂特性。其目的是通过模拟不同地质剖面的烃源岩热演化、生成和迁移行为，为未来超深层油气资源的勘探开发提供依据。

## Reference product
- methane (fossil): 30200; max 30200; uniform; calculated
  吾松格尔组 （6597～6835ｍ）的 天 然 气 产 量

## Inputs
- Shale gas well: 0.2; log-normal; calculated
  整体成熟度
- natural gas: 0.00055; log-normal; calculated
  HI的平均值

## Outputs
- natural gas: 30200; max 30200; uniform; calculated
  文献中没有天然气投入量，假设天然气开采过程中投入量：输出量=1:1

## Data selection and combination
采用盆地模拟技术对塔里木盆地寒武 系超深层 “源－圈－藏”系 统 重 点开展了热演化史 、生 烃史和运聚史分析 ，并 结合关键时刻流体的流线模拟结 果，探讨了寒武系超深层含油气系统的油气充注过程，以期为塔里木盆地超深层油气勘探提供相关依据

## Data treatment and extrapolations
塔北斜坡带、顺托果勒低隆起和麦盖提斜坡带烃源岩的整体成熟度低于２％ ，处于高成熟阶段，目前仍然具有较好的生烃潜力

## Use advice
在使用此数据集进行生命周期评估或相关地质和工业应用时，确保数据适用于感兴趣的特定地质环境。需要考虑海相碳酸盐岩层的深度和地质条件。方法和结果应正确反映寒武系超深层“源-圈-藏”油气系统内复杂的相互作用和演化历史。在特征相似性不足的情况下，小心推广至不同的盆地或地层可能不准确。用户应将结果与流体流线模拟成果结合，以提高预测勘探模型的准确性和相关性。

## Review details
清单： 内部审查通过几个迭代步骤完成，涉及原始数据验证、原始数据记录、代表性、完整性、与 ISO 14040 和 14044 有关的建模的一致性。

## Data sources
- 李斌;张欣;郭强;吕海涛;杨素举;徐勤琪;彭军; 塔里木盆地寒武系超深层含油气系统盆地模拟. 石油学报 804–815 (2022).
