# 稀土开采;镝;B/M;含稀土矿石

Dataset: ILCD process, Unit process, single operation
Geography: CN
Reference year: 2010
Valid until: 2019
Classification: Unit processes / Materials production / Non-energetic raw materials
Functional unit: The goal of this investigation is to compare environmental impacts related to the production of 1 kg Dy (functional unit) from IAC (Southern China), from B/M ore (Bayan Obo), and from an eudialyte deposit (Norra Kärr) using the LCA method
LCI method principle: Attributional
LCI method approaches: Allocation - mass
Generated by: 汪涛, twang@iue.ac.cn
Owner: 天工LCI数据工作小组
Review: Dependent internal review by 天工LCI数据工作小组
Amounts: no units in this file; such an amount is in the reference unit of its flow, which a separate flow dataset defines
copyright: false
licenseType: Free of charge for all users and uses

## General comment
从稀土开采中提取的镝因其独特的磁性能在各种高技术应用中得到使用。这包括用于制造电动汽车电机、风力涡轮及硬盘驱动器的组件，以及在高性能磁铁和激光器中的应用。

## Geography
华南地区和白云鄂博

## Technology and included processes
本次调查的目的是比较 IAC（中国南方）、B/M 矿石（白云鄂博）和 eudialyte 矿床（Norra Kärr）生产 1 千克镝（功能单位）的环境影响，使用生命周期分析法

## Reference product
- Raw ore: 1230; software or database
  Raw ore. Input for next process: Crushing

## Inputs
- Electricity: 4.392; measured
  Value from iron mine, electricity mix 2014
- Diesel: 10.07; measured
  Diesel, burned in diesel-electric generating set. Diesel for mining truck
- Explosive: 0.233; calculated
  Explosive. Blasting, 0.095 kg/t moved rock multiplied with stripping rate.
- transport in t*km,transport in t*km: 0.45; calculated
  Diesel 150 km, oil and explosives 929 km. Transport, freight, lorry >32 metric ton, EURO3
- transport in t*km,transport in t*km: 1.11; software or database
  Transport, freight train, 1046 km
- lubricating oil, waste: 0.037; calculated
  lubricating oil. Adapted to mining rat

## Outputs
- particles (> PM10),particles (> PM10),particles (>PM10): 2.75
  Dust (PM10), (PM2.5 - PM10), (PM2.5) Particles to air. Based on Arpacioglu and Er (2003) multiplied with stripping rate, distribution of dust analog Althaus et al. (2007a)
- Radioactive dust, waste: 1.324
  Radioactive dust. Uranium (U238) [Radioactive emissions to air], based on Th232 and U238 activity in the ore.
- Water,Water: 1492; calculated
  Waste water [other emissions to fresh water, value from Mount Weld rare earth mine adapted to mining area.
- overburden (unspecified),overburden (unspecified): 1226; calculated
  Non-sulfidic overburden, off-site [Waste], calculation based on stripping rate.
- lubricating oil, waste: 0.037; estimated
  lubricating oil, waste. Waste mineral oil [Waste], incineration of hazardous waste is assumed

## Deviations from the LCI method approaches
In this study, an allocation method based on the mass of produced REEs combined with their market prices (based on an international metals market analysis and pricing index company ) are considered, as usual for metals with strongly different prices. As the ores have different compositions, the allocation factor has to be assessed individually for each site.

## Use advice
在使用这些有关镝生产的生命周期评估（LCA）数据时，必须考虑基于提取稀土元素（REEs）的质量和市场价格的分摊方法。由于不同来源的矿石成分各异，必须针对每个案例分别评估分摊因子。比较的功能单位应保持一致（本案例为1千克镝）。确保方法学假设如系统边界、数据质量和回收考量被计入，并在不同来源的比较分析中统一应用。

## Review details
清单： 内部审查通过几个迭代步骤完成，涉及原始数据验证、原始数据记录、代表性、完整性、与 ISO 14040 和 14044 有关的建模的一致性。

## Data sources
- Zapp, P., Marx, J., Schreiber, A., Friedrich, B. & Voßenkaul, D. Comparison of dysprosium production from different resources by life cycle assessment. Resources, Conservation and Recycling 130, 248–259 (2018).
