# 原铜生产;阴极铜;闪速熔炼;铜精矿

Dataset: ILCD process, Unit process, single operation
Geography: CN
Reference year: 2019
Classification: Unit processes / Materials production / Metals and semimetals
Functional unit: the production of one ton of standard Cu cathode
LCI method principle: Attributional
LCI method approaches: Allocation - market value; Substitution
Generated by: 王鹏, 2867919560@qq.com
Owner: 天工LCI数据工作小组
Review: Dependent internal review by 天工LCI数据工作小组
Amounts: no units in this file; such an amount is in the reference unit of its flow, which a separate flow dataset defines
copyright: false
licenseType: Free of charge for all users and uses

## General comment
通过闪速熔炼和浴熔炼等原铜生产过程生产的阴极铜旨在用于电子、建筑、电气网络和合金制造等各种应用。闪速熔炼、双闪速、ISA熔炼和富氧底吹（SKS）技术在高效生产大量的铜阴极方面至关重要。特别是，A冶炼厂采用闪速熔炼和Peirce-Smith转炉，是世界上最大的冶炼厂，这突显了这项技术的广泛应用。同样，B、C、D冶炼厂采用创新方法来提高效率和产量，以满足大规模工业铜需求。

## Geography
通过调查中国四家典型铜冶炼厂的设施级数据;地理范围覆盖安徽、江西、河南和云南省

## Time period
参考Zhou (2019)总结的中国铜生产和冶炼工艺分布

## Technology and included processes
其中A冶炼厂是全球最大的冶炼厂，年产阴极铜1000多吨。其熔炼技术是“闪速熔炼”，采用含氧空气来促进自生条件，目前全世界大约一半的熔炼厂都在使用（Hanniala 等人，1999 年）以及 Peirce-Smith (PS) 转炉。作为“闪速熔炼”的一个分支，“双闪速”（即闪速熔炼和闪速吹炼）也被纳入研究范围，并在年产阴极铜400吨左右的B冶炼厂得到应用。它将“闪速熔炼”与闪速加工工艺相结合，以取代传统的 PS 加工工艺（Chaubal 等，1989）。 C冶炼厂采用的冶炼工艺为ISA冶炼加PS转炉，年产阴极铜500吨左右。与“闪速熔炼”不同，它是一种“浴熔炼”，其特点是将喷枪插入炉渣中，将富氧空气注入熔池中。这种修改会产生湍流，从而提高进料反应的生产率（Arthur 和 Edwards，2003）。 D冶炼厂采用的富氧底吹（又称SKS）冶炼技术（加闪速吹炼），年产阴极铜300kt左右，也属于“熔池冶炼”。它是在ISA熔炼技术的基础上进一步发展起来的一项新的强化冶炼技术。该技术的显着优势主要来自于其底吹技术及其智能化。

## Model description
创建了一个名为“估计排放处理”的虚拟过程并对其进行建模，以量化废气总排放量，同时对“废水处理”过程进行建模以量化废水总排放量。铜冶炼和精炼过程中产生的固体废物模拟为一般固体废物，如补充材料表S7所示。所有收集到的前景数据均使用 GaBi 软件（Sphera，2021）进行建模，然后对排放清单的质量平衡和完整性进行合理性检查。

## Reference product
- Refined copper: 1000; measured
  copper

## Inputs
- Oil sand (100% bitumen) (in MJ): 2914; software or database
  Crude oil
- hard coal,hard coal,hard coal: 26424; software or database
  Hard coal
- Lignite EU-27: 583; software or database
  Lignite
- natural gas,natural gas,natural gas: 6468; software or database
  Natural gas
- Uranium natural: 535; software or database
  Uranium natural需要补充
- primary energy from hydro power: 5927; software or database
  Primary energy from hydro power
- primary energy from solar energy: 550; software or database
  Primary energy from solar energy
- primary energy from wind power: 631; software or database
  Primary energy from wind power
- Copper ore: 73226; measured
  Copper ore – Pyro route
- Limestone: 450; measured
  Limestone (calcium carbonate)
- quartz sand: 198; measured
  Quartz sand (silica sand; silicon dioxide)
- freshwater,freshwater: 4.07701e6; measured
  Water
- Copper-containing slag: 198.2; measured
  Secondary copper-containing materials需要补充

## Outputs
- overburden (unspecified),overburden (unspecified): 4821; measured
  Overburden (deposited)
- Tailings, unspecified: 104823; measured
  Tailings (deposited)
- Slag: 0.0049; measured
  Slag (deposited)
- Waste rock: 276371; measured
  Waste rock需要补充
- hazardous waste (unspecified),hazardous waste (unspecified): 3500; measured
  Hazardous waste (deposited)
- carbon dioxide (fossil): 3950; software or database
  CO2
- methane (fossil): 7.5; software or database
  CH4
- nitrous oxide: 0.459; software or database
  N2O
- Nitrogen oxides: 20.5; software or database
  NOx需要补充
- sulfur oxides: 10.1; software or database
  SO2
- non-methane volatile organic compounds: 1.79; software or database
  non-methane volatile organic compounds 需要补充
- carbon monoxide,carbon monoxide (fossil): 7.32; software or database
  carbon monoxide
- particles (> PM10),particles (> PM10),particles (>PM10): 0.645; software or database
- particles (PM10): 3.67; software or database
- particles (PM2.5 - PM10): 1.1; software or database
- particles (PM2.5): 2.16; software or database
- arsenic: 1460, 3820 (2 entries); software or database
  Arsenic
- copper: 1830, 3490 (2 entries); software or database
  Copper
- lead: 1290, 1510 (2 entries); software or database
  Lead
- ammonium: 769; software or database
  Ammonium/ammonia
- magnesium: 0.159; software or database
  Nitrate(NO3)
- phosphate: 2660; software or database
  Phosphate (PO43 )
- biological oxygen demand: 496; software or database
  Biological oxygen demand (BOD)需要补充
- chemical oxygen demand: 5.34; software or database
  Chemical oxygen demand (COD)

## Deviations from the LCI method approaches
生命周期清单评估 (LCIA) 采用荷兰莱顿大学 (Guine ́e, 2001) 开发的 CML（方法开发中心）2001 方法进行，主要是因为该方法在全球 LCA 界得到了广泛接受。

## Data selection and combination
能源、燃料和辅助材料生产的背景数据来自GaBi数据库（Sphera数据库，2021），涵盖中国特定数据。此外，由于缺乏中国相关数据，硫酸钡（火法精炼过程中用作填充剂）等一些辅助材料生产的最佳可用代理数据采用全球平均或欧洲数据。

## Use advice
考察原铜生产影响的生命周期评估数据用户应参考这些数据集，包括四家中国典型铜冶炼厂的设施级数据及安徽、江西、河南和云南省的地理覆盖。使用GaBi软件对前景数据进行建模，并进行质量平衡和排放清单的可能性检查至关重要。用户应考虑采用的冶炼技术，如闪速熔炼、双闪速、ISA熔炼和富氧底吹（SKS），并考虑使用由于全球接受度而采用CML 2001方法进行LCIA。请注意，一些缺乏中国特定数据的辅助材料，如硫酸钡，使用全球或欧洲平均数据代表，应在评估中谨慎对待。

## Review details
清单： 内部审查通过几个迭代步骤完成，涉及原始数据验证、原始数据记录、代表性、完整性、与 ISO 14040 和 14044 有关的建模的一致性。

## Data sources
- Lu, T., Tikana, L., Herrmann, C., Ma, Y. & Jia, J. Environmental hotspot analysis of primary copper production in China and its future improvement potentials. Journal of Cleaner Production 370, 133458 (2022).
