# 超纯水制备;电去离子，螺旋缠绕，废水排放

Dataset: ILCD process, Unit process, single operation
Geography: CN
Reference year: 2022
Classification: Materials production / Water
Functional unit: 1 t ultrapure water
Generated by: 陆嘉麒, wilsherelu@foxmail.com
Owner: 天工LCI数据工作小组
Review: Dependent internal review by 天工LCI数据工作小组
Amounts: no units in this file; such an amount is in the reference unit of its flow, which a separate flow dataset defines
copyright: false
licenseType: Free of charge for all users and uses

## General comment
该数据集对应于通过使用螺旋缠绕配置的电去离子方法生产1吨超纯水的工业过程。此类超纯水对于要求极低杂质水平的应用至关重要，例如半导体制造、制药过程以及关键的实验室分析。

## Reference product
- Ultrapure water: 1000; article inperiodical
  超纯水产品

## Inputs
- electricity mix: 4.32; article inperiodical
- Electrodeionization components: 1.25e-5; article inperiodical
  EDI组件
- Reverse Osmosis Inlet Water: 1330; article inperiodical
  RO进水

## Outputs
- waste water - treated: 360; article inperiodical
  排水，可回用到RO
- Electrodeionization components: 1.25e-5; article inperiodical
  EDI组件废弃

## Use advice
在将此数据集应用于生命周期评估（LCA）时，请考虑超纯水的具体技术应用，并确保适当分配与电去离子过程相关的废水排放的环境影响。注意系统边界，并在超纯水消耗影响在总体LCA中占有重要地位时，包括使用阶段行为。此数据集适用于中国的工业环境，如CN单元过程标记所示。

## Review details
清单： 内部审查通过几个迭代步骤完成，涉及原始数据验证、原始数据记录、代表性、完整性、与 ISO 14040 和 14044 有关的建模的一致性。

## Data sources
- Yuan, Y. et al. Deduction of carbon footprint for membrane desalination processes towards carbon neutrality: A case study on electrodeionization for ultrapure water preparation. Desalination 559, 116648 (2023).
