# 稀土煅烧;稀土;原位浸出;钕铁硼(NdFeB)磁铁

Dataset: ILCD process, Unit process, single operation
Geography: NMG-CN
Reference year: 2014
Classification: Unit processes / Materials production / Metals and semimetals
Functional unit: The functional unit is a 1 kg NdFeB magnet
LCI method principle: Attributional
LCI method approaches: Allocation - market value; Allocation - mass
Generated by: 汪涛, twang@iue.ac.cn
Owner: 天工LCI数据工作小组
Review: Dependent internal review by 天工LCI数据工作小组
Amounts: no units in this file; such an amount is in the reference unit of its flow, which a separate flow dataset defines
copyright: false
licenseType: Free of charge for all users and uses

## General comment
在中国白云鄂博矿区通过煅烧和原位浸出工艺生产的NdFeB（钕铁硼）磁铁主要用于各种技术应用。这些应用包括电动机、发电机、风力涡轮机、硬盘驱动器的永磁材料，以及在制造电子和清洁能源技术的关键组件中的应用。

## Geography
Bayan Obo (China)

## Technology and included processes
所有三个矿床生产 Nd 和 Pr 的基本过程都是相同的。 Nd 和 Pr 是相同的，除了最后的溶剂萃取步骤 (SX5)，其中两者被分离。

## Reference product
- Neodymium oxide: 1.13; calculated
  Neodymium oxide. Bayan Obo: input for next process, electrolysis

## Inputs
- Exhaust gas: 749; software or database
  Natural gas. Bayan Obo: modelled with ASPEN PLUS
- Neodymium oxalate: 2.5; calculated
  Neodymium oxalate. Bayan Obo: stoichiometric calculation, humidity 35 %

## Outputs
- carbon dioxide (fossil): 2767; calculated
  原文未区分bio和fossil，根据专家判断此处为fossil

## Deviations from the LCI method approaches
In this study, an allocation method based on the market prices of REOs28 is considered. To estimate uncertainties that refer to the allocation method, a mass-based allocation is undertaken as a sensitivity analysis

## Use advice
在使用这个数据集进行NdFeB磁铁的生命周期评估（LCA）时，应特别注意研究中应用的基于稀土氧化物市场价格的分配方法。市场价格分配应用于结果的沟通和比较。另外，为了进行灵敏度分析，还应考虑基于质量的分配，以估计与分配过程相关的不确定性。用户需注意的是，数据集中指定的功能单元是1千克NdFeB磁铁，评估应与此参考相符。

## Review details
清单： 内部审查通过几个迭代步骤完成，涉及原始数据验证、原始数据记录、代表性、完整性、与 ISO 14040 和 14044 有关的建模的一致性。

## Data sources
- Marx, J., Schreiber, A., Zapp, P. & Walachowicz, F. Comparative Life Cycle Assessment of NdFeB Permanent Magnet Production from Different Rare Earth Deposits. ACS Sustainable Chem. Eng. 6, 5858–5867 (2018).
