# 开采阶段;油、气;水平井;钻井

Dataset: ILCD process, Unit process, single operation
Geography: LN-CN
Reference year: 2006
Classification: Energy carriers and technologies / Crude oil based fuels
LCI method principle: Attributional
LCI method approaches: Consequential
Generated by: 李梓萌, 1577978537@qq.com
Owner: 天工LCI数据工作小组
Review: Dependent internal review by 天工LCI数据工作小组
Amounts: no units in this file; such an amount is in the reference unit of its flow, which a separate flow dataset defines
copyright: false
licenseType: Free of charge for all users and uses

## General comment
水平井钻井技术经过长期实践证明能够提高采收率,是转换开发各类油气藏的有效方法

## Geography
欢喜岭油田位于辽河坳陷西部凹陷西斜坡南段

## Time period
2006年6月12日,我国欢喜岭油田的新井开始投产使用

## Technology and included processes
欢喜岭油田因地制宜的设计和改进水平井技术,在其主井眼上钻出几个水平的井眼,形成了水平井的分支,增大了油田的开采效率,也促进了我国采油技术方法的进步和完善。

## Technical purpose
该工业过程涉及在油田钻探水平井，以提高油气采收率。特别是在辽河坳陷区域的欢喜岭油田内实施。在此过程中使用的水平钻井技术允许从主井眼钻出多个水平井分支，从而增加与油藏的接触面积，进而提高提取效率。该过程是石油工业开发各类油气藏的专门应用。

## Reference product
- LPG - liquefied petroleum gas: 21100; uniform; article inperiodical
  日产油吨数

## Outputs
- LPG - liquefied petroleum gas: 22000; uniform; article inperiodical
  每天日产液吨数
- LPG - liquefied petroleum gas: 3840; uniform; article inperiodical
  日产气

## Use advice
在将此生命周期评估数据应用于环境影响评估时，用户应仔细考虑水平钻井过程的独特方面，包括提高的油气采收率以及欢喜岭油田的特定地理和技术背景。由于钻井技术的量身定制和改进，用户应当在与传统的垂直钻井方法比较时，计入特定的钻井技术和效率增益。必须确保数据被适当地应用于类似情景，并考虑任何可能影响评估的地区特定环境法规或实践。

## Review details
清单： 内部审查通过几个迭代步骤完成，涉及原始数据验证、原始数据记录、代表性、完整性、与 ISO 14040 和 14044 有关的建模的一致性。

## Data sources
- 陈亮.浅析水平井钻井技术在石油开发中的应用[J].石化技术,2015,22(07):105.
