# 烧结矿生产;烧结矿;烧结

Dataset: ILCD process, Unit process, single operation
Geography: CN
Classification: Unit processes / Materials production / Other mineralic materials
Generated by: 付翔, 1162850692@qq.com
Owner: 天工LCI数据工作小组
Review: Dependent internal review by 天工LCI数据工作小组
Amounts: no units in this file; such an amount is in the reference unit of its flow, which a separate flow dataset defines
copyright: false
licenseType: Free of charge for all users and uses

## General comment
此数据集描述了烧结矿的生产过程，烧结矿通常用作钢铁制造过程中高炉的原料，特别是基本氧炉（BF-BOF）路径。烧结过程将铁矿石粉末聚集成为更大、更有凝聚力的块状物，以便于在高炉中高效熔化。该数据适用于中国拥有焦化厂和电弧炉(EAF)作业的大型综合钢厂中烧结矿的生产。

## Geography
The data of the BF-BOF pathway were obtained from the large-scale integrated steel plants in China with an attached coking plant and EAF plant.

## Reference product
- Sinter: 1164.4; measured

## Inputs
All rows: measured
- Coke breeze: 48.9
- Iron ore: 237
  Iron ore (Domestic)
- Iron ore: 655.3
  Iron ore (Import)
- dolomite: 8.7
- quicklime: 49.6
  Quicklime
- freshwater,freshwater: 100
- Coke oven gas: 15.4
  COG
- Linz-Donawitz gas: 3
  LDG
- anthracite: 37.4
  Anthracite
- Electricity: 329.4

## Use advice
在生命周期评估中使用此数据集时，必须确保它仅用于BF-BOF路径下的烧结矿生产，因为它包含了中国带有焦化和电弧炉(EAF)的大型综合钢厂特定的技术和处理特征。应该考虑区域生产差异、技术适用性，并随着时间的推移更新数据以反映技术或效率改进。材料回收数据的包含或排除应根据LCA研究的目标和范围来确定。

## Review details
清单： 内部审查通过几个迭代步骤完成，涉及原始数据验证、原始数据记录、代表性、完整性、与 ISO 14040 和 14044 有关的建模的一致性。

## Data sources
- The carbon reduction potential of hydrogen in the low carbon transition of the iron and steel industry: The case of China
