# 熟料生产;熟料;新型干法, 5000 t/d

Dataset: ILCD process, Unit process, black box
Geography: GD-CN
Reference year: 2009
Classification: Materials production / Other mineralic materials
Generated by: 杨思琪, ysqsophia@gmail.com
Owner: 天工LCI数据工作小组
Review: Dependent internal review by 天工LCI数据工作小组
Amounts: no units in this file; such an amount is in the reference unit of its flow, which a separate flow dataset defines
copyright: false
licenseType: Free of charge for all users and uses

## General comment
新型干法生产水泥熟料。原料消耗和能源消耗记录平均值。

## Geography
广州珠江水泥厂

## Technical purpose
该工艺数据集描述了采用新型干法技术生产熟料的过程。此熟料是水泥制造中的关键中间产品。该过程专门用于广州珠江水泥厂，并针对每天生产5000吨熟料进行了优化。该过程生产的熟料预定用于建筑行业，作为水泥的主要成分，该水泥对于建筑、基础设施和其他建设项目中的混凝土制作至关重要。

## Model description
每生产1t熟料定义为1功能单位。将原料入厂设定为生命周期的起点，终点设定为熟料烧成阶段。

## Reference product
- clinker: 1000
  熟料

## Inputs
- limestone, crushed, for mill: 1300
  石灰石
- clay: 100
  黏土
- gypsum stone (CaSO4-dihydrate): 70
  石膏
- iron ore: 21
  铁矿石
- hard coal; 26.3 MJ/kg: 110
  煤
- electricity, medium voltage: 378
  电

## Outputs
- carbon dioxide (fossil): 277
  CO2（化石燃料燃烧）
- carbon dioxide: 647
  CO2（石灰石分解）
- sulfur dioxide: 0.31
  SO2
- Nitrogen oxides: 1.88
  NOx
- particles (> PM10): 0.025
  粉尘，未标明粒径，按PM>10处理。

## Use advice
在利用该数据集进行生命周期评估（LCA）时，数据使用者应注意，它涉及使用新型干法技术在广州珠江水泥厂生产的熟料。数据集的范围开始于原材料进厂，结束于熟料烧成阶段。功能单位被定义为一吨熟料。使用者应确保与类似技术水平和产能的工艺进行比较。如果数据集用于比较性评估，使用者需要考虑区域差异，并在必要时调整数据以反映当地条件。该数据未包括上游（原材料的提取）或下游工序（水泥的磨制、分配）的环境影响。

## Review details
清单： 内部审查通过几个迭代步骤完成，涉及原始数据验证、原始数据记录、代表性、完整性、与 ISO 14040 和 14044 有关的建模的一致性。

## Data sources
- 周奇, 黄启飞, 王琪, & 李丽. (2009). 废皮革水泥窑共处置生命周期评价. 环境科学研究, 22(4), 506–510.
