# 电力生产 ; 火电 ; 湖南

Dataset: ILCD process, Unit process, single operation
Geography: HUN-CN
Reference year: 2019
Classification: Unit processes / Energy carriers and technologies / Electricity
Generated by: 熊若熙, xiongrx0126@163.com
Owner: 天工LCI数据工作小组
Review: Dependent internal review by 天工LCI数据工作小组
Amounts: no units in this file; such an amount is in the reference unit of its flow, which a separate flow dataset defines
copyright: false
licenseType: Free of charge for all users and uses

## General comment
火电发电包括原煤、洗煤、石油、天然气等十七种化石燃料。该过程只考虑直接发电过程，不考虑上游原材料开采加工和下游消费

## Time period
根据2019年能源统计年鉴数据计算

## Technical purpose
湖南的火电发电过程使用包括原煤、洗煤、石油和天然气在内的十七种化石燃料来生产电力。该过程用于满足湖南地区的电力供应需求，确保省内工业、商业和居民用电的稳定供应。这个数据集严格涉及电力直接生成，并适用于专注于电厂运营的分析，而不考虑燃料采购或最终用户用电的生命周期阶段。

## Reference product
- electricity for thermal power: 3.6; calculated

## Inputs
All rows: calculated
- Raw coal: 0.36305
- Gangue, in ground: 0.0130188
- Coke oven gas: 0.004002
- blast furnace gas: 0.134496
- Converter gas: 0.015428
- Diesel: 4.592e-5
- fuel oil, unspecified: 4.155e-5
- Petroleum Coke: 0.00066696
- refinery gas: 0.00010387
- natural gas: 3.28e-5

## Outputs
- carbon dioxide (fossil): 0.822186; calculated
- sulfur dioxide: 0.000137345; calculated
- Nitrogen oxides: 0.000220667; calculated
- particles (> PM10): 2.97176e-5; calculated

## Data treatment and extrapolations
核算方法参考《企业温室气体排放核算方法与报告指南 发电设施》。不同形式发电量及燃料用量来自于《中国能源统计年鉴 2020》中的第三章（能源生产） 和第六章（地区能源平衡表）。用于计算二氧化碳排放因子的低位发热量、单位热值含碳量等燃料参数来自于《2019 年度中国区域电网二氧化碳基准线排放因子 OM 计算说明》、《企业温室气体排放核算方法与报告指南 发电设施》

## Use advice
在使用此数据集进行生命周期评估（LCA）或其他环境影响研究时，用户应注意它仅涵盖湖南地区热电厂发电过程的直接排放。数据集不包括上游过程如燃料的提取和精炼，以及包括电力消费在内的下游过程。为了准确的LCA建模，如果用户旨在评估电力生成的整个生命周期，他们必须考虑这些被排除阶段的附加数据。应遵循所提供的企业温室气体排放核算方法与报告指南。不同形式的发电量和燃料消耗数据应来源于《中国能源统计年鉴 2020》相关章节，排放因子应使用规定文件中的参数进行计算。

## Review details
清单： 内部审查通过几个迭代步骤完成，涉及原始数据验证、原始数据记录、代表性、完整性、与 ISO 14040 和 14044 有关的建模的一致性。

## Data sources
- 熊若熙. 中国电力生产和消费二氧化碳与污染物排放因子核算. (清华大学, 2023).
