# 修复后地下水;地下水原位修复;生物强化修复;加热-冷却系统运行

Dataset: ILCD process, Unit process, single operation
Geography: SH-CN
Reference year: 2020
Classification: Unit processes / Other Services / Repair and maintenance
Generated by: 肖萌, xiaomeng@mail
Owner: 天工LCI数据工作小组
Review: Dependent internal review by 天工LCI数据工作小组
Amounts: no units in this file; such an amount is in the reference unit of its flow, which a separate flow dataset defines
copyright: false
licenseType: Free of charge for all users and uses

## General comment
CHC+ISB用于现场修复，在设备运行阶段，进行加热和冷却过程。

## Geography
The aquifer in a certain area in Shanghai, China, is uniformly contaminated with chlorinated volatile organic compounds (CVOCs), with a surface area of 20,000 m2 and a depth of 50 m, with the water table located at a depth of 30 m.

## Technical purpose
该数据集代表了一个用于修复含有氯化挥发性有机化合物（CVOCs）污染的地下水的含水层过程。该过程涉及使用加热和冷却系统（CHC+ISB）的原位生物强化修复，以治疗均匀污染区域。它适用于因工业污染物影响而需要环境清理的项目，专门为大规模场地修复设计。该数据集适合用于模拟和评估地下水修复过程的环境影响。

## Reference product
- Remediated groundwater: 600000; measured
  surface area of 20 000 m2 (200 m × 100 m) and 50 m depth, with an aquifer depth of 30 m

## Inputs
- Groundwater after biological Medium injection: 600000; measured
- Electricity: 1.5552e8; calculated
  Heat supply by CHC = 21600000 kWh； Cold supply by CHC = 21600000 kWh Electricity
- Electricity: 18617; measured
  0.39 kWh/well, 34 wells/year and 390 years

## Use advice
用户应专门应用该数据集用于涉及CVOCs的地下水修复过程的环境影响评估，同时考虑到含水层的具体条件，如大小、深度和水位位置。必须注意确保数据的应用限于具有相似污染特征和修复技术的站点。该数据集在生命周期评估（LCA）研究中的包含应考虑修复设备的运营阶段，以及生物修复过程中加热和冷却的使用。应特别注意模拟与加热和冷却系统运行相关的能源消耗和排放。

## Review details
清单： 内部审查通过几个迭代步骤完成，涉及原始数据验证、原始数据记录、代表性、完整性、与 ISO 14040 和 14044 有关的建模的一致性。

## Data sources
- Ni, Z. et al. Comparative Life-Cycle Assessment of Aquifer Thermal Energy Storage Integrated with in Situ Bioremediation of Chlorinated Volatile Organic Compounds. Environ. Sci. Technol. 54, 3039–3049 (2020).
