# Electricity/electricalenergy+heatenergy|Coal|Layerburningfurnace|less than or equal to8 MW / \|电能/电能+热能|煤炭|层燃炉|小于等于8兆瓦

Dataset: ILCD process, Partly terminated system
Geography: CN
Reference year: 2019
Classification: Materials production / Other mineralic materials
Generated by: The data was created by the Office of the Second National Pollution Source Census of the Ministry of Ecology and Environment, and the data was organized by the TianGong Plan team for ILCD format / 生态环境部第二次全国污染源普查工作办公室创建数据，天工计划团队常慧敏整理数据为ILCD格式
Amounts: no units in this file; such an amount is in the reference unit of its flow, which a separate flow dataset defines
copyright: false

## Technology and included processes
the Technical of end-of-pipe management technology for pollution CoalisOthers (direct discharge)
污染物指标工业废气量（烟煤）的末端治理技术是其他（直排）

## Reference product
- Coal: 1000; input; calculated
  原文件中描述污染物类别为Product，污染物指标为煤炭，此处对其进行了匹配工作，将其匹配到LCAflow库里面相最符合的流，污染物指标备注为工业废气量（烟煤）

## Outputs
All rows: calculated
- Exhaust gas: 10290
  原文件中描述污染物类别为废气，污染物指标为工业废气量（烟煤），此处对其进行了匹配工作，将其匹配到LCAflow库里面相最符合的流，污染物指标备注为工业废气量（烟煤）
- Exhaust gas: 10197
  原文件中描述污染物类别为废气，污染物指标为工业废气量（无烟煤），此处对其进行了匹配工作，将其匹配到LCAflow库里面相最符合的流，污染物指标备注为工业废气量（无烟煤）
- Exhaust gas: 5915
  原文件中描述污染物类别为废气，污染物指标为工业废气量（褐煤），此处对其进行了匹配工作，将其匹配到LCAflow库里面相最符合的流，污染物指标备注为工业废气量（褐煤）
- particles (PM2.5 - PM10): nan, nan, nan, nan, nan, nan, nan, nan, nan, nan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 (24 entries)
  原文件中描述污染物类别为废气，污染物指标为颗粒物（烟煤），此处对其进行了匹配工作，将其匹配到LCAflow库里面相最符合的流，污染物指标备注为颗粒物（烟煤）
- particles (PM2.5 - PM10): nan, nan, nan, nan, nan, nan (6 entries)
  原文件中描述污染物类别为废气，污染物指标为颗粒物（无烟煤），此处对其进行了匹配工作，将其匹配到LCAflow库里面相最符合的流，污染物指标备注为颗粒物（无烟煤）
- particles (PM2.5 - PM10): nan, nan, nan, nan, nan, nan (6 entries)
  原文件中描述污染物类别为废气，污染物指标为颗粒物（褐煤），此处对其进行了匹配工作，将其匹配到LCAflow库里面相最符合的流，污染物指标备注为颗粒物（褐煤）
- sulfur dioxide: nan, nan, nan, nan, nan, nan, nan, nan, nan, nan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 (18 entries)
  原文件中描述污染物类别为废气，污染物指标为二氧化硫（烟煤，无炉内脱硫），此处对其进行了匹配工作，将其匹配到LCAflow库里面相最符合的流，污染物指标备注为二氧化硫（烟煤，无炉内脱硫）
- sulfur dioxide: nan, nan, nan, nan, nan, nan, nan, nan, nan, nan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 (18 entries)
  原文件中描述污染物类别为废气，污染物指标为二氧化硫（烟煤，炉内脱硫），此处对其进行了匹配工作，将其匹配到LCAflow库里面相最符合的流，污染物指标备注为二氧化硫（烟煤，炉内脱硫）
- sulfur dioxide: nan, nan, nan, nan, nan, nan, nan, nan, nan, nan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 (18 entries)
  原文件中描述污染物类别为废气，污染物指标为二氧化硫（无烟煤，无炉内脱硫），此处对其进行了匹配工作，将其匹配到LCAflow库里面相最符合的流，污染物指标备注为二氧化硫（无烟煤，无炉内脱硫）
- sulfur dioxide: nan, nan, nan, nan, nan, nan, nan, nan, nan, nan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 (18 entries)
  原文件中描述污染物类别为废气，污染物指标为二氧化硫（无烟煤，炉内脱硫），此处对其进行了匹配工作，将其匹配到LCAflow库里面相最符合的流，污染物指标备注为二氧化硫（无烟煤，炉内脱硫）
- sulfur dioxide: nan, nan, nan, nan, nan, nan, nan, nan, nan, nan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 (18 entries)
  原文件中描述污染物类别为废气，污染物指标为二氧化硫（褐煤，无炉内脱硫），此处对其进行了匹配工作，将其匹配到LCAflow库里面相最符合的流，污染物指标备注为二氧化硫（褐煤，无炉内脱硫）
- sulfur dioxide: nan, nan, nan, nan, nan, nan, nan, nan, nan, nan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 (18 entries)
  原文件中描述污染物类别为废气，污染物指标为二氧化硫（褐煤，炉内脱硫），此处对其进行了匹配工作，将其匹配到LCAflow库里面相最符合的流，污染物指标备注为二氧化硫（褐煤，炉内脱硫）
- Nitrogen oxides: 3.06, 0.612, 0.765 (3 entries)
  原文件中描述污染物类别为废气，污染物指标为氮氧化物，煤炭干燥无灰基挥发分小于等于10%，此处对其进行了匹配工作，将其匹配到LCAflow库里面相最符合的流，污染物指标备注为氮氧化物，煤炭干燥无灰基挥发分小于等于10%
- Nitrogen oxides: 3.06, 0.612, 0.765 (3 entries)
  原文件中描述污染物类别为废气，污染物指标为氮氧化物，10%小于煤炭干燥无灰基挥发分小于等于20%，此处对其进行了匹配工作，将其匹配到LCAflow库里面相最符合的流，污染物指标备注为氮氧化物，10%小于煤炭干燥无灰基挥发分小于等于20%
- Nitrogen oxides: 3.09, 0.618, 0.7725 (3 entries)
  原文件中描述污染物类别为废气，污染物指标为氮氧化物，20%小于煤炭干燥无灰基挥发分小于等于37%，此处对其进行了匹配工作，将其匹配到LCAflow库里面相最符合的流，污染物指标备注为氮氧化物，20%小于煤炭干燥无灰基挥发分小于等于37%
- Nitrogen oxides: 1.75, 0.35, 0.4375 (3 entries)
  原文件中描述污染物类别为废气，污染物指标为氮氧化物，煤炭干燥无灰基挥发分>37%，此处对其进行了匹配工作，将其匹配到LCAflow库里面相最符合的流，污染物指标备注为氮氧化物，煤炭干燥无灰基挥发分>37%
- Nitrogen oxides: 1.83, 0.5124, 0.6405 (3 entries)
  原文件中描述污染物类别为废气，污染物指标为氮氧化物（SNCR，煤炭干燥无灰基挥发分小于等于10%），此处对其进行了匹配工作，将其匹配到LCAflow库里面相最符合的流，污染物指标备注为氮氧化物（SNCR，煤炭干燥无灰基挥发分小于等于10%）
- Nitrogen oxides: 1.83, 0.5124, 0.6405 (3 entries)
  原文件中描述污染物类别为废气，污染物指标为氮氧化物（SNCR，10%小于煤炭干燥无灰基挥发分小于等于20%），此处对其进行了匹配工作，将其匹配到LCAflow库里面相最符合的流，污染物指标备注为氮氧化物（SNCR，10%小于煤炭干燥无灰基挥发分小于等于20%）
- Nitrogen oxides: 1.52, 0.456, 0.532 (3 entries)
  原文件中描述污染物类别为废气，污染物指标为氮氧化物（SNCR，20%小于煤炭干燥无灰基挥发分小于等于37%），此处对其进行了匹配工作，将其匹配到LCAflow库里面相最符合的流，污染物指标备注为氮氧化物（SNCR，20%小于煤炭干燥无灰基挥发分小于等于37%）
- Nitrogen oxides: 0.89, 0.267, 0.3115 (3 entries)
  原文件中描述污染物类别为废气，污染物指标为氮氧化物（SNCR，煤炭干燥无灰基挥发分>37%），此处对其进行了匹配工作，将其匹配到LCAflow库里面相最符合的流，污染物指标备注为氮氧化物（SNCR，煤炭干燥无灰基挥发分>37%）
- mercury: nan
  原文件中描述污染物类别为废气，污染物指标为汞及其化合物，此处对其进行了匹配工作，将其匹配到LCAflow库里面相最符合的流，污染物指标备注为汞及其化合物
- volatile organic compound: nan
  原文件中描述污染物类别为废气，污染物指标为挥发性有机物，此处对其进行了匹配工作，将其匹配到LCAflow库里面相最符合的流，污染物指标备注为挥发性有机物

## Data sources
- 第二次全国污染源普查产排污核算系数手册（试用版）,四级代码4411、4412文件，在完整版文件中第5333页
