# 抽提井;地下水原位修复;地下水抽出处理

Dataset: ILCD process, Unit process, single operation
Geography: JS-CN
Reference year: 2022
Classification: Unit processes / Other Services / Repair and maintenance
Generated by: 王宁, wang_ning@caep.org.cn
Owner: 天工LCI数据工作小组
Review: Dependent internal review by 天工LCI数据工作小组
Amounts: no units in this file; such an amount is in the reference unit of its flow, which a separate flow dataset defines
copyright: false
licenseType: Free of charge for all users and uses

## General comment
使用聚氯乙烯、水泥、云母砂、钢材、电力建造抽水井

## Geography
a closed pesticide manufacturing plant located in Jiangsu Province, China.

## Technology and included processes
使用聚氯乙烯、水泥、砂、钢材、电力建造抽水井

## Technical purpose
使用聚氯乙烯（PVC）、水泥、硅砂、钢材和电力建造的抽水井旨在服务于中国江苏省一个已关闭的农药生产厂相关的地下水外部修复项目。这些抽水井是旨在管理和修复受污染地下水的抽水处理系统的一部分。

## Reference product
- Extraction wel: 1; measured

## Inputs
- Polyvinyl chloride: 38.1; measured
- cement, unspecified: 1074.88; measured
- quartz sand: 2836.86; measured
- Steel sections: 50; measured
- Electricity: 760.32; measured
- transport in t*km: 399.984; calculated

## Use advice
当在生命周期评估中应用这些描述地下水修复抽水井建造的数据集时，用户应考虑特定的现场条件，如污染物类型和浓度。必须确保与当地环保法规和修复目标的兼容性。该数据集不包括使用阶段、维护以及材料潜在的生命周期末期回收操作。用户必须根据修复现场的具体情况独立建模这些方面。

## Review details
清单： 内部审查通过几个迭代步骤完成，涉及原始数据验证、原始数据记录、代表性、完整性、与 ISO 14040 和 14044 有关的建模的一致性。

## Data sources
- Ding, D. et al. Assessing the environmental impacts and costs of biochar and monitored natural attenuation for groundwater heavily contaminated with volatile organic compounds. Science of The Total Environment 846, 157316 (2022).
