# 圈闭预探 ; 烃源岩和陆源海相烃源岩 ; 天然气勘探

Dataset: ILCD process, Unit process, single operation
Geography: GD-CN
Reference year: 1999
Classification: Unit processes / Energy carriers and technologies / Natural gas based fuels
LCI method principle: Attributional
LCI method approaches: Consequential
Generated by: Shikang Kang, 908798159@qq.com
Owner: 天工LCI数据工作小组
Review: Dependent internal review by 天工LCI数据工作小组
Amounts: no units in this file; such an amount is in the reference unit of its flow, which a separate flow dataset defines
copyright: false
licenseType: Free of charge for all users and uses

## General comment
白云凹陷恩平组发育三角洲煤系烃源岩和陆源海相烃源岩，其潜在的岩性地层圈闭具有自生、自储、自盖的成藏条件，勘探潜力巨大，预测是白云凹陷主力成藏组合，是深水区天然气勘探的主体方向。

## Geography
珠江口盆地白云凹陷

## Time period
文献综述提及

## Technology and included processes
恩平组岩性地层圈闭具有成藏条件：自生条件、自储条件、自封条件。

## Technical purpose
该数据集描述了位于珠江口盆地白云凹陷中恩平组在天然气勘探中的利用。地质构造具有有利的沉积条件，包括三角洲煤系烃源岩和陆源海相烃源岩，促进了岩性地层圈闭的发展。这些圈闭具有成藏的自生、自储和自封条件。当前区域预计将成为白云凹陷的主要成藏区，并代表了深水区天然气勘探的一个重要方向，具有发现大型和中型岩性和地层圈闭的潜力。

## Reference product
- Shale gas well: 4500; input; min 4000; max 5000; uniform; missing unimportant
  集体埋藏深度

## Inputs
- Shale gas well: 0.85; log-normal; missing unimportant
  孔隙空间,数据为分布，量中填写的数据为取平均（取中值）的结果

## Outputs
- natural gas: 0.8; log-normal; missing unimportant
  储层孔隙度,数据为分布，量中填写的数据为取平均（取中值）的结果
- natural gas: 1.6; min 1.55; max 1.65; uniform; missing unimportant
  压力系数

## Data selection and combination
白云凹陷恩平组沉积条件形成了适中的砂地比 ，有利于岩性地层圈闭的发育 ，目前共搜索到潜在大中型岩性地层圈 闭20多个，包括地层超 覆、近岸水下扇、滩坝、低位扇、三角洲前缘前积楔形砂岩体和上 倾尖灭砂岩体等6种类型 。

## Data treatment and extrapolations
白云凹陷恩平组发育三角洲煤系烃源岩和陆源海相烃源岩，其潜在的岩性地层圈闭具有自生、自 储、自盖的成藏条件，勘探潜力巨大，预测是白云凹陷主力成藏组合，是深水区天然气勘探的主体方向

## Use advice
使用这份数据集的用户应考虑到该区域的地质独特性，依赖恩平组的沉积特征进行准确的预测和勘探活动。应特别注意对潜在圈闭的自生条件、自储和自封特性的识别。关键是要将此数据主要应用于勘探潜力评估，并指导指定深水区域天然气提取的战略规划。利用这些数据的方法应与当前的地质勘查实践和行业标准保持一致。

## Review details
清单： 内部审查通过几个迭代步骤完成，涉及原始数据验证、原始数据记录、代表性、完整性、与 ISO 14040 和 14044 有关的建模的一致性。

## Data sources
- 张功成;陈莹;杨海长;韩银学;赵钊;杨东升;王龙颖;黄萱; 恩平组岩性地层圈闭——白云凹陷深水区天然气勘探新领域. 中国海上油气 1–9 (2015).
