# 生物基甲醇生产 ; 甲醇 ; PV/CCU-CH3OH 路线 ; CO2, H2

Dataset: ILCD process, Unit process, black box
Geography: CN
Classification: Energy carriers and technologies / Renewable fuels
Functional unit: In this study, the functional unit is defined as 1 kg and 1 MJ of H2 carrier produced from coal, natural gas, and renewables.
LCI method principle: Attributional
Generated by: 唐子睿, tangzirui123@gmail.com
Owner: 天工LCI数据工作小组
Review: Dependent internal review by 天工LCI数据工作小组
Amounts: no units in this file; such an amount is in the reference unit of its flow, which a separate flow dataset defines
copyright: false
licenseType: Free of charge for all users and uses

## General comment
二氧化碳制甲醇的技术路线包含三个关键步骤，即捕获二氧化碳、通过水电解产生 H2 以及利用二氧化碳的水力发电合成甲醇。

## Geography
研究假设甲醇和合成氨生产厂都位于中国西北部，那里煤炭、天然气和太阳能资源丰富。

## Technology and included processes
我们假设二氧化碳的来源是为系统提供电力和蒸汽的发电厂的废气。如图 1C 所示，在碳捕集阶段，烟气在风机的驱动下进入吸收器。当吸收了足够的二氧化碳后，溶剂被泵入再生塔，在蒸汽的作用下，二氧化碳从吸收器中分离出来。在产生 H2 阶段，利用水电解产生 H2，H2 由光伏供电。最后，H2 和捕获的 CO2 被送入甲醇合成系统，通过对捕获的 CO2 进行催化加氢生成甲醇。

## Technical purpose
本工艺详述了通过 PV/CCU-CH3OH 路线生产生物基甲醇的过程。该路线是一种通过捕获二氧化碳（CO2）及通过太阳能光伏能源驱动水电解来生产氢（H2）的可持续方法。以这种方式生产的生物基甲醇可作为绿色化学品用于各种工业应用，如燃料添加剂、溶剂或用作生产其他化学品的中间体。该过程特别适用于资源丰富的地区，如中国西北部，那里拥有丰富的煤炭、天然气和太阳能资源。

## Reference product
- Methanol: 1000; article inperiodical

## Inputs
All rows: article inperiodical
- electricity: 153.9
- Hydrogen: 190
- carbon dioxide: 1455
- Aluminium oxide: 0.012
- Copper oxide: 0.062
- zinc oxide: 0.029

## Outputs
- waste water - untreated: 630; article inperiodical

## Data selection and combination
相关数据收集自 Ravikumar 的研究成果(Ravikumar et al., 2020).

## Data treatment and extrapolations
取参考文献中的平均值，参考文献根据文献综述总结了常见的 14 种情况。

## Use advice
在利用 Ravikumar 等人（2020年）的数据对生物基甲醇生产进行生命周期评估（LCA）时，应取参考文献中总结的14种常见情景的平均值。确保根据工艺描述详细建模特定的碳捕集和 H2 产生阶段，包括从电厂烟气捕集碳以及使用光伏能源进行水电解。在计算影响时，要考虑生产设施的区域背景，特别是中国西北地区的煤炭、天然气和太阳能资源的可用性。此评估的功能单元被定义为从这些能源生产的 1 千克和 1 兆焦耳的 H2 载体。

## Review details
清单： 内部审查通过几个迭代步骤完成，涉及原始数据验证、原始数据记录、代表性、完整性、与 ISO 14040 和 14044 有关的建模的一致性。

## Data sources
- Zhu, R., Wang, Z., He, Y., Zhu, Y. & Cen, K. LCA comparison analysis for two types of H2 carriers: Methanol and ammonia. Int. J. Energy Res. 46, 11818–11833 (2022).
