# 市政污泥处理与处置;干污泥;脱水

Dataset: ILCD process, Unit process, single operation
Geography: QD-SD-CN
Classification: Unit processes / End-of-life treatment / Waste water treatment
Functional unit: The functional unit is the base for the treatment comparison in the life-cycle inventory. The management of one tone of dry sludge (DS) is selected.
Generated by: 金思甜, 2331276@tongji.edu.cn
Owner: 天工LCI数据工作小组
Review: Dependent internal review by 天工LCI数据工作小组
Amounts: no units in this file; such an amount is in the reference unit of its flow, which a separate flow dataset defines
copyright: ['opt4ROkqig']
licenseType: Free of charge for all users and uses

## General comment
本研究采用国内最典型的采用厌氧消化技术处理污泥的污水处理厂——山东省青岛市麦岛污水处理厂厌氧消化和脱水过程的年平均监测数据。

## Geography
麦岛污水处理厂

## Technology and included processes
污泥处理处置步骤为重力浓缩、厌氧消化、脱水、农业利用。

## Technical purpose
此数据集描述了在麦岛污水处理厂通过脱水进行的市政污泥处理与处置过程。它旨在用于需要管理干污泥（DS）的环境影响数据的生命周期评估中。这些信息可用于比较研究和对污水处理过程的环境评价，特别关注脱水一吨干污泥。

## Reference product
- Sludge: 1000; input; estimated
  1吨干污泥(DS)

## Inputs
- Electricity: 221.544; measured
- Polyacrylamide: 4.31; measured

## Outputs
- waste water - untreated: 3; measured

## Use advice
在生命周期评估（LCA）中使用此数据集时，必须确保LCA的范围适当地反映将管理一吨干污泥作为功能单元。考虑地理相关性到麦岛污水处理厂和脱水过程的技术适用性等因素。用户还应根据当地运行条件考虑排放和资源使用可能的变化。该数据集专门化，可能不适用于不同的污水处理环境或不同污泥处理技术。

## Review details
清单： 内部审查通过几个迭代步骤完成，涉及原始数据验证、原始数据记录、代表性、完整性、与 ISO 14040 和 14044 有关的建模的一致性。

## Data sources
- Xu, C., Chen, W. & Hong, J. Life-cycle environmental and economic assessment of sewage sludge treatment in China. Journal of Cleaner Production 67, 79–87 (2014).
