# 炼铁;铁水;高炉炼铁;烧结矿/球团矿/块矿/废钢

Dataset: ILCD process, Unit process, single operation
Geography: CN
Reference year: 2006
Classification: Unit processes / Materials production / Metals and semimetals
Generated by: 王环宇, wanghuanyu00@126.com
Owner: 天工LCI数据工作小组
Review: Dependent internal review by 天工LCI数据工作小组
Amounts: no units in this file; such an amount is in the reference unit of its flow, which a separate flow dataset defines
copyright: false
licenseType: Free of charge for all users and uses

## General comment
所描述的过程与通过高炉炼铁产生铁水有关。该过程涉及将铁矿石（烧结矿、球团矿、块矿）和废钢转化为熔融铁。这通常由钢铁制造业作为生产钢铁的第一步使用。这种熔融铁或铁水是钢铁制造过程中的基本原料，特别是在综合钢铁厂，铁水将进一步加工成各种钢铁产品。

## Geography
Z1工厂同一名称的工艺过程

## Reference product
- iron: 1.8682; measured
  z01

## Inputs
- hard coal; 26.3 MJ/kg: 171.5; measured
  喷煤
- Energy, geothermal, converted: 12221.3; measured
  z01

## Outputs
- Flue dust: 0.162; measured
  z01
- waste incineration of municipal solid waste (MSW): 304; measured
  z01

## Use advice
使用此数据集时，用户应考虑所提供的信息属于工厂Z1下特定名称的单元操作过程。核实所描述过程的技术参数与用户的预期应用相匹配至关重要，尤其是如果数据要集成到更广泛的生命周期评估中。考虑因素应包括炉子的效率和技术年限，原材料的来源以及特定的能耗。用户还应当意识到在应用此数据时，过程技术可能发生的变化或更新，以确保准确性和相关性。

## Review details
清单： 内部审查通过几个迭代步骤完成，涉及原始数据验证、原始数据记录、代表性、完整性、与 ISO 14040 和 14044 有关的建模的一致性。

## Data sources
- 刘微. LCI数据质量体系中的分析方法研究. (北京工业大学, 2006).
