# 市政污水处理;污水;序批式反应器（SBR）+AO/BFB

Dataset: ILCD process, Unit process, single operation
Geography: JS-CN
Classification: Unit processes / End-of-life treatment / Waste water treatment
Generated by: 于晨阳, yuchenyang0506@foxmail.com
Owner: 天工LCI数据工作小组
Review: Dependent internal review by 天工LCI数据工作小组
Amounts: no units in this file; such an amount is in the reference unit of its flow, which a separate flow dataset defines
copyright: ['opt4ROkqig']
licenseType: Free of charge for all users and uses

## General comment
序批式反应器（SBR）结合AO（全氨氧化）或BFB（生物滤池）是一种先进的废水处理技术。在SBR系统中，废水逐批次进入反应器，经过一系列处理步骤，包括曝气、沉淀和排放。AO和BFB技术进一步优化了氮和磷的去除，提高了处理效率，常用于城市污水和工业废水处理，具有高效、灵活等特点。

## Technology and included processes
序批式反应器（SBR）结合AO/BFB工艺首先利用序批式反应器（SBR）对废水进行生物处理，包括充分混合、曝气、沉淀等步骤。接着，采用AO（接触氧化）或BFB（生物滤床）工艺进一步去除氮化合物，通过好氧和缺氧条件下的微生物反应完成氮的去除。最后，经过处理的水体排放出，完成废水的净化和处理。

## Technical purpose
此数据集描述了序批式反应器（SBR）与厌氧/缺氧/好氧（AO）或生物膜生物膜过程（BFB）结合用于市政污水处理的情况。它用于处理污水，以减少污染物并提高水质，然后才将水排放到接受水体或用于其他用途。此过程适用于处理居住区污水或工业与市政混合污水流的设施。

## Reference product
- Wastewater: 1; input; measured
  参考定量

## Inputs
- Electricity: 20.016; measured

## Use advice
在使用此数据集进行生命周期评估时，请确保清晰界定市政污水处理过程的边界。包括与 SBR+AO/BFB 单元操作相关的所有输入和输出。用户应考虑具体的能源消耗、过程中使用的化学品、废污泥产生量和治疗过程中可能的排放。在将此数据应用于其他场景时，考虑处理能力和效率非常重要，以保持准确性。如果进行比较评估，请确保系统边界、假设和性能指标的一致性。

## Review details
清单： 内部审查通过几个迭代步骤完成，涉及原始数据验证、原始数据记录、代表性、完整性、与 ISO 14040 和 14044 有关的建模的一致性。

## Data sources
- Tong, L., Liu, X., Liu, X., Yuan, Z. & Zhang, Q. Life cycle assessment of water reuse systems in an industrial park. Journal of Environmental Management 129, 471–478 (2013).
