# 铜生产;阴极铜;熔池熔炼法;硫化矿

Dataset: ILCD process, Unit process, single operation
Geography: CN
Reference year: 2014
Classification: Unit processes / Materials production / Metals and semimetals
Functional unit: functional unit was defined as the production of 1 t of refined copper (i.e., cathode copper).
LCI method principle: Attributional
LCI method approaches: Allocation - market value
Generated by: 王鹏, 2867919560@qq.com
Owner: 天工LCI数据工作小组
Review: Dependent internal review by 天工LCI数据工作小组
Amounts: no units in this file; such an amount is in the reference unit of its flow, which a separate flow dataset defines
copyright: false
licenseType: Free of charge for all users and uses

## General comment
该阴极铜通过硫化矿浴法初级生产制得，广泛应用于电线电缆、屋顶铺设、水管安装以及工业机械中。本数据集代表西部中国一个专门从事火法冶金的铜厂生产的铜，包括从采矿到电解精炼的整个周期。在中国，这种铜冶炼通常采用闪速或浴式冶炼技术。

## Geography
中国西部某铜厂的生产数据

## Technology and included processes
火法冶金工艺包括采矿、选矿、冶炼、转炉、火法精炼（包括阳极铸造）和电解精炼，其中冶炼是关键阶段。我国冶炼厂主要有两种类型，即闪速冶炼厂和浴式冶炼厂

## Reference product
- Refined copper: 1000; software or database

## Inputs
- copper ore/(0.81%): 0; measured
  copper ore/(0.81%)需要补充
- copper ore/(1.02%): 106064; measured
  copper ore/(1.02%)需要补充
- waste wire: 0; software or database
  waste wire需要补充
- Limestone: 109.44; software or database
  imestone
- quartz sand: 1092.09; software or database
- oxygen: 1469.39; software or database
- Sulfuric acid(98%): 6.8; software or database
  sulfuric acid需要补充resourse
- Alternating Current Electricity: 18398.3; software or database
  AC electricity需要补充
- Direct Current Electricity: 932.4; software or database
  DC electricity需要补充
- hard coal,hard coal,hard coal: 10454.9; software or database
  coal
- coke: 0; software or database
  coke需要补充
- Diesel oil,diesel oil: 9657; software or database
  diesel oil需要补充
- Heavy fuel oil (1.0 wt.% S): 1869.1; software or database
  heavy fuel oil

## Outputs
All rows: software or database
- carbon dioxide (fossil): 2203.63
  CO2
- sulfur oxides: 63.84
  SO2
- chemical oxygen demand: 52.59
  COD需要补充
- particles (PM2.5 - PM10): 27.5
  dust需要补充
- Slag: 2998
  slag

## Deviations from the LCI method approaches
Eco-Indicator 99（EI99）是生命周期影响评估中广泛使用的一种以损害为导向的影响评估方法[22]。影响评估采用 EI99 方法（层级论视角）进行。

## Data selection and combination
铜生产库存数据主要来源于两个采用不同设备和工艺的工厂，辅以其他公开文献。部分辅助材料的库存数据来自PE-GaBi数据库。

## Data treatment and extrapolations
本研究中使用 GaBi 4 软件对铜生产过程进行建模并确定环境负担。

## Use advice
使用此数据的用户应当在生命周期评估中考虑到西中国设施铜生产的具体情境。库存数据基于两家具有不同设备和工艺的工厂的信息，并且可能不会普遍代表所有铜生产。用户需特别注意这种区域性和技术上的特殊性，特别是在进行比较评估时。使用PE-GaBi数据库中辅助材料的数据以及通过GaBi 4软件对环境负担进行建模应当得到适当的参考。使用EI99方法进行的影响评估也应考虑此系统提供的层级论视角。

## Review details
清单： 内部审查通过几个迭代步骤完成，涉及原始数据验证、原始数据记录、代表性、完整性、与 ISO 14040 和 14044 有关的建模的一致性。

## Data sources
- Song, X., Yang, J., Lu, B., Li, B. & Zeng, G. Identification and assessment of environmental burdens of Chinese copper production from a life cycle perspective. Front. Environ. Sci. Eng. 8, 580–588 (2014).
