# Sanitarymaterialsandmedicalsupplies|ChemicalPharmaceuticalIngredients|SolidPreparation|200less than or equal toyieldless than1000 t/a / /|卫生材料及医药用品|化学药品原料药|固体制剂|200小于等于产量小于1000吨/年

Dataset: ILCD process, Partly terminated system
Geography: CN
Reference year: 2019
Classification: Materials production / Other mineralic materials
Generated by: The data was created by the Office of the Second National Pollution Source Census of the Ministry of Ecology and Environment, and the data was organized by the TianGong Plan team for ILCD format / 生态环境部第二次全国污染源普查工作办公室创建数据，天工计划团队常慧敏整理数据为ILCD格式
Amounts: no units in this file; such an amount is in the reference unit of its flow, which a separate flow dataset defines
copyright: false

## Technology and included processes
the Technical of end-of-pipe management technology for pollution Health and Medical Suppliesis/，The formula for calculating the actual operation rate (k-value) of the end-of-pipe treatment facility is k = annual normal operating time of waste gas treatment facilities (hours) / annual normal production time of enterprises (hours)
污染物指标废水量的末端治理技术是/，末端治理设施实际运行率（k值）计算公式为/

## Reference product
- Health and Medical Supplies: 1000; calculated
  原文件中描述污染物类别为Product，污染物指标为卫生材料及医药用品，此处对其进行了匹配工作，将其匹配到LCAflow库里面相最符合的流，污染物指标备注为废水量

## Outputs
All rows: calculated
- Waste water: 119
  原文件中描述污染物类别为废水，污染物指标为废水量，此处对其进行了匹配工作，将其匹配到LCAflow库里面相最符合的流，污染物指标备注为废水量
- chemical oxygen demand: 51.1, 4.9567, 2.8105, 1.7885 (4 entries)
  原文件中描述污染物类别为废水，污染物指标为化学需氧量，此处对其进行了匹配工作，将其匹配到LCAflow库里面相最符合的流，污染物指标备注为化学需氧量
- Ammonia Nitrogen: 1.9, 0.1786, 0.171, 0.114 (4 entries)
  原文件中描述污染物类别为废水，污染物指标为氨氮，此处对其进行了匹配工作，将其匹配到LCAflow库里面相最符合的流，污染物指标备注为氨氮
- phosphorus, total: 1.54, 0.2079, 0.1309, 0.02156 (4 entries)
  原文件中描述污染物类别为废水，污染物指标为总磷，此处对其进行了匹配工作，将其匹配到LCAflow库里面相最符合的流，污染物指标备注为总磷
- Nitrogen, organic bound: 3.8, 1.1362, 0.8854, 0.1596 (4 entries)
  原文件中描述污染物类别为废水，污染物指标为总氮，此处对其进行了匹配工作，将其匹配到LCAflow库里面相最符合的流，污染物指标备注为总氮
- Exhaust gas: 360169
  原文件中描述污染物类别为废气，污染物指标为废气量，此处对其进行了匹配工作，将其匹配到LCAflow库里面相最符合的流，污染物指标备注为废气量
- volatile organic compound: 9.72, 6.804, 2.43, 0.972 (4 entries)
  原文件中描述污染物类别为废气，污染物指标为挥发性有机物，此处对其进行了匹配工作，将其匹配到LCAflow库里面相最符合的流，污染物指标备注为挥发性有机物

## Data sources
- 第二次全国污染源普查产排污核算系数手册（试用版）,二级代码27,三级代码277.0文件，在完整版文件中第3237页
