# Integrated gravitational-flow wastewater treatment system

Dataset: ILCD process
Classification: Materials production / Other mineralic materials
Generated by: HUANG Runyao, runyaoh@163.com
Amounts: no units in this file; such an amount is in the reference unit of its flow, which a separate flow dataset defines

## Reference product
- Geomembrane,Pensile carrier,Plastic,挖弃土方,biochemical oxygen demand: 4.2042, 48.5078, 2.42539 (3 entries); input
- Electricity: 0.09702; input

## Data sources
- PPCPs in wastewater – Update and calculation of characterization factors for their inclusion in LCA studies
