# 清洁场地;运输土壤去填埋;土壤异位修复;挖掘和填埋

Dataset: ILCD process, Unit process, single operation
Geography: IT
Reference year: 2021
Classification: Unit processes / Other Services / Repair and maintenance
Generated by: 肖萌, xiaomeng@mail
Owner: 天工LCI数据工作小组
Review: Dependent internal review by 天工LCI数据工作小组
Amounts: no units in this file; such an amount is in the reference unit of its flow, which a separate flow dataset defines
copyright: false
licenseType: Free of charge for all users and uses

## General comment
被污染的土壤被收集、运输并在垃圾填埋场处理。该环节将开挖出来的污染土壤转运至填埋场

## Geography
The site taken as a reference for the remediation is an area of 712 m2 located in a disused industrial district of Tuscany (Italy), in the past subjected to various productive activities that led to contamination with various metals, some of which potentially toxic such as lead (Pb), arsenic (As) and thallium (Tl). As it is a “site of national interest”, its exact location is considered confidential and cannot be disclosed.

## Technical purpose
所描述的流程是用于工业场地受污染土壤的修复。它涉及挖掘因工业活动而受到污染的土壤，以及将其后续运输和处置于垃圾填埋场。这项服务通常用于因史上潜在有毒金属（如铅Pb、砷As和铊Tl）污染而被归类为国家利益场地的区域。

## Reference product
- Remedied site: 712; measured

## Inputs
- Excavated soil,Excavated soil: 1281.6; measured
- transport in t*km: 192240; measured

## Use advice
使用此数据时，用户必须确保他们考虑到场地和污染的具体性质，因为修复要求可能因污染物和当地法规而大不相同。地理细节和限制，如它是一个国家利益场地以及对确切位置的保密，必须被考虑在内。此数据适用于专注于土壤修复过程的LCA研究，不应泛化为所有废物管理或土地处理应用。

## Review details
清单： 内部审查通过几个迭代步骤完成，涉及原始数据验证、原始数据记录、代表性、完整性、与 ISO 14040 和 14044 有关的建模的一致性。

## Data sources
- Vocciante, M., De Folly D’Auris, A., Franchi, E., Petruzzelli, G. & Ferro, S. CO2 footprint analysis of consolidated and innovative technologies in remediation activities. J Clean Prod 297, 126723 (2021).
