# 单晶硅太阳能光伏电池生产 ; 单晶硅光伏电池，电池效率为 15.7% ; 掺杂元素的高温扩散

Dataset: ILCD process, Unit process, single operation
Geography: ZJ-CN
Reference year: 2015
Classification: Unit processes / Systems / Electrics and electronics
Functional unit: In this study, the production of 1 kWp mono-Si PV cell is selected as the functional unit
LCI method principle: Attributional
LCI method approaches: Allocation
Generated by: 杨锦锋, yjfzfshn@163.com
Owner: 天工LCI数据工作小组
Review: Dependent internal review by 天工LCI数据工作小组
Amounts: no units in this file; such an amount is in the reference unit of its flow, which a separate flow dataset defines
copyright: false
licenseType: Free of charge for all users and uses

## General comment
单晶硅

## Geography
本研究采用了浙江省某单晶硅光伏电池生产基地的年度统计数据

## Time period
文章发表

## Technical purpose
此数据集涉及具有15.7%效率的单晶硅太阳能光伏电池的生产。工业过程包括在单晶硅电池中高温扩散掺杂元素。这些电池主要用于组装太阳能电池板，将阳光转换为电能，适用于住宅、商业和公用事业规模的太阳能发电系统。

## Reference product
- mono-Si PV cell: 1000; measured

## Inputs
All rows: measured
- Electricity: 653.22
- Glass: 60.17
- Mono-Si wafer: 0.093
- Silver Paste: 0.14
  Silver paste
- Aluminum Paste: 0.59
  Aluminum paste
- Ammonia: 0.00237
- Phosphorus Oxychloride: 0.0206
  Phosphoryl chloride
- Ethanol: 3.31
- Organic Solvents: 0.00619
  Organic solvents
- Hydrochloric acid: 0.93
  Hydrochloric acid (38%)
- Hydrofluoric acid: 0.85
  Hydrogen ﬂuoride (40%)
- Sodium hydroxide: 0.99
- dinitrogen: 14.96
  Nitrogen
- Ethylene-vinyl acetate copolymer,Ethylene-vinyl acetate copolymer,Ethylene-vinyl acetate copolymer: 0.18
  Ethylene vinyl acetate (EVA) ﬁlm
- aluminium: 0.53
  Aluminum
- Silane: 0.00055
  Silicon tetrahydride
- Polyvinyl fluoride (PVF): 6.9e-6
  Polyvinylﬂuoride (PVF) ﬁlm
- freshwater: 1670
  Water

## Outputs
All rows: measured
- waste water - untreated: 0.67
  Wastewater
- industrial waste (unspecified): 0.53
  Solid waste
- hydrogen chloride: 0.00042
  Hydrogen chloride
- non-methane volatile organic compounds: 0.0274
  Non-methane volatile organic compounds
- hydrogen fluoride: 0.00102
  Hydrogen ﬂuoride
- ammonia: 9.11e-5
  Ammonia
- chloride: 7.29e-5
  Chloride
- methane (fossil): 2e-5
  Methane
- Silicon: 0.00277

## Deviations from the LCI method approaches
LCI 分析是一项调查，其中包括原材料和能源消耗、废物处理以及对环境的直接排放。

## Use advice
使用此数据时，请确保考虑生产数据的技术特定来源，该数据取自中国浙江省某单晶硅光伏电池生产基地的年度统计报告。数据包括基于所分析情景的原材料和能源消耗、废物处理以及对环境的直接排放。在此生命周期清单（LCI）分析中定义的功能单元是生产1 kWp的单晶硅光伏电池。用户必须考虑这些细节并严格遵守功能单元，当进行生命周期评估或环境影响研究时。

## Review details
清单： 内部审查通过几个迭代步骤完成，涉及原始数据验证、原始数据记录、代表性、完整性、与 ISO 14040 和 14044 有关的建模的一致性。

## Data sources
- Chen, W., Hong, J., Yuan, X. & Liu, J. Environmental impact assessment of monocrystalline silicon solar photovoltaic cell production: a case study in China. Journal of Cleaner Production 112, 1025–1032 (2016).
