# 稀土元素开采;稀土元素;氟碳铈矿路线;含稀土元素矿石

Dataset: ILCD process, Unit process, single operation
Geography: NMG-CN
Reference year: 2014
Classification: Unit processes / Materials production / Non-energetic raw materials
Functional unit: The functional unit of this study is the production of 1 kg of the basket REO from each corresponding mineralogical and processing route.
LCI method principle: Attributional
LCI method approaches: Allocation - market value
Generated by: 汪涛, twang@iue.ac.cn
Owner: 天工LCI数据工作小组
Review: Dependent internal review by 天工LCI数据工作小组
Amounts: no units in this file; such an amount is in the reference unit of its flow, which a separate flow dataset defines
copyright: false
licenseType: Free of charge for all users and uses

## General comment
本研究所分析的稀土元素（REE）生产过程，包括开采和溶剂萃取以及如沉淀和煅烧等产品精加工过程，旨在生产应用于电子、清洁能源和航天工程等多种高科技行业的含稀土元素化合物。

## Technology and included processes
在这项研究中，对稀土生产系统进行了分析，从采矿到溶剂萃取，其中包含沉淀和煅烧等产品精加工过程

## Reference product
- Raw ore: 1; calculated

## Inputs
All rows: calculated
- Diesel: 1.25
- to unspecified: 2.13e-6
- water: 0.0034
- mineral extraction site: 0.00012
- to unspecified: 2.13e-6
  To mineral extraction site
- Iron ore: 0.3
- cerium: 0.0164
- lanthanum: 0.00984
- neodymium: 0.00541
- praseodymium: 0.00172
- europium: 8.14e-5
- samarium: 0.00041
- gadolinium: 0.000206

## Outputs
All rows: calculated
- waste heat: 0.00513
- particles (PM2.5): 0.000144
- particles (PM10): 0.00144
- particles (PM2.5 - PM10): 0.0013
- uranium-238: 0.000134
- radium-226: 0.01
- thorium-232: 0.0506

## Deviations from the LCI method approaches
In this study, the REE production system was analyzed from mining up to and including solvent extraction which contains product finishing processes such as precipitation and calcination (Fig. 1). The other categories assessed in the literature review were mineral type, radioactivity, waste treatment, and co-mining. For mineral type, it was noted that the mineralogy accounted for in each study was different, which makes comparison difficult. For radioactivity, we marked with an X those studies which exemplified radioactivity flows in the LCI (if provided). For waste, we distinguished those LCIs which quantified waste treatment flows. For co-mining, since all REE are co-products of each other, this column is meant to highlight the co-products in addition to REE.

## Use advice
在使用此生命周期评估（LCA）数据集时，必须考虑矿物学差异和加工路线的不同，因为这些因素可能影响数据的可比性。同时，应关注研究中标记的放射性流量、废物处理流量及除了稀土元素以外的共同矿产品。比较的功能单元是每种特定矿物学和加工路线生产1公斤的REO（稀土氧化物）篮子。在评估过程中必须保持方法论的一致性，以确保准确比较和决策。

## Review details
清单： 内部审查通过几个迭代步骤完成，涉及原始数据验证、原始数据记录、代表性、完整性、与 ISO 14040 和 14044 有关的建模的一致性。

## Data sources
- Bailey, G. et al. Review and new life cycle assessment for rare earth production from bastnäsite, ion adsorption clays and lateritic monazite. Resources, Conservation and Recycling 155, 104675 (2020).
