# 土壤样品;样品运输;农田修复;原位钝化

Dataset: ILCD process, Unit process, single operation
Geography: NJ-YN-CN
Reference year: 2023
Classification: Unit processes / Other Services / Repair and maintenance
Generated by: 肖萌, xiaomeng@mail
Owner: 天工LCI数据工作小组
Review: Dependent internal review by 天工LCI数据工作小组
Amounts: no units in this file; such an amount is in the reference unit of its flow, which a separate flow dataset defines
copyright: false
licenseType: Free of charge for all users and uses

## General comment
稳定化修复的后端处置阶段，检测修复后的土样1000kg，从云南省兰坪运输到江苏省南京进行检测。

## Geography
云南省怒江州受铅锌矿污染某耕地土壤 污染修复工程

## Technical purpose
该数据集代表了云南省怒江州因铅锌矿污染导致的农田土壤稳定化和修复工业过程。该过程实现了16公顷重金属污染农田的修复，确保作物对镉(Cd)和铅(Pb)浓度标准的100%符合，并将土壤中有效态Cd和Pb浓度降低超过70%。这个过程对恢复农田生产力和环境健康至关重要。

## Reference product
- Soil Sample: 1000; measured
  运输到检测场地的样土

## Inputs
- transport in t*km: 12975; measured

## Use advice
在应用该数据集进行生命周期评估（LCA）时，用户应考虑到云南省怒江州重金属土壤修复的具体情况以及代表性的地理位置。重要的是注意到数据特定于使用的场地和技术（原位稳定化技术），若直接应用于不同的情境而不进行调整可能不适用。从云南省兰坪到江苏省南京长距离土壤样品运输也应考虑在生命周期评估中，特别是在评估运输影响时。用户在使用该数据集时必须考虑区域的重金属污染水平、修复效率和当地的农业实践变化。

## Review details
清单： 内部审查通过几个迭代步骤完成，涉及原始数据验证、原始数据记录、代表性、完整性、与 ISO 14040 和 14044 有关的建模的一致性。

## Data sources
- 肖萌 et al. 农田污染钝化修复环境影响定量评估方法与案例分析. 中国环境科学 43, 3571–3581 (2023).
