# 熟料生产;熟料;新型干法, 5000 t/d;废皮革

Dataset: ILCD process, Unit process, black box
Geography: GD-CN
Reference year: 2009
Classification: Materials production / Other mineralic materials
Generated by: 杨思琪, ysqsophia@gmail.com
Owner: 天工LCI数据工作小组
Review: Dependent internal review by 天工LCI数据工作小组
Amounts: no units in this file; such an amount is in the reference unit of its flow, which a separate flow dataset defines
copyright: false
licenseType: Free of charge for all users and uses

## General comment
试烧试验以废皮革为替代燃料。其热值约为3768.12kJ/kg，选择广州珠江水泥广日产水泥约5000t/d的新型干法水泥生产线进行试烧，废皮革入广后先进行破碎，包装成袋（200kg袋）经广内运输至窑尾位置，从三次风管与分解炉连接处通过绞式喂料机投入分解炉内试烧。每h投入废皮革约5t连续投料6h。记录试烧时的水泥产量、原料消耗和能源消耗量。并测定尾气的污染物成分及浓度。

## Geography
广州珠江水泥厂

## Technology and included processes
其热值约为3 768.12 k]/kg，选择广州珠江水泥广日产水泥约5 000 t/d的新型干法水泥生产线进行试烧，废皮革入广后先进行破碎，包装成袋(200 kg 袋)经广内运输至窑尾位置，从三次风管与分解炉连接处通过绞式喂料机投入分解炉内试烧。每h 投入废皮革约 5 t连续投料 6 h.记录试烧时的水泥产量、原料消耗和能源消耗量。并测定尾气的污染物成分及浓度。

## Technical purpose
将废皮革作为替代燃料的熟料生产过程专门用于水泥工业。这种创新方法利用废皮革的热值在新型干法水泥生产线中使用，从而提供了对传统化石燃料的替代。

## Model description
生产1t熟料定义为1功能单位。将原料入厂设定为生命周期的起点，终点设定为熟料烧成阶段。

## Reference product
- clinker: 1000
  熟料

## Inputs
- limestone, crushed, for mill: 1300
  石灰石
- clay: 100
  黏土
- gypsum stone (CaSO4-dihydrate): 70
  石膏
- iron ore: 21
  铁矿石
- Leather waste: 30
  废皮革
- hard coal; 26.3 MJ/kg: 95
  煤
- electricity, medium voltage: 360
  电

## Outputs
- carbon dioxide (fossil): 239
  CO2（化石燃料燃烧）
- carbon dioxide: 647
  CO2（石灰石分解）
- sulfur dioxide: 0.44
  SO2
- Nitrogen oxides: 1.54
  NOx
- particles (> PM10): 0.021
  粉尘，未标明粒径，按PM>10处理。

## Use advice
在使用此数据集进行生命周期评估（LCA）时，请将原料的进厂视为生命周期的起点。评估的终点应为最终的熟料煅烧阶段。确保准确记录试烧期间的水泥产量、原料消耗和能源使用情况。此外，测量废气中污染物的浓度和成分以评估使用废皮革作为燃料的环境影响至关重要。

## Review details
清单： 内部审查通过几个迭代步骤完成，涉及原始数据验证、原始数据记录、代表性、完整性、与 ISO 14040 和 14044 有关的建模的一致性。

## Data sources
- 周奇, 黄启飞, 王琪, & 李丽. (2009). 废皮革水泥窑共处置生命周期评价. 环境科学研究, 22(4), 506–510.
