# PVCartificialleather|Blending-mixing-plasticizing-calendering/scratching-foaming-surface treatment|All sizes / /|PVC人造革|树脂(PVC),增塑剂，发泡剂，表面处理剂|配料-混合-塑化-压延/刮凃-发泡-表面处理|所有规模

Dataset: ILCD process, Partly terminated system
Geography: CN
Reference year: 2019
Classification: Materials production / Other mineralic materials
Generated by: The data was created by the Office of the Second National Pollution Source Census of the Ministry of Ecology and Environment, and the data was organized by the TianGong Plan team for ILCD format / 生态环境部第二次全国污染源普查工作办公室创建数据，天工计划团队常慧敏整理数据为ILCD格式
Amounts: no units in this file; such an amount is in the reference unit of its flow, which a separate flow dataset defines
copyright: false

## Technology and included processes
the Technical of end-of-pipe management technology for pollution PVC Artificial Leatheris/，The formula for calculating the actual operation rate (k-value) of the end-of-pipe treatment facility is k = operating time of treatment facilities (hours) / actual operating time of biomass power generating units (hours)
污染物指标工业废气量的末端治理技术是/，末端治理设施实际运行率（k值）计算公式为/

## Reference product
- PVC Artificial Leather: 10000, 10000 (2 entries); calculated
  原文件中描述污染物类别为Product，污染物指标为PVC人造革，此处对其进行了匹配工作，将其匹配到LCAflow库里面相最符合的流，污染物指标备注为工业废气量

## Outputs
- Exhaust gas: 345000; calculated
  原文件中描述污染物类别为废气，污染物指标为工业废气量，此处对其进行了匹配工作，将其匹配到LCAflow库里面相最符合的流，污染物指标备注为工业废气量
- volatile organic compound: 4.59, 6.885, 0.765, 9.18, 9.18, 3.06, 3.06, 4.59, 15.3 (9 entries); calculated
  原文件中描述污染物类别为废气，污染物指标为挥发性有机物，此处对其进行了匹配工作，将其匹配到LCAflow库里面相最符合的流，污染物指标备注为挥发性有机物

## Data sources
- 第二次全国污染源普查产排污核算系数手册（试用版）,二级代码29,四级代码2925文件，在完整版文件中第3308页
