# 焦化;焦炭;炼焦

Dataset: ILCD process, Unit process, single operation
Geography: LN-CN
Classification: Unit processes / Energy carriers and technologies / Energetic raw materials
Generated by: 付翔, 1162850692@qq.com
Owner: 天工LCI数据工作小组
Review: Dependent internal review by 天工LCI数据工作小组
Amounts: no units in this file; such an amount is in the reference unit of its flow, which a separate flow dataset defines
copyright: false
licenseType: Free of charge for all users and uses

## General comment
所描述的焦化过程指的是铁钢生产企业中的单一操作单元过程。在该过程中生产的焦炭主要用作高炉中提取铁从铁矿石时的燃料和还原剂。它也用于铸造厂以及其他需要高温碳源的工业冶金过程。

## Geography
To analyze life cycle water use and discharge, an iron and steel enterprise located in Liaoning Province, China, was selected as the case study.

## Reference product
- coke,Coke: 1000; measured
  Coke

## Inputs
All rows: measured
- freshwater,freshwater: 397
- Softened Water: 380.41
  Softened water
- Cleaned coal: 1343.49
  Cleand coal
- Coke oven gas: 33.13
- Blast furnace gas: 935.35
- Linz-Donawitz gas: 3.02
- Electricity: 114.732
- process steam: 37.61
- used air: 5.54
- nitrogen: 15.72

## Outputs
- process steam from waste incineration: 385.13; measured
  Waste heat steam
- waste heat: 122.28; measured
  Waste heat water
- Coke oven gas: 457.21; measured
- waste water - untreated: 79.51; measured

## Use advice
使用此LCA数据集时，请考虑由于该过程在中国辽宁省进行而导致的水使用和排放的区域特异性。考虑技术适用性，如焦化设备的年龄、过程的效率以及所涉及材料的终生处理。确保LCA的范围包括必要的背景流程，如能源供给和排放处理。任何联合过程的分摊程序应在研究的背景下报告和证明。

## Review details
清单： 内部审查通过几个迭代步骤完成，涉及原始数据验证、原始数据记录、代表性、完整性、与 ISO 14040 和 14044 有关的建模的一致性。

## Data sources
- Life cycle water use and wastewater discharge of steel production based on material-energy-water flows: A case study in China
