# Wet-steamed cotton dyeing and finishing | printing and dyeing cotton | turning

Dataset: ILCD process, Unit process, single operation
Geography: SZ-JS-CN
Reference year: 2012
Classification: Materials production / Other mineralic materials
Generated by: Yingfan Duan, 1300925579@qq.com
Review: Dependent internal review by Tiangong LCI Data Working Group
Amounts: no units in this file; such an amount is in the reference unit of its flow, which a separate flow dataset defines
copyright: false

## Geography
本研究选取江苏省某印染企业为重点调研对象，该企业位于长三角经济圈中的常熟。

## Inputs
- Cotton: 167; measured
- Cotton: 0.118; measured
  cotton thread

## Outputs
- carbon dioxide: 11.4; measured
- carbon monoxide: 0.0263
- sulfur dioxide: 0.000358; measured
- methane: 0.000232; measured
- Nitrogen oxides: 0.116
- nitrous oxide: 0.000217; measured
- Dust (unspecified, from stack): 0.00483; measured
- ammonia: 8.35e-5
- non-methane volatile organic compounds: 0.00942

## Review details
Inventory: The internal review was done by several iteration steps concerning raw data validation, raw data documentation, representativity, completeness and consistency of modelling with regard to ISO 14040 and 14044.

## Data sources
- 朱亚楠. 棉布连续轧染工艺生命周期环境影响评价. (南京大学, 2012).
