# 还原气生产;还原气;还原气生产过程

Dataset: ILCD process, Unit process, single operation
Geography: CN
Classification: Unit processes / Energy carriers and technologies / Other non-renewable fuels
Generated by: 付翔, 1162850692@qq.com
Owner: 天工LCI数据工作小组
Review: Dependent internal review by 天工LCI数据工作小组
Amounts: no units in this file; such an amount is in the reference unit of its flow, which a separate flow dataset defines
copyright: false
licenseType: Free of charge for all users and uses

## General comment
所描述的工业过程涉及还原气的生产，该还原气在化工行业和金属加工行业的各种还原反应中使用，特别是在直接还原铁矿石等过程中。此数据可能涉及使用煤基直接还原（Coal-DR）、焦炉气直接还制（COG-DR）或氢基直接还原（H-DR）路线的应用，在冶金行业生产铁或钢，不需要高炉。

## Geography
The LCI of Coal-DR is obtained, as shown in Table 9, based on the statistics of the demonstration project in China.

## Reference product
- Reducing gas: 1361.9; calculated

## Inputs
All rows: calculated
- freshwater,freshwater: 100
- process steam: 172.4
- Raw gas: 1310.1
- Top gas: 1063.4
- natural gas: 193.7
- Electricity: 244.44

## Outputs
- sulfur: 3.6; calculated
- Crude Benzene,clumsy: 1.1; calculated
  Crude benzene
- particles (> PM10): 0.1; calculated
- carbon dioxide (fossil): 182.4; calculated
  原文未区分bio和fossil，根据专家判断此处为fossil

## Data treatment and extrapolations
LCI of COG-DR and H-DR routes, which is not scaled-up in China are estimated based on Coal-DR routes combined with literature data from simulations, laboratory tests, and process modeling in Table 9 [49,50]. The LCI of Coal-DR is obtai

## Use advice
在生命周期评估中使用此数据集时，请仔细考虑地理和技术范围。所提供的数据主要基于中国的示范项目统计数据，因此可能不具有其他地区或规模的代表性。应注意，COG-DR 和 H-DR 路径在中国没有扩大规模，并且是从结合了来自模拟、实验室测试和过程建模等各种来源的文献数据的 Coal-DR 路线推断出来的。确保与可靠的二手数据进行彻底交叉参考，以提高所提供的生命周期清单（LCI）数据未直接涵盖的情景的准确性。

## Review details
清单： 内部审查通过几个迭代步骤完成，涉及原始数据验证、原始数据记录、代表性、完整性、与 ISO 14040 和 14044 有关的建模的一致性。

## Data sources
- The carbon reduction potential of hydrogen in the low carbon transition of the iron and steel industry: The case of China
