# Bioethanol ; Alkline

Dataset: ILCD process
Geography: GLO
Classification: Energy carriers and technologies / Renewable fuels
Generated by: 袁嘉翼, jiayi_y@mail.bnu.edu.cn
Owner: 天工LCI数据工作小组
Review: Dependent internal review by 天工LCI数据工作小组
Amounts: no units in this file; such an amount is in the reference unit of its flow, which a separate flow dataset defines
licenseType: Free of charge for all users and uses

## General comment
这种通过碱性工艺生产的生物乙醇主要用作可再生燃料来源，适合与汽油混合用于运输应用中减少碳排放。它还可以作为生产可生物降解塑料、制药和个人护理产品的前体物质。

## Inputs
All rows: uniform; missing unimportant
- sodium hydroxide: 132; min 46; max 400
- Electricity: 0.12132; max 2.2428
- heat: 3510; max 6100
- Electricity: 163.08; min 41.04; max 691.2
- heat: 2950; min 591; max 5220
- Electricity: 590.4; min 43.56; max 1965.6

## Outputs
- heat: 1620; max 3000; uniform; missing unimportant

## Use advice
使用该数据集时，用户应考虑与生物乙醇生产相关的生命周期各个阶段，包括资源采集、运输和加工。应关注生产过程中使用碱性化学品可能导致的潜在环境影响。此外，如果此生物乙醇用于燃料混合比例，用户必须确保符合目标市场相关燃料标准和法规的要求。

## Review details
清单： 内部审查通过几个迭代步骤完成，涉及原始数据验证、原始数据记录、代表性、完整性、与 ISO 14040 和 14044 有关的建模的一致性。
