# 砖块生产 ;页岩空心砖生产 ;筛分过程

Dataset: ILCD process, Unit process, single operation
Geography: GZ-JX-CN
Reference year: 2020
Classification: Unit processes / Materials production / Other mineralic materials
Generated by: 王湘锦, r99rt4@163.com
Owner: 天工LCI数据工作小组
Review: Dependent internal review by 天工LCI数据工作小组
Amounts: no units in this file; such an amount is in the reference unit of its flow, which a separate flow dataset defines
copyright: false
licenseType: Free of charge for all users and uses

## General comment
传统页岩空心砖生产工艺

## Technical purpose
该过程生产的页岩空心砖用于建筑目的，包括建造墙壁、外墙以及其他在需要轻质、隔热或成本效益时使用的结构元素。

## Reference product
- brickbat aggregate: 1375; measured
  筛分后的粗骨料

## Inputs
- brickbat aggregate: 1431; measured
- Electricity: 2.25; measured

## Outputs
- particles (> PM10),particles (> PM10): 0.03; measured
- Particles (PM0.2 - PM2.5): 0.035; measured
- Waste (solid): 36; measured

## Deviations from the LCI method approaches
环境影响评估报告基于砖的年产量（8000万块砖），出于统计目的，数据已根据其中所述的尺寸规格进行转换，即每吨生产的砖

## Data selection and combination
采用根据《第一次全国污染源普查工业污染源产排污系数手册 第七分册》中 3131 烧结类砖瓦及建筑砌块制造业产排污系数表的相关数据。

## Sampling procedure
该环评报告的数据来源于工厂的实时数据

## Use advice
该数据集的使用者需注意，排放和资源使用数据是基于8000万块砖块的生产量来计算的。在使用这些数据进行生命周期评估时，重要的是要将数据转换为与用户项目相关的特定数量和尺寸规格的砖块以匹配。此外，如果用户项目涉及回收或使用寿命结束的情景，必须相应调整数据以准确反映这些过程。

## Review details
清单： 内部审查通过几个迭代步骤完成，涉及原始数据验证、原始数据记录、代表性、完整性、与 ISO 14040 和 14044 有关的建模的一致性。

## Data sources
- 年产 8000 万块页岩标砖项目环评报告公示
