# 废纸浆造纸;超级压光纸

Dataset: ILCD process, Unit process, black box
Geography: SD-CN
Classification: Unit processes / Materials production / Paper and cardboards
Functional unit: In this study, one tonne of waste paper feedstock was collected as a functional unit.
LCI method principle: Attributional
LCI method approaches: Allocation
Generated by: 高逸翔, 22210740040@m.fudan.edu.cn
Owner: 天工LCI数据工作小组
Review: Dependent internal review by 天工LCI数据工作小组
Amounts: no units in this file; such an amount is in the reference unit of its flow, which a separate flow dataset defines
copyright: false
licenseType: Free of charge for all users and uses

## General comment
在生产方案中，制浆、造纸、原材料运输、辅料化学品运输、废水处理以及固体废弃物处理等流程均包含在系统边界内。

## Technology and included processes
在制浆工段，废纸经过链板输送机送到水力碎浆机，碎解后的浆料进入粗筛选系统(高浓除渣器和粗筛系统):粗筛后的浆料再通过分级筛系统，筛分为短纤维和长纤维，其中短纤维通过低浓除砂器除渣和浓缩机浓缩处理后进入抄前池;而长纤维通过低浓除砂器和精饰系统处理后再通过浓缩机、热分散系统和磨浆机后进入抄前池，抄前池的浆料再送往抄纸车间。此外，浆料浓缩过程中产生的白水部分回用于制浆工段。在再生超级压光纸中，生产过程所需的脱墨废纸浆在经过上述制浆过程之外，还需经过脱墨浮选和漂白处理。经过精筛系统后的纸浆，进入浮选脱墨系统，再经过多圆盘的浓缩后进入热分散系统、过氧化氢漂白系统，最后送浆塔贮存送造纸车间。在造纸工段中，四种再生纸生产方案的流程基本相同分成打浆、抄纸、烘干三个工段。浆料经过调浆箱、浓白水塔及冲浆泵进入网前压力筛,后进入面层流浆箱上网。在再生超级压光纸方案中，原生木浆与废纸浆按一定配浆比例混合后分别送至配浆池中，经多段除砂器低浓净化后，再进入机外白水槽的另一侧冲浆;各层浆经压力筛筛选，后进入流浆箱上网。上网的浆料经三长网成型部脱水成型，再经过由直通式靴压组成的压榨部进步脱水，通过于燥部烘缸干燥、硬压光、表面施胶、后干燥部干燥、涂布、再经水平复卷机复卷，后包装入库送至成品库储存。在废弃物处置环节，对再生纸生产制造中产生的一般固体废弃物、城市生活垃圾处理进行了安全填埋处置;而对浮选脱墨系统产生的工业危险废弃物脱墨渣收集后统一进行焚烧处置。再生超级压光纸方案中，对碎浆系统和除渣系统产生的废渣使用重力脱水机和污泥压榨机进行收集，后送至焚烧厂进行焚烧处理。

## Technical purpose
再生超级压光纸生产工艺专为生产高品质纸张产品设计，其中包括常用于杂志和目录的有光泽表面的印刷纸。该工艺涉及废纸的回收再制造过程，包括制浆、筛选和脱墨，并与原生木浆结合，以产生所需的纸质。

## Reference product
- Recycled Super Calendered Paper: 865; measured
  再生超级压光纸

## Inputs
All rows: measured
- sodium hydroxide: 72.46
  氢氧化钠
- Sodium silicate: 47.83
  硅酸钠
- Hydrogen peroxide: 65.94
  过氧化氢
- Diethylenetriaminepentaacetic acid: 1.81
  DTPA
- Fluorosurfactant: 4.35
  FSA
- Polyaluminum chloride: 5.07
  PAC
- Deinking Agent: 3.62
  脱墨剂
- Modified Starch: 43.23
  阳离子淀粉
- Calcium carbonate (> 63 microns): 181.58
  碳酸钙
- Inorganic Chemical Reagents: 20.89
  无机化学试剂
- Wood Pulp: 6.05
  外购木浆
- Polyester Mesh Fabric: 0.03
  聚酯网
- Blanket: 0.03459
  毛布
- water: 16.97
  水
- process steam: 1050
  蒸汽
- Electricity: 1324.8
  电力

## Outputs
All rows: measured
- chemical oxygen demand: 0.43
  CODcr
- Ammonia Nitrogen: 0.00554
  NH3-N
- waste water - untreated: 14.45
  废水排放
- Plastic Waste: 4.33
  塑料和金属废物
- Waste Residue: 3.29
  废渣
- sludge (paper production): 59.73
  污泥
- Waste solid: 2.86
  一般固体废弃物
- hazardous waste (unspecified): 69.17
  工业危险废弃物

## Data selection and combination
再生超级压光纸方案的清单数据来自于山东省某造纸企业的实地调研。其次，本研究中涉及的绝大部分背景数据均来自中国本土化基于流程的生命周期清单数据库（CPLCID）。

## Use advice
使用超级压光纸回收再制造过程的清单数据时，需考虑包括制浆、造纸、原材料运输、辅助化学品运输、废水处理和固体废物处理在内的系统边界。确保方法论适用性与生命周期评估的国际标准ISO 14040一致。数据不应考虑潜在可回收固体废弃物（例如，煤渣、聚酯树脂和棉纤维）的经济和环境影响，因为研究采用了截断方法。本研究的功能单位是收集一吨废纸原料。

## Review details
清单： 内部审查通过几个迭代步骤完成，涉及原始数据验证、原始数据记录、代表性、完整性、与 ISO 14040 和 14044 有关的建模的一致性。

## Data sources
- 杨冬璐. 典型再生纸产品的生命周期环境与经济影响评价. (山东大学, 2019).
