# 格林美股份有限公司电池湿法冶金技术A

Dataset: ILCD process, Unit process, single operation
Geography: CN
Reference year: 2022
Classification: Energy carriers and technologies / Other non-renewable fuels
Functional unit: Functional unit is a 12.717g used lithium battery
Generated by: 彭菲, pengfei24@email.ncu.edu.cn
Owner: 天工LCI数据工作小组
Review: Dependent internal review by 天工LCI数据工作小组
Amounts: no units in this file; such an amount is in the reference unit of its flow, which a separate flow dataset defines
copyright: false
licenseType: Free of charge for all users and uses

## General comment
在工艺 A 中，废旧电池经过预处理、酸浸出、萃取、提纯、前驱体合成、电池材料合成等过程，获得电池正极材料。这种方法可以有效地回收锂。

## Technology and included processes
在工艺A中，废旧电池经过预处理、酸浸、萃取、提纯、前驱体合成、电池材料合成等过程，得到电池正极材料。该方法可有效回收锂。

## Technical purpose
本湿法冶金技术专为回收利用废旧锂电池设计。其具体应用包括回收锂等贵重材料以生产电池正极材料。因此，这一过程主要适用于旨在从废弃的锂基电池中提取和合成高价值元素的电池回收设施。

## Reference product
- spent LIBs: 0.012717; input; measured
  已用 LIB

## Inputs
All rows: measured
- sodium chloride: 0.000675
- process water: 83.1
- Sulfuric acid(98%): 1.27
  硫酸
- Disooctyl Phosphate (P204): 0.00394
  四氧化二磷
- P204（95%）P507（95%）: 0.00145
  P507 萃取剂
- Sulfonated kerosene: 0.0137
  磺化煤油
- Sodium sulfide: 0.0133
  硫化钠
- Alkali: 0.884
  液碱
- Ammonia (25%): 0.0417
- process steam: 12
- Electricity: 0.06696

## Outputs
All rows: measured
- Dust (unspecified, from stack),Dust (unspecified, from stack): 0.000238
- hydrogen fluoride: 4.38e-5
- sulphuric acid: 3.75e-5
- hydrogen sulfide: 2.29e-5
- ammonia: 8.59e-5
- chemical oxygen demand: 0.0103
- Suspended solids, unspecified: 0.124
- biological oxygen demand: 0.00364
- nickel: 4.75e-5
- cobalt: 4.38e-5
- lithium: 0.00398
- manganese: 4.75e-5
- Ammonia Nitrogen: 0.000596
  氨氮
- Ternary cathode material: 1.25
  三元正极材料

## Use advice
在使用此数据进行生命周期评估时，用户应确保在所有比较中一致应用12.717g废旧锂电池的功能单位。考虑该过程的系统边界非常重要，包括前处理和后处理阶段。评估技术适用性时，必须考虑酸浸出、萃取和净化过程中锂的效率和回收率，以及由排放或产生的废物引起的任何潜在环境影响。

## Review details
清单： 内部审查通过几个迭代步骤完成，涉及原始数据验证、原始数据记录、代表性、完整性、与 ISO 14040 和 14044 有关的建模的一致性。

## Data sources
- Lai, X. et al. Critical review of life cycle assessment of lithium-ion batteries for electric vehicles: A lifespan perspective. eTransportation 12, 100169 (2022).
