# 农田修复;原位修复;钝化修复;施工准备;药剂运输

Dataset: ILCD process, Unit process, single operation
Geography: NJ-YN-CN
Classification: Other Services / Repair and maintenance
Generated by: 肖萌, xiaomeng@mail
Owner: 天工LCI数据工作小组
Review: Dependent internal review by 天工LCI数据工作小组
Amounts: no units in this file; such an amount is in the reference unit of its flow, which a separate flow dataset defines
licenseType: Free of charge for all users and uses

## General comment
稳定化修复施工准备阶段，药剂运输过程。

## Geography
云南省怒江州受铅锌矿污染某耕地土壤 污染修复工程

## Technical purpose
本数据集代表了中国云南省怒江州重金属污染农田土壤的稳定化修复施工准备阶段。该过程包括运输化学药剂，用以处理16公顷因铅锌矿开采而受到污染的农田，实现农作物中镉（Cd）和铅（Pb）含量100％达到安全标准，以及减少土壤有效态Cd和Pb浓度超过70%。该数据集适用于需要修复的重金属污染农用地，以满足作物生产的安全标准的场景。

## Reference product
- Equipment and Materials Arriving on Site: 240000; measured
  运输到场的药剂

## Inputs
- transport in t*km: 875458; measured

## Use advice
在应用此数据集进行整个生命周期评估（LCA）时，应关注过程的地理特异性和规模。该数据集反映了一个局部情况，应当在评估相似的土壤污染与治疗效果的地理区域中使用。使用者应该详细考虑数据集的边界条件，如污染土地的类型、污染程度以及采用的具体治疗方法。功能单元为修复16公顷土地；对更大面积进行数据外推时应谨慎，并须考虑规模效应。确保任何外推与LCA的目标和范围一致，并且相应地解释结果。

## Review details
清单： 内部审查通过几个迭代步骤完成，涉及原始数据验证、原始数据记录、代表性、完整性、与 ISO 14040 和 14044 有关的建模的一致性。

## Data sources
- 肖萌 et al. 农田污染钝化修复环境影响定量评估方法与案例分析. 中国环境科学 43, 3571–3581 (2023).
