# 地下水风险管控;监测自然衰减;原位修复;焦土

Dataset: ILCD process, Unit process, single operation
Geography: JS-CN
Reference year: 2022
Classification: Other Services / Repair and maintenance
Generated by: 贾瀛洛, 202321051222@mail.bnu.edu.cn
Owner: 天工LCI数据工作小组
Review: Dependent internal review by 天工LCI数据工作小组
Amounts: no units in this file; such an amount is in the reference unit of its flow, which a separate flow dataset defines
copyright: false
licenseType: Free of charge for all users and uses

## General comment
监测自然衰减（MNA）是一种被动的修复策略，它依赖于自然过程，如生物降解、分散和稀释，以降低土壤和地下水中污染物的浓度

## Technical purpose
该工艺用于环境修复和受污染场地的风险管理。这种被动修复策略用于减少土壤和地下水中的污染物浓度。它适用于自然过程能够充分降低污染水平的场所，从而防止进一步的环境破坏。

## Reference product
- carbon dioxide (biogenic): 273.03; missing unimportant

## Inputs
All rows: missing unimportant
- Electricity: 202.176
- Water Cooling fresh: 978540
- Steel sections: 795
- Polyethylene: 611.27
- Very fine milled silica sand d50 = 20 micrometer: 52640
- bentonite: 10530
- Polyvinyl chloride: 934.2

## Use advice
使用数据集进行生命周期评估或环境建模时，应考虑监测自然衰减在减少特定场地污染物中的有效性。用户应注意MNA的限制，如修复所需时间和如果MNA不足时潜在的补充方法的必要性。需仔细评估MNA的适用性，并结合监管要求和环境目标进行考量。

## Review details
清单： 内部审查通过几个迭代步骤完成，涉及原始数据验证、原始数据记录、代表性、完整性、与 ISO 14040 和 14044 有关的建模的一致性。

## Data sources
- Assessing the environmental impacts and costs of biochar and monitored
