# 熟料生产|熟料, 硅酸盐水泥熟料|新型干法, >4000 t/d

Dataset: ILCD process, Unit process, single operation
Geography: CN
Reference year: 2020
Classification: Materials production / Other mineralic materials
Generated by: 杨思琪
Amounts: no units in this file; such an amount is in the reference unit of its flow, which a separate flow dataset defines
copyright: false

## General comment
新型干法在水泥工业工艺中市场份额占比较大。熟料煅烧时排放废水、颗粒物、CO2、SO2、NOx、汞（Hg）、 氟（F）和氨（NH3）等。

## Model description
以 P·O 42.5 型水泥熟料为研究对象，功能单位与基准流为生产 1.00 吨水泥熟料，系统边界为熟料煅烧（包括煤粉制备）单元过程，基准年为 2020 年。

## Reference product
- clinker, portland cement clinker: 1000
  熟料，PO42.5

## Inputs
- raw meal: 1445.3; article inperiodical
  生料
- electricity, medium voltage: 125.28; article inperiodical
  电力。电力由电厂输送。
- tap water: 400; article inperiodical
  自来水
- coal, powder: 139.25; article inperiodical
  煤粉

## Outputs
- wastewater, unpolluted: 11.36; article inperiodical
  废水。废水为循环冷却水排水，水质除水温及浑浊度升高外基本无其它污染。
- particles (> PM10): 0.08159; article inperiodical
  颗粒物。袋式收尘器收集到的粉尘经返料系统全部返回生料均化阶段，工艺产出固废可有效循环利用。未标明粒径，按PM>10处理。
- sulfur dioxide: 0.07354; article inperiodical
  二氧化硫
- Nitrogen oxides: 0.85; article inperiodical
  氮氧化物
- mercury: 2.071e-5; article inperiodical
  汞
- fluorene: 0.00636; article inperiodical
  氟
- ammonia: 0.00944; article inperiodical
  氨
- carbon dioxide: 798.65; calculated
  二氧化碳。水泥行业通常不监测CO2排放量，CO2主要来源于石灰石分解和煤炭燃烧两个过程，根据化学平衡运用公式计算其产生量。

## Cut-off and completeness
本研究采用亿科环境科技有限公司开发的生命周期基础数据库，研究需符合CLCD取舍原则，详情如下：（一）当原料重量<1%产品重量及含稀贵/高纯度物料重量<0.1%产品重量时，忽略该原料上游生产数据，总共忽略原料总重量≤5%；（二）废弃物或低价值废物作原料时不追溯其上游生产过程；（三）生产设备、厂房、生活设施等在大多数情况下可忽略；（四）不应忽略已选定环境影响类型范围内的已知排放数据。
采用CLCD法作为本研究的数据质量评估方法，此法对水泥熟料LCA模型里的资源消耗和染物排放数据从清单数据来源和算法、年份、所在地及技术代表性等四方面加以评估，获取与数据库匹配带来的不确定度，再关联背景数据库基础不确定度后完成清单不确定度评估，运用解析公式法算出不确定度的传递和累积，最终得到水泥熟料生产过程LCA结果不确定度。

## Data selection and combination
除CO2外，其他数据来源于高安红狮、江西德安万年青等企业报告、水泥行业清洁生产评价指标体系及水泥熟料研究论文等。

## Data sources
- 陆柳鲜. (2022). 江西省多源有色冶炼固废资源化过程生命周期评价研究 [硕士, 江西理工大学].
