# 空气吹脱单元;地下水异位修复;P&T系统;基础设施建设

Dataset: ILCD process, Unit process, single operation
Geography: JS-CN
Reference year: 2022
Classification: Unit processes / Other Services / Repair and maintenance
Generated by: 王宁, wang_ning@caep.org.cn
Owner: 天工LCI数据工作小组
Review: Dependent internal review by 天工LCI数据工作小组
Amounts: no units in this file; such an amount is in the reference unit of its flow, which a separate flow dataset defines
copyright: false
licenseType: Free of charge for all users and uses

## General comment
使用铝、高密度聚乙烯和钢材制造空气吹脱装置

## Geography
a closed pesticide manufacturing plant located in Jiangsu Province, China.

## Technical purpose
该数据集描述的空气吹脱单元用于地下水异位修复过程中的抽吸与处理系统。具体而言，它用于中国江苏省一个已关闭的农药制造厂污染地下水的处理。该设备采用铝、高密度聚乙烯（HDPE）和钢材制造，旨在通过空气吹脱过程将地下水中的挥发性化合物转移到空气相中。

## Reference product
- Air stripping unit: 1; measured

## Inputs
- Steel sections: 250; measured
- Aluminium and aluminium alloy products: 550; measured
- Polyethylene,Polyethylene: 1650; measured
- transport in t*km: 245; calculated

## Use advice
使用此数据集的用户在将数据应用于类似修复活动时，应考虑江苏地点地下水的特定区域背景和污染物概况。材料分配、能耗和排放因子的代表性可能会因地理位置和其他地方实施的技术实践而异。在将此数据与其他生命周期评估数据集整合时，确保方法论的一致性至关重要，特别是在包括或排除所用材料（铝、HDPE 和钢材）的回收过程以及使用阶段行为建模方面。

## Review details
清单： 内部审查通过几个迭代步骤完成，涉及原始数据验证、原始数据记录、代表性、完整性、与 ISO 14040 和 14044 有关的建模的一致性。

## Data sources
- Ding, D. et al. Assessing the environmental impacts and costs of biochar and monitored natural attenuation for groundwater heavily contaminated with volatile organic compounds. Science of The Total Environment 846, 157316 (2022).
