# 电力生产 ; 火电 ; 安徽

Dataset: ILCD process, Unit process, single operation
Geography: AH-CN
Reference year: 2019
Classification: Unit processes / Energy carriers and technologies / Electricity
Generated by: 熊若熙, xiongrx0126@163.com
Owner: 天工LCI数据工作小组
Review: Dependent internal review by 天工LCI数据工作小组
Amounts: no units in this file; such an amount is in the reference unit of its flow, which a separate flow dataset defines
copyright: false
licenseType: Free of charge for all users and uses

## General comment
火电发电包括原煤、洗煤、石油、天然气等十七种化石燃料。该过程只考虑直接发电过程，不考虑上游原材料开采加工和下游消费

## Time period
根据2019年能源统计年鉴数据计算

## Technical purpose
所描述的火电发电过程旨在使用多种化石燃料（包括原煤、洗煤、石油和天然气）生产电力。预期应用包括为安徽省的区域电网提供电力，服务工业和非工业用户。它仅限于直接发电操作。

## Reference product
- electricity for thermal power: 3.6; calculated

## Inputs
All rows: calculated
- Raw coal: 0.385602
- Coke oven gas: 0.000903
- blast furnace gas: 0.043616
- Converter gas: 0.008278
- Diesel: 0.0001017
- fuel oil, unspecified: 1.92e-5
- Petroleum Coke: 0.001566
- refinery gas: 0.00242225
- natural gas: 0.009089

## Outputs
- carbon dioxide (fossil): 0.765514; calculated
- sulfur dioxide: 0.000131465; calculated
- Nitrogen oxides: 0.000209233; calculated
- particles (> PM10): 2.59677e-5; calculated

## Data treatment and extrapolations
核算方法参考《企业温室气体排放核算方法与报告指南 发电设施》。不同形式发电量及燃料用量来自于《中国能源统计年鉴 2020》中的第三章（能源生产） 和第六章（地区能源平衡表）。用于计算二氧化碳排放因子的低位发热量、单位热值含碳量等燃料参数来自于《2019 年度中国区域电网二氧化碳基准线排放因子 OM 计算说明》、《企业温室气体排放核算方法与报告指南 发电设施》

## Use advice
在使用该数据集进行生命周期评估时，用户必须只考虑直接的发电阶段。应排除上游原材料的开采和加工以及下游的消费。计算二氧化碳排放系数时应基于所提供的参考文件中的特定燃料参数，包括低位发热量和单位热值含碳量。用户应遵循《企业温室气体排放核算方法与报告指南 发电设施》中概述的方法论指导方针，以确保数据报告的准确性和一致性。

## Review details
清单： 内部审查通过几个迭代步骤完成，涉及原始数据验证、原始数据记录、代表性、完整性、与 ISO 14040 和 14044 有关的建模的一致性。

## Data sources
- 熊若熙. 中国电力生产和消费二氧化碳与污染物排放因子核算. (清华大学, 2023).
