# 热轧钢生产;热轧钢;热轧（长流程炼钢）

Dataset: ILCD process, Unit process, single operation
Geography: CN
Classification: Unit processes / Materials production / Metals and semimetals
Generated by: 付翔, 1162850692@qq.com
Owner: 天工LCI数据工作小组
Review: Dependent internal review by 天工LCI数据工作小组
Amounts: no units in this file; such an amount is in the reference unit of its flow, which a separate flow dataset defines
copyright: false
licenseType: Free of charge for all users and uses

## General comment
该数据集描述了使用BF-BOF路线的热轧钢生产过程，该过程在大型综合钢铁厂中使用。热轧钢是一种多用途材料，通常用于建筑、汽车、重型机械和其他需要可塑性强材料的工业应用。通过该过程生产的钢材用于制造各种钢制品，如工字钢、轨道、汽车框架和管道。

## Geography
The data of the BF-BOF pathway were obtained from the large-scale integrated steel plants in China with an attached coking plant and EAF plant.

## Reference product
- Hot rolled steel: 986.5; measured

## Inputs
All rows: measured
- Crude Steel: 1000
  Crude steel
- freshwater,freshwater: 600
- Circulating water: 1000
- Baling wire: 2.1
- Coke oven gas: 42.4
  COG
- Blast furnace gas: 72.8
  BFG
- Linz-Donawitz gas: 25.8
  LDG
- Electricity: 316.8

## Use advice
在使用该数据集进行生命周期评估时，用户应考虑所描述的具体路径和设施配置，例如附属的焦化厂和电弧炉厂。同样重要的是要考虑可能影响环境影响的区域特定因素，如当地能源来源、排放标准和废物处理实践。如果将数据应用于不同的技术设置或地理位置，用户可能需要调整数据，并且如果与LCA范围相关，他们应确保适当模拟回收和生命周期终端阶段。

## Review details
清单： 内部审查通过几个迭代步骤完成，涉及原始数据验证、原始数据记录、代表性、完整性、与 ISO 14040 和 14044 有关的建模的一致性。

## Data sources
- The carbon reduction potential of hydrogen in the low carbon transition of the iron and steel industry: The case of China
