# 铁水生产;铁水;高炉炼铁

Dataset: ILCD process, Unit process, single operation
Geography: CN
Classification: Unit processes / Materials production / Metals and semimetals
Generated by: 付翔, 1162850692@qq.com
Owner: 天工LCI数据工作小组
Review: Dependent internal review by 天工LCI数据工作小组
Amounts: no units in this file; such an amount is in the reference unit of its flow, which a separate flow dataset defines
copyright: false
licenseType: Free of charge for all users and uses

## General comment
该数据集描述了中国大型综合钢铁厂使用高炉（BF）单元操作的铁水生产过程。铁水（也称为热金属或生铁）主要用于氧气顶吹炉（BOF）的炼钢过程，或可浇铸成锭进一步加工。所附焦化厂的存在表明产生的焦炭对BF过程是必要的，同时拥有电弧炉（EAF）表明有利用钢铁废料进行回收的潜力。

## Geography
The data of the BF-BOF pathway were obtained from the large-scale integrated steel plants in China with an attached coking plant and EAF plant.

## Reference product
- Molten Iron: 924; measured
  Molten iron

## Inputs
All rows: measured
- coke,Coke: 342.6
  Coke
- Iron ore: 147
  Iron ore (Import)
- Sinter: 1164.4
- Pellet: 165.8
- dolomite: 14.7
- quicklime: 18
  Quicklime
- fluorspar: 1.2
- freshwater,freshwater: 300
- Circulating water: 15300
- compressed air: 55
- oxygen: 31.9
- Blast furnace gas: 646.6
  BFG
- anthracite: 67.9
  Anthracite
- hard coal,hard coal: 63.7
  Bituminous coal
- Electricity: 508.68

## Outputs
- Blast furnace gas: 1154; measured
  BFG
- Electricity: 125.28; measured
- BF Slag: 286.4; measured
- BF Shop Dust: 31; measured
  Dust and mud

## Use advice
使用此数据集的用户应确保将BF-BOF路径数据应用于适合以焦炭为基础的铁制造过程的大规模钢铁生产场景中去。应关注来源于该地区综合钢铁厂的具体工艺参数，因为这些参数可能会影响环境影响评估。如果要包括回收场景，则应考虑使用EAF厂进行钢铁废料熔化，这可能会改变整个钢铁生产过程的能源概况和排放。应用此数据集时，应考虑数据收集的时间范围和地理范围，以确保在生命周期评估（LCA）中的相关性和准确性。

## Review details
清单： 内部审查通过几个迭代步骤完成，涉及原始数据验证、原始数据记录、代表性、完整性、与 ISO 14040 和 14044 有关的建模的一致性。

## Data sources
- The carbon reduction potential of hydrogen in the low carbon transition of the iron and steel industry: The case of China
