# 铜基混合废料回收;锌;锌回收工艺;高锌灰

Dataset: ILCD process, Unit process, single operation
Geography: JX-CN
Reference year: 2020
Classification: Unit processes / Materials production / Metals and semimetals
Functional unit: We consider the functional unit of the recycling of copper-based mixed waste to be 1000 kg electrolytic copper.
LCI method principle: Attributional
LCI method approaches: Allocation - market value
Generated by: 王鹏, 2867919560@qq.com
Owner: 天工LCI数据工作小组
Review: Dependent internal review by 天工LCI数据工作小组
Amounts: no units in this file; such an amount is in the reference unit of its flow, which a separate flow dataset defines
copyright: false
licenseType: Free of charge for all users and uses

## General comment
该工业过程的典型应用位于中国江西省的一家金属回收设施。过程包括从冶炼和精炼操作产生的高锌灰中生产电解锌。这种循环材料用于需要锌的各种应用，例如镀锌、合金生产和锌基化合物的制造。该过程的主要能源是电力，额外使用的化学品包括高锰酸钾、碳酸钠、氢氧化钠和浓硫酸。

## Geography
中国江西省的一家金属回收企

## Technology and included processes
锌回收工艺以冶炼精炼产生的高锌灰为原料生产电解锌；以电为主要能源，高锰酸钾、碳酸钠、氢氧化钠、浓硫酸为辅助原料

## Reference product
- zinc: 48; measured
  Zinc

## Inputs
All rows: measured
- mineral waste (ash): 31.9
  From refining;Ash
- mineral waste (ash): 94.1
  From smelting;Ash
- Electricity: 475.2
- Potassium permanganate: 0.7
  Potassium permanganate需要补充
- Sodium carbonate: 5.9
  Sodium carbonate需要补充
- sodium hydroxide: 59
  Sodium hydroxide
- Sulfuric acid(98%): 82.6
  Sulfuric acid(98%)需要补充resourse
- transport in t*km,transport in t*km: 3.7199
  Transport
- water: 230.2
  Water
- zinc oxide: 0.1
  Zinc chloride
- Zinc dust: 0.4

## Outputs
All rows: measured
- Leaching residue: 101.9
- sulphuric acid: 0.1
  Sulfuric acid
- Water (evapotranspiration): 201.4
- copper (ii): 13.2
  Copper sulfate
- oxygen: 11.8
  Oxygen gaseous
- sodium sulfate: 122.4
  Sodium sulfate

## Deviations from the LCI method approaches
使用LCA-ReCiPe 2016（Heijungs et al., 2017）表征和归一化方法（中点和端点方法），将生命周期清单转换为多个领域的影响分数。

## Data selection and combination
前台数据和后台数据。

## Data treatment and extrapolations
采用GaBi 9.0软件计算各种铜基混合废物回收工艺单位质量的库存、资源消耗和废物排放量。

## Use advice
使用此数据集时，必须考虑使用GaBi 9.0软件和LCA-ReCiPe 2016方法所提供的方法论建议，以量化资源消耗、废物排放和整个生命周期影响分数。使用者应确保正确建模使用阶段行为，并考虑回收的潜在可能性，特别是关于前台和后台数据的系统边界定义。在LCA研究中，使用1000公斤电解铜的适当功能单元以确保可比性是至关重要的。

## Review details
清单： 内部审查通过几个迭代步骤完成，涉及原始数据验证、原始数据记录、代表性、完整性、与 ISO 14040 和 14044 有关的建模的一致性。

## Data sources
- Zhang, W. et al. Analyzing the environmental impact of copper-based mixed waste recycling-a LCA case study in China. Journal of Cleaner Production 284, 125256 (2021).
