# 直接还原铁生产;直接还原铁;煤基直接还原铁

Dataset: ILCD process, Unit process, single operation
Geography: CN
Classification: Energy carriers and technologies / Hard coal based fuels
Generated by: 付翔, 1162850692@qq.com
Owner: 天工LCI数据工作小组
Review: Dependent internal review by 天工LCI数据工作小组
Amounts: no units in this file; such an amount is in the reference unit of its flow, which a separate flow dataset defines
copyright: false
licenseType: Free of charge for all users and uses

## General comment
煤基直接还原铁（Coal-DRI）生产过程通常用于钢铁制造业，从铁矿石中获得不需要熔化矿石的金属铁。该过程使用非炼焦煤作为还原剂，对氧化铁进行固态还原。生产出的直接还原铁常用作电弧炉的原料，在钢厂中被熔化以生产钢材。

## Geography
The average operating data of Coal-DR, NG-DR (MID), and NG-DR (ENE) demonstration projects in China are used as the benchmark for the LCI of DR routes.

## Reference product
- Direct Reduced Iron: 1000; calculated
  DRI

## Inputs
All rows: calculated
- Pellet: 1357.3
  Pellets
- Water (fresh water): 400
  The average operating data of Coal-DR, NG-DR (MID), and NG-DR (ENE) demonstration projects in China are used as the benchmark for the LCI of DR routes. LCI of COG-DR and H-DR routes, which is not scaled-up in China are estimated based on Coal-DR routes combined with literature data from simulations, laboratory tests, and process modeling in
- process steam: 167.9
  (same comment as for Water (fresh water))
- oxygen: 299.5
  (same comment as for Water (fresh water))
- lignite: 608.6
  (same comment as for Water (fresh water))
- Natural gas, at consumer EU-27: 230
  (same comment as for Water (fresh water))
- Electricity: 478.44
  (same comment as for Water (fresh water))

## Outputs
All rows: calculated
- sulfur: 3.5
  (same comment as for Water (fresh water))
- Crude Benzene,clumsy: 1.1
  Crude benzene
- Slag: 14.4
  (same comment as for Water (fresh water))
- Dust (unspecified, from stack): 0.5
  (same comment as for Water (fresh water))
- carbon dioxide: 177.6
  (same comment as for Water (fresh water))

## Data treatment and extrapolations
LCI of COG-DR and H-DR routes, which is not scaled-up in China are estimated based on Coal-DR routes combined with literature data from simulations, laboratory tests, and process modeling in Table 9 [49,50]. The LCI of Coal-DR is obtai

## Use advice
在使用煤基直接还原（Coal-DRI）路线的生命周期清单（LCI）数据时，请确保数据适用于您评估的特定地理位置和技术背景。LCI数据应与中国示范项目的平均运行数据一致。对于COG-DR和H-DR路线，由于这些过程的数据是基于Coal-DRI与文献数据结合估算的，因此可能需要额外的验证。由于技术和规模外推的风险，对这些路线进行大型工业应用的预测应谨慎进行。

## Review details
清单： 内部审查通过几个迭代步骤完成，涉及原始数据验证、原始数据记录、代表性、完整性、与 ISO 14040 和 14044 有关的建模的一致性。

## Data sources
- The carbon reduction potential of hydrogen in the low carbon transition of the iron and steel industry: The case of China
