# 连铸钢坯;钢水;钢坯

Dataset: ILCD process, Unit process, single operation
Geography: CN
Reference year: 2020
Classification: Unit processes / Materials production / Metals and semimetals
Generated by: 纪伟, 1299801467@qq.com
Owner: 天工LCI数据工作小组
Review: Dependent internal review by 天工LCI数据工作小组
Amounts: no units in this file; such an amount is in the reference unit of its flow, which a separate flow dataset defines
copyright: false
licenseType: Free of charge for all users and uses

## General comment
数据集所描述的连铸钢坯用于通过下游制造工艺生产各种类型的钢结构和部件。它涉及将钢水转变为钢坯，这是中间产品，可以进一步加工成用于建筑、汽车和机械工业的棒材、杆材和型材。

## Time period
论文提到钢铁企业环境总体数据为1998年的吨钢环境基础数据。

## Reference product
- billet: 1030; calculated

## Inputs
All rows: calculated
- Molten Iron: 1056
- freshwater,freshwater: 800
- Refractory: 4.4
- oxygen: 2.7
- Electricity: 42.48
- Converter gas: 5.15

## Use advice
使用此数据集时，务必考虑到数据年份（1998年）的技术适用性，因为技术进步可能导致环境影响数据的更新。另外，考虑特定区域的生产实践，因为它们可能与提供的一般数据不同。在生命周期评估研究中，考虑任何可能适用于从连铸钢坯衍生的钢产品的相关生命周期末期回收过程。

## Review details
清单： 内部审查通过几个迭代步骤完成，涉及原始数据验证、原始数据记录、代表性、完整性、与 ISO 14040 和 14044 有关的建模的一致性。

## Data sources
- 梁田. 基于生命周期评价的典型钢铁企业环境影响评估及绿色发展研究. (郑州大学, 2020).
