# 稀土氧化物提取;稀土氧化物;一般工艺;离子吸附粘土

Dataset: ILCD process, Unit process, single operation
Geography: CN
Reference year: 2016
Classification: Unit processes / Materials production / Non-energetic raw materials
Functional unit: The functional unit chosen for this study is 1 kg of heavy REOs at 90% purity
LCI method principle: Attributional
LCI method approaches: Allocation - market value
Generated by: 汪涛, twang@iue.ac.cn
Owner: 天工LCI数据工作小组
Review: Dependent internal review by 天工LCI数据工作小组
Amounts: no units in this file; such an amount is in the reference unit of its flow, which a separate flow dataset defines
copyright: false
licenseType: Free of charge for all users and uses

## General comment
所述的混合稀土氧化物（REOs）在多个行业中有应用，这些行业要求高纯度稀土元素，比如电子制造，磁铁，荧光粉，合金以及催化剂的生产。鉴于它们90%的纯度，这些REOs适合于高规格要求和专业应用，其中稀土元素的组成和一致性至关重要。

## Geography
Ganzhou city, Jiangxi Province

## Technology and included processes
本研究描述了中国南方地区用离子吸附粘土生产混合 REO 的情况，纯度为 90%。 REO 中各个稀土矿物的成分因矿石而异。表 1 显示了来自江西普罗维登斯（本次 LCA 数据收集的同一地区）的两种离子吸附粘土的矿石，尽管它们可能无法准确表征在本次 LCA 数据收集地点开采的特定 REO。研究，它们可能是相似的。1 LCA 研究的系统边界包括使用原地浸出方法的采矿、提取和煅烧。这些过程全部在现场进行，最终产品是混合REO。不包括进一步的过程，例如溶剂萃取和单独的金属分离，因为它们通常发生在场外。

## Reference product
- coke: 1.15; input; calculated
  Coke, production average (CN), aggregate ; CLCD-China-Public 0.8.1 2012

## Inputs
- sulphuric acid: 2.14, 0.6 (2 entries); calculated
- sodium hydroxide: 2.07; calculated
- Ammonium bicarbonate: 4.65; calculated
  Ammonia bicarbonate

## Deviations from the LCI method approaches
The LCI was developed using primary data for the foreground system collected from four sites in southern China, as described in Sections 2.1.2.Background data are from the Chinese life cycle database (CLCD). CLCD is a Chinese national reference LCI database developed by Sichuan University, China, and IKE Environmental Technology CO. Ltd., and it sources original data from industry statistics, government publications, academic research, and other LCA databases (Liu et al. 2010). The one exception is electricity data provided by Ecoinvent that is used in the scenario analysis conducted in this study (Ecoinvent Center 2016). These datasets from Ecoinvent are used to model the effects of changing electricity grid composition via scenario analysis.

## Use advice
使用此数据集时，应注意LCA数据反映的是江西省赣州市生产过程的状况，并可能不适用于不同地区的类似过程。用户应考虑技术适用性，并在将这些数据应用到不同地理环境或技术设置时进行调整。应在建模中包含方法论考虑，包括原位浸出法、提取和煅烧。若包含在用户分析的范围内，则此LCA系统边界未包含的上游和下游过程，如溶剂萃取和金属分离，应分别进行核算。

## Review details
清单： 内部审查通过几个迭代步骤完成，涉及原始数据验证、原始数据记录、代表性、完整性、与 ISO 14040 和 14044 有关的建模的一致性。

## Data sources
- Deng, H. & Kendall, A. Life cycle assessment with primary data on heavy rare earth oxides from ion-adsorption clays. Int J Life Cycle Assess 24, 1643–1652 (2019).
