# 到达现场的设备和材料土壤原位修复;土壤生物通风

Dataset: ILCD process, Unit process, single operation
Geography: CN
Reference year: 2022
Classification: Unit processes / Other Services / Repair and maintenance
Generated by: 王宁, wang_ning@caep.org.cn
Owner: 天工LCI数据工作小组
Review: Dependent internal review by 天工LCI数据工作小组
Amounts: no units in this file; such an amount is in the reference unit of its flow, which a separate flow dataset defines
copyright: false
licenseType: Free of charge for all users and uses

## General comment
将设备与材料运输至现场

## Geography
案例焦化厂位于我国北方中纬度地带

## Technology and included processes
使用汽油将设备与材料运输至现场

## Technical purpose
所描述的过程涉及运输设备和材料，用于 '土壤原位修复'，特别是 '土壤生物通风'，这是一种使用控制气流刺激微生物活动，以在土壤中生物降解或转化污染物的技术。这种运输物流是为如位于我国北方中纬度地区的焦化厂等工业应用量身定制的，那里的土壤污染修复是环境管理和工业卫生的重要环节。

## Reference product
- Equipment and Materials Arriving on Site: 1; measured

## Inputs
- Gasoline (regular): 1.547; measured

## Use advice
在使用数据集进行生命周期评价时，应注意准确反映使用汽油在中国北方中纬度地区进行土壤生物通风程序的设备和材料的运输。计算与使用汽油进行运输相关的特定环境影响，并确保任何假设（行驶距离、车辆类型、燃油消耗率）都与焦化厂运营的地理和技术环境一致。考虑在生命周期评价中包含设备的使用终生阶段和临时工地运营的影响。不直接与运输活动相关的其他过程输入或输出的排除应清楚记录。

## Review details
清单： 内部审查通过几个迭代步骤完成，涉及原始数据验证、原始数据记录、代表性、完整性、与 ISO 14040 和 14044 有关的建模的一致性。

## Data sources
- 刘文晓等.基于修复效果的污染土壤修复工程环境足迹分析[J].环境科学研究 35,2367-2377（2022）.
