# 煤炭井工开采|开采煤炭

Dataset: ILCD process, Unit process, black box
Geography: LF-SX-CN
Reference year: 2022
Classification: Materials production / Other mineralic materials
Generated by: Linlin Yin, yinlinlin0623@163.com
Amounts: no units in this file; such an amount is in the reference unit of its flow, which a separate flow dataset defines

## Geography
低瓦斯的井工煤矿

## Technology and included processes
巷道掘进；设备安装；煤炭回采；设备回撤

## Reference product
- Hard coal, at consumer EU-27; uniform; article inperiodical
  M煤矿位于山西省临汾市,是一座低瓦斯的井工煤矿,作为研究对象的工作面长为2400m,宽为180m,煤层平均厚度为 2.85m,煤的平均密度为 1.35t/m3,根据上述基本信息可以计算得出该工作面的煤炭总量为1662120t.

## Inputs
- Electricity; uniform; article inperiodical
  消耗1MW·h的电力产生0.7399t的CO2（山西能源局提供的数据）
- Electricity: 1.48485e9; uniform; article inperiodical
  M煤矿电力活动水平数据
- water; uniform; article inperiodical
  M煤矿新鲜水活动水平数据

## Outputs
All rows: uniform; article inperiodical
- methane (fossil)
  开采1t煤炭释放10m3的甲烷气体。据M煤矿实际情况，该煤矿属于低瓦斯浓度煤矿，因此煤炭中的甲烷含量选择2006年IPCC清单中低甲烷排放系数。
- carbon dioxide (fossil)
  M煤矿煤炭开采过程中电力消耗产生的CO2量
- carbon dioxide (fossil)
  M煤矿—煤炭开采过程中新鲜水消耗产生的CO2量
- methane (fossil)
  M煤矿的煤炭开采过程中甲烷逃逸排放量的活动水平数据
- carbon dioxide (fossil)
  M煤矿煤炭开采过程中甲烷逃逸排放产生的CO2量
- carbon dioxide (fossil)
  M煤矿煤炭开采的碳排放强度为0.321tCO2e/t，即该煤矿生产1t原煤会排放 0.321t二氧化碳
