# 市政污泥处理与处置;湿污泥 含水率70%-75%;干化焚烧

Dataset: ILCD process, Unit process, single operation
Geography: GZ-GD-CN
Classification: Unit processes / End-of-life treatment / Waste water treatment
Functional unit: The life cycle study boundary starts from the wet sludge (moisture content is about 70% ~ 75%) after mechanical compression and dewatering in the sewage treatment plant to the final disposal functional unit adopts 1t wet sludge after mechanical compression.
Generated by: 金思甜, 2331276@tongji.edu.cn
Owner: 天工LCI数据工作小组
Review: Dependent internal review by 天工LCI数据工作小组
Amounts: no units in this file; such an amount is in the reference unit of its flow, which a separate flow dataset defines
copyright: ['opt4ROkqig']
licenseType: Free of charge for all users and uses

## General comment
以广州市某污水处理厂为研究实例，该厂的污水日处理能力为 250000ｔ/d， 机械压缩后湿污泥日产量 90ｔ/d。假定厂内配套低压小型鼓泡流化床锅炉进行污泥减量化、无害化焚烧处理。

## Technology and included processes
系统采用空心桨叶技术进行污泥干燥处理，焚烧炉产生的饱和蒸汽 （0.4MPa、150℃ ）为污泥的干燥热源，将湿污泥含水率从70.5％降至 40％左右，然后与煤掺混进行焚烧处理。该联合工艺可以达到能量的自平衡，干燥 90ｔ/天的湿污泥需要锅炉蒸汽量 3．6ｔ/h，锅炉排烟温度 160℃，锅炉效率为 72.82％。为满足热量平衡，需要掺烧无烟煤 7．65ｔ/天。

## Technical purpose
该工业过程用于处理和处置含水率为70%-75%的市政污泥。过程包括机械压缩脱水以及随后的干化和焚烧。此过程适用于管理污水处理厂废物的设施，将高含水污泥转换为体积更小的灰烬，以便最终处置。适用于需要减少污泥体积并减轻潜在环境影响的废物管理协议场景。

## Reference product
- Sludge: 1000; input; estimated
  1t湿污泥（水分含 量在 70％ ～75％左右 ）

## Inputs
- hard coal; 26.3 MJ/kg: 85; calculated
- Electricity: 398.304; measured

## Outputs
- carbon monoxide (biogenic): 0.38; calculated
  原文未区分biogenic和fossil，根据专家判断此处为biogenic。
- carbon dioxide (biogenic): 506.18; calculated
  原文未区分biogenic和fossil，根据专家判断此处为biogenic。
- Nitrogen oxides: 1.29699; calculated
- sulfur oxides: 0.99222; calculated
- hydrogen chloride: 0.00018; calculated
- Flue dust: 0.28; measured
  烟尘

## Use advice
在使用此数据集进行生命周期评估时，请确保系统边界包括污泥的机械压缩脱水以及干化和焚烧阶段。模拟工厂内的运输和处理也是必须的。功能单元应以机械压缩后的1吨湿污泥为准一致应用。用户应特别考虑焚烧阶段产生的排放，并考虑潜在的能源回收方面，这可能会影响整体环境影响评估。

## Review details
清单： 内部审查通过几个迭代步骤完成，涉及原始数据验证、原始数据记录、代表性、完整性、与 ISO 14040 和 14044 有关的建模的一致性。

## Data sources
- 廖艳芬,漆雅庆,马晓茜.城市污水污泥焚烧处理环境影响分析[J].环境科学学报,2009,29(11):2359-2365.DOI:10.13671/j.hjkxxb.2009.11.015.
