# 水泥生产;水泥, 普通硅酸盐水泥, 42.5MPa;新型五级悬浮预热器干法, 1800 t-cl/d;混合固废

Dataset: ILCD process, Unit process, black box
Geography: SC-CN
Reference year: 2007
Classification: Unit processes / Materials production / Other mineralic materials
Generated by: #REF!, ysqsophia@gmail.com
Owner: 天工LCI数据工作小组
Review: Dependent internal review by 天工LCI数据工作小组
Amounts: no units in this file; such an amount is in the reference unit of its flow, which a separate flow dataset defines
copyright: false
licenseType: Free of charge for all users and uses

## General comment
电石渣水泥采用电石渣与石灰石、硅质原料、铁质原料配料后入立磨制成生料粉，然后采用运行较稳定的新型五级悬浮预热器干法工艺生产水泥。

## Geography
四川省某水泥生产企业

## Technology and included processes
论文研究的电石渣水泥就是采用电石渣与石灰石、硅质原料、铁质原料配料后入立磨制成生料粉，然后采用运行较稳定的新型五级悬浮预热器干法工艺生产水泥。含工艺流程图和具体介绍。

## Technical purpose
此工业过程生产的水泥是42.5MPa强度等级的普通硅酸盐水泥。适用于普通建筑工程、钢筋混凝土、预制构件以及道路建设等建筑用途。本工艺的特点是利用工业废渣，包括电石渣和铁合金炉渣，提供了比传统水泥生产更环境友好的选择。

## Model description
1个功能单位为42.5千克普通硅酸盐水泥，即1Fu=1kgP·O42.5普通硅酸盐水泥。研究范围从生料制备、熟料锻烧及粉磨到水泥储存为止，主要考虑水泥生产工艺过程产生的环境影响。

## Reference product
- cement, ordinary portland cement, 42.5MPa: 1000
  电石渣水泥。P.O42.5普通硅酸盐水泥。

## Inputs
- limestone, crushed, for mill: 741.7
  石灰石。汽车运输，15km。
- shale: 70.4
  页岩。汽车运输，15km。
- sandstone: 78.56
  砂岩。汽车运输，15km。
- Carbide slag: 137.04
  电石渣。汽车运输，40km。
- iron, powder: 18.96
  铁粉。汽车运输，190km。
- gypsum stone (CaSO4-dihydrate): 24.07
  石膏。汽车运输，45km。
- Ferroalloy slag: 68.67
  铁合金炉渣。汽车运输，20km。
- hard coal; 26.3 MJ/kg: 99.58
  煤。汽车运输，34km。
- Electricity: 360
  电

## Outputs
- carbon dioxide (fossil): 645.3
  CO2。只涉及生产阶段（计算）。
- sulfur dioxide: 0.049
  SO2。只涉及生产阶段（实测）。
- Nitrogen oxides: 1.95
  NOx。只涉及生产阶段（实测）。
- particles (> PM10): 2.585
  粉尘。只涉及生产阶段（计算：除尘处理后的数据除以除尘效率）。未标明粒径，按PM>10处理。

## Sampling procedure
采用先进的新型五级悬浮预热器干法工艺技术，以一条F3.3x50m，以石灰石和电石渣为主要原料，日产1800吨水泥熟料的新型干法回转窑水泥生产线，年可利用工业废渣123426吨，其中电石渣8222吨、铁合金炉渣41204吨。

## Use advice
使用这些生命周期评估数据的用户应考虑本水泥生产过程中的特定方法学方面，例如在原材料中包含工业废渣。在保证准确体现整个生产过程的同时，应考虑使用这些废料的环境影响。分析范围应从生料制备到水泥储存，囊括与工艺相关的所有环境排放。在与其他水泥生产数据集比较时，应当注意技术细节，即使用的先进新型五级悬浮预热器干法工艺和废渣作为原材料的使用。

## Review details
清单： 内部审查通过几个迭代步骤完成，涉及原始数据验证、原始数据记录、代表性、完整性、与 ISO 14040 和 14044 有关的建模的一致性。

## Data sources
- 王超. (2007). 电石渣水泥和石灰石水泥生命周期评价的比较研究 [硕士, 西南交通大学].
