# 市政污泥处理与处置;污泥;水泥窑协同处置

Dataset: ILCD process, Unit process, single operation
Geography: CN
Classification: Unit processes / End-of-life treatment / Waste water treatment
Functional unit: In this study, the disposal of 1t municipal sludge was selected as the functional unit.
Generated by: 金思甜, 2331276@tongji.edu.cn
Owner: 天工LCI数据工作小组
Review: Dependent internal review by 天工LCI数据工作小组
Amounts: no units in this file; such an amount is in the reference unit of its flow, which a separate flow dataset defines
copyright: ['opt4ROkqig']
licenseType: Free of charge for all users and uses

## General comment
前景数据方面，水泥窑协同处置的资源与能源消耗来自京津冀地区典型水泥生产线协同处置技术实施前后各一年的统计数据。

## Geography
京津冀地区

## Technology and included processes
污泥中含有尿素等成分，可以与水泥熟料生产过程中产生的NOx反应，将NOx还原成氮气和水，起到脱硝的作用。

## Technical purpose
该工业过程旨在处理和共同处置市政污泥，在水泥窑中。该过程特定于中国的京津冀地区，并表示在水泥生产过程中处理污泥，其中1吨市政污泥是衡量该过程能力和效率的基本计量单位。

## Reference product
- Sludge: 1000; input; estimated

## Inputs
- Energy, gross calorific value, in biomass, primary forest: 334; measured
- unspecified: 0.544; measured

## Outputs
- carbon dioxide (fossil): 45.6; calculated
  原文未区分biogenic和fossil，根据专家判断此处为fossil。
- Nitrogen oxides: -9.36; calculated

## Use advice
使用此数据集时，必须考虑京津冀地区水泥窑共处置的区域特性和技术特点。数据只应用于类似的工业环境场景。应当注意生命周期评估的方法论框架，重点关注定义的1吨市政污泥功能单位，以确保一致和相关的应用。

## Review details
清单： 内部审查通过几个迭代步骤完成，涉及原始数据验证、原始数据记录、代表性、完整性、与 ISO 14040 和 14044 有关的建模的一致性。

## Data sources
- 丁冠元,刘宇,王亚丽等.水泥窑协同处置污泥的环境负荷分析[J].中国水泥,2021(03):81-84.
