# 牛奶生产 ; 包装

Dataset: ILCD process, Unit process, single operation
Geography: CC-JL-CN
Reference year: 2006
Classification: Unit processes / Materials production / Food and renewable raw materials
Functional unit: 1t milk
Generated by: 杨瑞, 1632707028@qq.com
Owner: 天工LCI数据工作小组
Review: Dependent internal review by 天工LCI数据工作小组
Amounts: no units in this file; such an amount is in the reference unit of its flow, which a separate flow dataset defines
copyright: false
licenseType: Free of charge for all users and uses

## General comment
根据本文的研究范围, 将牛奶生产生命周期 分为如下两个子系统: 生产和包装。由于企业内部 生产车间相对集中, 物料运输所造成的环境影响 忽略不计。

## Geography
本文研究对象为长春地区某市销售的普通袋装牛奶

## Technology and included processes
本文只考虑与研究目的和功能单位直接相关 的过程, 不考虑工厂以外产生环境负荷的各阶段

## Technical purpose
此处描述的技术用途是生产和包装供消费使用的普通袋装牛奶，这是长春地区生产和销售的牛奶生命周期评估的一部分。该牛奶作为食品行业的消耗品使用，特别是为日常零售和消费而格式化的。

## Reference product
- milk: 1000
  成品牛奶

## Inputs
All rows: measured
- Plastic (unspecified): 13.6
  塑料袋
- Plastic (unspecified): 1.5
  封口膜
- Plastic (unspecified): 4854
  吸管straw
- Plastic (unspecified): 4854
  塑标
- cartonboard boxes; mixed technology; production mix, a plant, 46% primary fibre, 54% recovered fibre: 135
  纸箱
- Electricity: 83.88
- water: 4122
- process steam: 151.4

## Outputs
All rows: measured
- carbon dioxide (fossil),carbon dioxide (fossil): 285
- carbon monoxide (fossil): 0.4
- sulfur dioxide: 2.1
- nitrogen, total (excluding N2): 0.9
  氮氧化物
- ammonia: 0.15
- particles (> PM10): 2.65
- municipal solid waste deposition: 21.9

## Deviations from the LCI method approaches
本文按照 ISO 的有关标准, 采用 LCA 方法分析牛奶生产各阶段的消耗和环境排放, 建立牛奶生产生命周期 基础数据库, 辨识牛奶各阶段对环境影响的相对 大小, 找出环境影响状况的主要因子, 从而为牛奶 企业实施清洁生产、改进牛奶生产环境性能提供 机会和途径。

## Use advice
在使用牛奶生产过程的生命周期评估数据时，考虑的范围严格限制在企业内的生产和包装。生产现场内物料运输的环境影响被认为是微不足道的。排除在设施外产生环境负荷的过程。为了获得准确的LCA结果，遵守与牛奶生产每个阶段的消耗分析和环境排放相关的ISO标准。使用已识别的环境影响因素来改进清洁生产实践，并提高牛奶工业的环境性能。

## Review details
清单： 内部审查通过几个迭代步骤完成，涉及原始数据验证、原始数据记录、代表性、完整性、与 ISO 14040 和 14044 有关的建模的一致性。

## Data sources
- 秦凤贤. 生命周期评价在牛奶生产中的应用研究. 乳业科学与技术 224–226 (2006).
