# 铜生产;再生铜;火法生产;混合废铜

Dataset: ILCD process, Unit process, single operation
Geography: CN
Reference year: 2010
Classification: Unit processes / Materials production / Metals and semimetals
Functional unit: Functional unit: 1 kg copper
LCI method principle: Attributional
LCI method approaches: Allocation - market value
Generated by: 王鹏, 2867919560@qq.com
Owner: 天工LCI数据工作小组
Review: Dependent internal review by 天工LCI数据工作小组
Amounts: no units in this file; such an amount is in the reference unit of its flow, which a separate flow dataset defines
copyright: false
licenseType: Free of charge for all users and uses

## General comment
该数据集代表了从混合废铜中火法生产再生铜的生命周期评估（LCA）数据，可用于多种应用，如电线、屋顶和管道、工业机械以及合金组成。数据展示了中国铜行业平均生产过程和能源考量，可以为小规模和工业规模的铜回收操作提供信息。

## Geography
本研究包括进口铜数据以及代表中国平均情况而非典型企业的统计数据，对三种铜生产路线的每个组成过程进行统计，特别是前台过程中的能源和资源使用以及后台过程中的电力生产。

## Time period
2010年至2050年中国铜需求预测。

## Reference product
- Refined copper: 1; software or database

## Inputs
All rows: software or database
- Electricity: 1.4796
- Diesel: 0.0088
- Limestone: 0.0739
- sulphuric acid: 0.0068
  Sulfuric acid
- hard coal,hard coal,hard coal: 0.186
  Hard coal
- natural gas,natural gas,natural gas: 0.492
  Natural gas
- oxygen: 0.0914
  Oxygen
- Domestic-copper scrap: 1.31
  Domestic copper scrap需要补充
- Imported-copper scrap: 0.573
  Imported-copper scrap需要补充
- water: 1.17

## Outputs
All rows: software or database
- sulfur dioxide: 0.003
  Sulfur dioxide
- waste water - untreated: 0.001
  Waste water
- carbon dioxide (fossil): 1.59
  Carbon dioxide
- carbon monoxide,carbon monoxide (fossil): 0.002
  Carbon monoxide
- particles (PM2.5 - PM10): 0.000282
  Particulates
- water: 0.000176
- zinc: 0.000375

## Deviations from the LCI method approaches
使用 CMLCA 6.0 软件和 CML2001 影响类别进行生命周期环境影响

## Data selection and combination
数据来源总结如表2和表3 后台系统中与铜生产相关的电力生产和其他流程的数据来自ecoinvent v3.4数据库，

## Data treatment and extrapolations
Ecoinvent v3.4 数据库-从摇篮到大门

## Use advice
使用这些数据时，用户应考虑这些数据反映的是中国铜行业的平均条件，而不是特定企业的表现。预测不应在所有情况下都被假定为有效，可能需要针对当地条件进行调整或随着时间的推移进行更新。它适用于在摇篮到大门范围内使用CMLCA 6.0软件和CML2001影响类别进行生命周期库存分析。数据特别适用于前台过程中的能源和资源使用，并基于ecoinvent v3.4。用户在应用前应确保参考适当的表格（2和3）以了解各自的数据来源和方法学背景。

## Review details
清单： 内部审查通过几个迭代步骤完成，涉及原始数据验证、原始数据记录、代表性、完整性、与 ISO 14040 和 14044 有关的建模的一致性。

## Data sources
- Dong, D., Van Oers, L., Tukker, A. & Van Der Voet, E. Assessing the future environmental impacts of copper production in China: Implications of the energy transition. Journal of Cleaner Production 274, 122825 (2020).
