# 地下水异位修复;地下水抽出处理;施工;抽水井

Dataset: ILCD process, Unit process, single operation
Geography: DK
Reference year: 2021
Classification: Unit processes / Other Services / Repair and maintenance
Generated by: 王宁, wang_ning@caep.org.cn
Owner: 天工LCI数据工作小组
Review: Dependent internal review by 天工LCI数据工作小组
Amounts: no units in this file; such an amount is in the reference unit of its flow, which a separate flow dataset defines
copyright: false
licenseType: Free of charge for all users and uses

## General comment
使用高密度聚乙烯、混凝土、碎石、泵等建造抽水井

## Technology and included processes
使用电力、混凝土、碎石、高密度聚乙烯建设抽提井

## Technical purpose
所描述的工艺用于构建作为地下水异位修复系统一部分的抽提井。这些井通常用于抽取和处理受污染的地下水，从受影响的含水层中隔离并去除污染物。建设过程涉及使用高密度聚乙烯（HDPE）、混凝土、碎石和泵。

## Reference product
- Extraction wel: 1; input; estimated

## Inputs
- polyethylene high density granulate (PE-HD): 40; estimated
- Electricity: 2300; estimated
- cement, unspecified: 200; estimated
- gravel: 330; estimated

## Use advice
在使用此数据集进行生命周期评估（LCA）时，请确保考虑材料（HDPE、混凝土、碎石）的开采和生产以及建造抽提井所需的能源消耗。这些数据应与修复系统的运行阶段以及最终的退役阶段结合起来。考虑地理特性和所使用的井建设方法的技术适用性，因为这可以显着不同。

## Review details
清单： 内部审查通过几个迭代步骤完成，涉及原始数据验证、原始数据记录、代表性、完整性、与 ISO 14040 和 14044 有关的建模的一致性。

## Data sources
- Sustainable remediation assessment of a chlorinated ethene plume: method evelopment, application, and assessment
