# 秸秆浆、木浆纸生产|本色文化纸|

Dataset: ILCD process, Unit process, black box
Geography: SD-CN
Classification: Materials production / Other mineralic materials
LCI method principle: Attributional
Generated by: Yixiang Gao, 22210740040@m.fudan.edu.cn
Review: Dependent internal review by Tiangong LCI Data Working Group
Amounts: no units in this file; such an amount is in the reference unit of its flow, which a separate flow dataset defines
copyright: false

## General comment
泉林纸业的文化用纸的原材料结构是80%秸秆和20%进口木浆。本色文化纸的生产过程主要是指抄纸， 其中包括散浆、除杂质、精浆、 打浆、配制各种添加剂、纸料的混合、纸料的流送、压榨部、干燥部、表面施胶、 干燥、 压光、 卷取成纸等。

## Geography
基于生命周期评价的泉林纸业环境影响评价实例

## Technology and included processes
本色文化纸生命周期评价的系统边界应包括从原料的收集 、备料一直到销售渠道整个过程， 其中包括稻秆收集运输、进口木装运输、制 奖过程、本色文化纸生产、 运输和销售过程以及废水和黑液的处理等。

## Inputs
- Straw: 1600; measured
  秸秆
- water: 24000; measured
  水
- Electricity: 1440; measured
  电

## Outputs
All rows: measured
- carbon dioxide: 1756.18
  CO2
- Nitrogen oxides: 3.01
  NOx
- sulfur dioxide: 3.61
  SO2
- methane: 0.28
  CH4
- carbon monoxide: 1.53
  CO
- chemical oxygen demand: 0.512
  COD
- biological oxygen demand: 0.1224
  BOD5
- nitrogen, total (excluding N2): 0.04
  TN
- Ammonia Nitrogen: 0.022
  NH3-N
- phosphorus, total: 0.0012
  TP
- Suspended solids, unspecified: 0.308
  SS
- Waste (solid): 214.4
  固废

## Data selection and combination
本文的数据来源主要是深入到泉林纸业实地调研、泉林纸业企业报表、 山东省聊城市统计局统计资料、 聊城市环保局环评材料等。

## Review details
Inventory: The internal review was done by several iteration steps concerning raw data validation, raw data documentation, representativity, completeness and consistency of modelling with regard to ISO 14040 and 14044.; Documentation: The review of the documentation was performed by Ecobilan and is in compliance with ISO 14040 and 14044. The data set documentation is correct in view of the appropriateness of the information provided. It includes all relevant information in view of data quality and scope of application of the respective LCI result.

## Data sources
- 周婷. 基于生命周期评价的秸秆造纸环境影响研究. (南京农业大学, 2013).
