# 粗钢产量;钢铁;粗钢生产

Dataset: ILCD process, Unit process, single operation
Geography: SD-CN
Reference year: 2018
Classification: Unit processes / Materials production / Metals and semimetals
Generated by: 王环宇, wanghuanyu00@126.com
Owner: 天工LCI数据工作小组
Review: Dependent internal review by 天工LCI数据工作小组
Amounts: no units in this file; such an amount is in the reference unit of its flow, which a separate flow dataset defines
copyright: false
licenseType: Free of charge for all users and uses

## General comment
该数据集代表粗钢生产过程，粗钢是钢铁工业中的中间材料。粗钢是各种下游加工步骤的原材料，这些加工步骤最终产生用于建筑、汽车制造、造船、机械和家电的成品钢材。

## Reference product
- iron: 1000; measured

## Inputs
All rows: measured
- mineral extraction site: 20
- dolomite: 170
- Limestone: 270
- Refined lime: 4.05
  精石灰Refined lime
- pebble: 4.05
  鹅卵石Cobble
- Ferrosilicon: 0.7
- Ferromanganese: 2.82
- manganese: 6.9
  Silicomanganese
- Silicomanganese: 0.02
  Aluminum wire
- magnesium: 4.1
  Light burning magnesium bal
- electrode: 0.23
  Electrode
- Deoxidizer: 0.54
- Iron powder: 360
- Rich ore powde: 1320
  Rich ore powder
- hard coal,hard coal: 990
- freshwater,freshwater: 3580
- Electricity: 1115.6
- iron: 360
  Other ferrous materials

## Outputs
All rows: measured
- phenol,Sulphur oxides (as SO2): 0.93
- particles (PM10): 0.15
- nitrous oxide: 0.65
- 2,3,7,8-tetrachlorodibenzo-p-dioxin: 91.32
  Dioxins
- fluoride: 2890
- benzo[a]pyrene: 3.18
- sulfide: 0.02
- cyanide: 0.01
- Suspended solids, unspecified: 15.83
- LPG - liquefied petroleum gas: 1.33
- volatile organic compound: 0.03
  Volatile phenol
- Ammonia nitrogen: 1.12
- chemical oxygen demand: 0.0191
- Chemicals (unspecified): 0.09
  IHW
- waste incineration of municipal solid waste (MSW): 0.83

## Use advice
在使用该数据集进行生命周期评估时，用户应考虑粗钢生产过程的技术和地理特异性。有关能源使用效率、原材料来源和生产相关排放的任何假设都需要明确定义且适合评估的上下文。应仔细模拟钢铁产品寿命终结时的回收潜能，同时考虑回收过程的能源需求和减排效果。

## Review details
清单： 内部审查通过几个迭代步骤完成，涉及原始数据验证、原始数据记录、代表性、完整性、与 ISO 14040 和 14044 有关的建模的一致性。
