# 电力生产 ; 火电 ; 陕西

Dataset: ILCD process, Unit process, single operation
Geography: SAX-CN
Reference year: 2019
Classification: Unit processes / Energy carriers and technologies / Electricity
Generated by: 熊若熙, xiongrx0126@163.com
Owner: 天工LCI数据工作小组
Review: Dependent internal review by 天工LCI数据工作小组
Amounts: no units in this file; such an amount is in the reference unit of its flow, which a separate flow dataset defines
copyright: false
licenseType: Free of charge for all users and uses

## General comment
火电发电包括原煤、洗煤、石油、天然气等十七种化石燃料。该过程只考虑直接发电过程，不考虑上游原材料开采加工和下游消费

## Time period
根据2019年能源统计年鉴数据计算

## Technical purpose
此数据集代表陕西省使用原煤、洗煤、石油和天然气等十七种化石燃料的热电发电过程。数据仅用于直接发电产生的电力生产设施，不包括上游原材料的开采加工和下游电力的消费。

## Reference product
- electricity for thermal power: 3.6; calculated

## Inputs
All rows: calculated
- Raw coal: 0.324689
- Other Washed Coal: 0.0635755
- Gangue, in ground: 0.0221204
- Coke oven gas: 0.029767
- blast furnace gas: 0.019877
- Converter gas: 0.000688
- Diesel: 1.828e-5
- natural gas: 0.000667

## Outputs
- carbon dioxide (fossil): 0.702386; calculated
- sulfur dioxide: 0.000135421; calculated
- Nitrogen oxides: 0.000215334; calculated
- particles (> PM10): 2.6669e-5; calculated

## Data treatment and extrapolations
核算方法参考《企业温室气体排放核算方法与报告指南 发电设施》。不同形式发电量及燃料用量来自于《中国能源统计年鉴 2020》中的第三章（能源生产） 和第六章（地区能源平衡表）。用于计算二氧化碳排放因子的低位发热量、单位热值含碳量等燃料参数来自于《2019 年度中国区域电网二氧化碳基准线排放因子 OM 计算说明》、《企业温室气体排放核算方法与报告指南 发电设施》

## Use advice
使用此数据集进行生命周期评估时，用户应参考《企业温室气体排放核算方法与报告指南 发电设施》来了解碳排放计算的方法论。用户在进行发电量和燃料消耗的计算时，应确保其计算与《中国能源统计年鉴 2020》第三章（能源生产）和第六章（地区能源平衡表）提供的数据保持一致。此外，对于 CO2 排放因子的计算，建议考虑如《2019年度中国区域电网二氧化碳基准线排放因子OM计算说明》及相关指南中详细描述的燃料参数，如低位发热量和单位热值含碳量。

## Review details
清单： 内部审查通过几个迭代步骤完成，涉及原始数据验证、原始数据记录、代表性、完整性、与 ISO 14040 和 14044 有关的建模的一致性。

## Data sources
- 熊若熙. 中国电力生产和消费二氧化碳与污染物排放因子核算. (清华大学, 2023).
