# 水泥生产;水泥, 复合硅酸盐水泥;新型干法回转窑, 4000 t/d;混合固废

Dataset: ILCD process, Unit process, black box
Geography: DL-LN-CN
Reference year: 2009
Classification: Unit processes / Materials production / Other mineralic materials
Generated by: #REF!, ysqsophia@gmail.com
Owner: 天工LCI数据工作小组
Review: Dependent internal review by 天工LCI数据工作小组
Amounts: no units in this file; such an amount is in the reference unit of its flow, which a separate flow dataset defines
copyright: false
licenseType: Free of charge for all users and uses

## General comment
新型干法回转窑生产水泥。混合固废指粉煤灰和矿渣。

## Geography
大连金刚天马水泥厂

## Time period
数据采集时间为2009年和2010年。

## Technical purpose
该工业过程用于生产水泥，具体为普通硅酸盐42.4级水泥和复合硅酸盐32.5级水泥。新型干法回转窑技术被采用，每天能够生产4000吨水泥熟料。该过程结合了混合固废，如粉煤灰和高炉渣作为原材料的一部分，强调在水泥工业中资源回收和可持续性。这项技术和水泥产品适用于需要高强度混凝土的建筑项目以及那些可作为水泥制造副产品利用粉煤灰与渣的地区。

## Model description
水泥生命周期评价的功能单位为1吨水泥产品。整个水泥生命周期划分为原料准备单元、煤粉制备单元、熟料煅烧单元和水泥粉磨单元。其中原料准备阶段（生料制备）包括原材料破碎粉磨、烘干及预均化过程；煤粉制备阶段包括原煤运输、储存和粉磨；熟料煅烧阶段是预热分解和回转窑中加入煤粉和原料进行加热过程，期间有CO2、SO2、NOx等废气的排放；水泥粉磨阶段包括石膏、石灰石破碎与水泥粉磨。

## Reference product
- cement, portland-composite cement: 1000
  水泥产品

## Inputs
- calcium carbonate: 841.4
  石灰石
- shale: 54
  页岩
- sandstone: 27.66
  砂岩
- iron, powder: 16.95
  铁粉
- gypsum stone (CaSO4-dihydrate): 51.5
  石膏
- ash: 154.3
  粉煤灰
- blast furnace slag: 257
  矿渣
- hard coal; 26.3 MJ/kg: 92
  煤炭
- Electricity: 318.06
  电。水泥生产能源消耗主要分为原煤和电力，其中公用系统中的电力生产、原煤生产部分利用国内开发的CLCD基础数据库获得。

## Outputs
- carbon dioxide (fossil): 632.65
  CO2。CO2排放量来自于熟料燃煤和石灰石煅烧两部分，由于CO2排放量一般不做检测，排放量根据CO2排放公式计算得到。
- sulfur dioxide: 0.207
  SO2。废气中SO2排放量由企业提供。
- Nitrogen oxides: 0.66
  NOx。废气中NOx排放量由企业提供。
- carbon monoxide (fossil): 0.0222
  CO
- particles (> PM10): 0.466
  粉尘（排放）：废气，未标明粒径，按PM>10处理。
- Chlorides, unspecified: 2.38
  氯化物：废水。此外运输过程中排放的污染物和污水排放数据来自于生命周期评价软件GaBi4.0软件的数据。
- sulfate: 0.31
  硫酸盐：废水。此外运输过程中排放的污染物和污水排放数据来自于生命周期评价软件GaBi4.0软件的数据。
- blast furnace dust, for recovery: 596.6
  粉尘（回收）：固废。固体废弃物包括收尘器收集的粉尘和生活垃圾，其中粉尘统一收集后返回工艺，生活垃圾全部投入回转窑进行焚烧处理，固体废弃物只考虑粉尘，其数据由企业提供。

## Data selection and combination
各单元主要输入原料和能源的数据以该企业实际生产流程和2009-2010两年的全年生产数据为基础，根据水泥产量折算成1t水泥所需要的原料和能量。与水泥生产相关的数据为实地调查、计算得到。

## Sampling procedure
大连某水泥企业拥有日产4000t新型干法窑水泥熟料生产线和独立开采的露天石灰石矿山，厂区周围分布有石灰石、页岩等矿产资源。现有直径3.8m、长13m水泥磨一台，直径3.2m、长13m矿渣磨两台。水泥生产过程主要分为生料制备阶段熟料制备阶段，煤粉制备阶段、水泥粉磨阶段等4个阶段。生料阶段主要原料有石灰石、页岩、硅石、铁粉；熟料阶段主要燃料是煤炭；水泥粉磨阶段主要原料是石膏、石灰石、粉煤灰、矿渣；其中主要能源来自煤炭和电力。该企业年产熟料135万t年生产复合硅酸盐水泥70万t；回转窑全年生产330d，水泥磨全年生产270d。产品为普通硅酸盐42.4级水泥和复合硅酸盐32.5级水泥。

## Use advice
当使用这个数据集进行水泥产品的生命周期评价（LCA）时，请确保您的LCA范围涵盖了原料采集、煤粉制备、熟料煅烧和水泥粉磨阶段。数据集的功能单位基于生产1吨水泥。LCA实践者应当考虑到生产线每年的运行天数和混合固体废料在水泥成分中的结合。在熟料煅烧阶段的排放数据，包括CO2、SO2和NOx，必须给予特别关注。由于原材料组成和能源消费模式的地区差异，在将这些数据应用到其他地区的水泥制造时，应当考虑地理和技术的适用性。

## Review details
清单： 内部审查通过几个迭代步骤完成，涉及原始数据验证、原始数据记录、代表性、完整性、与 ISO 14040 和 14044 有关的建模的一致性。

## Data sources
- 朴文华, 陈郁, 张树深, & 徐小宁. (2012). 基于LCA方法的水泥企业清洁生产审核. 环境科学学报, 32, 1785–1792.
