# 土壤修复;异位修复;水泥窑协同处置;准备阶段;煤粉制备

Dataset: ILCD process, Unit process, single operation
Geography: CN
Classification: Other Services / Repair and maintenance
Generated by: 曹嘉萌, 2979480760@qq.com
Owner: 天工LCI数据工作小组
Review: Dependent internal review by 天工LCI数据工作小组
Amounts: no units in this file; such an amount is in the reference unit of its flow, which a separate flow dataset defines
licenseType: Free of charge for all users and uses

## General comment
水泥厂拥有一条4000t/d规模的现代化干法生产线，年生产水泥190万t，熟料150万t．公司自有矿山面积0.448km2，年生产石灰石能力200万t.生产工艺采用具有先进水平的RSP五级窑外分解技术．危险废物均采用汽车运输方式，配置危险品专用车辆，行车路线为货车专用线.矿山至厂区的运输距离约1.5km，废弃物的运输距离约50km．常规水泥的生产过程主要包括原辅材料的幵采及运输、生料制备、煤粉制备、熟料煅烧和水泥粉磨等阶段， 添加废弃物处置环节后， 废弃物（污染土壤、消化污泥、废油泥等）可以用作替代原料和替代燃料，以节省石灰石和煤炭等原材料。水泥窑协同处置，准备阶段，煤粉制备过程，主要包括煤炭及工业废物（废白土、涂料渣和废油泥）的贮存和粉磨。

## Technical purpose
土壤修复中的异位处理涉及水泥窑协同处置的准备阶段，在拥有现代化4000t/d干法生产线的水泥厂进行，年产水泥190万吨，熟料150万吨。公司自营矿山面积0.448平方公里，年生产石灰石量达200万吨。生产过程中采用先进的RSP五级窑外分解技术。危险废物通过专门的危险品车辆运输，遵循货车专线。矿山至厂区的运输距离约为1.5公里，废弃物运输距离约为50公里。常规的水泥生产流程包括原辅材料开采与运输、生料制备、煤粉制备、熟料煅烧和水泥粉磨等阶段。加入废弃物处理步骤后，污染土壤、消化污泥和废油泥等废弃物可以作为替代原料和燃料使用，节约石灰石和煤炭资源。在水泥窑协同处理中，准备阶段包括煤粉制备主要涉及煤炭和工业废物（废白土、涂料渣和废油泥）的储存和粉磨。该过程代表了更大工业流程中的单元操作。

## Reference product
- carbon dioxide: 13.26

## Inputs
All rows: article inperiodical
- waste clay: 1.05
- Coating residue: 0.16
- oil sludge: 5.26
- Hard coal, at consumer EU-27: 98.28
- Electricity: 19.8

## Outputs
- Hard coal, at consumer EU-27: 98.8

## Use advice
使用此LCA数据的用户需确保包括了所有相关的操作输入和输出，包括在土壤修复及水泥窑协同处理阶段中使用危险废物作为替代原料和燃料。从矿区至厂区的石灰石运输和废弃物运输距离应包含在与运输相关的排放计算中。在比较此过程与其他水泥生产过程时，必须考虑所采用的特定技术（RSP窑外分解）。此数据集用于环境影响评估时应反映这一先进过程的技术适用性，以及使用废弃物替代传统原料和燃料带来的方法论影响。

## Review details
清单： 内部审查通过几个迭代步骤完成，涉及原始数据验证、原始数据记录、代表性、完整性、与 ISO 14040 和 14044 有关的建模的一致性。
