# 市政污泥处理与处置;湿污泥 含水率83.48%;与煤掺混焚烧发电与干化

Dataset: ILCD process, Unit process, single operation
Geography: CN
Classification: Unit processes / End-of-life treatment / Waste water treatment
Functional unit: The functional unit is 1t wet sludge.
Generated by: 金思甜, 2331276@tongji.edu.cn
Owner: 天工LCI数据工作小组
Review: Dependent internal review by 天工LCI数据工作小组
Amounts: no units in this file; such an amount is in the reference unit of its flow, which a separate flow dataset defines
copyright: ['opt4ROkqig']
licenseType: Free of charge for all users and uses

## General comment
本文中处理将含水率83.48％、干燥基热值为 5MJ／kg 市政污泥，通过烟气干化为45％的污泥，然后与热值为22.16MJ／kg 的无烟煤掺混燃烧发电。

## Technology and included processes
在焚烧发电以及烟气干化脱硫过程中假设脱硫效率达到 90％，系统发电效率达到30％，厂用电占发电量的 5％。

## Technical purpose
该数据集涉及市政污泥处理与处置过程，其中湿污泥含水率为83.48%，通过烟气干化至含水率45%的污泥。然后将干化的污泥与无烟煤掺混，共同焚烧用于发电。此过程的主要应用是在垃圾转能设施中，将市政污水处理副产品作为补充燃料源与煤共同用于生产电力。

## Reference product
- Sludge: 1000; input; estimated
  本文中处理将含水率83.48％、干燥基热值为 5MJ／kg 市政污泥。

## Inputs
- hard coal: 166.54; calculated
- Light fuel oil: 0.02459; calculated
  燃料油
- hydrogen chloride: 0.09293; calculated
  非甲烷挥发性有机物

## Outputs
All rows: calculated
- Flue dust: 3.86673
  烟尘
- carbon dioxide (fossil): 4007.77
  原文未区分biogenic和fossil，根据专家判断此处为fossil。
- carbon monoxide (fossil): 1.65217
  原文未区分biogenic和fossil，根据专家判断此处为fossil。
- Nitrogen oxides: 3.54378
- sulfur dioxide: 1.46455
- methane (fossil): 10.5553
  原文未区分biogenic和fossil，根据专家判断此处为fossil。
- Waste (solid): 606.522

## Use advice
利用此数据集进行生命周期评估（LCA）的用户应确保通过考虑能源和材料的共享使用，在污泥处理/处置与发电过程之间准确分配环境影响。对于联合焚烧过程的建模，需要核算污泥和无烟煤的热值。考虑废物转能设施的地理和技术背景很重要，因为它可能会影响环境影响结果。废弃物处理阶段的建模也应考虑可能的能量回收和与污泥焚烧相关的排放。

## Review details
清单： 内部审查通过几个迭代步骤完成，涉及原始数据验证、原始数据记录、代表性、完整性、与 ISO 14040 和 14044 有关的建模的一致性。

## Data sources
- 董进宁,马晓茜.基于生命周期评价的市政污泥烟气干化环境影响评价及其经济性分析[J].现代化工,2009,29(04):82-86.
