# 玻璃生产 ;有机玻璃单体MMA生产;粗单体罐

Dataset: ILCD process, Unit process, single operation
Geography: JX-CN
Classification: Unit processes / Materials production / Glass and ceramics
Generated by: 和夏夏, 18616148319@163.com
Owner: 天工LCI数据工作小组
Review: Dependent internal review by 天工LCI数据工作小组
Amounts: no units in this file; such an amount is in the reference unit of its flow, which a separate flow dataset defines
copyright: false
licenseType: Free of charge for all users and uses

## General comment
该工艺数据代表制造PMMA单体MMA（甲基丙烯酸甲酯）的过程，MMA储存在粗单体罐中。PMMA，亦称作有机玻璃或是丙烯酸玻璃，广泛用于制造各类产品，例如透明隔断、标志、飞机罩和照明设备。此外，MMA 也用作铸造和挤出板材、涂料树脂以及乳液聚合物的前体。

## Reference product
- methyl methacrylate: 997.998; measured
  MMA粗成品

## Inputs
All rows: measured
- Electricity: 138.24
- methyl methacrylate: 896.478
- polymethyl methacrylate (PMMA) beads: 26.062
- freshwater: 15.081
- organic waste (unspecified): 27.4685
- methanol: 8.88
- methacrylic acid: 11.9325
- methacrylate: 11.9325

## Outputs
- Waste (solid): 3.12; measured

## Use advice
数据用户应注意，生命周期评估（LCA）数据特定涉及到MMA的生产阶段及其在进一步加工之前在粗单体罐中的暂时储存。在将这些数据应用于评估产品生命周期中的环境影响时，确保数据在PMMA生产的正确背景下使用。根据特定产品要求和地区法规，还应额外考虑使用阶段行为、回收和处理等生命周期终点选项以及MMA的运输。除非生命周期评估范围明确包括，否则排除后续加工的影响。

## Review details
清单： 内部审查通过几个迭代步骤完成，涉及原始数据验证、原始数据记录、代表性、完整性、与 ISO 14040 和 14044 有关的建模的一致性。

## Data sources
- 江西旺达新材料有限公司年产20000吨有机玻璃原料生产项目
