# 鲍鱼中间养殖;鲍鱼大型仔鱼;网箱养殖

Dataset: ILCD process, Unit process, black box
Geography: ND-FJ-CN
Reference year: 2017
Valid until: 2018
Classification: Unit processes / Materials production / Food and renewable raw materials
Functional unit: 1 live-weight ton of abalone
LCI method principle: Attributional
LCI method approaches: Allocation - mass
Generated by: 吴康妮, wukangni@xmu.stu.edu.cn
Owner: 天工LCI数据工作小组
Review: Dependent internal review by 天工LCI数据工作小组
Amounts: no units in this file; such an amount is in the reference unit of its flow, which a separate flow dataset defines
copyright: false
licenseType: Free of charge for all users and uses

## General comment
该系统包括能源生产（红色）、饲料生产（绿色）、水产养殖生产主链（蓝色）和其他投入品的生产（紫色）。

## Geography
宁德市地级市由若干区县组成，其中福定市(a)、霞浦县(B)、福安市(C)、交城区(D)临海，纳入了我们的评估范围。2017年8月和2018年1月，我们在该地区随机抽取了321户家庭，分析了2016年期间从事海水养殖生产的292户家庭的数据。

## Time period
文献未具体说明采样时间，研究者于 2017 年 8月份和2018年1月份在宁德市沿海进行入户访谈

## Technology and included processes
鲍鱼育苗和养殖技术。鲍鱼养殖海区必须水陆交通较为便利，养殖海域无严重的工业污染，海水水流条件好，水深不宜过浅，最好能达到8~15米，水质清澈、透明度大于4米;鲍鱼的最适生长水温在14~24C，因此海区的水温应不低于 10C;种苗的购买应选择鲍鱼生长最适温度的时间进行。鲍苗需用消毒剂消毒后方可下海。网箱选择般根据地方海区的特点进行设计，采用网箱中间套聚乙烯网衣，网目规格为0.5~1.0厘米，同时配备有聚烯多孔方形鲍鱼养殖塑料笼，规格一般为60厘米x40厘米x15厘米，每4~8个为一串，悬挂于网箱中。养殖饲料主要为藻类。

## Technical purpose
该数据集代表了网箱养殖系统中鲍鱼的中间养殖，特别是大型仔鱼。这一水产养殖过程是为消费市场提供高质量鲍鱼供应链中的关键环节，包括但不限于豪华海鲜餐厅、传统医药和高端海鲜零售商。所涵盖的阶段包括能源生产、饲料生产、水产养殖生产主链和其他必要输入品的生产。

## Model description
文献参考了ecoinvent数据库（v.3.5）。为了解释所研究系统的可变性，在R软件（v.3.3.2）进行了蒙特卡罗模拟，使用copula函数对 LCA 中单位过程变量之间的相关性进行建模，解决了过程变量之间的相关性。在R软件中使用蒙特卡洛模拟，每个单元过程由一组输入参数、地理位置和成长阶段的相关矩阵表征，在模拟中使用了2000次迭代，并考虑了由于固有的不确定性、分散性和不代表性而导致的单元过程的可变性。通过假设变异系数为5 %来包括固有的不确定性，价差由主要和次要数据计算，并使用谱系方法解决不代表性。通过在每次迭代中使用依赖抽样来包括过程链之间的相关性，以及过程之间的相关性

## Reference product
- Big juveniles of Large Yellow Croake: 1273.7; measured
  数据来源于实际调研49户数据的平均值

## Inputs
- small juveniles of Large Yellow Croake: 48.4; measured
  数据来源于实际调研49户数据的平均值
- Fuel: 70.8; measured
  数据来源于实际调研49户数据的平均值
- laminaria: 1847, 10842.9 (2 entries); measured
  数据来源于实际调研49户数据的平均值
- transport in t*km: 633.3, 378.7, 249.1 (3 entries); measured
  数据来源于实际调研49户数据的平均值

## Deviations from the LCI method approaches
整个数据分析过程中采用质量分配，遵循英国标准学会推荐的指南

## Data selection and combination
数据来源于实际调研数据的平均值

## Data treatment and extrapolations
文献研究者从调查数据和科学文献两方面构建了海水养殖生产的生命周期清单。通过收集生长阶段的主要数据和辅助数据，以模拟苗种和幼体生产等其他过程。

## Sampling procedure
在中国福建省宁德市入户调研鲍鱼养殖52户，其中49户用于此条数据的模型计算

## Use advice
使用此数据集的用户应考虑数据的地理特定性，该数据仅限于宁德市级市的海水养殖实践，包括福定市、霞浦县、福安市和交城区。用户应注意，包括或排除某些过程的方法学细微差别可能会影响数据对其他地区或条件的适用性。能源消耗、饲料转换率和投入产出关系的假设与抽样家庭的运营规模有关。理想情况下，这些数据应该为大规模应用或不同地理位置进行更新或验证。

## Review details
清单： 内部审查通过几个迭代步骤完成，涉及原始数据验证、原始数据记录、代表性、完整性、与 ISO 14040 和 14044 有关的建模的一致性。

## Data sources
- Marín, T. et al. Resource Use in Mariculture: A Case Study in Southeastern China. Sustainability 11, (2019).
