# 主体工程建设 ; 一个40MW风电场的主体工程建设

Dataset: ILCD process, Unit process, black box
Geography: CN
Reference year: 2018
Classification: Unit processes / Systems / Construction
Functional unit: The functional unit is 2 MW wind turbine.
LCI method principle: Attributional
LCI method approaches: Allocation
Generated by: 赵云志, ll10088@163.com
Owner: 天工LCI数据工作小组
Review: Dependent internal review by 天工LCI数据工作小组
Amounts: no units in this file; such an amount is in the reference unit of its flow, which a separate flow dataset defines
copyright: false
licenseType: Free of charge for all users and uses

## General comment
文章中并未详细说明“Major engineering”具体指什么，按照风电场建设规范，推测：应该是指道路建设，电厂地基搭建，变电站建设等工程

## Geography
本研究选取华北地区某陆上40MW风电场20台2WM风电机组作为研究对象。

## Technical purpose
该40MW风电场的主体工程建设数据集代表了华北地区陆上设置的20台2MW风电机组的使用。建设包括通常用于中国风电场开发的材料类型和数量。该数据与可再生能源领域的利益相关者（如风电项目开发商、环境顾问和政策制定者）密切相关，用于规划和评估新的风电场项目以及在可持续能源组合中扩大风力发电的使用。

## Reference product
- Wind tower foundation: 20; measured
  Major engineering of wind farm.

## Inputs
All rows: measured
- Steel,Steel: 988200
  Ground surface and Underground
- Glass: 100
  Tempered glass
- polyvinylchloride resin (E-PVC): 3700
  Ground surface and Underground
- polyethylene high density granulate (PE-HD): 17100
- aluminium: 145900
- Resin: 6200
  Ground surface and Underground
- copper: 15000
- zinc: 100

## Deviations from the LCI method approaches
采用基于过程的生命周期评价方法，遵循ISO 14040 [ 33 ]和ISO 14044 [ 34 ]的原则，计算风电机组全生命周期的温室气体排放量。

## Data selection and combination
该风电场投入的物资种类和数量代表了目前我国风电场投入物资种类和数量的平均水平(表2)。用于风电场分析的所有数据都是从调查中获得的。各材料的温室气体排放系数来源于Ga Bi (一个用于LCA的商业软件)数据库。

## Use advice
用户应使用此LCA数据根据所描述的材料和过程的包含评估与风电场建设相关的环境影响。在使用这些数据时，用户必须遵守ISO 14040和ISO 14044标准，以评估风力涡轮机整个生命周期的温室气体排放。在将数据外推至不同地理位置或技术环境时，应谨慎确保数据的代表性。还建议考虑随时间可能发生的方法论变化以及来自更新数据库或未来调查的排放因子更新。

## Review details
清单： 内部审查通过几个迭代步骤完成，涉及原始数据验证、原始数据记录、代表性、完整性、与 ISO 14040 和 14044 有关的建模的一致性。

## Data sources
- Li, Q. et al. Life cycle assessment and life cycle cost analysis of a 40 MW wind farm with consideration of the infrastructure. Renewable and Sustainable Energy Reviews 138, 110499 (2021).
