# 粗钢生产;粗钢;热轧

Dataset: ILCD process, Unit process, single operation
Geography: CN
Reference year: 2014
Classification: Unit processes / Materials production / Metals and semimetals
Generated by: 付翔, 1162850692@qq.com
Owner: 天工LCI数据工作小组
Review: Dependent internal review by 天工LCI数据工作小组
Amounts: no units in this file; such an amount is in the reference unit of its flow, which a separate flow dataset defines
copyright: false
licenseType: Free of charge for all users and uses

## General comment
由此过程生产的粗钢用于建筑业、机械制造、交通基础设施、家电以及作为各工业部门进一步加工和制造的基础材料。

## Time period
基于 A 钢厂 2014 年的生产数据进行计算和分析对比。

## Reference product
- Crude Steel: 1000; measured
  钢材

## Inputs
All rows: measured
- Electricity: 417.6
  z10
- Crude Steel: 1041
  粗钢
- Linz-Donawitz gas: 20
  转炉煤气
- Blast furnace gas: 80
  高炉煤气
- Coke oven gas: 30
  焦炉煤气

## Outputs
- carbon dioxide (fossil): 243700; measured
  原文未区分bio和fossil，根据专家判断此处为fossil
- methane: 40; measured
- nitrous oxide: 0.017; measured

## Use advice
粗钢生产的数据集基于 2014 年 A 钢厂的生产数据。使用时应考虑自 2014 年以来行业中技术进步和效率提高的情况。用户应在其评估的地理和技术范围内对数据进行情境化，并根据最新数据或特定区域因素考虑调整或校准的需求。

## Review details
清单： 内部审查通过几个迭代步骤完成，涉及原始数据验证、原始数据记录、代表性、完整性、与 ISO 14040 和 14044 有关的建模的一致性。

## Data sources
- 刘宏强, 付建勋, 刘思雨, 谢欣悦, & 杨笑楹. 钢铁生产过程二氧化碳排放计算方法与实践. 钢铁 51, 74–82 (2016).
