# Betelnut|Betelnutdriedfruit|Cleaning - foaming - drying - gluing - slicing - add bittern|All sizes / /|槟榔|槟榔干果|清洗-发泡-烘干-上胶-切片-点卤|所有规模

Dataset: ILCD process, Partly terminated system
Geography: CN
Reference year: 2019
Classification: Materials production / Other mineralic materials
Generated by: The data was created by the Office of the Second National Pollution Source Census of the Ministry of Ecology and Environment, and the data was organized by the TianGong Plan team for ILCD format / 生态环境部第二次全国污染源普查工作办公室创建数据，天工计划团队常慧敏整理数据为ILCD格式
Amounts: no units in this file; such an amount is in the reference unit of its flow, which a separate flow dataset defines
copyright: false

## Technology and included processes
the Technical of end-of-pipe management technology for pollution phosphorus, totalisAnaerobic biological treatment + aerobic biological treatment，Its Technical efficiency of end-of-pipe management60，The formula for calculating the actual operation rate (k-value) of the end-of-pipe treatment facility is k = power consumption of treatment facilities (kWh/year) / (equipment rated power (kW) × equipment operating time (hours/year))
污染物指标总磷的末端治理技术是厌氧生物+好氧生物处理法，其效率为60，末端治理设施实际运行率（k值）计算公式为k=污水治理设施运行时间（天/年）/生产时间（天/年）

## Reference product
- Areca: 1000; calculated
  原文件中描述污染物类别为Product，污染物指标为槟榔，此处对其进行了匹配工作，将其匹配到LCAflow库里面相最符合的流

## Outputs
All rows: calculated
- Waste water: 3500
  原文件中描述污染物类别为废水，污染物指标为工业废水量，此处对其进行了匹配工作，将其匹配到LCAflow库里面相最符合的流
- chemical oxygen demand: 27.463, 21.9704, 16.4778, 5.4926, 2.7463 (5 entries)
  原文件中描述污染物类别为废水，污染物指标为化学需氧量，此处对其进行了匹配工作，将其匹配到LCAflow库里面相最符合的流
- Ammonia Nitrogen: 0.243, 0.2187, 0.1944, 0.0729, 0.03645 (5 entries)
  原文件中描述污染物类别为废水，污染物指标为氨氮，此处对其进行了匹配工作，将其匹配到LCAflow库里面相最符合的流
- Nitrogen, organic bound: 0.41, 0.369, 0.328, 0.246, 0.123 (5 entries)
  原文件中描述污染物类别为废水，污染物指标为总氮，此处对其进行了匹配工作，将其匹配到LCAflow库里面相最符合的流
- phosphorus, total: 0.054, 0.0486, 0.0324, 0.0324, 0.0216 (5 entries)
  原文件中描述污染物类别为废水，污染物指标为总磷，此处对其进行了匹配工作，将其匹配到LCAflow库里面相最符合的流

## Data sources
- 第二次全国污染源普查产排污核算系数手册（试用版）,四级代码1372文件，在完整版文件中第2646页
