# 电力生产 ; 火电 ; 云南

Dataset: ILCD process, Unit process, single operation
Geography: YN-CN
Reference year: 2019
Classification: Unit processes / Energy carriers and technologies / Electricity
Generated by: 熊若熙, xiongrx0126@163.com
Owner: 天工LCI数据工作小组
Review: Dependent internal review by 天工LCI数据工作小组
Amounts: no units in this file; such an amount is in the reference unit of its flow, which a separate flow dataset defines
copyright: false
licenseType: Free of charge for all users and uses

## General comment
火电发电包括原煤、洗煤、石油、天然气等十七种化石燃料。该过程只考虑直接发电过程，不考虑上游原材料开采加工和下游消费

## Time period
根据2019年能源统计年鉴数据计算

## Technical purpose
该数据集代表了云南省火力发电厂使用包括原煤、洗煤、石油和天然气在内的各种化石燃料进行电力生产的用途。数据专用于通常在该地区电网能源组合中使用的直接发电过程。

## Reference product
- electricity for thermal power: 3.6; calculated

## Inputs
All rows: calculated
- Raw coal: 0.481158
- Gangue, in ground: 0.0226012
- Coke oven gas: 0.001486
- blast furnace gas: 0.262685
- Converter gas: 0.023173
- Diesel: 0.00010433

## Outputs
- carbon dioxide (fossil): 1.16098; calculated
- sulfur dioxide: 0.000187763; calculated
- Nitrogen oxides: 0.000309024; calculated
- particles (> PM10): 4.1602e-5; calculated

## Data treatment and extrapolations
核算方法参考《企业温室气体排放核算方法与报告指南 发电设施》。不同形式发电量及燃料用量来自于《中国能源统计年鉴 2020》中的第三章（能源生产） 和第六章（地区能源平衡表）。用于计算二氧化碳排放因子的低位发热量、单位热值含碳量等燃料参数来自于《2019 年度中国区域电网二氧化碳基准线排放因子 OM 计算说明》、《企业温室气体排放核算方法与报告指南 发电设施》

## Use advice
在使用此数据集进行生命周期评估或碳足迹计算时，用户应仅限于考虑电力生产的直接排放。应排除上游原材料的开采加工和下游电力消费等活动。为了方法论的一致性，评估应基于《企业温室气体排放核算方法与报告指南 发电设施》提供的核算原则，并且应使用特定来源的燃料参数来计算二氧化碳排放因子。

## Review details
清单： 内部审查通过几个迭代步骤完成，涉及原始数据验证、原始数据记录、代表性、完整性、与 ISO 14040 和 14044 有关的建模的一致性。

## Data sources
- 熊若熙. 中国电力生产和消费二氧化碳与污染物排放因子核算. (清华大学, 2023).
