# 转炉炼钢;生铁;粗钢

Dataset: ILCD process, Unit process, single operation
Geography: CN
Reference year: 2020
Classification: Materials production / Metals and semimetals
Generated by: 纪伟, 1299801467@qq.com
Owner: 天工LCI数据工作小组
Review: Dependent internal review by 天工LCI数据工作小组
Amounts: no units in this file; such an amount is in the reference unit of its flow, which a separate flow dataset defines
licenseType: Free of charge for all users and uses

## General comment
该数据集代表基本氧气炼钢（BOS）过程中的单元过程，通常称为转炉炼钢工艺。它用于将生铁转化为粗钢，粗钢是钢铁生产中的中间产品。该数据集可以应用于制造多种钢铁产品，这些产品广泛应用于建筑、交通和机械制造等多个行业。

## Time period
论文提到钢铁企业环境总体数据为1998年的吨钢环境基础数据。

## Reference product
- Converter gas: 739; article inperiodical

## Inputs
All rows: article inperiodical
- iron: 665
- dolomite: 5.8
- quicklime: 29.2
- freshwater: 600
- compressed air: 8.9
- Steel scrap (external supply): 59.1
- Silicomanganese: 6.4
- Refractory: 7.4
- oxygen: 37
- Electricity: 203.04
- Converter gas: 7.4

## Outputs
- Converter gas: 29.1; article inperiodical
- BOF Slag: 188; article inperiodical
- carbon dioxide: 32.4; article inperiodical
- Sinter / Pellet Dust: 0.08; article inperiodical

## Use advice
在使用该LCA数据集时，应注意数据的基准年为1998年。它可能不反映当前的技术效率或环境控制情况。用户在将这些数据应用于当前情况时，应考虑时间相关性。该数据集不包括钢铁的终生回收过程，也未考虑具体的使用阶段行为。为了准确评估，应将此数据与类似时间和技术背景的数据集对齐。

## Review details
清单： 内部审查通过几个迭代步骤完成，涉及原始数据验证、原始数据记录、代表性、完整性、与 ISO 14040 和 14044 有关的建模的一致性。

## Data sources
- 梁田. 基于生命周期评价的典型钢铁企业环境影响评估及绿色发展研究. (郑州大学, 2020).
