# 水泥注浆墙;土壤风险管控;垂直阻隔;水泥注浆

Dataset: ILCD process, Unit process, single operation
Geography: US
Reference year: 2013
Classification: Unit processes / Other Services / Repair and maintenance
Generated by: 肖萌, xiaomeng@mail
Owner: 天工LCI数据工作小组
Review: Dependent internal review by 天工LCI数据工作小组
Amounts: no units in this file; such an amount is in the reference unit of its flow, which a separate flow dataset defines
copyright: false
licenseType: Free of charge for all users and uses

## General comment
形成水泥浆垂直阻隔屏障，可防止放射性同位素从受污染的土壤迁移到地下水，阻隔墙体的阻隔能力为83立方米的污染土壤。

## Geography
For this project, a Superfund location at the Brookhaven National Laboratory (BNL) is studied. This particular case was chosen because it is representative of the scale and scenario where soil grouting would be used. It is also one of only a few sites where CS grouting has been used for full scale remediation. BNL has served as a production facility for research and development of radioisotopes for decades. The design of some of the facilities failed to provide adequate safety measures against the spread of radioactivity to the soils and groundwater beneath them and as a result, BNL was added to the Superfund National Priorities List in 1989.

## Technical purpose
此工业流程指的是在Superfund站点形成水泥浆垂直阻隔屏障以进行土壤风险管控。该阻隔屏障旨在防止放射性同位素从受污染的土壤迁移到地下水，设计容量为83立方米污染土壤。这类阻隔通常用于需要土壤注浆进行环境整治的位置，特别是具有历史性放射性污染的地区。

## Reference product
- Cement slurry barrier: 48.6; measured
  使用该水泥液浆屏障，所能阻隔放射性同位素向地下水迁移的污染土壤量

## Inputs
All rows: measured
- cement, unspecified: 22970
- Electricity: 30240
- Equipment and Materials Arriving on Site: 37510
- Steel: 4300
- Tap Water: 41.9

## Use advice
使用此LCA数据集时，用户应确保其环境整治项目的范围与典型Superfund站点整治的规模和情景相匹配。应注意根据所涉及场地的具体受污染土壤体积调整阻隔屏障的容量。此外，还应考虑水泥浆垂直阻隔屏障的使用阶段行为，包括其长期稳定性和阻隔效果。最后，用户应注意数据的方法论限制，并相应调整其使用方式，特别是当将结果外推至具有不同污染特性或环境条件的其他站点时。

## Review details
清单： 内部审查通过几个迭代步骤完成，涉及原始数据验证、原始数据记录、代表性、完整性、与 ISO 14040 和 14044 有关的建模的一致性。

## Data sources
- Gallagher, P. M., Spatari, S. & Cucura, J. Hybrid life cycle assessment comparison of colloidal silica and cement grouted soil barrier remediation technologies. Journal of Hazardous Materials 250–251, 421–430 (2013).
