# 废旧NCM电池先进的湿法冶金术

Dataset: ILCD process, Unit process, single operation
Geography: CN
Reference year: 2020
Classification: Unit processes / End-of-life treatment / Material recycling
Functional unit: using 1 kWh as the functionalunit
Generated by: 彭菲, pengfei24@email.ncu.edu.cn
Owner: 天工LCI数据工作小组
Review: Dependent internal review by 天工LCI数据工作小组
Amounts: no units in this file; such an amount is in the reference unit of its flow, which a separate flow dataset defines
copyright: false
licenseType: Free of charge for all users and uses

## General comment
采用湿法工艺进行材料回收前，对废旧三元锂电池进行安全放电、拆分、热解、机械破碎，分选得到粉末状含锂废料。 含锂物料加入浸出溶剂进行浸出，过滤分离得到含锂溶液，加入净化剂进行反应后，过滤，浓缩，在一定的反应条件下，加入沉淀剂充分反应后结晶沉淀，经过滤、洗涤、干燥后得到电池级碳酸锂。

## Technology and included processes
浸出：浸出过程，冶炼用精选电极材料和浸出溶液的固液比宜控制在合适范围内,应搅拌均匀、反应充分。除杂：除杂过程,应以不引人多余杂质为前提,结合沉淀除杂和萃取除杂的方法,确保杂质元素得到合理去除,减少镍、钴、锰、锂等元素流失。提纯：应根据金属元素特性进行提纯,选用适当的萃取剂,在一定的萃取条件下，经多次萃取，获得高纯度的目标金属溶液，如含镍、钴、锰溶液或锂溶液。材料合成：材料合成将金属纯化液转化为正极材料、前驱体等电池材料的过程。材料合成的产品应符合相关产品的国家标准或行业标准，镍钻锰酸锂应符合YS/T798的要求，镍钴锰氢氧化物应符合GB/T26300的要求。

## Technical purpose
此描述的三元锂电池湿法冶金工艺主要用于回收废旧电池材料。具体来说，它被用于回收高纯度碳酸锂，这是制造消费电子产品、电动车以及能源存储系统新电池电芯的关键组成部分。

## Reference product
- EoL NCM battery: 3.6; input; software or database

## Inputs
All rows: software or database
- Sodium carbonate（95%）: 1.43
  苏打 (Na2CO3)
- Citric Acid: 16.7
  柠檬酸，基于GREET/CN的新工艺
- sodium hydroxide: 2.08
- Electricity: 4.58
- Carbon dioxide (fossil): 0.16
  原文未区分bio和fossil，根据专家判断此处为fossil
- natural gas,natural gas: 11.79, 11.79 (2 entries)

## Outputs
All rows: software or database
- nickel: 0.95
- manganese: 0.3
- Lithium carbonate: 0.98
- cobalt: 0.32
- copper: 1.01
- aluminium: 0.8

## Data selection and combination
数据来自多篇论文，难以区分。

## Data treatment and extrapolations
计算基础为 GEB2016 (12.0 × 1024 sej)

## Use advice
用户在应用本数据集时，应考虑三元锂电池的特定报废场景，并考虑以GEB2016 (12.0 × 1024 sej)为能量消耗单位，每1 kWh电池产出作为计算基础。应使用这些数据精确模拟湿法冶金工艺的环境影响。需要考虑来自不同论文的数据完整性，并确保在生命周期评估过程中与1 kWh功能单元的方法论一致。

## Review details
清单： 内部审查通过几个迭代步骤完成，涉及原始数据验证、原始数据记录、代表性、完整性、与 ISO 14040 和 14044 有关的建模的一致性。

## Data sources
- Wang, Y. et al. Environmental impact assessment of second life and recycling for LiFePO4 power batteries in China. Journal of Environmental Management 314, 115083 (2022).
