# 注入井;5.1 cm dia. 9 m deep;地下水原位修复;地下水原位化学氧化

Dataset: ILCD process, Unit process, single operation
Geography: CA
Reference year: 2007
Classification: Unit processes / Other Services / Repair and maintenance
Generated by: 王宁, wang_ning@caep.org.cn
Owner: 天工LCI数据工作小组
Review: Dependent internal review by 天工LCI数据工作小组
Amounts: no units in this file; such an amount is in the reference unit of its flow, which a separate flow dataset defines
copyright: false
licenseType: Free of charge for all users and uses

## General comment
注入井建设

## Geography
The contaminated area was located 600 m from a river shore in the northern part of the prov-ince of Quebec， Canada.

## Technology and included processes
使用聚氯乙烯、膨润土、石英砂、碎石、混凝土、柴油等建造注入井

## Technical purpose
该注入井直径5.1厘米，深9米，设计用于通过原位化学氧化进行地下水原位修复。具体来说，它用于处理位于加拿大魁北克省北部距河岸600米处的受污染地下水。建筑材料包括聚氯乙烯、膨润土、石英砂、碎石、混凝土和柴油，表明其在环境工程应用中的用途，尤其是用于控制和处理地下污染物。

## Reference product
- injection well: 125; estimated
  125 steel wells 5.1 cm dia. 9 m deep, in 10 lines spaced by 5 m

## Inputs
All rows: estimated
- Diesel: 281
- cement, unspecified: 5117
- bentonite: 1676
- sand: 352
- gravel: 2076
- Polyvinyl chloride: 513
- Steel: 10534

## Use advice
在使用此数据集进行生命周期评估时，必须考虑建筑资源和修复过程的地理特性——此处为加拿大魁北克省北部。注入井的使用阶段行为预期应包括对原位氧化过程中的化学物质的持久性和反应速度的考虑。此外，如果使用该数据集评估环境影响，应考虑包括施工阶段、运行阶段和可能拆除时的潜在排放。此数据集应在了解其对类似地理和水文地质环境的技术适用性的基础上使用。

## Review details
清单： 内部审查通过几个迭代步骤完成，涉及原始数据验证、原始数据记录、代表性、完整性、与 ISO 14040 和 14044 有关的建模的一致性。

## Data sources
- Cadotte, M., Deschênes, L. & Samson, R. Selection of a remediation scenario for a diesel-contaminated site using LCA. Int J Life Cycle Assess 12, 239–251 (2007).
