# 水泥生产;水泥, 硅酸盐水泥, 42.5MPa;其它回转窑

Dataset: ILCD process, Unit process, black box
Geography: HLJ-CN
Reference year: 2008
Classification: Materials production / Other mineralic materials
Generated by: 杨思琪, ysqsophia@gmail.com
Owner: 天工LCI数据工作小组
Review: Dependent internal review by 天工LCI数据工作小组
Amounts: no units in this file; such an amount is in the reference unit of its flow, which a separate flow dataset defines
copyright: false
licenseType: Free of charge for all users and uses

## General comment
其他回转窑生产硅酸盐水泥。对黑龙江省水泥工业目前所具备的其他旋窑工艺的工艺流程和工业运行参数进行研究，收集了所确定产品系统的输入、输出数据，并对数据进行了计算、量化。

## Technical purpose
该数据集描述了使用其他回转窑技术的42.5MPa硅酸盐水泥的生产过程。所述的硅酸盐水泥适用于需要高强度水泥的建筑应用，例如基础设施、建筑物和桥梁的建设。具体适用于黑龙江省水泥行业，涉及从生料准备到水泥制备的阶段。

## Model description
以1kg28天抗压强度为42.5MPa的水泥所具有的使用性能作为功能单位，即1Fu=42.5kgMPa。评价范围为生料准备、熟料煅烧和水泥制备。粘土类资源消耗造成的环境负荷暂不考虑。铁粉属于铁质校正材料，其引发的环境影响不予考虑。产品系统输出端考虑排放的废弃物主要包括氮氧化物、二氧化硫、二氧化碳及粉尘。

## Reference product
- cement, portland cement, 42.5MPa: 1000
  42.5强度等级的硅酸盐水泥

## Inputs
- limestone, crushed, for mill: 1203.4
  石灰石
- gypsum stone (CaSO4-dihydrate): 59
  石膏
- hard coal: 235.386
  标准煤。原始数据为0.2187kg标准煤，这里换算为硬煤，换算公式为1kg硬煤=0.929kg标准煤。
- electricity, medium voltage: 413.28
  电力

## Outputs
- particles (> PM10): 0.64
  粉尘，未标明粒径，按PM>10处理。
- sulfur dioxide: 0.7554
  二氧化硫
- Nitrogen oxides: 2.951
  氮氧化物
- carbon dioxide: 1181.7
  二氧化碳

## Use advice
在使用这个数据集进行生命周期评估（LCA）时，请注意评价范围包括生料准备、熟料煅烧和水泥制备，但不包括粘土资源消耗造成的环境负荷和铁粉作为铁质校正材料的影响。此外，在建模使用阶段行为或解释结果时，重要的是要注意，只考虑了氮氧化物、二氧化硫、二氧化碳和粉尘排放。确保将此数据纳入的LCA研究限于在具有可比技术适用性和工业运行参数的情况下使用硅酸盐水泥。

## Review details
清单： 内部审查通过几个迭代步骤完成，涉及原始数据验证、原始数据记录、代表性、完整性、与 ISO 14040 和 14044 有关的建模的一致性。

## Data sources
- 于淼. (2008). 黑龙江水泥工业可持续发展研究 [硕士, 哈尔滨工业大学].
