# Calcium carbonate powder production | Crushing and screening method, CN

Dataset: ILCD process
Classification: Materials production / Other mineralic materials
Generated by: Jiaqi Lu, wilsherelu@foxmail.com
Amounts: no units in this file; such an amount is in the reference unit of its flow, which a separate flow dataset defines

## Reference product
- Putty Powder: 1000
  大白粉产品

## Inputs
- Limestone: 1458
  石灰石
- Light fuel oil: 0.0267
  柴油
- water: 0.0777
- electricity mix: 54.972

## Outputs
- Particles (PM0.2 - PM2.5): 0.2
  粉尘
- waste water - untreated: 0.035
  生活污水
- municipal solid waste deposition: 0.1232
  生活垃圾
- used oil: 1.668e-6
  废机油
- nitrous oxide: 0.000415
  氮氧化物（燃油废气）
- carbon monoxide: 0.001117
  一氧化碳（燃油废气）
- total hydrocarbons（THC）: 0.000183
  THC（燃油废气）
