# 玻璃生产 ;有机玻璃单体MMA生产;深冷过程

Dataset: ILCD process, Unit process, single operation
Geography: JX-CN
Classification: Unit processes / Materials production / Glass and ceramics
Generated by: 和夏夏, 18616148319@163.com
Owner: 天工LCI数据工作小组
Review: Dependent internal review by 天工LCI数据工作小组
Amounts: no units in this file; such an amount is in the reference unit of its flow, which a separate flow dataset defines
copyright: false
licenseType: Free of charge for all users and uses

## General comment
该数据集涉及通过深冷过程生产聚甲基丙烯酸甲酯(PMMA)，通常称为亚克力或有机玻璃。PMMA用于各种应用中，如生产透明障碍物、标牌、飞机舱罩、天窗、汽车尾灯以及作为玻璃的轻质替代品。

## Reference product
- propionic acid: 17.479; measured
  精馏冷凝液

## Inputs
- Electricity: 188.28; measured
- waste heat: 94.66, 17.964 (2 entries); measured

## Use advice
在使用这个数据集进行产品全生命周期评估（LCA）时，请仔细关注PMMA生产中所用深冷过程的边界。确保数据集与LCA中的方法学选择一致，例如系统边界定义和影响评估方法。考虑深冷过程的能耗，并且如果分析考虑PMMA产品的整个生命周期，包括终生处理。

## Review details
清单： 内部审查通过几个迭代步骤完成，涉及原始数据验证、原始数据记录、代表性、完整性、与 ISO 14040 和 14044 有关的建模的一致性。

## Data sources
- 江西旺达新材料有限公司年产20000吨有机玻璃原料生产项目
