# 生料制备;生料

Dataset: ILCD process, Unit process, single operation
Geography: CN
Classification: Materials production / Non-energetic raw materials
Generated by: 杨思琪, ysqsophia@gmail.com
Owner: 天工LCI数据工作小组
Review: Dependent internal review by 天工LCI数据工作小组
Amounts: no units in this file; such an amount is in the reference unit of its flow, which a separate flow dataset defines
copyright: false
licenseType: Free of charge for all users and uses

## General comment
在原材料制备阶段，原始的原材料被磨成符合工艺要求的一定粒度范围的细粉末；然后，加入水和其他必要的材料以形成生胚，即为工艺阶段的最终半成品。在这个阶段，输入包括石灰石、粘土、煤、铁粉以及原材料中或在生产线上添加的水。该阶段包括三个内部的转化过程：对原材料进行研磨、煤粉碾磨和加水形成生料球。生料球是这个阶段的最终产品。在这个阶段，球团产品占总产量的大部分，高达79.32%（不包括水）。主要的污染物排放是粉尘，占总产量的0.29%。

## Technology and included processes
In the preparative phase for raw meal, the crude raw materials are ground into fine particles of a certain size range that meets the procedural requirements; then, water and other necessary materials are added to form raw balls, the final semi-product of the procedural phase. During this phase, input includes limestone, clay, coal, iron powder, and water contained in the raw materials or added in the procedural line. The phase includes three interior transformative processes: grinding the raw materials, coal pulverization, and the formation of raw balls by adding water to the white ground raw materials. Raw balls are the final product of this phase. The detailed material flows are described quantitatively in Fig. 3. In this phase, the ball products account for the majority of the total output, amounting to up to 79.32% (not including water). The main emission of pollutants is dust, which accounts for 0.29% of the total output.

## Technical purpose
所描述的生料制备工艺专为水泥行业中熟料生产而设计。具体来说，该系统用于采用立窑生产系统的水泥企业。它包括磨碎石灰石和粘土等原材料、碾磨煤炭、以及通过添加水和结合材料形成生料球的阶段，以产生用于水泥生产过程后期阶段的中间产品。

## Model description
系统边界为生料的制备阶段（包括磨碎）。

## Reference product
- raw meal: 1000
  生料球

## Inputs
- limestone, crushed, for mill: 719.28
  石灰石
- clay: 149.614
  黏土
- hard coal; 26.3 MJ/kg: 99.743
  煤炭
- iron, powder: 34.961
  铁粉
- Water (fresh water): 25.193
  水（水含量）：输入材料中的水。至于每单位水泥产品中的指标，材料的直接输入包括石灰石，粘土，煤炭，铁粉添加剂，混合材料，石膏和氧气，但不包括原材料或能量中添加或包含的水的输入。材料的总输入包括材料的直接输入和隐藏流的输入，其中包括所有水和其他空气组成部分，除了氧气外。
- Water (fresh water): 231.877
  水输入

## Outputs
- particles (> PM10): 3.599
  灰尘，未标明粒径，按PM>10处理。
- Water (groundwater from technosphere, waste water): 257.069
  水

## Sampling procedure
经调查，采用立窑生产系统的水泥企业的年产能为100,000吨熟料。立窑生产线的总体特点是能耗高，生产能力有限，劳动生产率低，粉尘排放量大。立窑生产线的动态代谢分析是在正常生产水平下以1小时为单位进行的。

## Use advice
此数据集代表水泥熟料生产的生料制备阶段，并包括详细的材料流。数据使用者应注意，系统边界包括整个生料制备阶段，包括磨碎。在生命周期评估的清单阶段，应考虑主要输出和排放，其中球团产品占总输出的大多数，粉尘排放虽占少数，但也值得注意。该数据旨在用于立窑水泥生产的生命周期评估，关注环境影响、能耗和生产可扩展性方面的影响。此数据集基于年产100,000吨熟料的生产能力，对于不同产能或技术设置的水泥生产设施的生命周期评估研究应进行校准。

## Review details
清单： 内部审查通过几个迭代步骤完成，涉及原始数据验证、原始数据记录、代表性、完整性、与 ISO 14040 和 14044 有关的建模的一致性。

## Data sources
- Dan Hu, Zhen Guo, Zhen Wang, & Qiang Xiao. (2015). Metabolism analysis and eco-environmental impact assessment of two typical cement production systems in Chinese enterprises. Ecological Informatics 26, 70–77.
