# 太阳能级多晶硅生产

Dataset: ILCD process, Unit process, single operation
Geography: CN
Reference year: 2014
Classification: Energy carriers and technologies / Renewable fuels
Functional unit: The functional unit of the LCA study was 1 kWh based on a multi-Si PV module
LCI method principle: Attributional
LCI method approaches: Allocation
Generated by: 杨锦锋, yjfzfshn@163.com
Owner: 天工LCI数据工作小组
Review: Dependent internal review by 天工LCI数据工作小组
Amounts: no units in this file; such an amount is in the reference unit of its flow, which a separate flow dataset defines
copyright: false
licenseType: Free of charge for all users and uses

## General comment
多晶硅

## Geography
本研究对中国采用多晶硅组件的光伏系统进行了生命周期评估

## Time period
文章发表

## Technical purpose
本数据集描述的太阳能级多晶硅纯化工艺用于生产光伏系统中的多晶硅（multi-Si）组件。这种高纯度的硅对于制造构成太阳能板的高效率太阳能电池至关重要，该电池用于将阳光转换为电能。其主要应用为通过太阳能发电装置产生可再生能源。

## Reference product
- Solar grade multi-Si: 5.52; measured

## Inputs
All rows: measured
- Metallurgical silicon: 6.08
  Metallurgical silicon (>99%)
- Lime: 6.52
  Calcium oxide
- Hydrochloric acid: 2.93
  Hydrochloric acid (30%)
- Hydrofluoric acid: 0.06
  Hydrofluoric acid (20%)
- Hydrogen: 0.5
  Hydrogen (>99.8%)
- Nitric acid: 0.22
  Nitric acid (35%)
- dinitrogen: 71.16
  Nitrogen gaseous
- Silicon tetrachloride: 8.29
  Silicon tetrachloride (>99%)
- Sodium hydroxide: 4.81
  Sodium hydroxide (20%)
- Water (fresh water): 10396.9
  Water
- electricity: 2287.25
  Electricity
- process steam: 385.02
  Steam

## Outputs
All rows: measured
- chemical oxygen demand: 0.0821
  COD
- Chlorosilane, trimethyl-: 0.02856
  Chlorosilane
- hydrogen chloride: 0.03624
  Hydrogen chloride
- hydrogen fluoride: 0.00022
  Hydrogen fluoride
- nitrogen dioxide: 0.00315
  Nitrogen dioxide
- Silicon: 0.00829
  Silicon dust to air
- Silicon: 0.83
  Silicon dust (99%) for recovery
- Silicon tetrachloride: 0.00923
- Suspended solids, unspecified: 0.05481
  Suspended solids
- Trichlorosilane: 0.03133
- Water (evapotranspiration): 5991.76
  Water (evapotranspiration) emissions to air

## Deviations from the LCI method approaches
本研究旨在定量评估中国光伏系统的生命周期对环境的影响，为中国光伏产业的可持续发展政策制定提供科学依据。

## Data selection and combination
库存数据，包括太阳能级产品生产过程中的材料消耗和 太阳能级硅、硅片、硅锭、电池和组件生产过程中的材料消耗和环境排放 硅、硅片、硅锭、电池和组件生产过程中涉及的材料消耗和环境排放。主要从代表中国目前多晶硅光伏技术领域的企业收集。技术的企业。能耗数据参考了 能耗数据参考了《中国太阳能光伏清洁生产报告》（Li 和 Chang，2012 年）。多晶硅生产数据来自有关中国多晶硅生产的文献。的文献资料。

## Use advice
在使用此多晶硅光伏组件生产的生命周期评估（LCA）数据时，请确保系统边界包括从生产太阳能级硅、硅片、硅锭、电池和组件中涉及的材料消耗和环境排放。本数据集特别针对中国多晶硅光伏技术领域，因此可能不具代表全球条件的特征。能耗数据取自《中国太阳能光伏清洁生产报告》，将此数据应用于其他地区应考虑当地能源结构和生产实践。使用1千瓦时（kWh）多晶硅光伏组件的功能单位作为影响量化的基础，以确保跨研究的可比性。

## Review details
清单： 内部审查通过几个迭代步骤完成，涉及原始数据验证、原始数据记录、代表性、完整性、与 ISO 14040 和 14044 有关的建模的一致性。

## Data sources
- Fu, Y., Liu, X. & Yuan, Z. Life-cycle assessment of multi-crystalline photovoltaic (PV) systems in China. Journal of Cleaner Production 86, 180–190 (2015).
