# 开采流程;原煤、原油;油田油气;钻井

Dataset: ILCD process, Unit process, single operation
Geography: LN-CN
Reference year: 2017
Classification: Unit processes / Energy carriers and technologies / Energetic raw materials
LCI method principle: Attributional
LCI method approaches: Consequential
Generated by: 李梓萌, 1577978537@qq.com
Owner: 天工LCI数据工作小组
Review: Dependent internal review by 天工LCI数据工作小组
Amounts: no units in this file; such an amount is in the reference unit of its flow, which a separate flow dataset defines
copyright: false
licenseType: Free of charge for all users and uses

## General comment
分析各工作环节中能源、水资源等资源消耗、废弃物排放等指标情况

## Geography
辽河油田

## Time period
论文发表时间

## Technology and included processes
钻井在石油开发过程中是油井建设过程，工作人员利用钻井工具配合相关技术利用钻头向地下钻进，钻穿岩石直至目的层。钻井过程包括多项施工工程，并且用到场地建设、钻井液配置、排放及采油废液排放等，在操作过程中将会产生废液、噪声及固体废弃物等多项污染行为。

## Technical purpose
该数据集描述了辽河油田原材料如原煤和原油的开采过程。该数据集特别适用于石油和天然气行业的分析，重点关注油田作业钻井阶段的能源和水资源消耗以及废弃物排放。此过程对于作为各种能源生产及工业应用输入的原煤和原油的供应至关重要。

## Reference product
- LPG - liquefied petroleum gas: 21; input; uniform; missing unimportant
  原油输入占油气开发阶段原煤投入的 10.1%

## Inputs
- LPG - liquefied petroleum gas: 32; uniform; missing unimportant
  原煤输入占油气开发阶段原煤投入的 10.1%

## Use advice
在使用该数据集进行生命周期评价时，必须考虑方法论方面的考虑，如系统边界的范围，应包括所有相关的钻井操作。数据使用者需要确保开采过程数据是截至发表时间相关和最新的，并且如果将其应用于不同的时间背景，需要调整技术变化或效率改进。应注意地理特性，如果没有针对当地条件进行调整，结果可能无法转移到其他地区。此外，在建模使用阶段行为时，应考虑辽河油田特有的操作实践和维护制度的变化。

## Review details
清单： 内部审查通过几个迭代步骤完成，涉及原始数据验证、原始数据记录、代表性、完整性、与 ISO 14040 和 14044 有关的建模的一致性。

## Data sources
- 胡新磊. 基于LCA的油田油气开发环境影响评价研究[D].吉林大学,2017.
