# 白灰采烧;冶金白灰;白灰采烧（D01）

Dataset: ILCD process, Unit process, single operation
Geography: CN
Reference year: 1998
Classification: Materials production / Metals and semimetals
Generated by: 付翔, 1162850692@qq.com
Owner: 天工LCI数据工作小组
Review: Dependent internal review by 天工LCI数据工作小组
Amounts: no units in this file; such an amount is in the reference unit of its flow, which a separate flow dataset defines
copyright: false
licenseType: Free of charge for all users and uses

## General comment
来自表 4-17 D01 钢厂生产吨材环境负荷编目表

## Time period
论文提到钢铁企业环境总体数据为1998年的吨钢环境基础数据。

## Technical purpose
冶金白灰在多种冶炼过程中用作添加剂，包括作为耐火材料，钢铁制造过程中的熔剂，以及调整炉渣性质。它也用于需要高氧化钙化合物的其他工业过程。

## Reference product
- Metallurgical ash: 173; measured
  冶金白灰

## Inputs
- Energy, geothermal, converted: 828.731; measured
- water: 70; measured

## Outputs
- Dust (unspecified, from stack): 0.076; measured
- sulfur dioxide: 0.329; measured
- Suspended solids, unspecified: 0.07266; measured
- Spoil (deposited, hibernating in ground, non elementary flow): 6.617; measured

## Use advice
这个数据集反映了基于1998年数据生产一吨冶金白灰的环境负荷，使用时应谨慎。由于环境法规和制造技术的潜在变化，实际的当前环境影响可能不同。用户应考虑使用当前的本地数据更新这些值，以进行精确的生命周期评估。另外，用户还应考虑冶金过程效率和回收实践的任何潜在变化，这些都可能影响材料的环境特性。

## Review details
清单： 内部审查通过几个迭代步骤完成，涉及原始数据验证、原始数据记录、代表性、完整性、与 ISO 14040 和 14044 有关的建模的一致性。

## Data sources
- 周和敏. 钢铁材料生产过程环境协调性评价研究. (北京工业大学, 2001).
