# 监测井;Din=0.15m,L=50m;地下水原位修复;生物强化修复;注射井和监测井的建设

Dataset: ILCD process, Unit process, single operation
Geography: SH-CN
Reference year: 2020
Classification: Unit processes / Other Services / Repair and maintenance
Generated by: 肖萌, xiaomeng@mail
Owner: 天工LCI数据工作小组
Review: Dependent internal review by 天工LCI数据工作小组
Amounts: no units in this file; such an amount is in the reference unit of its flow, which a separate flow dataset defines
copyright: false
licenseType: Free of charge for all users and uses

## General comment
CHC+ISB（加热-冷却系统+原位生物修复）用于现场修复，在施工准备阶段，修建监测井。

## Geography
The aquifer in a certain area in Shanghai, China, is uniformly contaminated with chlorinated volatile organic compounds (CVOCs), with a surface area of 20,000 m2 and a depth of 50 m, with the water table located at a depth of 30 m.

## Technical purpose
该数据集描述了加热-冷却系统（CHC）和原位生物修复（ISB）对含氯挥发性有机化合物（CVOCs）污染含水层的修复使用。它专门用于地下水原位修复工程中注射井和监测井的建设。适用于专注于地下水系统中CVOCs污染修复的环境工程公司。

## Reference product
- Monitoring well: 272
  文中仅给出监测井和注入井一共544口，没有给出单独的监测井和注入井数量，这里填报人简单估计两种监测井数量各半。

## Inputs
- Gravel Sand: 178145; calculated
  Gravel sand
- bentonite: 75216.2; calculated
- Steel: 1360; software or database
- Polyethylene,Polyethylene: 13600; software or database
  Polyethylene pipe
- Electricity: 846029; software or database

## Outputs
- Waste (solid): 245130
  每口井约产生钻井废土0.9012吨

## Use advice
使用此数据集的用户应确保所描述的修复过程适用于其污染场地的具体条件，包括考虑CVOCs的类型和浓度，含水层的地质以及地下水位的深度等因素。还应注意，井的建设应遵守当地的规定和指南，以防止进一步污染或扰乱含水层。特别需要注意的是，根据修复项目的规模，可能需要调整井的尺寸，以及施工过程中的安全考虑。

## Review details
清单： 内部审查通过几个迭代步骤完成，涉及原始数据验证、原始数据记录、代表性、完整性、与 ISO 14040 和 14044 有关的建模的一致性。

## Data sources
- Ni, Z. et al. Comparative Life-Cycle Assessment of Aquifer Thermal Energy Storage Integrated with in Situ Bioremediation of Chlorinated Volatile Organic Compounds. Environ. Sci. Technol. 54, 3039–3049 (2020).
