# 废弃超滤组件的处理;焚烧与填埋混合

Dataset: ILCD process, Unit process, single operation
Geography: CN
Reference year: 2022
Classification: Unit processes / End-of-life treatment / Other end-of-life services
Functional unit: 1 item of ultrafiltration module
Generated by: 陆嘉麒, wilsherelu@foxmail.com
Owner: 天工LCI数据工作小组
Review: Dependent internal review by 天工LCI数据工作小组
Amounts: no units in this file; such an amount is in the reference unit of its flow, which a separate flow dataset defines
copyright: false
licenseType: Free of charge for all users and uses

## General comment
数据集描述了废弃超滤组件的处理过程，这些组件通常用于水和废水处理设施。此模块用于净化和分离活动，帮助从各种液体中去除悬浮固体、细菌、病毒和高分子量物质。该数据所代表的超滤模块适用于如回收水、浓缩食品和饮料项目或处理药品和化工溶液等场景。

## Reference product
- Ultrafiltration Component: 1; input; measured
  1 waste Ultrafiltration module

## Outputs
All rows: measured
- waste incineration of plastics (unspecified) fraction in municipal solid waste (MSW): 11.75
  废弃挤压塑料管
- waste incineration of plastics (unspecified) fraction in municipal solid waste (MSW): 4.27
  废弃注塑塑料
- waste incineration of plastics (unspecified) fraction in municipal solid waste (MSW): 2.42
  废弃PU填充剂
- waste incineration of plastics (unspecified) fraction in municipal solid waste (MSW): 21.97
  废弃PVDF膜
- waste incineration of plastics (unspecified) fraction in municipal solid waste (MSW): 29.28
  废弃PVC外壳

## Use advice
使用此数据集时，用户应计算废弃超滤模块处理中焚烧与填埋的具体混合情况。地理覆盖范围为CN（中国），表明数据特定于中国的程序和法规。必须将数据使用与地区废弃物处理实践保持一致。此外，在将数据应用于环境影响评估时，用户必须考虑模块的使用寿命终期，计入焚烧可能产生的潜在排放和填埋可能造成的潜在生态影响。

## Review details
清单： 内部审查通过几个迭代步骤完成，涉及原始数据验证、原始数据记录、代表性、完整性、与 ISO 14040 和 14044 有关的建模的一致性。

## Data sources
- Ultrafiltration product manual
