# 饮用水生产;超滤、中空纤维膜

Dataset: ILCD process, Unit process, single operation
Geography: CN
Reference year: 2022
Classification: Energy carriers and technologies / Heat and steam
Functional unit: 1 t potable water
Generated by: 陆嘉麒, wilsherelu@foxmail.com
Owner: 天工LCI数据工作小组
Review: Dependent internal review by 天工LCI数据工作小组
Amounts: no units in this file; such an amount is in the reference unit of its flow, which a separate flow dataset defines
copyright: false
licenseType: Free of charge for all users and uses

## General comment
此数据集描述了采用中空纤维膜超滤技术生产饮用水的用途。它适用于需要生产、净化或处理高质量饮用水的场景。这可以应用于市政水处理设施、瓶装水生产厂或任何需要高纯度水的工业过程。

## Reference product
- drinking water: 1000; measured
  饮用水

## Inputs
- electricity mix: 6.498; measured
  过滤耗电
- Water (fresh water): 1310; measured
  原水
- Ultrafiltration Component: 2.37e-6; measured
  超滤组件

## Outputs
- waste water - treated: 310; measured
  可直排

## Use advice
此数据集的用户应考虑所建模饮用水生产过程的具体背景。应注意地理和技术的相关性，因为地区水质和可用技术的变化可能会影响数据的适用性。用户还应在计算能耗和排放时考虑与超滤前后处理过程的联系。此数据特别指的是生产1吨饮用水的过程，应相应地按照LCA中评估的水量进行缩放。

## Review details
清单： 内部审查通过几个迭代步骤完成，涉及原始数据验证、原始数据记录、代表性、完整性、与 ISO 14040 和 14044 有关的建模的一致性。

## Data sources
- Ultrafiltration product manual
