# 生产透辉石光伏组件;ZnO 组件 1m2;旋转镀膜法;ZnO

Dataset: ILCD process, Unit process, single operation
Geography: US
Classification: Unit processes / Energy carriers and technologies / Electricity
Functional unit: 1 square meter perovskite photovoltaic module
Generated by: 姚玺婧, 15898832265@163.com
Owner: 天工LCI数据工作小组
Review: Dependent internal review by 天工LCI数据工作小组
Amounts: no units in this file; such an amount is in the reference unit of its flow, which a separate flow dataset defines
copyright: false
licenseType: Free of charge for all users and uses

## General comment
The main process steps include substrate glass production, deposition of perovskite layers, deposition of electron transport layers, and packaging.

## Technology and included processes
Spin-coating method: The spin-coating process is relatively simple, and it is the mainstream preparation method of perovskite light-absorbing layer. Firstly, PbX2 was dissolved in solvent and spun on the substrate to form a film; Then PbX2 is soaked in solution or spun on the substrate again to react with PbX2 film to produce perovskite.

## Technical purpose
这种1平方米的ZnO模块专为钙钛矿光伏板设计，常作为半导体层嵌入板结构中，以提高太阳能向电能转换的效率。

## Reference product
- Solar Module,Solar Module,Solar Module: 1; log-normal

## Inputs
All rows: log-normal
- ethanol: 0.0271579
  基板清洗溶剂
- water: 0.0327
  基板清洗溶剂
- zinc oxide: 0.0459
  层厚度25 nm
- dimethyl formamide: 0.00283; calculated
  PbI2的溶剂
- isopropanol: 0.0112; calculated
  CH3NH3I溶剂
- chlorobenzene: 0.0118; calculated
  Spiro OMeTAD溶剂
- silver: 0.00119
  层厚度150 nm
- polyethylene terephthalate (PET) granulate: 0.0617
  应用于两侧
- Adhesives: 0.0202
  3米467英里/平方英尺
- Electricity: 16.416; calculated
- Indium Tin Oxide (ITO) coated glass: 1.54; calculated
  基底
- Lead iodide: 0.00138; calculated
  层厚度96 nm
- methylammounium iodide: 0.00014; calculated
  层厚度204 nm
- Spiro-OMeTAD: 0.00085; calculated
  层厚度200 nm

## Outputs
All rows: log-normal
- ethanol: 0.0258
  基板清洗溶剂
- butanol: 0.038
  ZnO油墨的溶剂
- methanol: 0.0571
  ZnO油墨的溶剂
- chloroform: 0.0496
  ZnO油墨的溶剂
- dimethyl formamide: 0.00283; calculated
  PbI2的溶剂
- isopropanol: 0.0112; calculated
  CH3NH3I溶剂
- chlorobenzene: 0.0118; calculated
  Spiro OMeTAD溶剂
- silver: 0.000215
  废阴极
- landfill of glas/inert waste: 1.63
- Zinc acetate dihydrate: 0.000617; calculated
  ZnO油墨中的废浓缩物
- Potassium hydroxide: 0.000443; calculated
  ZnO油墨的溶剂
- Lead iodide: 0.000966; calculated
  废弃PbI2
- Spiro-OMeTAD: 0.000595; calculated
  废弃Spiro OMeTAD

## Use advice
使用此数据集的用户应考虑ZnO模块在钙钛矿太阳能板中的特定技术应用。应注意模块的预期寿命、随时间的效率变化，以及在其使用寿命结束时材料回收的潜力。在将此数据整合到生命周期评价中时，还应考虑原材料的地区性和来源，以及制造和处置过程。

## Review details
清单： 内部审查通过几个迭代步骤完成，涉及原始数据验证、原始数据记录、代表性、完整性、与 ISO 14040 和 14044 有关的建模的一致性。
