# 基于木薯乙烯生产 ; 乙烯 ; 乙醇脱水 ; 木薯

Dataset: ILCD process, Unit process, single operation
Geography: GX-CN
Classification: Unit processes / Materials production / Organic chemicals
Functional unit: The functional unit is 1 tonne of ethylene production.
LCI method principle: Attributional
LCI method approaches: Allocation - mass
Generated by: 唐子睿, tangzirui123@gmail.com
Owner: 天工LCI数据工作小组
Review: Dependent internal review by 天工LCI数据工作小组
Amounts: no units in this file; such an amount is in the reference unit of its flow, which a separate flow dataset defines
copyright: false
licenseType: Free of charge for all users and uses

## General comment
本研究对两种替代乙醇生产方案（基于玉米秸秆和基于木薯）的乙烯生产进行了评估。

## Geography
相关生产数据（例如电力、蒸汽、水、化学品、原材料消耗和直接排放）来源于中国安徽省木薯乙醇生产工厂。

## Technology and included processes
本研究包括的过程总结如下：1）木薯生产；2）乙醇和乙烯生产；3）原料干燥；4）公路运输；5）废物处理；6) 材料和煤炭能源生产；7）生产能源回收。

## Technical purpose
基于木薯的乙烯主要用作生产各种塑料、弹性体和其他有机化学产品的原料。这种可再生原料选择对于寻求可持续解决方案以替代石油衍生的乙烯的行业特别相关，尤其适用于对'绿色'化工产品需求高的市场。

## Reference product
- ethene (ethylene): 1000; measured

## Inputs
All rows: measured
- Ethanol,Ethanol: 1700
- water: 800
- Electricity: 1332
- process steam: 1800
- light fuel oil: 85

## Deviations from the LCI method approaches
进行了基于产品质量的联产品分配。

## Data selection and combination
相关生产数据（例如电力、蒸汽、水、化学品、原材料消耗和直接排放）来源于中国安徽省木薯乙醇生产工厂。2. 玉米秸秆生产、燃煤发电和公路运输过程的相关数据取自参考文献。3. 由于缺乏中国的信息，因此使用了欧洲的化学品生产数据和相关背景数据[26]。

## Use advice
在使用这个生命周期评估数据集时，请确保正确应用了联产品的分配方法，因为该数据集涉及基于质量的比例分配。注意区域特性，因为基于木薯和基于玉米的乙烯生产流程数据来自中国的设施，可能与其他区域的数据不同。在缺乏中国数据的情况下，使用了欧洲数据作为代理；如果有更本地化的数据变得可用，相应调整您的评估。使用这些LCA数据来模拟乙烯生产的环境影响，确保适当考虑能源使用、运输、废物处理和直接排放等因素。

## Review details
清单： 内部审查通过几个迭代步骤完成，涉及原始数据验证、原始数据记录、代表性、完整性、与 ISO 14040 和 14044 有关的建模的一致性。

## Data sources
- Hong, J., Zhang, Y., Xu, X. & Li, X. Life cycle assessment of corn- and cassava-based ethylene production. Biomass and Bioenergy 67, 304–311 (2014).
