# 日光温室茄子生产 ; 农作生产（常规）

Dataset: ILCD process, Unit process, single operation
Geography: HD-HEB-CN
Reference year: 2002
Valid until: 2017
Classification: Unit processes / Materials production / Agricultural production means
Functional unit: 1T eggplant
Generated by: Haoran Zhang, hrzhang@whu.edu.cn
Owner: 天工LCI数据工作小组
Review: Dependent internal review by 天工LCI数据工作小组
Amounts: no units in this file; such an amount is in the reference unit of its flow, which a separate flow dataset defines
copyright: false
licenseType: Free of charge for all users and uses

## General comment
实验采用的日光温室为拱圆式，长 60 m、宽 7 m． 温室内多种蔬菜轮作( 每年两茬) ，本研究茄 子生长 于 每 年 3 ～ 8 月，进 行 了 为 期 4 a ( 2013 ～ 2016 年) 的实验． 实验设 3 个处理 ①常规模式: 采 用当地农民传统的温室管理模式，主要施用化肥， 少量施用有机肥，病虫害的防治以化学防治为主; ②综合模式: 所施有机肥和化肥用量分别为有机和 常规模式施用量的 50% ，病虫害防治主要用生物防 治方法，严重时用低毒低残留的化学农药进行处 理; ③有机模式: 按照有机蔬菜生产标准，只施用 有机肥( 堆肥和鸡粪) ，不使用化肥和农药，病虫害 防治以农业措施和物理防治为主 ( 如使用黄板诱 杀、防虫网等) ． 综合和有机模式施氮量同常规模 式均为同一水平，各处理灌水情况一致，灌溉方式 为大水漫灌( 表 1)

## Geography
曲周

## Time period
设施蔬菜长期定位实验于2002年3月开始

## Technology and included processes
本实验采用的日光温室为拱圆式, 长60 m、宽7 m.温室内多种蔬菜轮作 (每年两茬) , 本研究茄子生长于每年3~8月, 进行了为期4 a (2013~2016年) 的实验.实验设3个处理：常规、综合、有机

## Technical purpose
数据集代表曲周温室设施中进行的蔬菜常规生产的长期定位实验。该信息适用于专注于常规蔬菜栽培实践中的环境影响和资源使用分析，特别是与茄子生长相关的分析。它可用于农业研究、政府政策制定和工业农业规划，以了解使用常规、综合和有机方法的环境影响。

## Reference product
- eggplant: 1000; calculated
  常规

## Inputs
- Rice Seeds: 5.8; measured
  综合
- Agricultural film: 41.67; measured
  综合
- Diesel: 50; measured
  综合
- river water: 9425; measured
  综合
- Electricity: 18.18; calculated
  常规
- arable, non-irrigated: 85.34; calculated
  常规
- water: 80.44; calculated
  常规

## Outputs
All rows: calculated
- Hydrocarbons, aliphatic, alkanes, unspecified: 1.24e-5
  常规
- carbon monoxide: 0.0003
  常规
- carbon dioxide (fossil): 1.36
  常规
- ammonium: 1.1134
  常规
- nitrous oxide: 0.179
  常规
- Nitrogen oxides: 0.002
  常规
- nitrate: 2.1173
  常规
- sulfide: 0.0017
  常规
- methane: 2.99e-5
  常规
- phosphorus, total: 0.0165
  常规
- cadmium: 0.0004
  常规
- lead-210: 0.0015
  常规
- copper: 0.0048
  常规
- zinc: 0.0148
  常规
- phosphate: 0.0005
  常规
- Pyrethrins: 0.032
  常规
- benomyl: 0.0325
  常规
- carbendazim: 0.0325
  常规
- mancozeb: 0.0325
  常规

## Deviations from the LCI method approaches
生命周期评价包括以下 4 个步骤: 目标定义与范围界定、清单分析、影响评价和结果解释． 下面对主要步骤进行简要描述

## Data selection and combination
清单分析包括数据的收集和对数据进行量化处理． 农资生产子系统中化肥、有机肥、杀虫剂、地膜和柴油等生产的污染物排放( 包括CO、CO2、NOx、SO2、CH4、N2O和COD 等) 及能源消耗等计算参考梁龙［22］的研究结果．

## Data treatment and extrapolations
氧化亚氮的收集采用静态箱法［19］，测定采用Agilent 7890A 型气相色谱仪． 土壤硝态氮( NO3－ -N和总磷淋溶采用自流式农田地下淋溶收集装置，每次灌溉后 3 ～ 5 d 内用抽水器抽取渗漏液，用流动分析仪( TＲAACS2000 ) 测定． 有机肥中重金属含量( 主要考虑 Cu、Zn、Pb 和 Cd) 的浸提采用硝酸-盐酸-氢氟酸消煮法，待测液用 ICP-MS 测定． 作物收获时，对每次采摘果实进行称量和记录，取 3 次平均值． 各指标的详细测定过程参见文献［

## Use advice
在使用该数据集进行生命周期评价（LCA）时，用户应遵循为清单分析、影响评价和结果解释阶段提供的特定方法指导。应注意到系统边界从摇篮到农场大门的设定，确保排除基础设施建设、农业机械生产、蔬菜消费及废弃物排放过程。方法指南包括使用静态箱方法收集氧化亚氮排放，以及使用ICP-MS分析有机肥料中的重金属。遵循指明文献中记载的详细分析程序以确保与原始研究方法论的准确性和一致性至关重要。

## Review details
清单： 内部审查通过几个迭代步骤完成，涉及原始数据验证、原始数据记录、代表性、完整性、与 ISO 14040 和 14044 有关的建模的一致性。

## Data sources
- 徐强,胡克林,李季等.华北平原不同生产模式设施蔬菜生命周期环境影响评价[J].环境科学,2018,39(05):2480-2488.
