# 废塑料化学回收，制油

Dataset: ILCD process, Unit process, single operation
Geography: CN
Reference year: 2013
Classification: Materials production / Other mineralic materials
Generated by: Jiaqi Lu, wilsherelu@foxmail.com
Amounts: no units in this file; such an amount is in the reference unit of its flow, which a separate flow dataset defines
copyright: false

## Reference product
- packaging waste (plastic): 1000; input; measured

## Inputs
- Electricity: 2052; measured
  电
- Water for industrial use: 0.14; measured
  水
- natural gas: 50; measured
  液化气

## Outputs
All rows: measured
- light fuel oil: 260.5
  轻油
- heavy fuel oil: 547.05
  重油
- Paraffin: 60.7833
  石蜡
- carbon: 58.2333
  炭黑
- carbon dioxide (fossil): 249.74
  天然气燃烧排放
- nitrogen dioxide: 0.32
  天然气燃烧排放
- methane (fossil): 0.0216674
  天然气燃烧排放
- sulfur dioxide: 0.101949
  天然气燃烧排放
- carbon monoxide: 0.0860491
  天然气燃烧排放
