# SVE系统;土壤原位修复;气相抽提;SVE系统安装

Dataset: ILCD process, Unit process, single operation
Geography: KR
Reference year: 2011
Classification: Unit processes / Other Services / Repair and maintenance
Generated by: 张建宾, zhangjb@caep.org.cn
Owner: 天工LCI数据工作小组
Review: Dependent internal review by 天工LCI数据工作小组
Amounts: no units in this file; such an amount is in the reference unit of its flow, which a separate flow dataset defines
copyright: false
licenseType: Free of charge for all users and uses

## General comment
污染源区面积200 m2，污染深度5 m

## Technology and included processes
1个取出井 2个监测井 已制成的SVE商用系统(包含取出+水/油分离+废气处理设施)直接应用在现场

## Technical purpose
所描述的SVE（土壤气相抽提）系统用于原位整治受污染的土壤区域。系统覆盖面积为200平方米，整治深度为5米，特别适用于有挥发性有机化合物（VOCs）污染的工业场地。该系统通过在取出井施加真空压力来挥发和移除土壤中的污染物，从而促进现场净化过程。商用SVE系统包括一个取出井和两个监测井，以及集成的油水分离和废气处理设施。

## Reference product
- SVE system: 1; measured

## Inputs
- Flexible Polyurethane Hose: 340; measured
- sand: 4; measured
- Concrete: 5; measured
- CO2 Welding, Laser Beam Welding, Flux-cored Arc Welding, Gas Metal Arc Welding: 100; measured
- Equipment and Materials Arriving on Site: 44800
  文中给出修复工程总的材料使用量为99.8吨，此处44.8吨为填报人根据经验估算得到的结果。SVE处理系统包括提取+油水分离器+尾气处理各部分。

## Use advice
在使用该SVE系统的LCA数据时，请确保根据描述中提及的输入输出流包含所有主要原材料和能源消耗。此数据集是为所描述的系统和用例量身定制的；应用规模、深度或额外流程的任何偏差都应单独计算。建模使用阶段行为时，考虑当地可用的技术和基础设施能力。方法学建议包括计算可能的材料回收，如聚氨酯软管、砂子和混凝土。确保遵循废气处理的技术适用性及系统应用地区特定的任何法规合规性。

## Review details
清单： 内部审查通过几个迭代步骤完成，涉及原始数据验证、原始数据记录、代表性、完整性、与 ISO 14040 和 14044 有关的建模的一致性。

## Data sources
- Jeong, S.-W. & Suh, S.-W. Assessment of Environmental Impacts and CO 2 Emissions from Soil Remediation Technologies using Life Cycle Assessment - Case Studies on SVE and Biopile Systems -. Journal of Korean Society of Environmental Engineers 33, 267–274 (2011).
