# 锂电池回收传统的火法冶金工艺（工艺 A）

Dataset: ILCD process, Unit process, single operation
Geography: CN
Reference year: 2013
Valid until: 2017
Classification: Unit processes / End-of-life treatment / Material recycling
Functional unit: FU is a typical type of LIB electrode material of 100 kg
Generated by: 马清源, m1120498928@163.com
Owner: 天工LCI数据工作小组
Review: Dependent internal review by 天工LCI数据工作小组
Amounts: no units in this file; such an amount is in the reference unit of its flow, which a separate flow dataset defines
copyright: false
licenseType: Free of charge for all users and uses

## General comment
对拆解的电极材料直接进行煅烧，温度通常 在 1200 oC 以上，高温可去除电极中的石墨以及隔膜等有机物，Fe、Mn、Ni、Co 等金属被熔炼成锰铁合金。

## Time period
数据来源于2013-2017

## Technical purpose
传统的火法冶金工艺（工艺A）是指将拆解的锂离子电池（LIB）电极材料直接煅烧的过程。该工艺涉及将材料加热至1200°C以上，以除去石墨和隔膜等有机成分，并从铁、锰、镍、钴等金属中产出锰铁合金。

## Reference product
- Electrolyte: 100; input; missing unimportant
  电极浆料

## Inputs
- water,water: 130; missing unimportant
- Raw coal: 49; missing unimportant
- Electricity: 33.12; missing unimportant

## Outputs
All rows: missing unimportant
- Al/Cu foil: 1.2
- Nickel salt: 1
  镍盐、金属
- Cobalt salt: 2
  钴盐、金属
- Alloy (Ni, Fe, Al, etc.): 36
- Slags: 17.9
- Metal Fumes: 7.11
- carbon dioxide (fossil): 147
  原文未区分bio和fossil，根据专家判断此处为fossil
- sulfur dioxide: 0.2
- Coke: 110

## Data selection and combination
工艺的投入产出来自文献综述所报道数据的平均结果，体现了“坟墓”到 “摇篮” 的代表性过程。本研究不考虑塑料及金属外壳的回收或处理，人工成本、 工厂建设费用及其对环境的影响亦不包括在此分析中。

## Data treatment and extrapolations
值得注意的是，欧盟的数据并非针对于某个行业的计算，部分进出口数据和回收信息不适合中国的 情况。因此，改进后的 CRMs 评价方法还结合了中国官方数据、文献报道和来自 贸易/行业协会等其它利益集团数据，对主要的 LIB 制造商、回收公司、中国的官方管理机构等利益相关方的数据进行了最佳估计。在数据的时效性方面，CRMs 评估中使用的数据的参考期是基于最近的 4 年平均值（即 2013 年-2016 年）。

## Use advice
使用该数据集的用户应注意所提供的投入产出信息是基于2013年至2017年特定时期文献综述的平均值。由于该过程是从'坟墓'到'摇篮'的代表性描述，它没有计算塑料或金属外壳等非金属元素的回收或处理。此外，工人和建筑费用以及由此产生的环境影响也不包括在内。为了适应中国的情况，该数据结合了来自中国官方和行业协会的数据，但由于市场和监管条件的不同，欧盟的数据可能并不完全适用。参考的功能单元（FU）是100千克典型锂离子电池（LIB）电极材料。

## Review details
清单： 内部审查通过几个迭代步骤完成，涉及原始数据验证、原始数据记录、代表性、完整性、与 ISO 14040 和 14044 有关的建模的一致性。

## Data sources
- 宋佳丽. 面向能源金属高效回收的资源关键性评价模型与应用. (天津大学, 2019).
