# 球团矿生产;球团矿;球团

Dataset: ILCD process, Unit process, single operation
Geography: CN
Classification: Unit processes / Materials production / Other mineralic materials
Generated by: 付翔, 1162850692@qq.com
Owner: 天工LCI数据工作小组
Review: Dependent internal review by 天工LCI数据工作小组
Amounts: no units in this file; such an amount is in the reference unit of its flow, which a separate flow dataset defines
copyright: false
licenseType: Free of charge for all users and uses

## General comment
该工业过程的技术用途涉及球团矿的生产，通常称为球团。这些球团用于直接还原（DR）过程中生产海绵铁，之后用于炼钢。所提供的数据集具体关系到基于煤炭的直接还原（Coal-DR）铁矿石球团的生命周期清单（LCI），并参考了焦炉气（COG-DR）和基于氢的直接还原（H-DR）路径，后两者在中国尚未扩大。

## Geography
The LCI of Coal-DR is obtained, as shown in Table 9, based on the statistics of the demonstration project in China.

## Reference product
- Pellet: 1394.1; calculated

## Inputs
All rows: calculated
- Iron ore: 1505.6
  Iron ore (Import)
- dolomite: 14.2
- quicklime: 2.2
  Quicklime
- freshwater,freshwater: 200
- Circulating water: 700
- bentonite: 22.6
- Raw coal: 44.9
- Electricity: 129.24

## Outputs
- particles (> PM10): 0.3; calculated

## Data treatment and extrapolations
LCI of COG-DR and H-DR routes, which is not scaled-up in China are estimated based on Coal-DR routes combined with literature data from simulations, laboratory tests, and process modeling in Table 9 [49,50]. The LCI of Coal-DR is obtai

## Use advice
使用这项LCA数据的用户应考虑到Coal-DR的生命周期清单是基于中国示范项目的统计数据。对于COG-DR和H-DR的LCI数据估计，用户应注意，这些数据是根据Coal-DR路线派生的，但根据参考文献中的模拟、实验室测试和过程建模进行了调整。由于这些过程在中国还没有完全扩大，因此在将这些数据应用于不同地理环境或扩大的工业情景时应小心谨慎。强烈推荐在不同技术适用性场景中应用时，与其他数据集或更新的信息进行交叉检查。

## Review details
清单： 内部审查通过几个迭代步骤完成，涉及原始数据验证、原始数据记录、代表性、完整性、与 ISO 14040 和 14044 有关的建模的一致性。

## Data sources
- The carbon reduction potential of hydrogen in the low carbon transition of the iron and steel industry: The case of China
