# 再生铜生产;精炼铜;NerinGutai-Lu（NGL）废铜精炼技术;废铜

Dataset: ILCD process, Unit process, single operation
Geography: JX-CN
Reference year: 2022
Classification: Unit processes / Materials production / Metals and semimetals
Functional unit: the production of 1 ton of refined copper is taken as the functional unit.
LCI method principle: Attributional
LCI method approaches: Allocation - market value
Generated by: 王鹏, 2867919560@qq.com
Owner: 天工LCI数据工作小组
Review: Dependent internal review by 天工LCI数据工作小组
Amounts: no units in this file; such an amount is in the reference unit of its flow, which a separate flow dataset defines
copyright: false
licenseType: Free of charge for all users and uses

## General comment
通过NerinGutai-Lu（NGL）废铜精炼技术生产的精炼铜，在要求高纯度铜的应用中被使用，如电气组件、建筑以及各种工业过程。该技术回收铜废料，将其转化为更纯净的铜形式，适用于生产高导电性电缆、铜棒和管以及电子产品组件。

## Geography
精炼铜生命周期清单（LCI）数据来源于对中国安徽省和江西省多家铜生产企业的现场调查和年度监测报告。

## Technology and included processes
该技术的关键工序包括废铜的分级压缩、废铜的顶吹吹炼、粗铜的“NGL”精炼和铸造、阳极铜的电解。

## Reference product
- Refined copper: 1000; measured
  refined copper需要补充

## Inputs
- Copper scrap（Cu 95%）,Copper scrap（Cu 95%）: 1200; measured
  Copper scrap需要补充
- quartz sand: 40.2; software or database
  Quartz sand
- Quicklime: 0; software or database
  Quick lime需要补充
- freshwater,freshwater: 2.93; software or database
  Fresh water需要补充
- Limestone: 20.1; software or database
- Hydrochloric acid: 0.151; software or database
  Hydrochloric acid需要补充
- Sulfuric acid(98%): 5.21; software or database
  Sulfuric acid需要补充resourse
- Gelatin: 0.045; software or database
  Gelatin需要补充
- Thiourea: 0.075; software or database
  Thiourea需要补充resourse
- barium sulfate: 60.3; software or database
  Barium sulfate
- natural gas,natural gas,natural gas: 115; software or database
  Natural gas
- Electricity: 3121.2; measured

## Outputs
All rows: software or database
- chemical oxygen demand: 0.036
  COD需要补充
- ammonium: 0.00573
  Ammonia nitrogen需要补充
- sulfur dioxide: 0.0637
  Sulfur dioxide
- nitrous oxide: 0.296
  Nitrogen oxide
- particles (PM2.5 - PM10): 0.0603
- lead: 0.00195
  Lead
- mercury: 0
  Mercury
- arsenic: 0.000219
  Arsenic
- cadmium: 1.92e-5
  Cadmium
- chromium: 2.17e-5
  Chromium
- fluorine: 0
  Fluoride

## Deviations from the LCI method approaches
鉴于ReCiPe模型应用广泛，本研究选择LCIA模型。

## Data selection and combination
精炼铜数据来源于中国安徽省和江西省的多家铜生产企业的现场调查和年度监测报告。本次LCA分析的其他材料生产数据来源于Eco-invent数据库。

## Use advice
使用精炼铜的生命周期库存（LCI）数据时，确保清晰定义系统边界，特别是如果与其他数据集整合时。在使用数据时，必须考虑数据的地理特异性（中国安徽省和江西省），因为在其他地区环境影响可能有所不同。在考虑回收场景时，确保使用适当的产品末尾阶段建模。如果采用ReCiPe模型进行生命周期影响评估（LCIA），请考虑该方法的区域化特征因子以获得更准确的影响评估。

## Review details
清单： 内部审查通过几个迭代步骤完成，涉及原始数据验证、原始数据记录、代表性、完整性、与 ISO 14040 和 14044 有关的建模的一致性。

## Data sources
- Zhang, J., Tian, X., Chen, W., Geng, Y. & Wilson, J. Measuring environmental impacts from primary and secondary copper production under the upgraded technologies in key Chinese enterprises. Environmental Impact Assessment Review 96, 106855 (2022).
