# 废纸浆造纸;箱纸板

Dataset: ILCD process, Unit process, black box
Geography: CN
Classification: Unit processes / Materials production / Paper and cardboards
Functional unit: In this study, 1000 kg of cardboard product was selected as the functional unit.
LCI method principle: Attributional
Generated by: 高逸翔, 22210740040@m.fudan.edu.cn
Owner: 天工LCI数据工作小组
Review: Dependent internal review by 天工LCI数据工作小组
Amounts: no units in this file; such an amount is in the reference unit of its flow, which a separate flow dataset defines
copyright: false
licenseType: Free of charge for all users and uses

## General comment
箱纸板生命周期从废纸的收集开始，经过废纸制 浆、箱纸板的抄造、复卷、包装入库，直至送到用户 或经销商，同时还包含能源生产、化学品生产、运输 等单元过程。由于箱纸板产品是下游企业生产产品的 原料，形成产品后已改变了箱纸板的属性，产品的使 用和使用后废弃物的处理不在本研究的系统边界内， 即为 “摇篮-到-大门” 的方法。其中燃料开采、交通 工具、基础设施的生产不在本研究范围内。

## Technology and included processes
废纸在收集、分类过程中需进行运输、分拣、打包等过程，会产生 GHG 排放。

## Technical purpose
该工艺涉及从废纸收集开始的再生纸箱纸板生产过程。再生纸箱纸板的生命周期包括废纸制浆、纸板制造、复卷、包装及入库等阶段。产品交付给用户或分销商后，作为下游制造行业的原料，从而改变了纸箱纸板的性质。纸箱纸板广泛应用于各种行业的箱体和包装材料生产。本数据集特别涵盖了“摇篮到大门”的情景，包括所有准备好发运给消费者之前的阶段，但不包括产品的使用和产品寿命终结处理。研究中不包括燃料的开采、车辆的生产和基础设施的建设。本数据集中的单元过程评估可以为中国造纸行业的碳核算和减排提供指导。

## Reference product
- Cardboard: 1000; measured
  箱纸板

## Outputs
All rows: calculated
- Greenhouse Gases: 139.9
  GHG（废纸收集阶段）
- Greenhouse Gases: 345.3
  GHG（制浆阶段）
- Greenhouse Gases: 1111.6
  GHG（抄纸阶段）
- Greenhouse Gases: 20.2
  GHG（废渣抄纸阶段）
- Greenhouse Gases: 130.7
  GHG（运输阶段）
- Greenhouse Gases: 50.9
  GHG（废水处理阶段）

## Deviations from the LCI method approaches
根据企业调研情况，所用废纸来源于美国、欧洲及国内，因此不同运输方式产生的排放根据废纸来源地的用量及运输方式进行分配。2.生产过程中，蒸汽、 电力等能源消耗的分配依据产品产量进行分配; 对能源生产过程中所排放的污染物的分配，根据各单元过程的能源消耗量进行分配。

## Data selection and combination
本研究采集了箱纸板工厂 一年的活动数据，并进行分析、筛选，计算得到生产每吨箱纸板的输入、输出数据。数据计算过程中，由于某些原因，如某个过程不在组织控制、数据调研成本过高等原因导致初级活动水平数据无法获取。对于无法获取初级活动水平数据的情况，寻求次级水平数据予以填补。本研究中次级活动数据主要来源有ecoinvent 数据库和文献资料中的数据。

## Use advice
在使用这些数据进行生命周期评估时，需要特别注意系统边界和排除事项，例如不考虑设备和建筑相关的生产与维护过程。数据集侧重于定义边界内的纸箱纸板生产，并排除了消费后使用和废物处理。需要计入与废纸收集、分类和打包相关的温室气体排放。运输过程中排放分配的方法应反映不同来源地废纸的用量和运输方式。生产过程中蒸汽和电力的使用也应根据产量适当分配。由于初级活动数据缺失，已使用来自 ecoinvent 数据库和文献资料的次级数据填补。研究设定的删减规则是对于单一排放源占排放总量不到 1% 的不予考虑，被省略的排放源总比例不得超过产品碳足迹的 5%。为了符合 PAS 2050 标准，资产性商品生产所产生的排放不应计入产品生命周期内的温室气体排放。研究选定的功能单位是 1000 公斤的纸箱纸板产品。

## Review details
清单： 内部审查通过几个迭代步骤完成，涉及原始数据验证、原始数据记录、代表性、完整性、与 ISO 14040 和 14044 有关的建模的一致性。

## Data sources
- 张清文 & 陈曦. 100%OCC生产的箱纸板碳足迹评价. 中国造纸 34, 20–24 (2015).
