# 水泥生产;水泥, 普通硅酸盐水泥, 42.5MPa;新型干法;混合固废

Dataset: ILCD process, Unit process, black box
Geography: HLJ-CN
Reference year: 2008
Classification: Materials production / Other mineralic materials
Generated by: 杨思琪, ysqsophia@gmail.com
Owner: 天工LCI数据工作小组
Review: Dependent internal review by 天工LCI数据工作小组
Amounts: no units in this file; such an amount is in the reference unit of its flow, which a separate flow dataset defines
copyright: false
licenseType: Free of charge for all users and uses

## General comment
实验室数据。电石渣替代石灰石生产水泥。生料中电石渣配比30%。应用黑龙江乙炔化工行业所产生的电石渣烧制水泥。采用合肥水泥研究设计院开发了预烘干干磨干烧工艺，该工艺是目前较为先进的利用电石渣生产水泥的新型干法工艺。该工艺可使电石渣在生料配比提高到60%以上，石灰石替代率达80%以上，并且较为稳定的配料提高了电石渣入磨的稳定性。

## Technology and included processes
我国利用电石渣生产水泥熟料始于 20 世纪 70 年代，当时主要采用传统湿法窑生产[5]。随后，逐渐出现半湿法工艺、湿磨干烧工艺及直接入磨干磨干烧工艺[57]。由于上述工艺存在电石渣掺量(或石灰石替代率)低、生产负荷大、能耗高等缺点，即使在一定程度上节约了不可再生石灰石资源，水泥生产造成的总体环境负荷仍然处于较高的水平，而这对水泥工业的可持续发展是不利的。随着水泥生产工艺的技术进步和对电石渣研究的深入，利用电石渣生产水泥熟料的工艺也在不断进步。2005 年，合肥水泥研究设计院开发了预烘干干磨干烧工艺，该工艺是目前较为先进的利用电石渣生产水泥的新型干法工艺[58].该工艺可使电石渣在生料配比提高到 60%以上，石灰石替代率达 80%以上，并且较为稳定的配料提高了电石渣入磨的稳定性。本节选取上述工艺，应用黑龙江乙快化工行业所产生的电石渣烧制水泥，以改善黑龙江水泥工业环境协调性，促进水泥工业可持续发展。预烘干干磨干烧工艺流程如图 5-1 所示。

## Technical purpose
该数据集描述了使用新型干法工艺生产28天抗压强度为42.5MPa的普通硅酸盐水泥的过程。该过程中混合固废，特别是黑龙江乙炔化工行业产生的电石渣，作为石灰石替代品。合肥水泥研究设计院开发的这种新工艺可以使原料中的电石渣比例超过60%，替代超过80%的石灰石，从而在水泥工业中促进环境可持续性。该水泥适用于需要高强度建材的建筑项目。

## Model description
以1kg28天抗压强度为42.5MPa的水泥所具有的使用性能作为功能单位，即1Fu=42.5kgMPa。评价范围为生料准备、熟料煅烧和水泥制备。粘土类资源消耗造成的环境负荷暂不考虑。铁粉属于铁质校正材料，其引发的环境影响不予考虑。产品系统输出端考虑排放的废弃物主要包括氮氧化物、二氧化硫、二氧化碳及粉尘。

## Reference product
- cement, ordinary portland cement, 42.5MPa: 1000
  42.5普通硅酸盐水泥

## Inputs
- limestone, crushed, for mill: 588.5
  石灰石
- Carbide slag: 349.1
  电石渣。生料中电石渣配比30%。
- gypsum stone (CaSO4-dihydrate): 51.3
  石膏。
- ash: 98.7
  粉煤灰
- hard coal: 125.927
  标准煤。原始数据为0.117kg标准煤，这里换算为硬煤，换算公式为1kg硬煤=0.929kg标准煤。
- electricity, medium voltage: 388.8
  电力

## Outputs
- particles (> PM10): 0.324
  粉尘，未标明粒径，按PM>10处理。
- sulfur dioxide: 0.3893
  二氧化硫
- Nitrogen oxides: 1.557
  氮氧化物
- carbon dioxide: 597.9
  二氧化碳（kg）。

## Use advice
使用此数据集的用户应将其具体应用于使用电石渣替代方法生产的普通硅酸盐水泥相关的场景。在与传统水泥生产过程比较时，需要考虑石灰石稳定性的增强和替代率的提高。环境影响的考量应聚焦于石灰石采集减少和可能的排放特性变化，包括评估氮氧化物、二氧化硫、二氧化碳及粉尘排放。此数据不适用于不使用电石渣的工艺，或者在不考虑新型干法独特特性的场景中。

## Review details
清单： 内部审查通过几个迭代步骤完成，涉及原始数据验证、原始数据记录、代表性、完整性、与 ISO 14040 和 14044 有关的建模的一致性。

## Data sources
- 于淼. (2008). 黑龙江水泥工业可持续发展研究 [硕士, 哈尔滨工业大学].
