# 废旧LFP电池火法冶金术

Dataset: ILCD process, Unit process, single operation
Geography: CN
Reference year: 2018
Classification: Unit processes / End-of-life treatment / Material recycling
Functional unit: using 1 kWh as the functionalunit
Generated by: 彭菲, pengfei24@email.ncu.edu.cn
Owner: 天工LCI数据工作小组
Review: Dependent internal review by 天工LCI数据工作小组
Amounts: no units in this file; such an amount is in the reference unit of its flow, which a separate flow dataset defines
copyright: false
licenseType: Free of charge for all users and uses

## General comment
首先将完全放电的EoL LFP电池拆解和破碎。然后，电池材料通过1400℃高温冶炼（或称为烧结）过程进行处理。接着进行酸浸，溶剂萃取。最后氧化并进行900℃焙烧得到LiCoO2

## Technology and included processes
通过煅烧去除有机粘结剂，使磷酸铁锂粉末与铝箔片分离，获得磷酸铁锂材料，之后再在其中加入适量原料，以得到所需的锂、铁、磷的摩尔比，经高温固相法合成新的磷酸铁锂。

## Technical purpose
所描述的火法冶金工艺用于回收使用寿命结束的磷酸铁锂（LFP）电池。该程序包括拆卸、破碎、1400℃高温烧结、酸浸、溶剂萃取，以及最终在900℃下焙烧步骤，目的在于回收宝贵材料，尤其是以锂钴氧化物（LiCoO2）形式的锂和钴。所回收的化合物对于制造新电池或需要使用这些材料的其他应用至关重要。

## Reference product
- EoL LFP battery: 3.6; input; software or database

## Inputs
All rows: software or database
- Limestone: 1.36
  石灰石、砾石、生产混合物、EU-28
- Sulphuric acid: 4.39
  硫酸，生产混合物、EU-28
- sodium hydroxide: 3
  氢氧化钠，生产混合物、EU-28
- hydrogen peroxide: 0.25
  过氧化氢
- Electricity: 0.074
- natural gas: 6.84

## Outputs
- Carbon dioxide (fossil): 10.32; software or database
  原文未区分bio和fossil，根据专家判断此处为fossil
- copper: 0.98; software or database
- iron: 0.91; software or database
- aluminium: 0.14; software or database

## Data selection and combination
数据来自多篇论文，难以区分。

## Use advice
在使用该数据集进行所述火法冶金回收工艺的生命周期评估时，确保功能单元与1 kWh电池容量一致。必须将这些数据与其他回收处理过程区分开，需要注意的是，提供的信息来源于多篇论文。应关注方法论的一致性，如系统边界、回收过程效率的假设、能量投入以及回收步骤中的排放。用户必须确保技术适用性与类似的电池使用寿命结束处理相兼容，且能代表实际的回收实践。

## Review details
清单： 内部审查通过几个迭代步骤完成，涉及原始数据验证、原始数据记录、代表性、完整性、与 ISO 14040 和 14044 有关的建模的一致性。

## Data sources
- Wang, Y. et al. Environmental impact assessment of second life and recycling for LiFePO4 power batteries in China. Journal of Environmental Management 314, 115083 (2022).
