# 生物基乙烯生产; 乙烯; 生物乙醇制乙烯路线（BETE）; 玉米秸秆

Dataset: ILCD process, Unit process, black box
Geography: AH-CN
Classification: Energy carriers and technologies / Renewable fuels
Functional unit: The functional unit was defined as one metric ton of ethylene product in 99.9% purity.
LCI method principle: Attributional
LCI method approaches: Allocation - mass
Generated by: 唐子睿, tangzirui123@gmail.com
Owner: 天工LCI数据工作小组
Review: Dependent internal review by 天工LCI数据工作小组
Amounts: no units in this file; such an amount is in the reference unit of its flow, which a separate flow dataset defines
copyright: false
licenseType: Free of charge for all users and uses

## General comment
工艺过程包括乙醇发酵以及乙醇脱水和加压制备乙烯。

## Geography
BETE路线的案例工厂选自安徽省一家建于2005年的玉米秸秆乙醇生产工厂。

## Technology and included processes
首先，通过生物发酵技术处理玉米秸秆或玉米粒来生产乙醇。 随后乙醇脱水生成乙烯，其中生物乙醇通过蒸馏和脱水装置进行加工。 最后经急冷加压生产烯烃，生产乙烯产品。

## Technical purpose
该生物基乙烯生产过程旨在制造高纯度乙烯，主要用作各种塑料、弹性体和其他有机化学品的原料。使用玉米秸秆的生物乙醇到乙烯路线（BETE）衍生的乙烯可服务于与化石基乙烯相似的市场，通过利用生物质可能降低环境影响。

## Reference product
- ethene (ethylene): 1000; article inperiodical

## Inputs
All rows: article inperiodical
- sodium hydroxide: 0.6
- Corn: 3110
- Liquefaction enzymes: 0.00162
- Glycolytic enzymes: 0.0024
- Yeast: 0.1
- tall oil,sulphuric acid: 1.5
- calcium chloride: 0.5
- Ethanol: 1710
- Light fuel oil: 85
  Fuel oil
- process steam: 1200
  Medium pressure steam
- process steam: 3400
  Low pressure steam
- Electricity: 2026.8
- water: 7800
  Desalted water

## Outputs
- carbon dioxide: 300.8; article inperiodical

## Deviations from the LCI method approaches
采用质量法在乙烯和丙烯副产品之间分配量化的环境负荷。

## Data selection and combination
本文从公开的化工企业官方环评报告中获取了4条乙烯路线的真实前景数据。还回顾了文献和公司研究数据作为补充。 乙烯生产路线生命周期模型的原料（玉米秸秆）和能源（电力、工业用水、蒸汽）背景数据来自 CLCD 和 Ecoinvent 数据库。

## Data treatment and extrapolations
对于BETE路线中生产乙醇的原料，玉米产量库存与Ecoinvent数据库相关联，以代表中国市场的平均状况。

## Use advice
为确保使用该数据集进行准确的环境影响评估，用户在基于质量分配方法对系统建模时，应包括乙烯和丙烯共产环境负荷的分配。背景数据应来源于 CLCD 和 Ecoinvent 数据库，了解这些数据代表中国市场上玉米生产的平均状况。此外，应根据特定区域背景核实有关电力、工业用水和蒸汽等能源输入的假设。

## Review details
清单： 内部审查通过几个迭代步骤完成，涉及原始数据验证、原始数据记录、代表性、完整性、与 ISO 14040 和 14044 有关的建模的一致性。

## Data sources
- Qian, H., Zhao, Y., Qin, F. & Song, G. Life-cycle environmental burdens of ethylene production in the context of China’s chemical feedstock transition from naphtha to coal and shale gas by-product of ethane. Environmental Impact Assessment Review 101, 107152 (2023).
