# 电力生产 ; 火电 ; 山西

Dataset: ILCD process, Unit process, single operation
Geography: SX-CN
Reference year: 2019
Classification: Unit processes / Energy carriers and technologies / Electricity
Generated by: 熊若熙, xiongrx0126@163.com
Owner: 天工LCI数据工作小组
Review: Dependent internal review by 天工LCI数据工作小组
Amounts: no units in this file; such an amount is in the reference unit of its flow, which a separate flow dataset defines
copyright: false
licenseType: Free of charge for all users and uses

## General comment
火电发电包括原煤、洗煤、石油、天然气等十七种化石燃料。该过程只考虑直接发电过程，不考虑上游原材料开采加工和下游消费

## Time period
根据2019年能源统计年鉴数据计算

## Technical purpose
该数据集代表山西省的火电发电过程，该过程使用包括原煤、洗煤、石油和天然气在内的各种化石燃料。这一过程专注于直接发电，主要用于区域电力供给以及可能的国家电网整合。它主要适用于需要立即分配和消费所产生的电力的上下文环境，而不深入到燃料提取、加工或最终用户消费所生成电力的生命周期阶段。

## Reference product
- electricity for thermal power: 3.6; calculated

## Inputs
All rows: calculated
- Raw coal: 0.386859
- Other Washed Coal: 0.0885188
- Gangue, in ground: 0.0250331
- Coke oven gas: 0.010858
- blast furnace gas: 0.045309
- Converter gas: 0.003996
- Diesel: 2.286e-5
- fuel oil, unspecified: 8.19e-6
- natural gas: 0.007473

## Outputs
- carbon dioxide (fossil): 0.864; calculated
- sulfur dioxide: 0.000166; calculated
- Nitrogen oxides: 0.000264; calculated
- particles (> PM10): 3.3e-5; calculated

## Data treatment and extrapolations
核算方法参考《企业温室气体排放核算方法与报告指南 发电设施》。不同形式发电量及燃料用量来自于《中国能源统计年鉴 2020》中的第三章（能源生产） 和第六章（地区能源平衡表）。用于计算二氧化碳排放因子的低位发热量、单位热值含碳量等燃料参数来自于《2019 年度中国区域电网二氧化碳基准线排放因子 OM 计算说明》、《企业温室气体排放核算方法与报告指南 发电设施》

## Use advice
用户在使用这个数据集时应注意，它仅涵盖山西省特定化石燃料所列出直接电力发电阶段。评估时必须排除电力生命周期的上游和下游阶段，如原材料开采、加工以及终端用户的电力消费。为了方法论上的一致性，用户应参考《企业温室气体排放核算方法与报告指南 发电设施》的指导方针和《中国能源统计年鉴 2020》的相关章节以确保火电发电排放的准确呈现。需严格遵守所提供的地区二氧化碳基准排放因子和其他燃料参数，以确保在计算环境影响及进行全面的生命周期评估时的可靠性。

## Review details
清单： 内部审查通过几个迭代步骤完成，涉及原始数据验证、原始数据记录、代表性、完整性、与 ISO 14040 和 14044 有关的建模的一致性。

## Data sources
- 熊若熙. 中国电力生产和消费二氧化碳与污染物排放因子核算. (清华大学, 2023).
