# 电力生产 ; 火电 ; 四川

Dataset: ILCD process, Unit process, single operation
Geography: SC-CN
Reference year: 2019
Classification: Unit processes / Energy carriers and technologies / Electricity
Generated by: 熊若熙, xiongrx0126@163.com
Owner: 天工LCI数据工作小组
Review: Dependent internal review by 天工LCI数据工作小组
Amounts: no units in this file; such an amount is in the reference unit of its flow, which a separate flow dataset defines
copyright: false
licenseType: Free of charge for all users and uses

## General comment
火电发电包括原煤、洗煤、石油、天然气等十七种化石燃料。该过程只考虑直接发电过程，不考虑上游原材料开采加工和下游消费

## Time period
根据2019年能源统计年鉴数据计算

## Technical purpose
此数据集适用于中国四川火电行业的参与者。它详细介绍了使用原煤、洗煤、石油、天然气等多种化石燃料进行的发电过程。数据专注于直接发电过程，不包括原材料提取和加工或电能终端使用的环境影响。

## Reference product
- electricity for thermal power: 3.6; calculated

## Inputs
All rows: calculated
- Raw coal: 0.342546
- Other Washed Coal: 0.00429093
- Gangue, in ground: 0.0270706
- Coke oven gas: 0.015609
- blast furnace gas: 0.217131
- Converter gas: 0.025865
- Diesel: 0.00013332
- fuel oil, unspecified: 0.00033433
- refinery gas: 0.00035074
- natural gas: 0.010584

## Outputs
- carbon dioxide (fossil): 0.913778; calculated
- sulfur dioxide: 0.000146293; calculated
- Nitrogen oxides: 0.000241552; calculated
- particles (> PM10): 3.3639e-5; calculated

## Data treatment and extrapolations
核算方法参考《企业温室气体排放核算方法与报告指南 发电设施》。不同形式发电量及燃料用量来自于《中国能源统计年鉴 2020》中的第三章（能源生产） 和第六章（地区能源平衡表）。用于计算二氧化碳排放因子的低位发热量、单位热值含碳量等燃料参数来自于《2019 年度中国区域电网二氧化碳基准线排放因子 OM 计算说明》、《企业温室气体排放核算方法与报告指南 发电设施》

## Use advice
在使用此数据集进行生命周期评估或其他环境影响研究时，用户应仔细考虑数据集的边界，它仅包括电力的直接生成。排除了上游和下游过程的影响。为确保方法论的一致性，用户应参考《企业温室气体排放核算方法与报告指南 发电设施》，《中国能源统计年鉴 2020》以及《2019 年度中国区域电网二氧化碳基准线排放因子 OM 计算说明》。

## Review details
清单： 内部审查通过几个迭代步骤完成，涉及原始数据验证、原始数据记录、代表性、完整性、与 ISO 14040 和 14044 有关的建模的一致性。

## Data sources
- 熊若熙. 中国电力生产和消费二氧化碳与污染物排放因子核算. (清华大学, 2023).
