# 光伏组件制造 ; 光伏组件 ; 集成方法

Dataset: ILCD process, Unit process, single operation
Geography: SC-CN
Reference year: 2013
Classification: Unit processes / Systems / Other machines
Functional unit: 1 kg solar grade multi-Si
LCI method principle: Attributional
LCI method approaches: Allocation
Generated by: 杨锦锋, yjfzfshn@163.com
Owner: 天工LCI数据工作小组
Review: Dependent internal review by 天工LCI数据工作小组
Amounts: no units in this file; such an amount is in the reference unit of its flow, which a separate flow dataset defines
copyright: false
licenseType: Free of charge for all users and uses

## General comment
多晶硅

## Geography
四川某太阳能电池组件生产企业

## Time period
文章发表

## Technology and included processes
用特殊导线焊接串并联后，模压封装在高透射率钢化玻璃上，进而形成太阳能电池组件产品

## Technical purpose
该过程描述了太阳能组件的生产过程，具体是通过使用特殊导线以串联和并联的方式焊接多晶硅(Multi-Si)电池，并将其模压封装于高透射率钢化玻璃之上，从而制成太阳能电池模块。这些组件是生产用于将太阳能转化为电能的太阳能电板的关键部分。这些面板通常用于住宅和商业太阳能发电系统。

## Reference product
- Solar Module,Solar Module,Solar Module: 1e6; measured
  太阳能电池组件（MW）

## Inputs
All rows: measured
- Multi-Si solar cell,Multi-Si solar cell,Multi-Si solar cell: 5808
  太阳能电池片
- Electricity: 22320
  电耗
- freshwater: 348610
  新鲜水
- Glass: 60
  玻璃
- TPT film: 430
  TPT背板
- Ethylene-vinyl acetate copolymer,Ethylene-vinyl acetate copolymer,Ethylene-vinyl acetate copolymer: 30
  EVA膜
- Organic Silicone: 40
  有机硅胶
- aluminium: 10
  铝框

## Outputs
- volatile organic compound: 3.24; measured
  TVOC
- Welding Fumes: 1.04; measured
  焊接烟气
- industrial waste (unspecified): 132; measured
  固体废弃物

## Deviations from the LCI method approaches
以太阳能级多晶硅为研究对象，运用 LCA的评价方法，定量计算国内普遍生产水平下，太阳能级多晶硅生命周期过程的资源、能源投入和环境排放值

## Data selection and combination
根据四川某太阳能电池组件生产企业生产过程的数据资料收集整理

## Use advice
在使用太阳能级多晶硅生产的LCA数据时，考虑包括从摇篮到大门评估的特定方法，重点是能源和资源输入，以及与一般国内生产环境相关的生产过程的环境排放。在材料采购、组装过程效率和潜在排放方面应给予方法论上的关注。此外，用户应考虑与该地区相关的技术适应性，并考虑四川特定采用的生产技术。为了做出全面评估，应将此数据集与其他有关太阳能模块整个生命周期的数据集（包括使用阶段和生命周期终端情景）相匹配。

## Review details
清单： 内部审查通过几个迭代步骤完成，涉及原始数据验证、原始数据记录、代表性、完整性、与 ISO 14040 和 14044 有关的建模的一致性。

## Data sources
- 何洋. 太阳能级多晶硅的生命周期评价. (西南交通大学, 2013).
