# 高密度聚乙烯（HDPE）生产;高密度聚乙烯

Dataset: ILCD process, Unit process, black box
Geography: CN
Reference year: 2020
Classification: Unit processes / Materials production / Plastics
Functional unit: considering 1 kg resin production as the functional unit.
Generated by: 郭慧娟, GHJ@email.ncu.edu.cn
Owner: 天工LCI数据工作小组
Review: Dependent internal review by 天工LCI数据工作小组
Amounts: no units in this file; such an amount is in the reference unit of its flow, which a separate flow dataset defines
copyright: false
licenseType: Free of charge for all users and uses

## General comment
通过前期原油精炼得到乙烯和丙烯，然后分别聚合成PE和PP。对于PE，根据不同的聚合方法得到了HDPE和LDPE

## Geography
Process-based data from China were used, yet if not available, data from Europe were applied instead.

## Time period
Process-based data from China were used, yet if not available, data from Europe were applied instead. The electricity input was developed based on the national grid structure in China (Table S3), which was obtained from the share of the electric power structure in 2020 (National Bureau Statistics of China, 2020).

## Technical purpose
高密度聚乙烯（HDPE）用途广泛，包括塑料瓶、耐腐蚀管道、土工膜和塑料木材的生产。这种原材料对于需要更高拉伸强度和刚性的产品至关重要，例如坚固的容器和耐用的家庭用品。

## Model description
life cycle environmental and human health impacts were modeled using SimaPro software (version 8.5) with Ecoinvent 3 and ELCD (European Reference Life Cycle Database) databases.

## Reference product
- polyethylene high density granulate (PE-HD): 1; missing unimportant

## Inputs
- ethylene: 1.02; missing unimportant
- naphtha: 0.075; missing unimportant
- Hydrogen: 0.11; missing unimportant
- Electricity: 1.5; missing unimportant

## Outputs
All rows: missing unimportant
- carbon dioxide (fossil): 2.35
  原文未区分bio和fossil，根据专家判断此处为fossil
- carbon monoxide (fossil): 1.76
  原文未区分bio和fossil，根据专家判断此处为fossil
- hydrocarbons (unspecified): 0.33
- Nitrogen oxides: 0.32
- ethane: 0.016
- toluene: 9e-9
- benzene: 6.5e-7
- phenol: 2e-9
- Waste (unspecified): 1.27
- Suspended substances: 0.33

## Data treatment and extrapolations
ReCiPe method (Europe H/H) was used as the assessment method for consistency.

## Use advice
使用高密度聚乙烯生产生命周期评估数据时，确保通过考虑基于中国国家电网结构的电力输入数字为中国来源数据或适用的欧洲数据来保持技术边界的一致性。如果设定不同的地理边界，仔细地包括正确的电力组合。应用ReCiPe方法（欧洲H/H）以保持评估方法的一致性。在计算环境和人类健康影响时，依赖于来自Ecoinvent 3和ELCD数据库等可靠来源的生命周期清单模型，并使用SimaPro软件或等效的LCA软件。

## Review details
清单： 内部审查通过几个迭代步骤完成，涉及原始数据验证、原始数据记录、代表性、完整性、与 ISO 14040 和 14044 有关的建模的一致性。

## Data sources
- An, J., Wu, F., Wang, D. & You, J. Estimated material metabolism and life cycle greenhouse gas emission of major plastics in China: A commercial sector-scale perspective. Resources, Conservation and Recycling 180, (2022).
