# 玻璃生产 ;钢化玻璃;磨边

Dataset: ILCD process, Unit process, single operation
Geography: KM-YN-CN
Reference year: 2015
Valid until: 2023
Classification: Unit processes / Materials production / Glass and ceramics
Generated by: 和夏夏, 18616148319@163.com
Owner: 天工LCI数据工作小组
Review: Dependent internal review by 天工LCI数据工作小组
Amounts: no units in this file; such an amount is in the reference unit of its flow, which a separate flow dataset defines
copyright: false
licenseType: Free of charge for all users and uses

## General comment
该数据描述了钢化玻璃的生产过程，重点关注磨边操作。这种玻璃通常用于需要比标准玻璃更高强度和热阻性的应用。常见用途包括汽车窗户、淋浴门、建筑玻璃门和面板，以及部分智能手机屏幕。

## Time period
至今

## Reference product
- Glass (formed & finished): 303000; measured

## Inputs
- Electricity: 272881; measured
- Glass (formed & finished): 303202; measured

## Outputs
- Waste (solid): 201.5; measured

## Use advice
使用此数据集的用户应注意所描述的钢化玻璃生产过程的具体条件和范围。考虑将这个数据集用于特定于玻璃处理类型和阶段的环境影响评估。系统边界、分配方法和终生处理等方法论考虑应仔细考虑，以确保准确的生命周期评估(LCA)结果。

## Review details
清单： 内部审查通过几个迭代步骤完成，涉及原始数据验证、原始数据记录、代表性、完整性、与 ISO 14040 和 14044 有关的建模的一致性。

## Data sources
- 建设项目环境影响报告表（国环评证乙字 第 2501 号）
