# 铜渣回收;水泥;电炉处理后生产水泥;铜渣

Dataset: ILCD process, Unit process, single operation
Geography: CN
Reference year: 2010
Classification: Unit processes / Materials production / Inorganic chemicals
Functional unit: The functional unit was defined as the recycling of 1 ton of copper slag from copper smelting process.
LCI method principle: Attributional
LCI method approaches: Substitution
Generated by: 王鹏, 2867919560@qq.com
Owner: 天工LCI数据工作小组
Review: Dependent internal review by 天工LCI数据工作小组
Amounts: no units in this file; such an amount is in the reference unit of its flow, which a separate flow dataset defines
copyright: false
licenseType: Free of charge for all users and uses

## General comment
此数据集代表了中国领先的铜业公司的四种铜渣回收方案，应用于建筑材料行业。具体用于评估在不同处理过程中铜渣作为原材料或添加剂的水泥和未烧造砖生产的环境影响，这些处理过程包括直接使用、电炉处理和浮选。

## Geography
中国领先的铜业公司。

## Time period
摘自相关公司2010年内部报告。

## Technology and included processes
根据技术可用性，开发了四种铜渣回收方案：（1）直接生产水泥，（2）电炉处理后生产水泥，（3）浮选后生产水泥，（4）生产不烧砖浮选后。

## Reference product
- Refined copper: 1000; measured

## Inputs
- hard coal,hard coal,hard coal: 1648.3; measured
  Hard coal
- crude oil; 42.3 MJ/kg: 46.6; measured
  Crude oil
- natural gas; 44.1 MJ/kg: 38.2; measured
  Natural gas
- Limestone: 6567.7; measured
- clay: 1315.1; measured
  Clay
- gypsum: 400.9; measured
  Gypsum
- Scrap: 1000

## Outputs
All rows: measured
- carbon dioxide (fossil): 5265.9
  CO2
- carbon monoxide,carbon monoxide (fossil): 3.5
  CO
- sulfur dioxide: 19.2
  SO2
- hard coal,hard coal,hard coal: 17
  NOx需要补充
- particles (PM2.5 - PM10): 23.3
  Dust需要补充

## Deviations from the LCI method approaches
在分配程序之后，使用避免负担方法进行表征、归一化和加权。

## Data selection and combination
铜渣处理数据主要来源于国内某铜业龙头企业。水泥和砖的生产数据大部分来自采用先进设备和工艺的真实工厂，并辅以公开发表的文献。

## Data treatment and extrapolations
本研究中使用 GaBi 4 软件对铜回收系统进行建模并确定对环境的影响。采用生态指标99（EI99）进行生命周期影响评估

## Use advice
用户应使用 GaBi 4 软件或同等软件，根据提供的数据来建模各个铜渣回收方案，以便使用生态指标99（EI99）方法进行正确的生命周期影响评估。在生命周期评估中，应特别注意分配程序后采用避免负担方法等方法论具体内容。生命周期评估的参考流程应基于铜冶炼过程中回收1吨铜渣的功能单元。

## Review details
清单： 内部审查通过几个迭代步骤完成，涉及原始数据验证、原始数据记录、代表性、完整性、与 ISO 14040 和 14044 有关的建模的一致性。

## Data sources
- Song, X. L., Yang, J. X., Wang, J. W. & Wu, W. J. Assessing the Life Cycle Environmental and Economic Performance of Copper Slag Recycling. AMR 878, 219–225 (2014).
