# 锂电池回收硫酸化焙烧（工艺 C）

Dataset: ILCD process, Unit process, single operation
Geography: CN
Reference year: 2013
Valid until: 2017
Classification: Unit processes / End-of-life treatment / Material recycling
Functional unit: FU is a typical type of LIB electrode material of 100 kg
Generated by: 马清源, m1120498928@163.com
Owner: 天工LCI数据工作小组
Review: Dependent internal review by 天工LCI数据工作小组
Amounts: no units in this file; such an amount is in the reference unit of its flow, which a separate flow dataset defines
copyright: false
licenseType: Free of charge for all users and uses

## General comment
采用在较低的温度（200-600 oC）下在焙烧炉中加入 硫酸或硫酸盐，使有价金属硫酸盐化后用热水浸出，得到硫酸盐溶液，随后将其 中的有价金属采用沉淀法回收。

## Time period
数据来源于2013-2017

## Technical purpose
该工业过程是使用硫酸化焙烧（一种炼金术技术）来提取有价金属。在较低的温度（200-600°C）下，通过在焙烧炉中加入硫酸或硫酸盐将有价金属转化为硫酸盐形式。然后用热水浸出这些金属，并通过沉淀法进行回收。此过程通常应用于冶金行业，用于从矿石、矿物和废料中回收金属。

## Reference product
- Electrolyte: 100; input; missing unimportant
  电极浆料

## Inputs
All rows: missing unimportant
- Sulfuric acid: 49
- sulfate: 126.6
- water,water: 110
- hard coal: 19.5
  煤炭
- Electricity: 25.2

## Outputs
All rows: missing unimportant
- Lithium carbonate: 7.9
- Al/Cu foil: 2.7
- Nickel sulfate: 10
  镍盐、金属
- Cobalt Sulfate: 19
  钴盐、金属
- Manganese salt: 9
  锰盐、金属
- Alloy (Ni, Fe, Al, etc.): 16
- sodium sulfate: 50
- Sulfuric acid: 35
- Slags: 7.9
- Metal Fumes: 1.45
- carbon dioxide (fossil): 58.5
  原文未区分bio和fossil，根据专家判断此处为fossil
- sulfur dioxide: 3
- waste water - treated: 100

## Data selection and combination
工艺的投入产出来自文献综述所报道数据的平均结果，体现了“坟墓”到 “摇篮” 的代表性过程。本研究不考虑塑料及金属外壳的回收或处理，人工成本、 工厂建设费用及其对环境的影响亦不包括在此分析中。

## Data treatment and extrapolations
值得注意的是，欧盟的数据并非针对于某个行业的计算，部分进出口数据和回收信息不适合中国的 情况。因此，改进后的 CRMs 评价方法还结合了中国官方数据、文献报道和来自 贸易/行业协会等其它利益集团数据，对主要的 LIB 制造商、回收公司、中国的官方管理机构等利益相关方的数据进行了最佳估计。在数据的时效性方面，CRMs 评估中使用的数据的参考期是基于最近的 4 年平均值（即 2013 年-2016 年）。

## Use advice
数据集来源于文献综述报告结果的平均值，应用于代表2013-2016年间的硫酸化焙烧过程。使用此数据集的用户应注意，其中未考虑塑料和金属外壳的回收或处理、人工成本和工厂建设成本。另外，在中国特定环境下应用此数据时，用户应将其与中国官方统计数据、贸易和行业资源相结合，以确保相关性和准确性。此数据集特别为典型的100公斤LIB电极材料的生命周期评估而定制，可能不会准确代表其他工业应用。

## Review details
清单： 内部审查通过几个迭代步骤完成，涉及原始数据验证、原始数据记录、代表性、完整性、与 ISO 14040 和 14044 有关的建模的一致性。

## Data sources
- 宋佳丽. 面向能源金属高效回收的资源关键性评价模型与应用. (天津大学, 2019).
