# 电力生产 ; 火电 ; 北京

Dataset: ILCD process, Unit process, single operation
Geography: BJ-CN
Reference year: 2019
Classification: Unit processes / Energy carriers and technologies / Electricity
Generated by: 熊若熙, xiongrx0126@163.com
Owner: 天工LCI数据工作小组
Review: Dependent internal review by 天工LCI数据工作小组
Amounts: no units in this file; such an amount is in the reference unit of its flow, which a separate flow dataset defines
copyright: false
licenseType: Free of charge for all users and uses

## General comment
火电发电包括原煤、洗煤、石油、天然气等十七种化石燃料。该过程只考虑直接发电过程，不考虑上游原材料开采加工和下游消费

## Time period
根据2019年能源统计年鉴数据计算

## Technical purpose
该数据集中提到的火电发电主要用于北京地区的公共和工业电力供应。它使用包括原煤、洗煤、石油和天然气在内的多种化石燃料来发电。

## Reference product
- electricity for thermal power: 3.6; calculated

## Inputs
All rows: calculated
- Raw coal: 0.00810121
- Diesel: 4.514e-5
- Petroleum Coke: 0.00145592
- liquefied petroleum gas: 1.806e-5
- refinery gas: 2.709e-5
- natural gas: 0.156562

## Outputs
- carbon dioxide (fossil): 0.358976; calculated
- sulfur dioxide: 2.11162e-5; calculated
- Nitrogen oxides: 3.75833e-5; calculated
- particles (> PM10): 7.91104e-6; calculated
  原文描述为Dust，由于flow库中没有dust，此处选择为Particles（>PM10）

## Data treatment and extrapolations
核算方法参考《企业温室气体排放核算方法与报告指南 发电设施》。不同形式发电量及燃料用量来自于《中国能源统计年鉴 2020》中的第三章（能源生产） 和第六章（地区能源平衡表）。用于计算二氧化碳排放因子的低位发热量、单位热值含碳量等燃料参数来自于《2019 年度中国区域电网二氧化碳基准线排放因子 OM 计算说明》、《企业温室气体排放核算方法与报告指南 发电设施》

## Use advice
使用此数据集时，请注意它仅包含北京地区热电厂直接发电的数据。它不包括化石能源提取和加工的上游过程以及发电电力的下游使用产生的环境影响。用户应参考《企业温室气体排放核算方法与报告指南 发电设施》了解方法论。有关电力生产和燃料消耗数据以及计算CO2排放因子的参数的更多具体信息，请参阅《中国能源统计年鉴2020》的第3章和第6章以及支持文件，如《2019年中国区域电网二氧化碳基准线排放因子计算说明OM》。

## Review details
清单： 内部审查通过几个迭代步骤完成，涉及原始数据验证、原始数据记录、代表性、完整性、与 ISO 14040 和 14044 有关的建模的一致性。

## Data sources
- 企业温室气体排放核算方法与报告指南 发电设施.
