# 涤棉生产|涤棉|最终处置

Dataset: ILCD process, Unit process, single operation
Geography: CN
Reference year: 2018
Classification: Materials production / Other mineralic materials
Generated by: 段颖凡, 1300925579@qq.com
Review: Dependent internal review by 天工LCI数据工作小组
Amounts: no units in this file; such an amount is in the reference unit of its flow, which a separate flow dataset defines
copyright: false

## Outputs
All rows: article inperiodical
- carbon dioxide: 421
- sulfur dioxide: 0.7
- Nitrogen oxides: 0.4
- methane: 13.2
- mercury: 0.4

## Review details
清单： 内部审查通过几个迭代步骤完成，涉及原始数据验证、原始数据记录、代表性、完整性、与 ISO 14040 和 14044 有关的建模的一致性。

## Data sources
- 康宏. 基于LCA的棉印染生产过程改进设计研究. (大连理工大学, 2018).
