# 精炼铜生产;精炼铜;火法炼铜;铜矿石

Dataset: ILCD process, Unit process, single operation
Geography: CN
Reference year: 2011
Classification: Unit processes / Materials production / Metals and semimetals
Functional unit: The function unit is defined as 1000kg of refined copper.
LCI method principle: Attributional
Generated by: 王鹏, 2867919560@qq.com
Owner: 天工LCI数据工作小组
Review: Dependent internal review by 天工LCI数据工作小组
Amounts: no units in this file; such an amount is in the reference unit of its flow, which a separate flow dataset defines
copyright: false
licenseType: Free of charge for all users and uses

## General comment
该数据集描述了从铜矿石开始，通过火法冶炼方法生产精炼铜的过程。精炼铜通常用于电线电缆、屋顶材料、管道以及作为各种金属合金的组成部分。它也应用于工业机械制造以及热导体和电导体的生产。

## Geography
铜冶炼背景数据来源于《中国有色金属工业年鉴2011》

## Reference product
- Refined copper: 1000; software or database
  需要补充refined copper

## Inputs
All rows: missing unimportant
- pyrite: 10
  Pyrite
- Copper ore: 195000
- Sandstone: 6040
  Sandstone需要补充
- iron: 389
  Iron ore
- Crude coal: 3780
  Crude coal需要补充
- crude oil; 42.3 MJ/kg: 573
  Crude oil
- natural gas; 44.1 MJ/kg: 0
  Natural gas

## Outputs
- carbon dioxide (fossil): 6720; software or database
  原文未区分bio和fossil，根据专家判断此处为fossil
- carbon monoxide,carbon monoxide (fossil): 44.6; software or database
  原文未区分bio和fossil，根据专家判断此处为fossil
- non-methane volatile organic compounds: 8.57; software or database
- methane (fossil): 17.1; software or database
  CH4
- sulfur oxides: 47.6; software or database
  SO2
- nitrous oxide: 30.7; software or database
  NOX
- particles (PM2.5 - PM10): 1010; software or database
- chemical oxygen demand: 0; software or database
  COD需要补充
- cadmium: 0.00193; software or database
  Cd
- lead: 0.0103; software or database
- Waste liquid: 221000; missing unimportant
  Waste liquid需要补充
- Waste solid: 2280; missing unimportant
  Waste solid需要补充

## Deviations from the LCI method approaches
影响潜力通过 CML 方法进行量化。

## Data selection and combination
环境数据采集方面，铜冶炼背景数据来源于《2011年中国有色金属工业年鉴》，发电、煤炭、焦炭生产等能源生产LCI均来源于Sinocenter数据库。所有这些数据均根据国家统计数据计算得出，能够反映我国能源生产的平均水平。铜矿石和石灰石开采的相关数据也来自Sinocenter数据库，砂岩开采的库存来自Ecoinvent数据库。

## Use advice
使用这个数据集的用户应该注意，铜冶炼过程的背景数据来源于《中国有色金属工业年鉴2011》，这可能并不反映当前的技术状态或者环境影响。能源生成的生命周期库存数据（LCI）来自Sinocenter数据库，应被视为代表中国能源生产的平均水平。在使用这些数据对产品进行生命周期评估（LCA）建模时，至关重要的是要包括所有相关的上游过程，如铜矿石和石灰石的采矿，并应用CML（莱顿大学环境科学中心）方法来量化影响潜力。功能单位定义为1000kg精炼铜。

## Review details
清单： 内部审查通过几个迭代步骤完成，涉及原始数据验证、原始数据记录、代表性、完整性、与 ISO 14040 和 14044 有关的建模的一致性。

## Data sources
- Wang, H. T. et al. Life Cycle Assessment of Metallic Copper Produced by the Pyrometallurgical Technology of China. MSF 814, 559–563 (2015).
