# 水泥生产;水泥, 复合硅酸盐水泥;新型干法预分解窑, 4000 t/d;混合固废

Dataset: ILCD process, Unit process, black box
Geography: CN
Classification: Unit processes / Materials production / Other mineralic materials
Generated by: #REF!, ysqsophia@gmail.com
Owner: 天工LCI数据工作小组
Review: Dependent internal review by 天工LCI数据工作小组
Amounts: no units in this file; such an amount is in the reference unit of its flow, which a separate flow dataset defines
copyright: false
licenseType: Free of charge for all users and uses

## General comment
选用了预分解窑干法水泥生产模型。

## Technology and included processes
本文选用预分解窑干法水泥生产模型。新型干法预分解水泥生产技术以悬浮预热和预分解技术为核心，是一种比较符合环保要求、符合高生产率要求的生产技术，成为中国水泥行业未来的发展趋势。故选用新型干法预分解水泥生产技术作为水泥模型生产技术具有先进性和环保性需求。

## Technical purpose
复合硅酸盐水泥采用新型干法预分解窑生产，日产量为4000吨，使用混合固废。该工艺环保且提高了生产力水平，是中国水泥行业未来的发展趋势。这种先进且环保的生产方式符合现代水泥生产的可持续制造过程要求。

## Model description
选用生命周期功能单位为 1t 水泥来构建生命周期模型。水泥工业系统边界包括水泥的生产、原材料的生产与运输、电力的生产，不包括水泥的使用和处理。对于矿渣、粉煤灰等辅助材料只考虑其交通运输和准备过程，不考虑其生产过程。

## Reference product
- cement, portland-composite cement: 1000
  复合硅酸盐水泥

## Inputs
- limestone, crushed, for mill: 848.37
  石灰石
- clay: 143.55
  粘土
- iron, powder: 26.04
  铁粉
- gypsum stone (CaSO4-dihydrate): 50
  石膏。各通用水泥组分使用中国GB-175-2007通用硅酸盐水泥标准值。
- granulated blast furnace slag: 100
  粒化高炉矿渣。各通用水泥组分使用中国GB-175-2007通用硅酸盐水泥标准值。
- ash: 200
  粉煤灰。各通用水泥组分使用中国GB-175-2007通用硅酸盐水泥标准值。
- hard coal; 26.3 MJ/kg: 68.4
  煤。采用中国生产线中统计值，大中型预分解窑的标煤耗为114kg/t熟料，同时根据煤灰的化学成分以及煤的工业分析值，可对煤的消耗量进行计算。
- Electricity: 354.06
  电耗。中国国内电力消耗平均水平。对于干法水泥生产线，粉磨作业消耗的电力占全部电力消耗的60%以上，其中生料粉磨约占30%，水泥粉磨约占40%。由于原料开采数据有限，对各种原料合并进行简化处理，采用电力消耗数据13.89kwh/t原料。对于不同品种的混合水泥，出于原材料形状、性质的差异，粉磨不同原料所消耗的电力不同，根据美国粉磨原料消耗电力百分比进行估计计算。

## Outputs
- carbon dioxide (fossil): 604
  CO2。水泥生产阶段二氧化碳排放来自两个部分，一部分为煅烧时原料中碳酸钙和碳酸镁的分解释放，另一部分为燃料煤燃烧释放。原料中排放二氧化碳公式： CaCO3→Cao+CO2；MgCO3→Mgo+CO2。煤燃烧的二氧化碳释放量采用中国工程院的碳排放系数，CO2排放系数为2.4933kgCO2/(kg标准煤)。
- sulfur dioxide: 0.372
  SO2。SO2排放量来自第一次中国水泥制造业污染源普查结果（SO20.066kg/t熟料）。
- Nitrogen oxides: 1.92
  NOx。NOx排放量来自第一次中国水泥制造业污染源普查结果（NOx1.584kg/t熟料）。
- particles (> PM10): 0.341
  粉尘，未标明粒径，按PM>10处理。水泥生产过程中粉尘的排放数据采用中国水泥工业大气污染物排放标准的上限值。根据水泥生产不同设备的粉尘排放浓度计算水泥生产过程中各个生产阶段的粉尘排放量，其中生料粉磨排放粉尘浓度约占55%，水泥粉磨约占 20%，煤粉制备阶段占 13%，煅烧过程占12%。
- chemical oxygen demand: 0.0102
  COD。COD排放量来自第一次中国水泥制造业污染源普查结果（COD0.06g/t熟料）。
- Oils, unspecified: 0.261
  油
- methane (fossil): 0.733
  甲烷
- mercury: 0.00793
  汞

## Deviations from the LCI method approaches
运用GaBi4专业生命周期评价软件，建立生命周期模型，进行水泥生命周期评价。利用GaBi4软件将整个水泥生命周期分为五大模块，每个模块为一个plan模型。每个plan模型中包括水泥生产的各个阶段数据输入。

## Data selection and combination
石灰石、石膏开采中污染物排放数据来自于中国生命周期参考数据库（CLCD）。由于缺乏粘土和铁矿石的开采数据，且其开采量较少，故采用石灰石的开采污染物排放数据作为估算。煤炭开采的污染物排放数据采用中国生命周期参考数据库（CLCD）中的原煤开采数据。电力生产污染物排放数据采用中国生命周期参考数据库（CLCD）中的全国平均电网电力混合与传输数据。运输阶段考虑水泥生产所需要所有原材料的运输，包括石灰石、粘上、铁粉、石膏、煤以及工业废弃物，为计算方便以载重10t的柴油货车高速公路运输为例，假定所有原材料的运输平均距离为100km。采用中国生命周期参考数据（CLCD）中载重10t的柴油货车污染物排放清单数据。

## Use advice
本数据集应用于模拟1吨复合硅酸盐水泥使用新型干法预分解工艺的生命周期。它包括水泥生产、原材料的生产及运输和电力生产。水泥的使用和处置阶段不包括在内。对于矿渣和粉煤灰等辅助材料，仅考虑其交通运输和准备过程。数据用户应使用GaBi4专业生命周期评价软件构建生命周期模型，分为五大模块，每个模块代表一个包含水泥生产各阶段的plan模型。请注意，工业废弃物生产的环境影响归属于废弃物生产者，本模型仅包括运输和准备过程。

## Review details
清单： 内部审查通过几个迭代步骤完成，涉及原始数据验证、原始数据记录、代表性、完整性、与 ISO 14040 和 14044 有关的建模的一致性。

## Data sources
- 徐小宁. (2013). 中国水泥工业的生命周期评价 [硕士, 大连理工大学].
