# 抽提井;土壤原位修复;气相抽提;建井

Dataset: ILCD process, Unit process, single operation
Geography: KR
Reference year: 2011
Classification: Unit processes / Other Services / Repair and maintenance
Generated by: 张建宾, zhangjb@caep.org.cn
Owner: 天工LCI数据工作小组
Review: Dependent internal review by 天工LCI数据工作小组
Amounts: no units in this file; such an amount is in the reference unit of its flow, which a separate flow dataset defines
copyright: false
licenseType: Free of charge for all users and uses

## General comment
建设3口抽提井

## Technology and included processes
聚氯乙烯45 kg -砂0.3 m3，膨润土211 kg -砂浆2,291 kg -钻井设备柴油11 L

## Technical purpose
该数据集描述了三个抽提井的建设，这些抽提井是原位土壤修复项目的一部分，专门用于设计处理受污染土壤的气相抽提（SVE）系统。这类抽提井通常用于环境修复，以减少挥发性污染物的浓度，常见于化学品泄漏可能发生的工业场所。

## Reference product
- Extraction wel: 3; measured
  1 extraction well and 2 monitoring wells

## Inputs
- Polyvinyl chloride: 45; measured
- sand: 0.3; measured
- bentonite: 211; measured
- Mortar: 2291; measured
- Diesel,Diesel: 0.011; measured
- Equipment and Materials Arriving on Site: 25000
  文中给出修复工程总的材料使用量为99.8吨，但基础设施建设和建井两个环节材料用量没有单独统计重量，此处25吨为填报人根据经验估算得到的结果。

## Use advice
该数据集的用户应注意，它包含了土壤修复抽提井建设的全面投入和产出。这些包括主要原材料，如PVC、砂土、膨润土和砂浆，以及必要的能源消耗，如钻井设备柴油。在使用此数据进行生命周期评估时，请确保考虑了类似的建设过程和条件，如污染物类型和土壤属性。此外，在模拟使用阶段时，应综合考虑SVE系统的维护和运行情况。

## Review details
清单： 内部审查通过几个迭代步骤完成，涉及原始数据验证、原始数据记录、代表性、完整性、与 ISO 14040 和 14044 有关的建模的一致性。

## Data sources
- Jeong, S.-W. & Suh, S.-W. Assessment of Environmental Impacts and CO 2 Emissions from Soil Remediation Technologies using Life Cycle Assessment - Case Studies on SVE and Biopile Systems -. Journal of Korean Society of Environmental Engineers 33, 267–274 (2011).
