# 炼铁;铁水;高炉炼铁;外购球团矿

Dataset: ILCD process, Unit process, single operation
Geography: CN
Reference year: 2014
Classification: Unit processes / Materials production / Metals and semimetals
Generated by: 付翔, 1162850692@qq.com
Owner: 天工LCI数据工作小组
Review: Dependent internal review by 天工LCI数据工作小组
Amounts: no units in this file; such an amount is in the reference unit of its flow, which a separate flow dataset defines
copyright: false
licenseType: Free of charge for all users and uses

## General comment
该数据集代表使用高炉（BF）工艺生产铁水的过程，特别是关注使用外购铁矿球团。它适用于钢铁制造厂等工业环境，其中该高温冶金过程是从铁矿石生产钢铁的第一步。

## Time period
基于 A 钢厂 2014 年的生产数据进行计算和分析对比。

## Reference product
- Molten Iron: 977; measured
  铁水

## Inputs
All rows: measured
- hard coal,hard coal: 168.93
- Pellet: 421
  球团矿
- Electricity: 61.2
- oxygen: 28
- coke,Coke: 367.5
  焦炭
- Sinter: 1211
  烧结矿
- Coke oven gas: 17
  焦炉煤气
- Electricity: 133.2
  TRT 余压发电（自产）

## Outputs
All rows: measured
- Electricity: 133.2
  TRT 余压发电（自用）
- Blast furnace gas: 1681
  高炉煤气
- carbon dioxide (fossil): 822500
  原文未区分bio和fossil，根据专家判断此处为fossil
- methane: 30
- nitrous oxide: 2

## Use advice
在使用该数据集进行生命周期评估时，用户应考虑到它基于2014年某特定钢铁厂的生产数据。应当考虑到自那时起可能发生的技术进步和生产方法或原材料采购的变化。用户应确保这些加工参数与被评估系统的参数紧密对齐。如果涉及回收过程，系统边界定义必须清楚地划分包括或排除回收材料的阶段。

## Review details
清单： 内部审查通过几个迭代步骤完成，涉及原始数据验证、原始数据记录、代表性、完整性、与 ISO 14040 和 14044 有关的建模的一致性。

## Data sources
- 刘宏强, 付建勋, 刘思雨, 谢欣悦, & 杨笑楹. 钢铁生产过程二氧化碳排放计算方法与实践. 钢铁 51, 74–82 (2016).
