# 稀土滤液沉淀及HCl浸出;镝;IAC;含REE矿石

Dataset: ILCD process, Unit process, single operation
Geography: CN
Reference year: 2010
Valid until: 2019
Classification: Materials production / Inorganic chemicals
Functional unit: The goal of this investigation is to compare environmental impacts related to the production of 1 kg Dy (functional unit) from IAC (Southern China), from B/M ore (Bayan Obo), and from an eudialyte deposit (Norra Kärr) using the LCA method
LCI method principle: Attributional
LCI method approaches: Allocation - mass
Generated by: 汪涛, twang@iue.ac.cn
Owner: 天工LCI数据工作小组
Review: Dependent internal review by 天工LCI数据工作小组
Amounts: no units in this file; such an amount is in the reference unit of its flow, which a separate flow dataset defines
copyright: false
licenseType: Free of charge for all users and uses

## General comment
该工艺的技术用途涉及通过从滤液中沉淀稀土元素以及随后的盐酸（HCl）浸出来生产镝（Dy）。这个过程专门用于从华南地区和白云鄂博地区含稀土元素矿石中提取和精炼镝。镝是一种常用于永磁体的稀土元素，是现代电子产品、电动车辆和风力发电机等高科技应用中不可缺少的组成部分。

## Geography
华南地区和白云鄂博

## Technology and included processes
本次调查的目的是比较 IAC（中国南方）、B/M 矿石（白云鄂博）和 eudialyte 矿床（Norra Kärr）生产 1 千克镝（功能单位）的环境影响，使用生命周期分析法

## Reference product
- Leaching solution: 208; article inperiodical
  Leaching solution. Input for next process: Solvent extraction

## Inputs
- Electricity: 1.62; calculated
  Estimated on base of throughput in solvent extractio, electricity mix 2014
- Ammonium bicarbonate: 5.4; calculated
  Ammonium bicarbonate. Stoichiometric calculation with 25 % excess, ammonium bicarbonate, at plant
- sulphuric acid: 0.66; min 0.26; max 1.06; uniform; measured
  For adjusting a pH value of 5 for further processing, sulphuric acid, liquid, at plant. Average
- Lime: 1.885; min 0.74; max 3.03; uniform; measured
  Lime production, hydrated, packe, for adjusting a pH value of 10 to separate impurities. Average
- hydrogen chloride: 11.48; measured
  Hydrochloric acid, 36 % in H2O, from reacting propylene and chlorine, for adjusting a pH value of 4 for REE chloride solution
- water: 197; measured
  For dilution of HCl
- transport in t*km,transport in t*km: 2.565; min 2.07; max 3.06; uniform; software or database
  Chemicals: 320 km average distance deposit -Guangzhou, carbonate: 200 km deposit - Shaoguan, HCl: 230 km Guangzhou - Shaoguan. Market for transport, freight, lorry >32 metric ton, EURO3, average

## Outputs
- Sludge: 5.14
  Assumed to be dumped at the deposit area
- aluminium: 0.000146; article inperiodical
  Aluminium [Inorganic emissions to fresh water]
- calcium: 0.000808; article inperiodical
  Calcium [Inorganic emissions to fresh water]
- iron: 1.7e-6; article inperiodical
  Iron [Heavy metals to fresh water]
- magnesium: 7.07e-5; article inperiodical
  Magnesium [Inorganic emissions to fresh water]
- manganese: 2.31e-5; article inperiodical
  Manganese [Heavy metals to fresh water
- potassium: 6.72; article inperiodical
  Potassium [Inorganic emissions to fresh water]
- Activated silica: 0.000147; article inperiodical
  Activated silica. Silicon dioxide (silica) [Particles to air]
- sodium: 0.000105; article inperiodical
  Sodium [Inorganic emissions to fresh water]

## Deviations from the LCI method approaches
In this study, an allocation method based on the mass of produced REEs combined with their market prices (based on an international metals market analysis and pricing index company ) are considered, as usual for metals with strongly different prices. As the ores have different compositions, the allocation factor has to be assessed individually for each site.

## Use advice
在使用这些数据进行生命周期评估（LCA）时，重要的是考虑基于生产的稀土元素（REEs）的质量以及它们的市场价格的分配方法。应该比较不同来源（包括中国南方的IAC、白云鄂博的B/M 矿石、Norra Kärr的eudialyte）生产1公斤镝的环境影响。由于矿石成分各异，必须为每个地点单独评估分配因子。在LCA模型中，还必须考虑地点特定的技术适用性和处理效率。

## Review details
清单： 内部审查通过几个迭代步骤完成，涉及原始数据验证、原始数据记录、代表性、完整性、与 ISO 14040 和 14044 有关的建模的一致性。

## Data sources
- Zapp, P., Marx, J., Schreiber, A., Friedrich, B. & Voßenkaul, D. Comparison of dysprosium production from different resources by life cycle assessment. Resources, Conservation and Recycling 130, 248–259 (2018).
