# 修复后土壤;土壤原位修复;气相抽提;SVE系统运行2.05年

Dataset: ILCD process, Unit process, single operation
Geography: KR
Reference year: 2011
Classification: Unit processes / Other Services / Repair and maintenance
Generated by: 张建宾, zhangjb@caep.org.cn
Owner: 天工LCI数据工作小组
Review: Dependent internal review by 天工LCI数据工作小组
Amounts: no units in this file; such an amount is in the reference unit of its flow, which a separate flow dataset defines
copyright: false
licenseType: Free of charge for all users and uses

## General comment
采用SVE系统抽提750天

## Technology and included processes
SVE操作期间预计所需电量:148748 kWh

## Technical purpose
该数据代表了一种土壤原位修复过程，使用气相抽提(SVE)系统持续2.05年。这种修复技术通常用于受污染土壤，以去除挥发性和一些半挥发性污染物。SVE系统运行750天，在此期间获得高纯度土壤作为输出。这种处理过的土壤可以根据修复目标用于不同用途，例如住宅或商业开发、农业或栖息地恢复。电力消耗（148,748千瓦时）指示了SVE操作期间使用的能源。

## Reference product
- Remediated soil: 1000; measured

## Inputs
- Electricity: 535493; measured
- contaminated soil: 1000; measured
- Activated Carbon: 18000; measured

## Outputs
- Exhaust gas: 1; estimated

## Use advice
使用此数据集时，请确保土壤修复过程的上下文与您项目的参数一致。电力消耗数据特定于运行2.05年的SVE系统，不同的运营时间应相应地进行缩放调整。考虑区域电网混合情况，因为这将影响所消耗能源的环境影响。确保输入和输出与生命周期评估中使用的其他数据具有可比性，并考虑技术或运营效率可能的差异。

## Review details
清单： 内部审查通过几个迭代步骤完成，涉及原始数据验证、原始数据记录、代表性、完整性、与 ISO 14040 和 14044 有关的建模的一致性。

## Data sources
- Jeong, S.-W. & Suh, S.-W. Assessment of Environmental Impacts and CO 2 Emissions from Soil Remediation Technologies using Life Cycle Assessment - Case Studies on SVE and Biopile Systems -. Journal of Korean Society of Environmental Engineers 33, 267–274 (2011).
