# 沉箱式导水门;直径2.4m;原位地下水修复;PRB;漏斗-导水门式PRB

Dataset: ILCD process, Unit process, single operation
Geography: US
Reference year: 2011
Classification: Unit processes / Other Services / Repair and maintenance
Generated by: 张建宾, zhangjb@caep.org.cn
Owner: 天工LCI数据工作小组
Review: Dependent internal review by 天工LCI数据工作小组
Amounts: no units in this file; such an amount is in the reference unit of its flow, which a separate flow dataset defines
copyright: false
licenseType: Free of charge for all users and uses

## General comment
导水门是地下水渗透性反应墙的组成部分之一，隔水漏斗将污染地下水流引导或汇集进入导水门，导水门内填充通过活性材料，用于使流经的地下水得到处置。沉箱式导水门指采用沉箱法安装的导水门。

## Geography
假设的污染场地

## Technical purpose
沉箱式导水门被用作渗透性反应墙系统（PRB）的一个组成部分，用于原位地下水修复。它的作用是通过隔水漏斗将污染地下水引导到导水门中，然后通过导水门内的活性材料处理污染水。'沉箱式'一词指的是导水门的安装工艺，该工艺采用沉箱方法，这是一种允许在水下环境中构建导水门的技术。

## Reference product
- Caisson-based gate: 4; estimated

## Inputs
All rows: estimated
- Zero-valent Iron: 139000
  Assume Fe0 is mixed with quartz sand in 1:1 (w:w)
- quartz sand: 139000
  Assume Fe0 is mixed with quartz sand in 1:1 (w:w)
- transport in t*km: 44480
  Transport distance of the materials to the site is assumed to be 160 km (100 mile)
- Electricity: 483000
  Reactive media construction. Replacement of reactive media is assumed to occur three times.
- Steel: 37200
  Gate (caisson) steel 9300 kg/gate (caisson)
- sand: 72100
- transport in t*km: 17488
- Electricity: 731000
  Gate (caisson) construction energy 182.7 GJ/ gate (caisson), including ① Soil excavation energy 1.151 GJ/m3 soil and ② Backfilling energy 1.74 MJ/kg backfills
- quartz sand: 21400
  Backfilling the pretreatment and post-treatment zones with quartz sand

## Use advice
使用此数据集时，需准确模拟沉箱式导水门的原位地下水修复过程，考虑其独特的安装方法、直径以及导水门内使用的反应材料的性质。数据集包含了所有主要原材料和必要的能耗，这些都应在生命周期评估中予以考虑。用户应注意过程的功能单位——单一操作——及其在污染场地的模拟PRB安装中的应用。

## Review details
清单： 内部审查通过几个迭代步骤完成，涉及原始数据验证、原始数据记录、代表性、完整性、与 ISO 14040 和 14044 有关的建模的一致性。

## Data sources
- Mark S. H. Mak and Irene M. C. Lo.Environmental Life Cycle Assessment of Permeable Reactive Barriers: Effects of Construction Methods, Reactive Materials and Groundwater Constituents[J].Environmental Science & Technology 2011, 45, 23, 10148-10154
