# 冶金硅冶炼 ; 硅（99%） ; 碳热还原

Dataset: ILCD process, Unit process, single operation
Geography: CN
Reference year: 2014
Classification: Unit processes / Materials production / Metals and semimetals
Functional unit: The functional unit of the LCA study was 1 kWh based on a multi-Si PV module
LCI method principle: Attributional
LCI method approaches: Allocation
Generated by: 杨锦锋, yjfzfshn@163.com
Owner: 天工LCI数据工作小组
Review: Dependent internal review by 天工LCI数据工作小组
Amounts: no units in this file; such an amount is in the reference unit of its flow, which a separate flow dataset defines
copyright: false
licenseType: Free of charge for all users and uses

## General comment
多晶硅

## Geography
这项研究为中国的多晶硅组件光伏系统提供了生命週期评估

## Time period
文章发表

## Technical purpose
本数据集描述的冶金硅熔炼过程用于生产多晶硅，这是太阳能光伏（PV）系统中捕获和转换太阳能必不可少的组成部分。该过程特指使用碳热还原法生产纯度为99%的硅。所生产的多晶硅（即多硅）随后用于生产包括晶圆、铸锭、电池和模块在内的各种光伏组件，用于组装太阳能面板。

## Reference product
- Metallurgical silicon: 6.08; measured
  Silicon (99%)

## Inputs
- quartz sand: 20.48; measured
  Quartz sand
- hard coal: 45.4; measured
  Standard coal

## Outputs
All rows: measured
- carbon dioxide (fossil): 132.91
  Carbon dioxide
- carbon monoxide,carbon monoxide (fossil): 1.7
  Carbon monoxide
- Slag: 4.38
- Nitrogen oxides: 279.55
- Silicon dioxide: 1.7
- sulfur dioxide: 0.79
  Sulfur dioxide

## Deviations from the LCI method approaches
本研究旨在定量评估中国光伏系统的生命周期环境影响，为中国光伏产业的可持续发展提供科学依据

## Data selection and combination
库存数据，包括太阳能级硅、晶圆、铸锭、电池和模块生产所涉及的材料消耗和环境排放，主要来自代表中国当前领域多硅光伏技术的公司。能源消费数据参考了“中国太阳能光伏的清洁生产”报告(Li and Chang，2012)。多晶硅生产数据来源于国内有关的文献资料

## Use advice
使用此数据集时，用户应考虑由中国多晶硅组件光伏系统的生命周期评估（LCA）提供的方法论框架。用户应确保引用研究的适当范围，该研究侧重于从中国光伏产业的角度考量的材料消耗、环境排放和能源使用。在适用的情况下，用户还必须考虑数据的技术适用性，特别是在预测LCA研究结果以供政策制定或在不同地理环境中应用时。还应在相关的地方包括回收和产品寿命终结的考量。

## Review details
清单： 内部审查通过几个迭代步骤完成，涉及原始数据验证、原始数据记录、代表性、完整性、与 ISO 14040 和 14044 有关的建模的一致性。

## Data sources
- Fu, Y., Liu, X. & Yuan, Z. Life-cycle assessment of multi-crystalline photovoltaic (PV) systems in China. Journal of Cleaner Production 86, 180–190 (2015).
