# 高炉炼铁;球团矿烧结矿;生铁

Dataset: ILCD process, Unit process, single operation
Geography: HUN-CN
Reference year: 2013
Classification: Unit processes / Materials production / Metals and semimetals
Generated by: 王环宇, wanghuanyu00@126.com
Owner: 天工LCI数据工作小组
Review: Dependent internal review by 天工LCI数据工作小组
Amounts: no units in this file; such an amount is in the reference unit of its flow, which a separate flow dataset defines
copyright: false
licenseType: Free of charge for all users and uses

## General comment
该数据集描述了使用球团矿烧结矿在高炉内炼铁以生产生铁的过程。生铁是钢铁制造中的中间产品，通常用于钢铁工业的大规模生产，用于建筑、运输、家用电器和各种类型的机械配件。

## Geography
湖南华菱湘潭钢铁有限公司

## Reference product
- Molten Iron: 950; measured
  生铁

## Inputs
- Sinter: 1000; measured
  烧结矿
- Pellet: 1000; measured
  球团矿

## Use advice
使用该数据集的用户在将数据应用于生命周期评价时，应考虑球团矿质量的波动和技术进步因素。应注意数据的特殊性，因为这些数据来源于湖南华菱湘潭钢铁有限公司。该数据集是站点特定的，反映了该设施使用的技术和实践。在没有考虑当地条件和技术的情况下，用户不应将这些结果泛化应用于其他设施。此外，应根据具体生命周期评价研究的范围，明确界定是否包括钢铁制造、铸造、轧制以及可能的生命周期末期回收等下游过程。

## Review details
清单： 内部审查通过几个迭代步骤完成，涉及原始数据验证、原始数据记录、代表性、完整性、与 ISO 14040 和 14044 有关的建模的一致性。

## Data sources
- 1.
