# Corn-based ethanol production | Ethanol | Fermentation | Corn

Dataset: ILCD process, Unit process, single operation
Geography: AH-CN
Classification: Materials production / Other mineralic materials
Functional unit: The functional unit is 1.7 tonne of ethanol production.
LCI method principle: Attributional
LCI method approaches: Allocation - mass
Generated by: Zirui Tang
Amounts: no units in this file; such an amount is in the reference unit of its flow, which a separate flow dataset defines
copyright: false

## General comment
The previous step of corn-based ethylene production.

## Geography
Data related to the operation process (e.g., electricity, steam, water, chemicals, raw material consumption, and direct emissions) from the cassava-based ethanol and corn-based ethylene production plants in the Guangxi and Anhui Provinces in China were used [20], [21].

## Technology and included processes
Processes included in present study are summarized as follows:
1) Corn and cassava production at farm;
2) Ethanol and ethylene production.

## Reference product
- Ethanol: 1.7; article inperiodical

## Inputs
All rows: article inperiodical
- Straw: 5.4
- Glucoamylase: 3.8
- Calcium hydroxide: 18.3
- Amylase: 4.97, 4.8 (2 entries)
- Dipotassium Phosphate: 1.8
- Diammonium phosphate: 1.6
- Sulfuric acid: 9.3
- calcium chloride: 0.9
- Alkali: 31.4
- Urea: 0.96
- water: 48.8
- process steam: 6.96
- electricity: 716.9

## Outputs
- Protein Feed: 1.74; article inperiodical

## Deviations from the LCI method approaches
Co-product allocation based on product mass was performed.

## Data selection and combination
1. Data related to the operation process (e.g., electricity, steam, water, chemicals, raw material consumption, and direct emissions) from the cassava-based ethanol and corn-based ethylene production plants in the Guangxi and Anhui Provinces in China were used.
2. Corn-based ethanol, with an annual production capacity of 370 kt in 2010, accounted for approximately 20% of the total biomass-based ethanol production, whereas cassava-based ethanol, with an annual total capacity of 20 kt, is currently the only non-grain-based ethanol production enterprise.
3. The data related to corn and cassava production at farms, coal-based electricity generation, and road transport processes were taken from the references.
4. Moreover, data on chemical production and relevant background data from Europe were used [26] because of the lack of information for China.

## Data sources
- Hong, J., Zhang, Y., Xu, X. & Li, X. Life cycle assessment of corn- and cassava-based ethylene production. Biomass and Bioenergy 67, 304–311 (2014).
