# Starterleadbatteries|Lead,sulfuricacidglassfiber(orPVC)|Internalized polar plates manufacturing + assembly|greater than or equal to0.5 million kVA / /|起动型铅蓄电池|铅、硫酸玻璃纤维（或PVC）|内化成极板制造+组装|大于等于50万千伏安时

Dataset: ILCD process, Partly terminated system
Geography: CN
Reference year: 2019
Classification: Materials production / Other mineralic materials
Generated by: The data was created by the Office of the Second National Pollution Source Census of the Ministry of Ecology and Environment, and the data was organized by the TianGong Plan team for ILCD format / 生态环境部第二次全国污染源普查工作办公室创建数据，天工计划团队常慧敏整理数据为ILCD格式
Amounts: no units in this file; such an amount is in the reference unit of its flow, which a separate flow dataset defines
copyright: false

## Technology and included processes
the treatment technology for the pollution of Power storage batterydidn't offered
污染物指标工业废水量的末端治理技术是－

## Reference product
- Power storage battery: 3.6; calculated
  原文件中描述污染物类别为Product，污染物指标为起动型铅蓄电池，此处对其进行了匹配工作，将其匹配到LCAflow库里面相最符合的流，污染物指标备注为工业废水量，单位说明为文件中记录的单位是千伏安时，为匹配LCA单位库，将其改为kWh，依据如下：千伏安时（kVAh）和千瓦时（kWh）都是用于测量电能的单位，但是它们之间有一些区别。千伏安时（kVAh）：这个单位考虑了系统的总功率，包括有用功率（实功率）和无用功率（虚功率）。它是由电压（V）和电流（A）的乘积得到的，不考虑功率因数。千瓦时（kWh）：这个单位只考虑了系统的有用功率，即实际做功的部分。它是实际消耗或产生的电能的单位。这两个单位之间的关系可以通过功率因数（PF）来表示：kWh=kVAh×PF，其中，PF 是功率因数，是一个无单位的值，表示实功率和总功率之间的比例，其值范围是 0 到 1。如果系统只有有用功率，没有无用功率，那么功率因数就是 1，此时 kVAh 和 kWh 是相等的。如果系统有无用功率，那么功率因数就小于 1，此时 kVAh 会大于 kWh。

## Outputs
All rows: calculated
- Waste water: 0.071, 0.0107 (2 entries)
  原文件中描述污染物类别为废水，污染物指标为工业废水量，此处对其进行了匹配工作，将其匹配到LCAflow库里面相最符合的流，污染物指标备注为工业废水量
- chemical oxygen demand: 0.00288, 0.00288, 0.000432, 0.000432 (4 entries)
  原文件中描述污染物类别为废水，污染物指标为化学需氧量，此处对其进行了匹配工作，将其匹配到LCAflow库里面相最符合的流，污染物指标备注为化学需氧量
- lead: 2.21e-5, 2.21e-5, 3.32e-6, 3.32e-6 (4 entries)
  原文件中描述污染物类别为废水，污染物指标为总铅，此处对其进行了匹配工作，将其匹配到LCAflow库里面相最符合的流，污染物指标备注为总铅
- Exhaust gas: 439, 1980 (2 entries)
  原文件中描述污染物类别为废气，污染物指标为工业废气量，此处对其进行了匹配工作，将其匹配到LCAflow库里面相最符合的流，污染物指标备注为工业废气量
- lead: 0.0001976, 0.0001976, 0.0001976, 2.96e-5, 2.96e-5, 2.96e-5 (6 entries)
  原文件中描述污染物类别为废气，污染物指标为铅，此处对其进行了匹配工作，将其匹配到LCAflow库里面相最符合的流，污染物指标备注为铅

## Data sources
- 第二次全国污染源普查产排污核算系数手册（试用版）,二级代码38,四级代码3843文件，在完整版文件中第3413页
