# NGH开采; 甲烷水合物 ;LCA、LCC分析

Dataset: ILCD process, Unit process, single operation
Geography: GD-CN
Reference year: 2009
Classification: Unit processes / Energy carriers and technologies / Other non-renewable fuels
LCI method principle: Attributional
LCI method approaches: Consequential
Generated by: Shikang Kang, 908798159@qq.com
Owner: 天工LCI数据工作小组
Review: Dependent internal review by 天工LCI数据工作小组
Amounts: no units in this file; such an amount is in the reference unit of its flow, which a separate flow dataset defines
copyright: false
licenseType: Free of charge for all users and uses

## General comment
本文对水合物的开采进行LCA分析，得到其生 命周期过程中对环境影响最重要的工艺环节和影 响类别，分析其产生原因，并提出合理的改进意见

## Geography
数据研制地点

## Time period
文献发表时间

## Technology and included processes
运用生命周期评价（LCA）和生命周期成本分析（LCC）两大方法，分 别对海洋NGH开采的环境效应和经济效益进行了系统分析，并与天然气（NG）开采进行对比。 结果表明，NGH开采排放的酸 性气体接近零，温室气体排放也比较少，全生命周期成本比NG开采低。

## Technical purpose
甲烷水合物通过NGH开采提取，主要用作天然气的替代能源。其开采过程已证明在经济上是可行的，在环境影响方面比传统天然气生产要小，适用于已确认具有高品位、浅埋藏和集中分布的NGH矿藏的区域。产生的甲烷可用于能量生成、供暖和作为各种化工过程的原料。

## Reference product
- methane (biogenic): 0.31; input; log-normal
  原文已区分为bio。开采工程成本,数据为分布，量中填写的数据为取平均（取中值）的结果

## Outputs
All rows: log-normal
- methane (biogenic): 0.000623; measured
  原文已区分为bio。Exploitation engineering,数据为分布，量中填写的数据为取平均（取中值）的结果
- methane (biogenic): 0.001; measured
  原文已区分为bio。Drilling engineering,数据为分布，量中填写的数据为取平均（取中值）的结果
- methane (biogenic): 0.00099; measured
  原文已区分为bio。Surface engineering,数据为分布，量中填写的数据为取平均（取中值）的结果
- methane (biogenic): 0.481; measured
  原文已区分为bio。Mining engineering,数据为分布，量中填写的数据为取平均（取中值）的结果
- methane (biogenic): 0.484; calculated
  原文已区分为bio。Total,数据为分布，量中填写的数据为取平均（取中值）的结果

## Data selection and combination
广州海洋地质调查局在南海北部东沙、 神狐、 西沙和琼东南4个海域实施了9年的水合物专项 调查，完成18个航次的综合调查与研究，发现大量 冷泉碳酸盐及以天然气为生的甲烷菌生物群，在很 大程度上可以判定存在大块的渗漏型[5]NGH矿藏[8]， 具有品位高、埋藏浅、分布集中的特点。

## Data treatment and extrapolations
运用生命周期的方法， 对NGH开采进行了环 境性能和经济性能的综合评价。 有效识别关键排放 物和环境影响潜值，找出最主要的环境成本，为技 术方案的选择提供定量的科学依据。 说明NGH的 开采具有现实可行性。

## Use advice
使用NGH开采的LCA和LCC分析数据时，需要考虑数据集起源的背景，包括南海北部的环境条件、技术适用性和特定的地理因素。与区域天然气开采实践的比较可能是必须的，以完全理解环境和经济效益。方法论建议包括确保将NGH开采的关键排放物和环境影响潜力纳入环境成本计算，并在制定能源和资源利用策略时考虑这些数据点。

## Review details
清单： 内部审查通过几个迭代步骤完成，涉及原始数据验证、原始数据记录、代表性、完整性、与 ISO 14040 和 14044 有关的建模的一致性。

## Data sources
- 樊栓狮;梁华杰;郎雪梅;王燕鸿; 天然气水合物开采的全生命周期分析. 天然气化工(C1化学与化工) 73–78 (2010).
