# 轧钢;粗钢;热轧

Dataset: ILCD process, Unit process, single operation
Geography: CN
Reference year: 2020
Classification: Unit processes / Materials production / Metals and semimetals
Generated by: 纪伟, 1299801467@qq.com
Owner: 天工LCI数据工作小组
Review: Dependent internal review by 天工LCI数据工作小组
Amounts: no units in this file; such an amount is in the reference unit of its flow, which a separate flow dataset defines
copyright: false
licenseType: Free of charge for all users and uses

## General comment
该数据集代表钢铁制造中粗钢的热轧工艺。它通常应用于钢铁生产的初始阶段，通过热轧技术将粗钢加工成半成品，如板材、卷材或带材。这些半成品钢材随后用于各个行业制造建筑材料、汽车零部件、管道和机械制造等。

## Time period
论文提到钢铁企业环境总体数据为1998年的吨钢环境基础数据。

## Reference product
- Steel hot rolled coil: 1000; calculated

## Inputs
All rows: calculated
- freshwater,freshwater: 600
- compressed air: 20
- Refractory: 0.6
- oxygen: 0.1
- Electricity: 432
- Blast furnace gas: 74

## Outputs
- carbon dioxide (fossil): 70.2; calculated
  原文未区分bio和fossil，根据专家判断此处为carbon dioxide (fossil)
- sulfur dioxide: 0.15; calculated
- Nitrogen oxides: 0.13; calculated
- Sinter / Pellet Dust: 0.02; calculated

## Use advice
使用此数据集进行生命周期评估（LCA）时，用户应注意环境数据的基准年是1998年。这反映了那一时期的技术实践和环境影响。用户必须考虑数据的时间相关性，并在必要时更新数据以反映当前技术和环保法规。此外，为了精确的LCA，用户应包括热轧过程中的能耗、排放和废物生成。在钢铁生产生命周期内，还必须考虑潜在的共产品分配和回收实践。

## Review details
清单： 内部审查通过几个迭代步骤完成，涉及原始数据验证、原始数据记录、代表性、完整性、与 ISO 14040 和 14044 有关的建模的一致性。

## Data sources
- 梁田. 基于生命周期评价的典型钢铁企业环境影响评估及绿色发展研究. (郑州大学, 2020).
