# 水泥生产;水泥, 硅酸盐水泥, 52.5RMPa;现代干法, 回转窑, 5000 t/d

Dataset: ILCD process, Unit process, black box
Geography: DL-LN-CN
Classification: Materials production / Other mineralic materials
Generated by: 杨思琪, ysqsophia@gmail.com
Owner: 天工LCI数据工作小组
Review: Dependent internal review by 天工LCI数据工作小组
Amounts: no units in this file; such an amount is in the reference unit of its flow, which a separate flow dataset defines
copyright: false
licenseType: Free of charge for all users and uses

## General comment
公司现有一条5000t/d规模的现代干法生产线。原料磨采用先进的德国莱歇公司的立式四辊磨，规格为LM60.4。熟料煅烧采用了先进的新型窑外分解技术。

## Geography
大连水泥公司

## Technology and included processes
公司现有一条 5000t/d 规模的现代干法生产线，如图 6.5 所示。原料磨采用先进的德国莱歇公司的立式四辊磨，规格为 LM60.4，如图6.6 所示。熟料烧采用了先进的新型窑外分解技术。

## Technical purpose
大连水泥公司(DCGC)生产的水泥采用现代干法和回转窑工艺，适用于要求使用高强度水泥的基础设施和建筑施工，如大型工业项目、高层建筑和桥梁、大坝等大型基础设施工程。特定的高强度产品，如52.5RMPa硅酸盐水泥，也可用于特殊应用，比如油井水泥以及在具有侵蚀性的环境中的抗硫水泥。

## Model description
未采用LCA方法建模。

## Reference product
- cement, portland cement, 52.5RMPa: 1000
  水泥，PⅡ 52.5R

## Inputs
- limestone, crushed, for mill: 1159
  石灰石
- clay: 216.5
  粘土
- iron, powder: 45.2
  铁粉
- gypsum stone (CaSO4-dihydrate): 30
  石膏
- electricity, medium voltage: 418.824
  电
- hard coal: 147.5
  原煤

## Outputs
- sulfur dioxide: 0.3372
  SO2。建材制品生产过程中排放的SO2主要来源于燃料和原料中所含的硫化物。
- Nitrogen oxides: 0.2069
  NOx。建材制品生产过程中排放的NOx来源主要两种途径。第一种，在高温状态下，空气中的N与O2化合而成，与温度高低有着直接关系。第二种，燃料中的N与O2低温化合而成，与O2的浓度有关系。
- carbon dioxide: 756.339
  CO2。建材工业CO2的产生途径主要来源于燃料燃烧和原材料分解。
- particles (> PM10): 0.4509
  粉尘。建材制品生产过程中粉尘的产生与原材料中粉状物含量有关。未标明粒径，按PM>10处理。
- chemical oxygen demand: 4.7163e-5
  化学需氧量（mg/l）。化学需氧量（COD）是指采用强氧化剂处理废水时，所消耗的氧化剂的量。用它来衡量废水受有机物污染的指标，化学需氧量越大说明废水污染越严重。
- Suspended solids, unspecified: 1.641e-5
  悬浮物（SS）（mg/l）。建材工业废水排放中的悬浮物主要是指不溶于水的无机物、有机物、泥沙、粘土、微生物等。
- Oils, unspecified: 2.43e-8
  石油类（mg/l）。废水中的油类污染物主要米源于钢铁、焦化、石油化工等生产企业。根据油滴粒径的出大到小，油类物质在废水中有三种存在形式：上浮油、分散油、乳化油，其从废水中的分离难度也依次递增。
- particles (> PM10): 87.2125
  固废，文中指生产过程中产生的扬尘等固体废弃物。未标明粒径，按PM>10处理。

## Data selection and combination
水泥产品评价指标数据通过到水泥生产企业实地调研获得，指标数据来自于企业生产工艺数据。由于缺乏具体的工业污染物排放统计数据，数据收集过程十分困难，部分数据无法直接获取，因此采用相关能源与原材料折算的方式获取。

## Sampling procedure
DCGC始建于1907年，为国家重点水泥骨干企业之一，该生产线设计生产能力为日产熟料5500吨，年产水泥200多万吨。主要产品有《海鸥牌》PO32.5R型、PO42.5R型普通硅酸盐水泥、A级油井水泥G级中、高抗硫油井水泥、大坝水泥。《五羊牌》波特兰水泥：《远洋牌》PO32.5R型、PO42.5R型普通硅酸盐水泥、PS32.5R型水泥。DCGC公司注册资本人民币48.90亿元，厂区占地37万平方米。公司现有从业人员434人。年产熟料155吨，年产水泥182万吨。

## Use advice
在使用大连水泥公司水泥生产数据进行生命周期评估或其它环境分析时，需考虑现代干法生产线和回转窑技术的特定特性与排放。请注意，直接污染物排放数据不可用，提供的数据基于能源和原材料转换率。由于这种间接的数据收集方法，环境影响的准确性可能有限。建议在可能的情况下用更新和区域特定的信息补充这些数据。此数据集没有采用LCA建模，用户可能需要应用自己的LCA模型来准确评估环境性能。

## Review details
清单： 内部审查通过几个迭代步骤完成，涉及原始数据验证、原始数据记录、代表性、完整性、与 ISO 14040 和 14044 有关的建模的一致性。

## Data sources
- 李礼. (2012). 建筑材料绿色性的6E综合评价体系研究 [博士, 大连理工大学].
