# 土壤原位修复;土壤生物通风;污染土壤得到修复

Dataset: ILCD process, Unit process, single operation
Geography: CA
Reference year: 2007
Classification: Unit processes / Other Services / Repair and maintenance
Generated by: 王宁, wang_ning@caep.org.cn
Owner: 天工LCI数据工作小组
Review: Dependent internal review by 天工LCI数据工作小组
Amounts: no units in this file; such an amount is in the reference unit of its flow, which a separate flow dataset defines
copyright: false
licenseType: Free of charge for all users and uses

## General comment
使用电力运行生物通风系统，污染土壤得到修复

## Geography
The contaminated area was located 600 m from a river shore in the northern part of the prov-ince of Quebec， Canada.

## Technology and included processes
使用电力驱动土壤通风系统，使受污染的土壤得到修复

## Technical purpose
该描述的过程是一种环境修复技术，专注于土壤原位修复，尤其是生物通风。该过程利用电力生物通风系统通过增强土壤中原生微生物群体的活性来处理受污染的土壤。此技术常用于化学污染物影响土地的修复，使土壤再次适宜用于农业、建设或自然栖息地等多种用途。

## Reference product
- Remediated soil: 1; estimated
  得到修复的土壤

## Inputs
- Electricity: 174000; estimated
  生物通风系统运行所消耗的电力
- contaminated soil: 1; estimated
  受污染的土壤
- injection well: 1; estimated
- Treatment facilities: 1; estimated

## Use advice
为有效使用此生命周期评估（LCA）数据集，用户必须注意几个因素。数据集专为生物通风修复项目设计，可能不适用于其他形式的土壤修复。数据使用者应确保数据集的上下文与其预期的应用相匹配，同时考虑地理位置（加拿大魁北克省北部河岸附近）以及土壤中存在的污染物类型。在建模修复过程影响时，要考虑当地电网组合，因为它会影响修复过程的总体环境足迹。另外，在考虑将回收纳入生命周期评估时，应考虑所处理土壤的特定生命周期终端情境。

## Review details
清单： 内部审查通过几个迭代步骤完成，涉及原始数据验证、原始数据记录、代表性、完整性、与 ISO 14040 和 14044 有关的建模的一致性。

## Data sources
- Cadotte, M., Deschênes, L. & Samson, R. Selection of a remediation scenario for a diesel-contaminated site using LCA. Int J Life Cycle Assess 12, 239–251 (2007).
