# 电力生产 ; 火电 ; 吉林

Dataset: ILCD process, Unit process, single operation
Geography: JL-CN
Reference year: 2019
Classification: Unit processes / Energy carriers and technologies / Electricity
Generated by: 熊若熙, xiongrx0126@163.com
Owner: 天工LCI数据工作小组
Review: Dependent internal review by 天工LCI数据工作小组
Amounts: no units in this file; such an amount is in the reference unit of its flow, which a separate flow dataset defines
copyright: false
licenseType: Free of charge for all users and uses

## General comment
火电发电包括原煤、洗煤、石油、天然气等十七种化石燃料。该过程只考虑直接发电过程，不考虑上游原材料开采加工和下游消费

## Time period
根据2019年能源统计年鉴数据计算

## Technical purpose
所描述的火电发电过程通过燃烧原煤、洗煤、石油、天然气等十七种化石燃料，在吉林省生产电力。它为住宅、商业和工业需求提供电力。数据集代表通过燃烧十七种化石燃料特别是适用于大规模电力供应网络的电力生成。

## Reference product
- electricity for thermal power: 3.6; calculated

## Inputs
All rows: calculated
- Raw coal: 0.481767
- Other Washed Coal: 0.0127396
- Gangue, in ground: 0.0416192
- Coke oven gas: 0.003834
- blast furnace gas: 0.010173
- Converter gas: 0.000494
- Diesel: 4.175e-5
- fuel oil, unspecified: 5.273e-5
- refinery gas: 0.00053613
- natural gas: 0.001483

## Outputs
- carbon dioxide (fossil): 1.08909; calculated
- sulfur dioxide: 0.000186345; calculated
- Nitrogen oxides: 0.000294169; calculated
- particles (> PM10): 3.6203e-5; calculated

## Data treatment and extrapolations
核算方法参考《企业温室气体排放核算方法与报告指南 发电设施》。不同形式发电量及燃料用量来自于《中国能源统计年鉴 2020》中的第三章（能源生产） 和第六章（地区能源平衡表）。用于计算二氧化碳排放因子的低位发热量、单位热值含碳量等燃料参数来自于《2019 年度中国区域电网二氧化碳基准线排放因子 OM 计算说明》、《企业温室气体排放核算方法与报告指南 发电设施》

## Use advice
用户在评估直接发电操作时应使用数据集，而不考虑上游原材料开采或下游电力消费。该数据基于2019年能源统计年鉴，排放因素来自区域电网基线报告和企业指南。当对发电设施进行建模时，应特别注意参考温室气体核算方法的方法学建议。

## Review details
清单： 内部审查通过几个迭代步骤完成，涉及原始数据验证、原始数据记录、代表性、完整性、与 ISO 14040 和 14044 有关的建模的一致性。

## Data sources
- 熊若熙. 中国电力生产和消费二氧化碳与污染物排放因子核算. (清华大学, 2023).
