# 水泥生产;水泥, 硅酸盐水泥;燃烧后二氧化碳捕获

Dataset: ILCD process, Unit process, black box
Geography: CN
Reference year: 2008
Classification: Unit processes / Materials production / Other mineralic materials
Generated by: #REF!, ysqsophia@gmail.com
Owner: 天工LCI数据工作小组
Review: Dependent internal review by 天工LCI数据工作小组
Amounts: no units in this file; such an amount is in the reference unit of its flow, which a separate flow dataset defines
copyright: false
licenseType: Free of charge for all users and uses

## General comment
采用后燃烧碳捕集和储存（post-combustion carbon capture and storage）技术的水泥生产。对于燃烧后CO2捕集技术，排放到大气之前添加CO2分离过程。分离后的高纯度CO2经过压缩后可以进行运输和储存。化学吸收目前是从低压和低浓度烟气中捕集CO2的最常用方法，MonoEthanolAmine（MEA）是最常用的吸附剂。因此，MEA吸附方法被选为燃烧后CO2捕集技术的案例研究。MEA CO2捕集需要额外的能量，因为CO2被MEA吸收后需要大量的低压蒸汽对MEA进行再生。我们假设蒸汽将由现场的联合发电工厂供应，并且该工厂还可以满足水泥工厂的燃烧后捕集过程和其他生产过程的电力需求。窑气中的NOx和SO2会对MEA吸收过程产生负面影响，因此在将烟气传递到CO2捕集单元之前，它们必须降到所需水平。选择性催化还原（Selective catalytic reduction，SCR）单元被考虑用于消除NOx，烟气脱硫单元被考虑用于从烟气中去除SO2。

## Geography
http://documents.ieaghg.org/index.php/s/YKm6B7zikUpPgGA?path=%2F2008

## Technology and included processes
For post-combustion CO, capture technology, a CO, separation process is added before the fluegas is discharged to the atmosphere. The separated high-purity CO,, after being compressed, canthen be transported and stored. Chemical absorption is currently the most widely used method forcapturing CO, from low pressure and low concentration flue gases, and MEA is the most widely useochemical adsorbent (191. Therefore, the MEA adsorption method was selected as a case study forpost-combustion CO, capture technology. Extra energy is required for MEA CO, capture because MEAhas to be regenerated by a large amount of low-pressure steam after the CO, has been absorbed in theMEA. We assumed that steam will be supplied by an onsite combined heat and power (CHP) plantand that the plant can also meet the power requirements of the post-combustion capture process ancother production processes in the cement plant. NOx and SO, in the kiln flue gas can have negativeimpacts on the MEA absorption process, so they have to be reduced to the required level before theflue gas is passed to the CO capture unit. In this study, a selective catalytic reduction (SCR) unit isconsidered to eliminate NO and a flue gas desulphurization (FDG) unit is considered to remove SOfrom the flue gas.

## Technical purpose
本描述的硅酸盐水泥生产过程旨在每年生产100万吨水泥。该过程融合了燃烧后二氧化碳捕获和储存（CCS）技术，以减少CO2排放，使用的化学吸附剂为单乙醇胺（MEA）。它专门为目标是减少CO2排放的应用设计，如在严格排放法规的环境中。所生产的水泥含91%熟料，适用于考虑减少环境影响的建筑用途。

## Reference product
- cement, portland cement: 1000
  水泥产品。数据来源于IEA温室气体研发计划（IEA GHG）的技术报告《Cement Industry中的CO2捕捉》（2008年）。在线可获取：http://documents.ieaghg.org/index.php/s/YKm6B7zikUpPgGA?path=%2F2008（访问日期：2017年9月5日）。

## Inputs
- hard coal; 26.3 MJ/kg: 291.6
  煤炭。数据来源于IEA温室气体研发计划（IEA GHG）的技术报告《Cement Industry中的CO2捕捉》（2008年）。在线可获取：http://documents.ieaghg.org/index.php/s/YKm6B7zikUpPgGA?path=%2F2008（访问日期：2017年9月5日）。
- Petroleum Coke: 31.9
  石油焦。数据来源于IEA温室气体研发计划（IEA GHG）的技术报告《Cement Industry中的CO2捕捉》（2008年）。在线可获取：http://documents.ieaghg.org/index.php/s/YKm6B7zikUpPgGA?path=%2F2008（访问日期：2017年9月5日）。
- Electricity: -81.828
  电。数据来源于IEA温室气体研发计划（IEA GHG）的技术报告《Cement Industry中的CO2捕捉》（2008年）。在线可获取：http://documents.ieaghg.org/index.php/s/YKm6B7zikUpPgGA?path=%2F2008（访问日期：2017年9月5日）。
- limestone, crushed, for mill: 1258.51
  石灰石。数据来源于IEA温室气体研发计划（IEA GHG）的技术报告《Cement Industry中的CO2捕捉》（2008年）。在线可获取：http://documents.ieaghg.org/index.php/s/YKm6B7zikUpPgGA?path=%2F2008（访问日期：2017年9月5日）。
- ferric oxide: 7.47
  氧化铁。数据来源于IEA温室气体研发计划（IEA GHG）的技术报告《Cement Industry中的CO2捕捉》（2008年）。在线可获取：http://documents.ieaghg.org/index.php/s/YKm6B7zikUpPgGA?path=%2F2008（访问日期：2017年9月5日）。
- gypsum stone (CaSO4-dihydrate): 23.63
  石膏。数据来源于IEA温室气体研发计划（IEA GHG）的技术报告《Cement Industry中的CO2捕捉》（2008年）。在线可获取：http://documents.ieaghg.org/index.php/s/YKm6B7zikUpPgGA?path=%2F2008（访问日期：2017年9月5日）。
- ammonia, anhydrous, liquid: 1.85
  氨。数据来源于IEA温室气体研发计划（IEA GHG）的技术报告《Cement Industry中的CO2捕捉》（2008年）。在线可获取：http://documents.ieaghg.org/index.php/s/YKm6B7zikUpPgGA?path=%2F2008（访问日期：2017年9月5日）。
- Ethanolamine: 2.24
  单乙醇胺（MEA）。数据来源于IEA温室气体研发计划（IEA GHG）的技术报告《Cement Industry中的CO2捕捉》（2008年）。在线可获取：http://documents.ieaghg.org/index.php/s/YKm6B7zikUpPgGA?path=%2F2008（访问日期：2017年9月5日）。

## Outputs
- carbon dioxide (fossil): 1067.73
  二氧化碳捕获。数据来源于IEA温室气体研发计划（IEA GHG）的技术报告《Cement Industry中的CO2捕捉》（2008年）。在线可获取：http://documents.ieaghg.org/index.php/s/YKm6B7zikUpPgGA?path=%2F2008（访问日期：2017年9月5日）。
- carbon dioxide (fossil): 188.42
  二氧化碳排放。数据来源于IEA温室气体研发计划（IEA GHG）的技术报告《Cement Industry中的CO2捕捉》（2008年）。在线可获取：http://documents.ieaghg.org/index.php/s/YKm6B7zikUpPgGA?path=%2F2008（访问日期：2017年9月5日）。
- particles (PM2.5): 0.0109
  颗粒<2.5um。数据来自ecoinvent数据库，版本为Ecoinvent Database v3。在线可获取链接：http://www.ecoinvent.org/database/ecoinvent-33/ecoinvent-33.html（访问日期：2018年4月15日）。由于额外的烟气脱硫（FDG）和选择性催化还原（SCR）过程，后燃烧情况下颗粒物减少了50%。
- particles (> PM10): 0.0026
  颗粒>10um。数据来自ecoinvent数据库，版本为Ecoinvent Database v3。在线可获取链接：http://www.ecoinvent.org/database/ecoinvent-33/ecoinvent-33.html（访问日期：2018年4月15日）。由于额外的烟气脱硫（FDG）和选择性催化还原（SCR）过程，后燃烧情况下颗粒物减少了50%。
- particles (PM2.5 - PM10): 0.0036
  颗粒>2.5um，<10um。数据来自ecoinvent数据库，版本为Ecoinvent Database v3。在线可获取链接：http://www.ecoinvent.org/database/ecoinvent-33/ecoinvent-33.html（访问日期：2018年4月15日）。由于额外的烟气脱硫（FDG）和选择性催化还原（SCR）过程，后燃烧情况下颗粒物减少了50%。

## Sampling procedure
生产能力设定为每年生产1百万吨水泥，水泥产品中熟料的比例为91%。

## Use advice
在使用这份生命周期评估数据时，必须重点考虑所捕集的CO2和MEA再生过程所需的额外能源输入应当分别核算。现场热电联产（CHP）电厂生成的少量剩余电力被送往电网，其环境抵消并未在此数据中考虑。因此，用户必须根据他们特定的方法论框架处理这些方面。此外，数据指出NOx和SO2对MEA吸收过程的影响，建议在烟气进入CO2捕集单元前控制这些排放。在声明的技术适用性和操作条件的背景下谨慎使用这份数据。

## Review details
清单： 内部审查通过几个迭代步骤完成，涉及原始数据验证、原始数据记录、代表性、完整性、与 ISO 14040 和 14044 有关的建模的一致性。

## Data sources
- Jing An, Richard S. Middleton, & Yingnan Li. (2019). Environmental Performance Analysis of Cement Production with CO2 Capture and Storage Technology in a Life-Cycle Perspective. Sustainability 11, 2626.
