# 聚乙烯（PE）生产;聚乙烯 ;低压气相流化床 550000t/a

Dataset: ILCD process, Unit process, black box
Geography: CN
Reference year: 2009
Classification: Unit processes / Materials production / Plastics
Functional unit: 1 ton of polythene
Generated by: 程晓宇, xiaoyucheng@email.ncu.edu.cn
Owner: 天工LCI数据工作小组
Review: Dependent internal review by 天工LCI数据工作小组
Amounts: no units in this file; such an amount is in the reference unit of its flow, which a separate flow dataset defines
copyright: false
licenseType: Free of charge for all users and uses

## General comment
根据低压气相流化床聚合聚乙烯生产工艺，将聚乙烯生产过程的生命周期阶段分为以下几个子阶段，即：原油开采与运输、蒸馏精炼、乙烯制造、聚乙烯制造。

## Geography
我国东北某大型石化企业

## Time period
文献发表时间

## Technical purpose
采用低压气相流化床聚合工艺生产的聚乙烯用于生产各种产品，例如包装材料、容器、管道和汽车部件。这种聚乙烯可用于需要耐用、轻便和灵活塑料材料的工业和消费品。

## Reference product
- Polyethylene: 1000; measured

## Inputs
All rows: measured
- energy (recovered): 32300
- Gasoline (regular): 85.05
- Diesel: 56.81
- crude oil; 42.3 MJ/kg: 2326.28
- Light Hydrocarbon: 459.17
- naphtha: 1392.77
- Complement component 3 (C3): 72.48
- C4,C4: 442.87
- Hydrocracking Tail Oil: 565.13
- ethylene: 958.93
- butene: 37.07
- hexane: 20.07
- Butane: 2.4
- hydrogen: 0.11

## Outputs
All rows: measured
- carbon dioxide (fossil): 91.07
  原文未区分bio和fossil，根据专家判断此处为fossil
- sulfur dioxide: 0.63
- Nitrogen oxides: 1.03
- carbon monoxide (fossil): 2.64
  原文未区分bio和fossil，根据专家判断此处为fossil
- hydrocarbons (unspecified): 7.1
- Total Suspended Particles: 4.96
- waste water - untreated: 7.22
- Waste (solid): 77.53

## Data treatment and extrapolations
必要的补充和校正

## Use advice
在使用该聚乙烯生产过程的生命周期评估(LCA)数据时，需要考虑完整的生命周期阶段，包括原油开采与运输、蒸馏精炼、乙烯制造和聚乙烯制造。确保包括与这些阶段相关的所有环境影响，并根据与过程实施相关的特定地理和技术因素进行必要的调整。根据文献的发布日期，应考虑数据集的更新和更正，以保持数据的准确性。

## Review details
清单： 内部审查通过几个迭代步骤完成，涉及原始数据验证、原始数据记录、代表性、完整性、与 ISO 14040 和 14044 有关的建模的一致性。

## Data sources
- 李蔓, 王震 & 孙德智. 聚乙烯生产生命周期评价的研究. 环境科学与技术 191–195 (2009).
