# 修复后土壤;土壤异位修复;热脱附

Dataset: ILCD process, Unit process, single operation
Geography: CN
Reference year: 2022
Classification: Unit processes / Other Services / Repair and maintenance
Generated by: 王枫, wangfeng@caep.org.cn
Owner: 天工LCI数据工作小组
Review: Dependent internal review by 天工LCI数据工作小组
Amounts: no units in this file; such an amount is in the reference unit of its flow, which a separate flow dataset defines
copyright: false
licenseType: Free of charge for all users and uses

## General comment
异位热脱附修复1立方米污染土，通过上料机和传送装置，将污染土壤输送到回转窑，通入天然气，将污染土壤均 匀加热到设定的温度，并按照设定速率向窑尾输送至出料仓，在回转窑中使土壤中的污染物充分 气化挥发

## Geography
我国华东区域5 个污染土壤异位热脱附修复工程案例

## Technology and included processes
通过上料机和传送装置，将污染土壤输送到回转窑，通入天然气，将污染土壤均匀加热到设定的温度，并按照设定速率向窑尾输送至出料仓，在回转窑中使土壤中的污染物充分气化挥发

## Technical purpose
本工业过程详述了通过热脱附进行土壤异位修复的方法。此过程包括在回转窑中加热受污染的土壤到特定温度，使污染物蒸发。处理后的土壤有潜力重新作为建筑或景观的干净填充材料融入。数据集主要关联到中国华东地区使用天然气作为加热介质的修复项目。

## Reference product
- Remediated soil: 1; measured

## Inputs
All rows: measured
- Diesel: 0.0002
- Steel: 0.08
- natural gas,natural gas: 35
- Electricity: 5.4
- Pre-treatment Soil: 1

## Outputs
- Exhaust gas: 1; missing unimportant
  文中没有给出异位热脱附修复1m3污染土壤所生成的尾气量是多少，仅给出尾气净化的碳排放，所以将它认为是1项，而没有按体积计算

## Use advice
在使用此数据集进行生命周期评估（LCA）时，确保考虑热脱附过程的区域特pecific性，因为它是基于中国华东地区的案例。考虑到过程的能源来源是天然气，输出物特定于1立方米土壤的修复。在模型化系统边界时，包括将受污染土壤运输到处理设施的过程，以及处理后土壤的后续处理。在没有适当调整的情况下谨慎不要将数据概括为不同的土壤类型或污染物特征。

## Review details
清单： 内部审查通过几个迭代步骤完成，涉及原始数据验证、原始数据记录、代表性、完整性、与 ISO 14040 和 14044 有关的建模的一致性。

## Data sources
- 刘爽,陈盼,宋慧敏等.我国华东地区污染土壤异位热脱附修复碳排放及减排策略[J].环境工程学报,2022,16(08):2663-2671.
