# 页岩气生产;场地准备阶段;废水池建造

Dataset: ILCD process
Geography: SC-CN
Reference year: 2014
Valid until: 2016
Classification: Systems / Construction
Generated by: 洪溥, 15695258655@163.com
Owner: 天工LCI数据工作小组
Review: Dependent internal review by 天工LCI数据工作小组
Amounts: no units in this file; such an amount is in the reference unit of its flow, which a separate flow dataset defines
licenseType: Free of charge for all users and uses

## General comment
该数据集代表了中国四川和重庆页岩气提取地点的废水池建造阶段的环境影响。此数据与评估页岩气生产所需基础设施相关，并可用于类似提取站的环境研究和规划。

## Geography
我国页岩气开采工作目前集中在四川及重庆地区，选取四川及重庆的数据进行LCA计算。

## Time period
原始数据时间介于2014-2016之间

## Reference product
- Retention pond: 2200; min 3200; max 1200; uniform; measured
  场地准备阶段--废水池体积

## Inputs
All rows: uniform; measured
- #325 cement: 164000; min 110000; max 220000
  场地准备阶段--废水池建造消耗的水泥
- sand: 281000; min 189000; max 377000
  场地准备阶段--废水池建造消耗的沙子
- gravel: 485000; min 327000; max 651000
  场地准备阶段--废水池建造消耗的碎石
- freshwater: 77000; min 52000; max 103000
  场地准备阶段--废水池建造消耗的清水
- Diesel: 3791; min 2382; max 5238
  场地准备阶段--废水池建造中物料运输消耗的汽油
- Electricity: 1519.2; min 1022.4; max 2037.6
  场地准备阶段--废水池建造过程混凝土搅拌消耗的电能

## Use advice
用户应注意，原始数据的时间范围是2014年至2016年，并且可能不反映在此期间之后发生的建设实践或规定的变化。当将这些数据应用于当前或未来的项目时，用户必须考虑由于技术进步或更新的环境立法导致的环境影响潜在变化。数据集专门涉及四川和重庆地区；因此，在向其他地理位置推断时应谨慎，由于环境、技术和法规上下文的差异，可能不适用。

## Review details
清单： 内部审查通过几个迭代步骤完成，涉及原始数据验证、原始数据记录、代表性、完整性、与 ISO 14040 和 14044 有关的建模的一致性。

## Data sources
- Wang, J., Liu, M., McLellan, B. C., Tang, X. & Feng, L. Environmental impacts of shale gas development in China: A hybrid life cycle analysis. Resources, Conservation and Recycling 120, 38–45 (2017).
