# 华东水稻-冬小麦生产 ; 农作生产(水稻)

Dataset: ILCD process, Unit process, single operation
Geography: NJ-JS-CN
Reference year: 2015
Valid until: 2015
Classification: Unit processes / Materials production / Agricultural production means
Functional unit: 1 ton of rice and 1 ton of winter wheat
Generated by: Haoran Zhang, hrzhang@whu.edu.cn
Owner: 天工LCI数据工作小组
Review: Dependent internal review by 天工LCI数据工作小组
Amounts: no units in this file; such an amount is in the reference unit of its flow, which a separate flow dataset defines
copyright: false
licenseType: Free of charge for all users and uses

## General comment
农作生产系统的能源消耗则主要计算柴油、 农药使用产生的能源消耗。本研究中，农资和农 作生产系统的能源消耗主要通过公式 1 进 行 运 算 ， 农 资 生 产 阶 段 的 柴 油 、 电力资源消耗量参见McDougall［22］等 研 究 ( 表 2 和 表 3 ) ; 依 据 刘 洪 涛 等［23］的研 究 ( 表 4) ，可 以 计 算 出 1t 尿 素 ( 纯 N) 的耗能 情 况，根据单位作物产量所消耗的尿素 ( 纯 N) ，可得出农资生产系统的氮肥生产产生的 能耗; 农作阶段的柴油、农药等折能系数参见袁 包荣等［24］研究成果( 柴油和农药( kg·hm－2 ) 的折 能系数分别 42. 55 和 100. 5 MJ·kg－1)

## Technology and included processes
以 1t 水稻和 1t 冬小麦为 功能单位，研究该地区稻麦轮作系统生产 1t 水稻 和 1t 冬小麦的资源能耗与环境影响。农产品生命 周期的起始边界为与稻麦生命周期相关的能源原 料开采，终止边界为经过农作物种植栽培至收获 输出农作物产品和排放废气，具体包括农资生产 和农作生产两个系统

## Technical purpose
该工业流程数据代表了江苏省南京市江宁区82户农户的水稻及冬小麦的农作生产。数据覆盖了两年期间的耕作实践。这些生命周期评估数据对于关心水稻和冬小麦生产环境影响的利益相关者极有价值。这些数据对于评估包括复合肥料、尿素、杀虫剂（氧化乐果和辛硫磷）、除草剂（丁草胺和华星草克）的资源使用情况，以及将机械粉碎秸秆还田的做法，都十分相关。

## Reference product
- rice: 9360; measured

## Inputs
All rows: measured
- Diesel: 27.8
  水稻
- heavy fuel oil: 33.1
  水稻
- nitrogen: 300
  水稻
- phosphorus: 120
  水稻
- potassium chloride: 120
  水稻
- Bactericide: 2
  水稻
- Rice Seeds: 3.9
  水稻
- Insecticide: 0.1
  水稻
- Electricity: 263.16
  水稻

## Deviations from the LCI method approaches
农产品生命周期的起始边界为与稻麦生命周期相关的能源原料开采, 终止边界为经过农作物种植栽培至收获输出农作物产品和排放废气

## Data selection and combination
江苏省南京市江宁区82户农户近2年的投入产出抽样调查结果。化肥主要包括复合肥和尿素, 杀虫剂为氧化乐果和辛硫磷, 除草剂为丁草胺和华星草克等。田间秸秆全部采用机械粉碎还田

## Data treatment and extrapolations
对产品系统整个生命周期所有输入与输出的过程及进行运算的过程, 一般包括分类和特征化、标准化和加权评估

## Sampling procedure
江苏省南京市江宁区82户农户近2年的投入产出抽样调查结果

## Use advice
在使用该生命周期评估数据时，需要考虑数据的地理特异性及其与类似农业实践的相关性。该数据应被用于了解在水稻和冬小麦生产中涉及的物质和能量流动，并评估潜在的环境影响。必须考虑区域实践，例如所使用的肥料和杀虫剂种类，以及如将秸秆还田这类的文化实践。使用者应将数据与关于作物耕种过程的基准假设相结合，以便在更广泛的农业生命周期评估中进行适当的评估。请注意所应用的方法论框架：输入与输出的分类和特征化、标准化和加权评估。

## Review details
清单： 内部审查通过几个迭代步骤完成，涉及原始数据验证、原始数据记录、代表性、完整性、与 ISO 14040 和 14044 有关的建模的一致性。

## Data sources
- 胡乃娟,陈倩,朱利群.长江中下游稻-麦轮作系统生命周期环境影响评价——以江苏南京为例[J].长江流域资源与环境,2019,28(05):1111-1120.
