# 熟料生产;熟料;新型干法, 5000 t/d;粉煤灰

Dataset: ILCD process, Unit process, black box
Geography: HAIN-CN
Classification: Unit processes / Materials production / Other mineralic materials
Generated by: #REF!, ysqsophia@gmail.com
Owner: 天工LCI数据工作小组
Review: Dependent internal review by 天工LCI数据工作小组
Amounts: no units in this file; such an amount is in the reference unit of its flow, which a separate flow dataset defines
copyright: false
licenseType: Free of charge for all users and uses

## General comment
传统生产。

## Technical purpose
该数据集代表了使用新型干法和粉煤灰作为其中一个组分，以每天5000吨的产能，传统生产水泥熟料的过程。该过程意图用于建筑行业，创建各种类型的建筑材料，其中水泥是主要的粘合成分。

## Model description
功能单元定义：将1吨水泥熟料定义为功能单元。系统边界设置：该工厂的原材料被设定为生命周期的起点，而熟料水泥的产出被设定为终点。

## Reference product
- clinker: 1000
  熟料

## Inputs
- limestone, crushed, for mill: 1360
  石灰石
- clay: 95
  粘土
- ash: 65
  粉煤灰
- iron ore: 35
  铁石
- hard coal; 26.3 MJ/kg: 111
  煤炭
- Electricity: 306
  电力的平均消耗

## Outputs
- carbon dioxide (fossil): 276
  m-CO2。煤炭燃烧的二氧化碳排放量（mc）用热碳当量法计算。mc=标准煤x2.93x10^7×8.494x10^-8=标准煤×2.489，其中1J热量释放相当于8.494×10^-8kg的CO2。1kg标准煤相当于2.93 × 10^7 J的热量（热值）。
- carbon dioxide (fossil): 539
  n-CO2。石灰石分解产生的CO2排放量（nc）采用公式计算。nc=石灰石消耗量x90%x44%=石灰石消耗量x0.396，其中石灰石中CaCO3的百分比为90%。CaCO3中CO2的百分比为44%。
- sulfur dioxide: 1.02
  SO2。SO2的排放数据主要来自工厂的在线监测系统。
- Nitrogen oxides: 1.81
  NOx。NOx的排放数据主要来自工厂的在线监测系统。
- particles (> PM10): 0.06
  粉尘，未标明粒径，按PM>10处理。。粉尘的排放数据主要来自工厂的在线监测系统。

## Data selection and combination
水泥生产的其他原料来自于海南某矿山。

## Sampling procedure
在海南省某市选取一家5000吨/天新型干法水泥生产线的水泥厂并对其进行试验。

## Use advice
使用此数据集时，用户应注意功能单元定义为1吨水泥熟料。系统边界从海南某矿山提取原材料到熟料水泥的最终生产设置。用户应确保在这些边界内的所有相关过程和能量输入都包含在评估中。同时考虑运输原材料和使用粉煤灰的环境影响也是相当重要的。为了进行完整的生命周期评估，应该分别纳入下游过程，例如熟料的运输、水泥制造和潜在的回收情景。

## Review details
清单： 内部审查通过几个迭代步骤完成，涉及原始数据验证、原始数据记录、代表性、完整性、与 ISO 14040 和 14044 有关的建模的一致性。

## Data sources
- Kan Fu, Xiao Yu Ren, Jin Quan Lin, & Ping Yue. (2013). Comparative Analysis of Environmental Impacts between Dregs Disposal and Conventional Cement Production by Life Cycle Assessment (LCA). Advanced Materials Research 777, 461–466.
