# 水泥生产;水泥, 复合硅酸盐水泥;新型干法, 水泥窑协同处置工业固体废弃物;混合固废

Dataset: ILCD process, Unit process, black box
Geography: CN
Reference year: 2012
Classification: Unit processes / Materials production / Other mineralic materials
Generated by: #REF!, ysqsophia@gmail.com
Owner: 天工LCI数据工作小组
Review: Dependent internal review by 天工LCI数据工作小组
Amounts: no units in this file; such an amount is in the reference unit of its flow, which a separate flow dataset defines
copyright: false
licenseType: Free of charge for all users and uses

## General comment
案例企业配备有4500t/d新型干法水泥熟料生产线。案例为有水泥窑协同处置工业固体废弃物水泥生产系统。

## Geography
东北某水泥厂

## Technical purpose
该工业过程生产的复合硅酸盐水泥用于各种建筑项目，包括住宅和商业基础设施建设。在生产过程中，水泥窑协同处置工业固体废弃物的做法符合可持续废物管理实践，并通过回收材料为最终产品增值。

## Model description
系统边界为水泥厂水泥生产系统。

## Reference product
- cement, portland-composite cement: 1000
  水泥产品

## Inputs
- limestone, crushed, for mill: 1128.05
  石灰石
- shale: 1.23171
  页岩
- silica stone: 17.8049
  硅石
- iron, powder: 27.3171
  铁粉
- gypsum stone (CaSO4-dihydrate): 52.2561
  石膏
- ash: 124.39
  粉煤灰
- blast furnace slag: 204.268
  矿渣
- waste clay: 1.04878
  废白土
- Coating slag: 0.160366
  涂料渣
- refinery sludge: 5.26829
  废油泥
- Catalyst waste: 2.11585
  废催化剂
- soil, contaminated: 5.26829
  污染土壤
- digester sludge: 15.7927
  消化污泥
- hard coal; 26.3 MJ/kg: 98.4146
  煤炭。年耗煤用能=（1.614E+8）kg×（2.149E+7）J/kg（平均地位热值）（3.7E+15）J。
- Diesel oil: 4.18659
  柴油。柴油=（6.866E+6）kg×（46.04）MJ/kg（燃烧值）=（3.16E+8）MJ。
- Electricity: 338.488
  总耗电量。年耗电能=（1.542E+8）kWh×（3.60E+6）J/kWh=（5.55E+14）J。
- tap water: 251.22
  原文是总水量，即自来水。

## Outputs
- carbon dioxide (fossil): 884.146
  CO2
- sulfur dioxide: 0.328659
  SO2
- Nitrogen oxides: 1.11585
  NOx
- particles (> PM10): 0.853659
  粉尘，未标明粒径，按PM>10处理。

## Use advice
在使用此工业过程的数据集时，用户应考虑水泥在不同建筑环境中的使用阶段行为。应注意复合硅酸盐水泥的特定特性，尤其是协同处理的废物如何影响最终产品的性能、耐久性和环境影响。还应考虑任何关于在水泥生产中使用工业固体废弃物的地区性法规，以及需要仔细表征废物流。

## Review details
清单： 内部审查通过几个迭代步骤完成，涉及原始数据验证、原始数据记录、代表性、完整性、与 ISO 14040 和 14044 有关的建模的一致性。

## Data sources
- 邵帅. (2016). 基于Emergy和Em-LCA的水泥企业可持续发展水平评价 [硕士, 大连理工大学].
