# Basalt continuous fiber production ; CN

Dataset: ILCD process
Geography: CN
Classification: Materials production / Other mineralic materials
Generated by: Jiaqi Lu, wilsherelu@foxmail.com
Owner: Tiangong LCI Data Working Group
Review: Dependent internal review by Tiangong LCI Data Working Group
Amounts: no units in this file; such an amount is in the reference unit of its flow, which a separate flow dataset defines
copyright: false
licenseType: Free of charge for all users and uses

## Reference product
- Basalt Fiber: 1000; missing unimportant
  Basalt continuous fiber products

## Inputs
All rows: missing unimportant
- basalt: 1060
  basalt ore
- water: 7.65e7
  tap water
- electricity mix: 1969.52
  Power consumption
- natural gas: 497.8
- cartonboard boxes; mixed technology; production mix, a plant, 46% primary fibre, 54% recovered fibre: 0.00989
  Carton)

## Outputs
All rows: missing unimportant
- Nitrogenous Matter (unspecified, as N): 0.17
  Ammonia nitrogen [discharge to water (unspecified type)
- nitrous oxide: 0.76
  Nitrogen oxides [emission to atmosphere (unspecified type)]
- sulfur dioxide: 0.27
  Sulfur dioxide [emission to atmosphere (unspecified type)]
- chemical oxygen demand: 5.77
  Chemical oxygen demand [discharge to water (unspecified type)]
- Particles (PM0.2 - PM2.5): 0.26
  Total particulate matter [emissions to atmosphere (unspecified type)
- volatile organic compound: 0.13
  volatile organic compound [emitted to atmosphere (unspecified type)]
- Sludge (from processing): 3.11

## Review details
Inventory: The internal review was done by several iteration steps concerning raw data validation, raw data documentation, representativity, completeness and consistency of modelling with regard to ISO 14040 and 14044.

## Data sources
- 玄武岩连续纤维生产项目环评报告公示
