# 开采阶段;钻井液;低渗气田;废弃钻井液钻井

Dataset: ILCD process, Unit process, single operation
Geography: EEDS-NMG-CN
Reference year: 2014
Classification: Materials production / Non-energetic raw materials
LCI method principle: Attributional
LCI method approaches: Consequential
Generated by: 李梓萌, 1577978537@qq.com
Owner: 天工LCI数据工作小组
Review: Dependent internal review by 天工LCI数据工作小组
Amounts: no units in this file; such an amount is in the reference unit of its flow, which a separate flow dataset defines
copyright: false
licenseType: Free of charge for all users and uses

## General comment
全井钻进过程中无废弃固相和液相落地。钻井液不落地技术减少了挖泥浆池的工作量,实现了钻井施工过程中废弃钻井液的零排放,减少了其对环境造成的损害,完钻后地面完全恢复钻前状态;废弃钻井液的重复利用,还可大幅减少钻井成本投入

## Geography
大牛地气田位于陕蒙交界地区，属于鄂尔多斯盆地，是 中国石油化工股份有限公司华北分公司 开发地区之一。大牛地气田“十二五”期间计划部署水平井723口，新建天然气产能66.5×108m3，天然气产量达214×108m3。2012年，按会战要求大牛地气田实现了年产天然气30×108m3，完钻水平井119口，平均完钻井深3 992.21 m，平均水平段长1 131.13 m，是国内第1个实现水平井规模开发的低渗气田。

## Technical purpose
本工业流程涉及低渗气田的开采阶段，特别是钻井操作中钻井液的使用。最新技术确保无废弃钻井液排放至地面，采用不落地技术提高了环境保护能力，避免了土壤和地下水污染并可在钻井后恢复现场。此外，钻井液的重复利用大幅降低了操作成本。该数据反映了大牛气田的实践，展示了中国天然气提取方法论的横向油井大规模开发和进步。

## Reference product
- LPG - liquefied petroleum gas: 1.0845e6; uniform; article inperiodical
  大牛地气田“十二五”产生废弃钻井液

## Inputs
- LPG - liquefied petroleum gas: 1.446e8; uniform; article inperiodical
  大牛地气田“十二五”计划消耗化学药剂14.46×104t

## Use advice
数据用户应将此数据集特定于大牛气田，并不必然代表其他油田。在欣赏不落地钻井液技术的环境效益和成本节约的同时，用户需要确保其研究的背景与此场景观察到的条件和技术适用性一致。在尝试将这些结果推广到不同的地质或操作环境时，必须进行方法论调整。钻井液的重复使用也应作为减少废物和资源利用的一个重要部分纳入生命周期分析。

## Review details
清单： 内部审查通过几个迭代步骤完成，涉及原始数据验证、原始数据记录、代表性、完整性、与 ISO 14040 和 14044 有关的建模的一致性。

## Data sources
- 邓红琳,赵文彬,袁立鹤.钻井液不落地技术在大牛地气田的应用[J].断块油气田,2014,21(01):97-99.
