# 乙烯生产 ; 乙烯 ; 煤基甲醇制乙烯路线 ; 煤基甲醇

Dataset: ILCD process, Unit process, black box
Geography: EEDS-NMG-CN
Reference year: 2021
Classification: Energy carriers and technologies / Energetic raw materials
Functional unit: Define 1t of industrial grade ethylene product as a functional unit
LCI method principle: Attributional
LCI method approaches: Allocation - mass
Generated by: 任亚楠, renyn15@tsinghua.org.cn
Owner: 天工LCI数据工作小组
Review: Dependent internal review by 天工LCI数据工作小组
Amounts: no units in this file; such an amount is in the reference unit of its flow, which a separate flow dataset defines
copyright: false
licenseType: Free of charge for all users and uses

## General comment
中电投与道达尔煤制聚烯烃项目，80万吨/年烯烃，甲醇制烯烃技术

## Geography
内蒙古自治区鄂尔多斯市工业园区

## Time period
未提及，以文献发表时间代替

## Technology and included processes
煤基甲醇路径制乙烯的模型中采用煤气化合成气生成甲醇，再经MTO制备乙烯的工艺。原料煤经煤粉制备装置制备出合格的粉煤。在煤气化装置中，粉煤与来自空分装置的氧气，经干粉煤加压气化工艺生成粗煤气。粗煤气中的大部分送往一氧化碳变换装置，采用变换工艺将粗煤气中的部分CO变换为H2，变换气送往酸性气体脱除装置，采用低温甲醇洗工艺脱除变换气中的CO2、H2S等酸性气体，净化气输送至甲醇合成装置；剩余部分的粗煤气直接送往酸性气体脱除装置，脱除H2S后送热电站用于发电。脱除的含H2S送至硫回收装置回收，CO2部分返回煤气化装置。净化气去甲醇合成装置，生产粗甲醇，合成气去氢回收装置回收H2，其它部分在系统内循环或去全厂燃料气管网。粗甲醇经甲醇精馏装置后得到MTO级甲醇。MTO级甲醇进入甲醇制烯烃装置合成烯烃，生成乙烯及丙烯、C5等副产品。

## Technical purpose
该工业过程涉及通过煤基甲醇到乙烯（MTO）路线生产乙烯。该过程是旨在每年生成80万吨烯烃（特别是乙烯、丙烯和C5副产品）的项目的核心部分。通过这种方法生产的乙烯在制造聚烯烃中应用，并作为用于塑料工业、包装和农业中的各种化学品的前体。

## Reference product
- ethene (ethylene): 1000; measured
  乙烯

## Inputs
All rows: measured
- Methanol: 2690
  MTO级甲醇
- Hydrogen: 0.74
  氢气
- sodium hydroxide: 18.16
  氢氧化钠溶液
- Dimethyl disulfide: 0.07
  二甲基二硫
- Aluminum oxide (alumina): 0.000639
  催化剂Al2O3
- palladium: 4.08e-5
  催化剂Pd
- process steam: 3500
  蒸汽
- Water (desalinated; deionized): 1710
  中压锅炉给水
- Water for industrial use: 50
  生产水
- electricity mix: 862.092
  电

## Outputs
All rows: measured
- carbon dioxide: 60
  CO2
- nitrous oxide: 1e-5
  NOx
- non-methane volatile organic compounds: 1.54e-11
  NMVOC
- methane: 23.9
  CH4
- chemical oxygen demand: 0.23
  COD
- biological oxygen demand: 0.08
  BOD5
- Sodium hydroxide: 0.08
  NaOH
- waste water - untreated: 166.54
  MTO工艺废水
- Water (groundwater from technosphere, waste water): 1410.82
  汽提净化水
- waste water - untreated: 21.9
  含碱废水
- Waste Alumina Catalyst: 0.000639
  废Al2O3催化剂

## Deviations from the LCI method approaches
MTO级甲醇进入甲醇制烯烃装置合成烯烃，生成乙烯及丙烯、C5等副产品，本研究选择质量分配

## Data selection and combination
清单数据来源于年产80万吨聚烯烃的中电投乙烯项目

## Use advice
使用此LCA数据时，用户应注意库存数据来源于中电投的乙烯项目，该项目关注每年生产80万吨的聚烯烃。功能单位定义为1吨工业级乙烯产品。在此研究中选择了质量分配方法，以在主要产品和副产品之间分配环境负荷。用户在比较或将此数据整合到更广泛的评估中时，应确保他们应用相同的系统边界、分配方法和功能单位。还必须注意到技术参考时间框架，由于未特别提及，在本例中由文件的发表时间所替代。

## Review details
清单： 内部审查通过几个迭代步骤完成，涉及原始数据验证、原始数据记录、代表性、完整性、与 ISO 14040 和 14044 有关的建模的一致性。

## Data sources
- 赵悦如. 基于生命周期方法的乙烯生产环境影响分析. (大连理工大学, 2021).
