# 地下水异位修复;地下水抽出处理;得到修复的地下水

Dataset: ILCD process, Unit process, single operation
Geography: DK
Reference year: 2021
Classification: Unit processes / Other Services / Repair and maintenance
Generated by: 王宁, wang_ning@caep.org.cn
Owner: 天工LCI数据工作小组
Review: Dependent internal review by 天工LCI数据工作小组
Amounts: no units in this file; such an amount is in the reference unit of its flow, which a separate flow dataset defines
copyright: false
licenseType: Free of charge for all users and uses

## General comment
地下水抽出处理系统的运行，使地下水得到修复

## Technology and included processes
使用电力运行地下水抽出处理系统，使地下水得到修复

## Technical purpose
所提供的生命周期评估（LCA）数据描述了一个地下水异位修复工艺，特别是展示了旨在修复受污染地下水的地下水抽出处理系统的运行。该系统用于环境修复活动，并通常部署在地下水受到污染物负面影响的地区。修复后的地下水随后可用于多种用途，例如但不限于农业灌溉、工业应用和补充地方水资源。

## Reference product
- Remediated groundwater: 1; estimated

## Inputs
- Electricity: 35000; estimated
- contaminated groundwater: 1; estimated
- Extraction wel: 1; estimated
- Treatment facilities: 1; estimated

## Use advice
使用此LCA数据进行环境影响评估的用户应考虑地下水修复过程的整个生命周期，并确保包括抽水和处理系统的电耗以及与所用电力生成相关的任何排放。计算环保负担时考虑当地电力组合至关重要，以准确反映修复的影响。用户还应考虑设施和设备的生命周期结束阶段，以及因改善的地下水质量可能带来的补偿。

## Review details
清单： 内部审查通过几个迭代步骤完成，涉及原始数据验证、原始数据记录、代表性、完整性、与 ISO 14040 和 14044 有关的建模的一致性。

## Data sources
- Sustainable remediation assessment of a chlorinated ethene plume: method evelopment, application, and assessment
