# 稀土元素;稀土元素;基线;含稀土元素矿石的酸焙烧

Dataset: ILCD process, Unit process, single operation
Geography: NMG-CN
Reference year: 2012
Classification: Unit processes / Materials production / Inorganic chemicals
Functional unit: Not Mentationed
LCI method principle: Attributional
LCI method approaches: Allocation - market value
Generated by: 汪涛, twang@iue.ac.cn
Owner: 天工LCI数据工作小组
Review: Dependent internal review by 天工LCI数据工作小组
Amounts: no units in this file; such an amount is in the reference unit of its flow, which a separate flow dataset defines
copyright: false
licenseType: Free of charge for all users and uses

## General comment
该数据集描述了从露天矿中提取稀土元素（REE）的常规露天采矿过程。回收的矿石具有 4.1% 的稀土氧化物（REO）品位。此过程的主要应用是为生产各种与稀土相关的产品提供原料，例如氧化钕，随后被转化为用于各种技术应用的NdFeB磁铁，包括电机、风力涡轮和电子设备。

## Technology and included processes
使用传统的露天采矿技术（例如钻孔和爆破）从露天矿中回收矿石。该矿蕴藏矿石 7.5 亿吨，稀土品位 4.1%

## Reference product
- Rare Earth Oxides: 1; software or database
  REO

## Inputs
All rows: software or database
- transport in t*km,transport in t*km: 0.171
  lorry >16t
- transport in t*km,transport in t*km: 3.08
  freight, rail
- sulphuric acid: 1.55
- heavy fuel oil: 6.59
- Sulfidic tailing: 0.505
- Rare Earth Oxides: 1.11
  REO

## Outputs
- carbon dioxide (fossil): 0.154; software or database
  原文未区分bio和fossil，根据专家判断此处为fossil
- sulfur dioxide: 0.00911; software or database

## Deviations from the LCI method approaches
In this section, we discuss the life cycle inventory (LCI) in detail. Each subsection discusses one process of the LCA. Section 3.1 describes the conventional method of rare earths in China from mineral sources. Section 3.2 describes the production process used to transform neodymium oxide into an NdFeB magnet. Finally, section 3.3 describes two alternative recycling processes that could be used. Detailed information on the LCI, assumptions, and allocation choices can be found in the Supporting Information.

## Use advice
在生命周期评估（LCA）中使用此数据集时，必须考虑采矿过程的特定技术背景。数据集反映了常规的钻孔和爆破技术，并代表了一个具有 7.5 亿吨矿石储量、4.1% REO品位的基线情景。用户应注意，提供的数据仅涉及提取阶段，不包括下游加工或回收过程。LCA从业者在将此数据概括应用于其他具有不同矿石等级或采矿技术的稀土开采作业时应谨慎行事。应查阅支持信息中使用的假设和分配选择，以确保方法论的一致性。

## Review details
清单： 内部审查通过几个迭代步骤完成，涉及原始数据验证、原始数据记录、代表性、完整性、与 ISO 14040 和 14044 有关的建模的一致性。

## Data sources
- Sprecher, B. et al. Life Cycle Inventory of the Production of Rare Earths and the Subsequent Production of NdFeB Rare Earth Permanent Magnets. Environ. Sci. Technol. 48, 3951–3958 (2014).
