# 稀土破碎磨粉;镝;B/M;含稀土矿石

Dataset: ILCD process, Unit process, single operation
Geography: CN
Reference year: 2010
Valid until: 2019
Classification: Unit processes / Materials production / Non-energetic raw materials
Functional unit: The goal of this investigation is to compare environmental impacts related to the production of 1 kg Dy (functional unit) from IAC (Southern China), from B/M ore (Bayan Obo), and from an eudialyte deposit (Norra Kärr) using the LCA method
LCI method principle: Attributional
LCI method approaches: Allocation - mass
Generated by: 汪涛, twang@iue.ac.cn
Owner: 天工LCI数据工作小组
Review: Dependent internal review by 天工LCI数据工作小组
Amounts: no units in this file; such an amount is in the reference unit of its flow, which a separate flow dataset defines
copyright: false
licenseType: Free of charge for all users and uses

## General comment
稀土破碎磨粉过程针对的是从华南地区和白云鄂博矿石中提取和加工含稀土元素的矿石，特别是生产镝。镝在生产永磁体时经常使用，这些永磁体是电机、风力涡轮发电机和先进电子产品等多种高科技应用中的关键组件。

## Geography
华南地区和白云鄂博

## Technology and included processes
本次调查的目的是比较 IAC（中国南方）、B/M 矿石（白云鄂博）和 eudialyte 矿床（Norra Kärr）生产 1 千克镝（功能单位）的环境影响，使用生命周期分析法

## Reference product
- Ore pulp: 183.12; software or database
  Ore pulp. Milling: 150 km for the crushed ore

## Inputs
- Electricity: 7.632; software or database
  Crushing: value per crushing step estimated by experts from RWTH Aachen University 1.0 kWh/t ore (carbonatite)
- Steel: 0.043; software or database
  Steel. Crushing: low-alloyed, 0.035 kg/t ore estimated by experts from RWTH Aachen University
- transport in t*km,transport in t*km: 0.00084; software or database
  Crushing: transport, freight, lorry >32 metric ton, EURO3. 20 km assumed
- Electricity: 55.188; calculated
  Milling: own calculation with Bond index formula
- Electricity: 0.72; software or database
  Magnetic separation: calculation is based on a Selection Guide for Process Equipment, electricity mix 2014

## Outputs
- particles (> PM10),particles (> PM10),particles (>PM10): 3.777; calculated
  Dust. Crushing: dust (PM10), (PM2.5 - PM10), (PM2.5) Particles to air. Calculation is based on Western Regional Air Partnership (WRAPAIR, 2006), distribution of dust analog Althaus et al. (2007a)
- Radioactive dust, waste: 5.46; calculated
  Radioactive dust, waste. Crushing: Uranium (U238) [Radioactive emissions to air]. based on Th232 and U238 activity in the ore.
- Steel: 1.37; calculated
  Steel. Milling: calculation is based on Abrasion index
- water: 1335; measured
  Milling: production of ore pulp with 40 % milled ore
- transport in t*km,transport in t*km: 0.0273; software or database
  Milling: 20 km
- Iron oxide: 612; calculated
  Iron oxide. Magnetic separation: Iron oxide (II-oxide) [Inorganic intermediate products], calculation is based on ore concentration and yield
- Niobium oxide: 1.77; calculated
  Niobium oxide. Magnetic separation: Niobium oxide, calculation is based on ore concentration and yield
- tailings (unspecified): 365; calculated
  Magnetic separation: mass estimated by experts from RWTH Aachen University (Stark, 05.08.2015)
- Ore pulp: 2770; calculated
  Ore pulp. Magnetic separation: input for next process: Flotation

## Deviations from the LCI method approaches
In this study, an allocation method based on the mass of produced REEs combined with their market prices (based on an international metals market analysis and pricing index company ) are considered, as usual for metals with strongly different prices. As the ores have different compositions, the allocation factor has to be assessed individually for each site.

## Use advice
在使用这个生命周期评估（LCA）数据集来评估与生产镝相关的环境影响时，必须采用一种基于所产稀土元素的质量与其市场价格相结合的分配方法。因为不同地点矿石的组成各不相同，所以必须对每个地点的分配因素进行单独评估。确保方法论的途径与生命周期评估的既定国际准则相一致。由于镝和其他共同提取的稀土元素的经济重要性，特别注意系统边界定义和分配程序。

## Review details
清单： 内部审查通过几个迭代步骤完成，涉及原始数据验证、原始数据记录、代表性、完整性、与 ISO 14040 和 14044 有关的建模的一致性。

## Data sources
- Zapp, P., Marx, J., Schreiber, A., Friedrich, B. & Voßenkaul, D. Comparison of dysprosium production from different resources by life cycle assessment. Resources, Conservation and Recycling 130, 248–259 (2018).
