# 电力生产 ; 火电 ; 宁夏回族自治区

Dataset: ILCD process, Unit process, single operation
Geography: NX-CN
Reference year: 2019
Classification: Unit processes / Energy carriers and technologies / Electricity
Generated by: 熊若熙, xiongrx0126@163.com
Owner: 天工LCI数据工作小组
Review: Dependent internal review by 天工LCI数据工作小组
Amounts: no units in this file; such an amount is in the reference unit of its flow, which a separate flow dataset defines
copyright: false
licenseType: Free of charge for all users and uses

## General comment
火电发电包括原煤、洗煤、石油、天然气等十七种化石燃料。该过程只考虑直接发电过程，不考虑上游原材料开采加工和下游消费

## Time period
根据2019年能源统计年鉴数据计算

## Technical purpose
所描述的火电发电过程旨在使用原煤、洗煤、石油、天然气等多种化石燃料生产电力。该电力在宁夏回族自治区生成，可以用于各种商业、工业和居民用途。数据集代表了不考虑原材料提取、加工和下游消费生命周期阶段的直接电力生成。

## Reference product
- electricity for thermal power: 3.6; calculated

## Inputs
All rows: calculated
- Raw coal: 0.504562
- Other Washed Coal: 0.00371982
- Gangue, in ground: 0.00568364
- Coke oven gas: 0.000558
- blast furnace gas: 0.021246
- Diesel: 1.738e-5
- fuel oil, unspecified: 5.79e-6
- natural gas: 0.002621
- Natural gas, liquefied: 2.17e-6

## Outputs
- carbon dioxide (fossil): 0.95923; calculated
- sulfur dioxide: 0.000165855; calculated
- Nitrogen oxides: 0.000261863; calculated
- particles (> PM10): 3.1855e-5; calculated

## Data treatment and extrapolations
核算方法参考《企业温室气体排放核算方法与报告指南 发电设施》。不同形式发电量及燃料用量来自于《中国能源统计年鉴 2020》中的第三章（能源生产） 和第六章（地区能源平衡表）。用于计算二氧化碳排放因子的低位发热量、单位热值含碳量等燃料参数来自于《2019 年度中国区域电网二氧化碳基准线排放因子 OM 计算说明》、《企业温室气体排放核算方法与报告指南 发电设施》

## Use advice
使用此数据集时，请考虑它仅反映火力发电行业的直接发电阶段。它排除了原材料提取和加工等上游过程，以及下游电力消费。核算方法基于《企业温室气体排放核算方法与报告指南 发电设施》和《中国能源统计年鉴2020》。对于排放计算，请参阅指定的指南，以获取确定二氧化碳排放因子时使用的低位发热量和含碳量的详细信息。

## Review details
清单： 内部审查通过几个迭代步骤完成，涉及原始数据验证、原始数据记录、代表性、完整性、与 ISO 14040 和 14044 有关的建模的一致性。

## Data sources
- 熊若熙. 中国电力生产和消费二氧化碳与污染物排放因子核算. (清华大学, 2023).
