# 市政污水处理; 污水 ; AAO+MBR处理工艺（地下）

Dataset: ILCD process, Unit process, single operation
Geography: GZ-GD-CN
Classification: Unit processes / End-of-life treatment / Wastewater treatment
Generated by: 黄润垚, runyaoh@163.com
Owner: 天工LCI数据工作小组
Review: Dependent internal review by 天工LCI数据工作小组
Amounts: no units in this file; such an amount is in the reference unit of its flow, which a separate flow dataset defines
copyright: ['opt4ROkqig']
licenseType: Free of charge for all users and uses

## General comment
市政污水处理中，地下AAO+MBR处理工艺是一种先进的污水处理技术。该工艺首先采用AAO（厌氧-缺氧-好氧）进行生物降解和氨氮去除，然后将处理后的水送入MBR（膜生物反应器）进行膜过滤，以彻底去除悬浮物和微生物。在AAO过程中，污水在有氧条件下与生物膜接触，微生物降解有机物，同时氧化氨氮。而MBR系统利用微孔膜过滤器将水和污泥分离，从而实现了高效的固液分离和微生物的截留。这种地下处理工艺具有占地面积小、处理效率高、出水质量稳定等优点，适用于城市地下空间有限的污水处理需求。

## Geography
广州市白云区沙太北路以东、犀牛南路以北地段

## Technology and included processes
市政污水处理中，地下的AAO+MBR处理工艺具有以下技术特性：地下布置： AAO+MBR处理工艺通常被设计为地下布置，利用地下空间来容纳生物反应器和膜模块，减少地表占用，并保护设备不受外部环境影响。膜生物反应器（MBR）： 该工艺采用膜生物反应器（MBR）技术，通过微孔膜将水和微生物有效隔离，实现固液分离。膜模块需要定期清洗和维护，以确保其稳定的运行和长期使用寿命。厌氧-缺氧-好氧（AAO）处理工艺： AAO工艺结合了好氧和缺氧的处理区域，以在一个系统中实现有机物和氮、磷等营养物质的去除。操作中需要控制好氧区域和缺氧区域的氧气供应、混合速率和气液比等参数，以维持最佳的微生物生长环境和反应效率。操作条件： 对于AAO+MBR处理工艺的操作，需要定期监测和调整膜模块的通量、跨膜压差和清洗周期，以保证处理系统的稳定运行和高效处理效果。相关上游和下游过程： 该工艺的上游过程包括污水预处理，如筛网过滤、格栅过滤和沉淀，以去除大颗粒物和沉淀物。下游过程可能包括膜模块的清洗和维护，以及进一步的消毒或高级氧化等后续处理步骤，以确保最终的处理水质量符合排放标准。

## Technical purpose
本工艺描述的是结合了高级氧化过程（AAO）和膜生物反应器（MBR）的地下水处理设施。该单元过程位于广州市白云区沙太北路以东，犀牛南路以北的区域。这一工艺专用于处理市政或工业污水，有效去除有机污染物和病原体，使水能够适合再利用或安全排放到环境中。

## Reference product
- Wastewater: 0.1; input; measured

## Inputs
All rows: measured
- Secondary Steel Making Slag: 3.888e6
- aerated concrete block: 44110
- Compost: 17846
- Electricity: 2.9592e7, 1.89e7 (2 entries)
- chemical oxygen demand: 0.00027
- biological oxygen demand: 0.00016
- nitrogen, total (excluding N2): 3.5e-5
- ammonia: 3e-5
- Phosphorus: 4.5e-6
- Suspended solids, unspecified,Suspended solids, unspecified,Suspended solids, unspecified: 0.00022
- primary energy from geothermics: 2.304
- sodium hypochlorite: 41.7
- Poly Aluminum Chloride，PAC: 2320
- Gasoline (regular): 735

## Outputs
All rows: measured
- chemical oxygen demand: 2e-5
- nitrogen trifluoride: 5e-6
- nitrogen monoxide: 1.17e-5
- nitrogen, total (excluding N2): 3.2e-7
- Phosphorus: 3e-7
- carbon dioxide (biogenic): 5e-7
  原文未区分biogenic和fossil，根据专家判断此处为biogenic。
- Sludge: 56260
- municipal solid waste deposition: 5.97e7
- steel rebar: 1.477e6

## Use advice
在使用该工艺数据进行生命周期评估时，必须确保边界条件与预期应用相匹配。对于这一特定的地下AAO+MBR处理工艺，用户应考虑地理位置和处理污水的特性。在环境影响评估中考虑具体的地域性法规、技术规模和运行参数至关重要。此外，评估中还应考虑潜在的废泥处理和能源消耗，以确保全面分析。

## Review details
清单： 内部审查通过几个迭代步骤完成，涉及原始数据验证、原始数据记录、代表性、完整性、与 ISO 14040 和 14044 有关的建模的一致性。

## Data sources
- 郝晓地,于文波,王向阳等.地下式污水处理厂全生命周期综合效益评价[J].中国给水排水,2021,37(07):1-10.DOI:10.19853/j.zgjsps.1000-4602.2021.07.001.
