# 市政污泥处理与处置;湿污泥 含水率80%;焚烧

Dataset: ILCD process, Unit process, single operation
Geography: HAZ-ZJ-CN
Classification: Unit processes / End-of-life treatment / Waste water treatment
Functional unit: The system boundary is defined as the transport of wet sludge (80% moisture content) to the sludge treatment or disposal point to form a complete process route.
Generated by: 金思甜, 2331276@tongji.edu.cn
Owner: 天工LCI数据工作小组
Review: Dependent internal review by 天工LCI数据工作小组
Amounts: no units in this file; such an amount is in the reference unit of its flow, which a separate flow dataset defines
copyright: ['opt4ROkqig']
licenseType: Free of charge for all users and uses

## General comment
在整个工艺路线中，各环节的占地面积、能耗、温室气体、气体污染物排放均纳入环境影响评价范畴之内。

## Technology and included processes
每吨污泥完成单独焚烧处置所需外加燃油。

## Technical purpose
本数据集描述了市政污泥处理与处置过程，特指湿污泥含水率80%并运输至处理或处置设施进行焚烧的情况。这些数据与环境和废物管理专业人士处理高含水量市政废弃污泥的工作相关。

## Reference product
- Sludge: 1000; input; estimated
  湿污泥( 含水率为 80% )

## Inputs
- Diesel: 24.6; measured
  燃油
- Electricity: 50.4; measured

## Outputs
- carbon dioxide (biogenic): 227; measured
  原文未区分biogenic和fossil，根据专家判断此处为biogenic。
- 2,3,7,8-tetrachlorodibenzo-p-dioxin: 1.87e-12; missing unimportant
- copper: 0.01004; calculated
- lead: 0.00188; calculated
- zinc: 0.03362; calculated
- chromium: 0.00189; calculated
- nickel: 0.00072; calculated

## Use advice
使用此数据集的用户应确保系统边界维持如所定义，包括含水率80%的湿污泥运输至处理或处置设施。在应用这些数据时，考虑特定的焚烧技术至关重要，因为它可能会影响环境效果。用户还应注意有关污泥处理和焚烧排放处理的当地法规和标准。

## Review details
清单： 内部审查通过几个迭代步骤完成，涉及原始数据验证、原始数据记录、代表性、完整性、与 ISO 14040 和 14044 有关的建模的一致性。

## Data sources
- 刘洪涛,郑海霞,陈俊,等. 城镇污水处理厂污泥处理处置工艺生命周期评价[J]. 中国给水排水,2013,29(6):11-13. DOI:10.3969/j.issn.1000-4602.2013.06.003.
