# 水泥生产;水泥, 普通硅酸盐水泥, 42.5MPa;新型干法;混合固废

Dataset: ILCD process, Unit process, black box
Geography: CN
Reference year: 2004
Classification: Materials production / Other mineralic materials
Generated by: 杨思琪, ysqsophia@gmail.com
Owner: 天工LCI数据工作小组
Review: Dependent internal review by 天工LCI数据工作小组
Amounts: no units in this file; such an amount is in the reference unit of its flow, which a separate flow dataset defines
copyright: false
licenseType: Free of charge for all users and uses

## General comment
矿渣和粉煤灰替代粘土进行水泥生产。原料组分包括石灰石、石膏、粘土和铁粉等。在干法生产工艺中，除这些组分外，还包括掺入粉煤灰和矿渣等工业废渣。能源消耗包括各生产工序的电耗和煤耗，污染物则包括颗粒物、SO2、NOx和CO2等。

## Technical purpose
该数据集描述了一种42.5MPa强度级别的普通硅酸盐水泥的生产过程，该过程采用了新型干法并掺入了混合固体废料，特别是矿渣和粉煤灰。矿渣和粉煤灰被用来替代传统的粘土原料。所描述的水泥适用于一般建设目的，包括建筑物、桥梁、道路以及其他基础设施项目，这些项目需要较高的强度和耐久性。

## Model description
研究以1kg42.5等级硅酸盐水泥作为评价的功能单位。评价范围界定为水泥产品的厂内生产过程及其周边环境。其中，厂内生产过程是指原料依次经过预处理、生料粉磨、煅烧、熟料磨和水泥均化等工序最终成为水泥产品的生产全过程。水泥生产过程的周边环境是指外部资源和能源的投人和污染物的排放等。

## Reference product
- cement, ordinary portland cement, 42.5MPa: 1000
  1kg42.5等级硅酸盐水泥

## Inputs
- limestone, crushed, for mill: 1073.7
  石灰石
- gypsum stone (CaSO4-dihydrate): 51.1
  石膏
- iron, powder: 28.5
  铁粉
- ash: 98
  粉煤灰
- blast furnace slag: 137.6
  矿渣
- hard coal: 100.957
  标准煤。原始数据为0.0938kg标准煤，这里换算为硬煤，换算公式为1kg硬煤=0.929kg标准煤。
- electricity, medium voltage: 347.76
  电力

## Outputs
- particles (> PM10): 0.255
  颗粒物，未标明粒径，按PM>10处理。
- sulfur dioxide: 0.3501
  SO2
- Nitrogen oxides: 1.419
  NOx
- carbon dioxide: 807.3
  CO2

## Use advice
使用此数据集的用户应在评估时考虑包括外部资源投入和污染物排放等因素。数据集基于1kg 42.5等级硅酸盐水泥的功能单位评估，涉及水泥产品厂内生产过程及其周边环境。用户需计入原料预处理、生料粉磨、煅烧、熟料磨和水泥均化等过程。在输入混合组分中使用矿渣和粉煤灰等工业副产品的方法应用适应性应得到相应的体现。

## Review details
清单： 内部审查通过几个迭代步骤完成，涉及原始数据验证、原始数据记录、代表性、完整性、与 ISO 14040 和 14044 有关的建模的一致性。

## Data sources
- 朱天乐, 何炜, 曾小岚, 黄新, & 马保国. (2006). 中国水泥生产环境负荷研究. 环境科学, 10, 2135–2138.
