# Roasting and hydrometallurgy of REO|REO|bastnaesite route|REE containing ore

Dataset: ILCD process, Unit process, single operation
Geography: CN
Reference year: 2007
Valid until: 2020
Classification: Materials production / Other mineralic materials
Functional unit: The study considered 15 different functional units corresponding to different RE metals. The assessment included three main RE production sites in China: REO production in Bayan Obo, Sichuan, and IACs. Primary data were collected for foreground production processes from Chinese and further international scientific literature, industry reports, government and industry surveys. The authors assumed a baseline for aqueous and gaseous emissions using national discharge standards for industry from the Chinese Ministry of
LCI method principle: Attributional
LCI method approaches: Allocation
Generated by: Tao Wang, twang@iue.ac.cn
Review: Dependent internal review by Tiangong LCI Data Working Group
Amounts: no units in this file; such an amount is in the reference unit of its flow, which a separate flow dataset defines
copyright: false

## Geography
Bayan Obo, Chinese Southern Provinces

## Technology and included processes
Because no primary mining data from Bayan Obo were available, LCI data in the studies (Sprecher, Arshi, Marx, Bailey (Classen et al., 2007)) are based on different data sources either from iron mining or in Althaus from phosphate rock mining. Main inputs are energy and blasting agent

## Reference product
- REO: 2.41; input; article inperiodical

## Inputs
- Primary energy: 24.52; article inperiodical
- sulphuric acid: 3.21; article inperiodical
- Hydrochloric acid: 1.51; article inperiodical
- water: 33.7; article inperiodical

## Outputs
- sulfur dioxide: 104.97; article inperiodical
- carbon dioxide: 372; article inperiodical
- hydrogen fluoride: 34.44; article inperiodical

## Deviations from the LCI method approaches
Goal of this chapter is to identify the most important differences and uncertainties of crucial parameters in the LCIs and to link those directly to the affected LCIAs. However, comparability of LCIA results shown in Fig. 4 is limited due to different LCIA methods, as already mentioned in the chapter “methods”. All LCIA results are shown in Tables S1 and S3 (Supplementary material). It should also be mentioned that we calculated Althaus' LCIA data, as he provided only the LCI in the ecoinvent database. For this, we rebuilt Althaus' original process “rare earth oxide production from bastnasite” in the GaBi software and evaluated it with two LCIA methods for comparison (Table S1).

## Review details
Inventory: The internal review was done by several iteration steps concerning raw data validation, raw data documentation, representativity, completeness and consistency of modelling with regard to ISO 14040 and 14044.; Documentation: The review of the documentation was performed by Ecobilan and is in compliance with ISO 14040 and 14044. The data set documentation is correct in view of the appropriateness of the information provided. It includes all relevant information in view of data quality and scope of application of the respective LCI result.

## Data sources
- Schreiber, A., Marx, J. & Zapp, P. Life Cycle Assessment studies of rare earths production - Findings from a systematic review. Science of The Total Environment 791, 148257 (2021).
