# 砖生产;非烧结砖;原材料加工（破碎、混合）

Dataset: ILCD process, Unit process, single operation
Geography: MY-SC-CN
Reference year: 2020
Classification: Unit processes / Materials production / Other mineralic materials
Functional unit: 1t WDC were chosen as the functional unit
Generated by: 王湘锦, r99rt4@163.com
Owner: 天工LCI数据工作小组
Review: Dependent internal review by 天工LCI数据工作小组
Amounts: no units in this file; such an amount is in the reference unit of its flow, which a separate flow dataset defines
copyright: false
licenseType: Free of charge for all users and uses

## General comment
以人造沙、水泥以及水基钻屑为原材料

## Technology and included processes
包括在 WDC 粉碎预处理后加入适量骨料（即人造砂），制备免烧砖。整个生产过程包括搅拌（时间为 2 分钟）、压制（压力为 3 兆帕；尺寸为 240 × 115 × 53 毫米）和维护步骤

## Technical purpose
该工业过程生产的非烧结砖用于需要特定尺寸（240 × 115 × 53 毫米）和性质的建筑项目中。这种砖头可用于不需要或不希望使用烧结砖的应用场合，并可用于各种类型的建筑工作，如构建墙体、铺设路面及其他结构构件。

## Reference product
- clay: 1000; input; measured

## Inputs
All rows: measured
- sand: 2310
- Fly ash: 12
- portland cement: 530
- freshwater: 300
- Electricity: 342

## Outputs
- brickbat aggregate: 4152; measured
  砖块粗原料
- particles (> PM10): 0.12357; measured

## Deviations from the LCI method approaches
作为生命周期评估的一部分，亿科环境技术有限公司开发的 eFootprint 在线分析平台用于对整个生命周期过程进行定量分析。

## Data selection and combination
有关原材料、能源投入和污染物排放数据的信息来自绵阳建材制造有限公司。

## Sampling procedure
此外，选择 1t WDC 作为功能单位，并按照功能单位计算所有原材料、辅助材料、能耗、运输和直接排放的输入参数。

## Use advice
在使用这组生命周期评估（LCA）数据时，用户需注意WDC（废弃物衍生胶凝材料）1吨被定义为功能单位。采用了截断规则，可从清单中排除重量不足最终产品1%的低价值材料，例如粉煤灰。这种排除可能会影响结果的全面性。用户应确保这种方法与其方法论要求一致，并且不会忽视任何重大环境影响。从绵阳建材制造有限公司获得的数据应根据具体情况进行调整，并且如果在不同的地理或技术环境中应用可能需要更新。

## Review details
清单： 内部审查通过几个迭代步骤完成，涉及原始数据验证、原始数据记录、代表性、完整性、与 ISO 14040 和 14044 有关的建模的一致性。

## Data sources
- Liu, W. et al. Comparative life cycle assessment of cement, sintered bricks and non-sintered bricks manufacturing using water-based drilling cuttings from shale gas production in the Sichuan Basin, China. J. Environ. Manage. 314, 115135 (2022).
