# 开挖土壤;土壤异位修复;热脱附;清挖运输

Dataset: ILCD process, Unit process, black box
Geography: CN
Reference year: 2022
Classification: Unit processes / Other Services / Repair and maintenance
Generated by: 王枫, wangfeng@caep.org.cn
Owner: 天工LCI数据工作小组
Review: Dependent internal review by 天工LCI数据工作小组
Amounts: no units in this file; such an amount is in the reference unit of its flow, which a separate flow dataset defines
copyright: false
licenseType: Free of charge for all users and uses

## General comment
异位热脱附修复1立方米污染土，使用挖机将污染土壤从污染区域挖出，并场外运输至热处理车间

## Geography
我国华东区域5 个污染土壤异位热脱附修复工程案例

## Technology and included processes
使用挖机将污染土壤从污染区域挖出，并运输至处理大棚

## Technical purpose
该技术数据集描述了开挖过程和热脱附方法用于污染土壤整治的应用。该过程专门用于土壤的异位处理，其中土壤从污染现场挖出、运输，并随后在专为热脱附而设计的独立设施或处理大棚中进行处理。该过程通常在环境工程项目中应用于中国华东地区，并且适用于小到中型面积的污染土地的整治，使其在处理后适合于建设、景观或农业再利用。

## Reference product
- Excavated soil,Excavated soil: 1; measured
  基于我国华东区域 5 个污染土壤异位热脱附修复工程案例，得到异位热脱附修复 1 m3 污染土壤的平均能源和材料投入量

## Inputs
- Diesel,Diesel: 0.00011, 0.00013 (2 entries); measured
  基于我国华东区域 5 个污染土壤异位热脱附修复工程案例，得到异位热脱附修复 1 m3 污染土壤的平均能源和材料投入量

## Use advice
数据使用者应在环境整治和废物管理的背景下考虑这个数据集。它应该只应用于确定适合异位热脱附的场景，考虑到污染物的性质和适用的环境法规。该数据集反映了中国华东地区特定的技术实践和措施，因此，用户在应用这些数据时应确保区域技术的适用性。此外，建议用户在使用这些数据进行生命周期评估时，要考虑交通排放和能源使用，并将此数据集与其他相关的环境影响数据整合，以进行全面评估。

## Review details
清单： 内部审查通过几个迭代步骤完成，涉及原始数据验证、原始数据记录、代表性、完整性、与 ISO 14040 和 14044 有关的建模的一致性。

## Data sources
- 刘爽,陈盼,宋慧敏等.我国华东地区污染土壤异位热脱附修复碳排放及减排策略[J].环境工程学报,2022,16(08):2663-2671.
