# 再生铜生产;铜（1吨，99.99%）;双面吹浴冶炼技术;铜精矿

Dataset: ILCD process, Unit process, single operation
Geography: CN
Reference year: 2018
Classification: Unit processes / Materials production / Metals and semimetals
Functional unit: the production of 1 ton of copper (i.e., refined or reclaimed copper) was selected as the functional unit.
LCI method principle: Attributional
LCI method approaches: Allocation - mass
Generated by: 王鹏, 2867919560@qq.com
Owner: 天工LCI数据工作小组
Review: Dependent internal review by 天工LCI数据工作小组
Amounts: no units in this file; such an amount is in the reference unit of its flow, which a separate flow dataset defines
copyright: false
licenseType: Free of charge for all users and uses

## General comment
使用双面吹浴冶炼技术的再生铜生产过程主要用于从铜精矿生产高纯度铜。这种纯度为99.99%的精炼铜，通常应用于电气行业生产高品质电线和电气组件，因为它具有优良的导电性。它也广泛应用于建筑业，制作屋顶和管道材料，以及各种工业制造过程中，这些过程中需要高品级铜。

## Geography
中国有两个精炼铜和再生铜生产基地。

## Reference product
- Refined copper: 1000; software or database
  copper

## Inputs
- unspecified: 0.92; measured
  Land occupation
- water: 5070; measured
  Water
- Electricity: 1031.83; software or database
- Oils, unspecified: 76.41; software or database
  Oil
- hard coal,hard coal,hard coal: 201.15; software or database
  Coal
- Chemicals inorganic,Chemicals, inorganic: 0.0889; software or database
  Chemicals inorganic需要补充
- Chemicals organic,Chemicals, organic: 18.29; software or database
  Chemicals organic需要补充
- natural gas,natural gas,natural gas: 0; software or database
  Natural gas
- Sulfuric acid(98%): 7.3; software or database
  Sulfuric acid需要补充resourse

## Outputs
- carbon dioxide (fossil): 331.49; software or database
  Carbon dioxide
- particles (PM2.5 - PM10): 0.03932; software or database
- sulfur oxides: 0.40038; software or database
  Sulfur dioxide
- nitrous oxide: 0.94684; software or database
- arsenic: 0.00404, 6.51e-6 (2 entries); software or database
  Arsenic
- lead: 0.00022; software or database
  Lead
- copper: 0.00039, 0.00019 (2 entries); software or database
  Copper
- nickel: 8.48e-6, 0.00024 (2 entries); software or database
  Nickel
- sulphuric acid: 0.00021; software or database
  Sulfuric acid
- Phosphorus: 1.54e-5; software or database
- lead-210: 1.65e-5; software or database
  Lead
- ammonium: 0.0002; software or database
  Ammonia
- hazardous waste (unspecified),hazardous waste (unspecified): 4.66; measured
  Hazardous waste

## Deviations from the LCI method approaches
采用 ReCiPe 方法在中点水平进行生命周期影响评估 (LCIA)，该方法是 LCA 分析中最常用的指标方法之一（Goedkoop 等人，2009 年；Schryveretal.2009）。

## Data selection and combination
本研究中提供的生命周期清单数据是从中国的两个精炼和再生铜生产基地收集的。

## Data treatment and extrapolations
LCA 使用 SimaPro 8.2 软件进行。

## Use advice
在使用再生铜生产的生命周期清单数据时，必须严格遵守定义为生产1吨铜的功能单位。不应将数据推断到中国两个生产基地之外的范围。用户应考虑双面吹浴冶炼技术的地理相关性和技术适用性与他们特定情境的关联。此外，用户应当知晓，数据是使用ReCiPe方法在中点水平进行的评估。在与其他数据集比较或应用于不同的生命周期影响评估度量标准时，必须考虑方法论和范围上的差异，以确保分析的可比性和有效性。

## Review details
清单： 内部审查通过几个迭代步骤完成，涉及原始数据验证、原始数据记录、代表性、完整性、与 ISO 14040 和 14044 有关的建模的一致性。

## Data sources
- Hong, J. et al. Life cycle assessment of copper production: a case study in China. Int J Life Cycle Assess 23, 1814–1824 (2018).
