# 农田修复;原位钝化;工程实施;药剂施加、混合搅拌

Dataset: ILCD process, Unit process, single operation
Geography: NJ-YN-CN
Reference year: 2023
Classification: Unit processes / Other Services / Repair and maintenance
Generated by: 肖萌, xiaomeng@mail
Owner: 天工LCI数据工作小组
Review: Dependent internal review by 天工LCI数据工作小组
Amounts: no units in this file; such an amount is in the reference unit of its flow, which a separate flow dataset defines
copyright: false
licenseType: Free of charge for all users and uses

## General comment
稳定化修复实施阶段，对污染土进行药剂施撒（为人力运输与撒施），并使用轮式旋耕机TH554对污染场地进行药剂施加。使用的稳定化药剂为海泡石和生石灰。

## Geography
云南省怒江州受铅锌矿污染某耕地土壤 污染修复工程

## Technical purpose
所描述的工业过程用于通过原位施加海泡石和生石灰等稳定化剂进行农田修复。这个过程涉及到被重金属（特别是镉(Cd)和铅(Pb)污染的土壤的药剂喷洒、混合和搅拌。该技术被设计用于旨在减少可生物吸收的Cd和Pb浓度超过70%的修复项目，确保这些金属在作物中的浓度达到可接受标准。

## Reference product
- contaminated soil: 9.06e6; input; measured
  受污染的农田土壤

## Inputs
All rows: measured
- Diesel: 67354.2
- natural pumice: 172000
  海泡石（pumice）
- quicklime: 68000
  生石灰（quicklime）
- Equipment and Materials Arriving on Site: 240000
  运输到场的药剂
- Equipment and Materials Arriving on Site: 2050
  运输到场的设备

## Outputs
- Soil passivation by sepiolite and quicklime: 9.06e6; measured
  使用海泡石、生石灰钝化后的农田土壤
- Soil Sample: 1000; measured
  运输到场检测的样土，用于后续效果评估

## Use advice
在使用该数据集进行生命周期评价(LCA)时，请确保您的LCA范围包括受重金属污染的农田的具体情境。计入在稳定化剂的运输和应用中涉及的人力劳动。在修复过程中应考虑使用机械，例如旋耕机的因素。应考虑修复的有效性，即可生物利用金属浓度的减少以及作物金属浓度与相关标准的符合度。在将此数据概括到其他场地时要小心使用，因为土壤属性和污染水平可能会有所不同。

## Review details
清单： 内部审查通过几个迭代步骤完成，涉及原始数据验证、原始数据记录、代表性、完整性、与 ISO 14040 和 14044 有关的建模的一致性。

## Data sources
- 肖萌 et al. 农田污染钝化修复环境影响定量评估方法与案例分析. 中国环境科学 43, 3571–3581 (2023).
