# 电解镍生产 ; 电池级一级镍（镍含量99.9%） ; 磨矿和浮选电解法 ; 甘肃省镍钴矿

Dataset: ILCD process, Unit process, single operation
Geography: GS-CN
Reference year: 2018
Classification: Unit processes / Materials production / Metals and semimetals
Generated by: 孙鑫, xs389@cornell.edu
Owner: 天工LCI数据工作小组
Review: Dependent internal review by 天工LCI数据工作小组
Amounts: no units in this file; such an amount is in the reference unit of its flow, which a separate flow dataset defines
licenseType: Free of charge for all users and uses

## General comment
火法冶炼和精炼阶段的资源消耗、原材料投入、能源消耗、污染物排放和废物处理数据参考了中国最大的镍金属生产基地甘肃公布的企业运营数据，该基地贡献了中国 80% 以上的电解镍产量。废石、尾矿和废渣贮存造成的金属排放数据参考了浸出实验结果。中国基于工艺的 LCI 数据库为背景清单提供了数据支持。缺失的化学品（如硼酸、碳酸钡和硫化钠）背景清单，包括输入和输出流量，由 Ecoinvent 第 3 版数据库进行补充。

## Technology and included processes
在精炼阶段，采用了中国工业化应用的两种主流技术（即磨浮电解法（GFEM）和浸出电积法（LEM）），将镍锍精炼成高纯度的金属镍。在 GFEM 法中，使用颚式破碎机和球磨机进行的研磨和浮选过程将生产出镍精矿作为主要产品。铜精矿和二次合金作为副产品生产，并进一步加工回收铜和铂族金属。本研究中的镍精矿在反射炉中熔化，用铸造机铸造成阳极板。然后，在直流电的作用下，金属镍在硫化镍电解槽中沉淀。

## Technical purpose
通过电解工艺生产的高纯度一级镍主要用于制造电池。特别是99.9%的纯度等级，使其适用于高端应用，例如在锂离子电池的电极生产中。

## Reference product
- Nickel metal (＞99.9% Ni): 1000; measured

## Inputs
All rows: measured
- water: 19250
- Nickel concentrate (8.6% Ni): 150
- unspecified: 0.0408
- Nickel matte: 1750
- Barium carbonate: 3.62
- sodium carbonate: 480
- Sulfuric acid: 170
- hydrogen chloride: 0.07
- chlorine: 140
- Boric acid: 8
- sodium hydroxide: 20
- Nitrogenous Fertilizer: 0.33
- Chemicals (unspecified): 0.00138
- transport in t*km: 185.62
- Electricity: 17213.9
- Hard coal, at consumer EU-27: 520
- process steam: 2990

## Outputs
All rows: measured
- sulphuric acid: 0.04815
- hydrogen sulfide: 0.04277
- chlorine: 0.07265
- particles (PM2.5 - PM10): 0.49
- chemical oxygen demand: 0.42
- Suspended solids, unspecified: 0.0476
- ammonia: 0.00773
- sulfide: 5.574e-5
- decane: 0.00079
- fluoride: 0.00238
- phosphorus, total: 0.00087
- nitrogen, total (excluding N2): 0.05164
- copper: 0.00159
- nickel: 0.00167
- lead: 0.00095
- cadmium: 0.00024
- waste water - untreated: 10500
- municipal solid waste deposition: 4.17
- hazardous waste (unspecified): 57.26

## Use advice
使用此数据集时，用户应考虑磨矿和浮选电解工艺相关的特定能源需求和环境排放。当体系研究涉及镍的回收时，必须仔细关注影响分配。用户还应确保通过考虑新疆省的区域电力组合来保证技术适用性，因为它可能会影响镍生产过程的整体环境概况。

## Review details
清单： 内部审查通过几个迭代步骤完成，涉及原始数据验证、原始数据记录、代表性、完整性、与 ISO 14040 和 14044 有关的建模的一致性。

## Data sources
- Bai, Y. et al. Strategies for improving the environmental performance of nickel production in China: Insight into a life cycle assessment. Journal of Environmental Management 312, 114949 (2022).
