# 水处理设施;地下水异位修复;P&T系统;基础设施建设

Dataset: ILCD process, Unit process, single operation
Geography: JS-CN
Reference year: 2022
Classification: Unit processes / Other Services / Repair and maintenance
Generated by: 王宁, wang_ning@caep.org.cn
Owner: 天工LCI数据工作小组
Review: Dependent internal review by 天工LCI数据工作小组
Amounts: no units in this file; such an amount is in the reference unit of its flow, which a separate flow dataset defines
copyright: false
licenseType: Free of charge for all users and uses

## General comment
使用 PVC 管、混凝土和钢材等建设水处理设施

## Geography
a closed pesticide manufacturing plant located in Jiangsu Province, China.

## Technical purpose
该数据集涉及使用PVC管、混凝土和钢材等材料建设的水处理设施。特别是设计用于地下水异位修复的抽水和处理(P&T)系统。这样的基础设施对于需要去毒或清除污染物的地点尤其相关，例如位于中国江苏省的已关闭的农药制造厂。这些设施在工业或市政环境中至关重要，地下水污染已被识别，并且需要修复以满足环保标准。

## Reference product
- Treatment facilities: 1; measured

## Inputs
- Polyvinyl chloride: 400; measured
- Concrete: 60500; measured
- Steel sections: 2250; measured
- transport in t*km: 6315; calculated

## Use advice
当使用这个数据集进行生命周期评估(LCA)时，用户应考虑到水处理设施建设的特定背景。这包括对地理和技术特性（例如，中国江苏省的条件）的关注，以及P&T系统解决的污染物类型。用户应确保清单反映了区域建筑实践和材料提取及加工的环境影响。在LCA计算中，应注意了解在建筑中使用的材料的生命周期末期阶段以及它们的回收或再利用潜力。此外，在建模使用阶段时，必须准确表示水处理系统的特定操作行为，以捕捉其环境性能。

## Review details
清单： 内部审查通过几个迭代步骤完成，涉及原始数据验证、原始数据记录、代表性、完整性、与 ISO 14040 和 14044 有关的建模的一致性。

## Data sources
- Ding, D. et al. Assessing the environmental impacts and costs of biochar and monitored natural attenuation for groundwater heavily contaminated with volatile organic compounds. Science of The Total Environment 846, 157316 (2022).
