# 平均稀土氧化物;REE;四川;含稀土矿石的生命周期盘点

Dataset: ILCD process, Unit process, single operation
Geography: SC-CN
Reference year: 2012
Valid until: 2014
Classification: Materials production / Non-energetic raw materials
Functional unit: 1 kg REO at 100% purity
LCI method principle: Attributional
LCI method approaches: Allocation - mass
Generated by: 汪涛, twang@iue.ac.cn
Owner: 天工LCI数据工作小组
Review: Dependent internal review by 天工LCI数据工作小组
Amounts: no units in this file; such an amount is in the reference unit of its flow, which a separate flow dataset defines
copyright: false
licenseType: Free of charge for all users and uses

## General comment
本数据集描述的平均稀土氧化物（REE）用于需要高纯度REE材料的各种应用，例如先进电子产品的制造、风力涡轮机的磁铁以及石油化工行业的催化剂。它代表了来自四川矿山的1公斤REE（100%纯度）的生命周期清单，涵盖了从矿石提取到REO生产的环境影响。

## Technology and included processes
LCA 模型是使用 eBalance Professional 4.7（IT & Knowledge for Environment，四川，中国）构建的。我们选择构建归因模型，因为它更符合我们的研究目标，尽管我们采用了贡献性方法来进行情景敏感性分析。使用 CML2002 方法评估生命周期环境影响（CML 2015）。根据建议的 LCA 实践（Hauschild 等，2013）和之前确定的行业环境危害，选择了 11 个中点影响类别。

## Reference product
- REO: 1; article inperiodical

## Inputs
- Iron ore: 26.24; calculated
  Iron ore, open-pit mining substituted for bastn ̈ asite-containing ores (5% REO)
- sulphuric acid: 0.047; article inperiodical
- Sodium silicate: 0.039; article inperiodical
- process steam: 3.68; measured
- Hydrochloric acid: 3.23; article inperiodical
- Sodium hydroxide: 1.75; article inperiodical
- calcium chloride: 0.05; article inperiodical
- phosphoric acid: 0.002; article inperiodical
- ammonia: 0.32; article inperiodical
- Kerosene: 0.01; article inperiodical
- Ammonium bicarbonate: 0.89; article inperiodical
- Sodium sulfide: 0.05; article inperiodical
- Sodium carbonate: 0.19; article inperiodical
- Charcoal: 0.02; measured
- Electricity: 1723.57; article inperiodical
- hard coal: 82.88; article inperiodical
- water: 229.8; article inperiodical

## Outputs
- fluorspar: 0.032; article inperiodical
  Calcium fluoride
- Spray mold: 0.295; calculated
  Ammonium chloride
- fluoride: 0.002; article inperiodical
- ammonia: 0.029; article inperiodical
- thorium-230: 0.079; article inperiodical
  Thorium (air, unspecified)
- carbon dioxide: 1.283; calculated

## Deviations from the LCI method approaches
The LCI is first described individually for the three REO production chains, followed by a section on metal refining. Aggregated modeling data are also included for the industry average REO production in tabular form (Tables 1, 2, and 3). A more in-depth description of the processes, LCI, and modeling data used for the entire study (including metal refining) is available in section 1 in supporting information S1 on the Web.

## Use advice
此LCA数据集的用户应仅在高纯度REE应用的背景下应用它。采用所提供的归因模型对于准确的影响评估至关重要，但在分析情境敏感性时考虑贡献性方法。数据用户必须参考表1、2和3以获取行业平均REO生产值，并根据Hauschild等人（2013）的标准使用CML2002影响评估方法。金属精炼过程也很关键，应该包含在相关的LCA框架中。从网上的支持信息S1中可以获取LCI和建模数据的深入理解，第1节提供了详细的细分。

## Review details
清单： 内部审查通过几个迭代步骤完成，涉及原始数据验证、原始数据记录、代表性、完整性、与 ISO 14040 和 14044 有关的建模的一致性。

## Data sources
- Lee, J. C. K. & Wen, Z. Rare Earths from Mines to Metals: Comparing Environmental Impacts from China’s Main Production Pathways: Environmental Impacts of Rare Earths in China. Journal of Industrial Ecology 21, 1277–1290 (2017).
