# 多晶硅片切片 ; 多晶硅片 ; 硅锭破碎机用于切割硅锭

Dataset: ILCD process, Unit process, single operation
Geography: CN
Reference year: 2016
Classification: Unit processes / Materials production / Other materials
Functional unit: Grid-connected electricity generation from a 1 MWp multi-Si PV system, whose lifespan is 30 years of a 10 MWp power station has been taken as the research object and the functional unit
LCI method principle: Attributional
LCI method approaches: Allocation
Generated by: 杨锦锋, yjfzfshn@163.com
Owner: 天工LCI数据工作小组
Review: Dependent internal review by 天工LCI数据工作小组
Amounts: no units in this file; such an amount is in the reference unit of its flow, which a separate flow dataset defines
copyright: false
licenseType: Free of charge for all users and uses

## General comment
多晶硅

## Geography
该电站位于宁夏中部地区，年平均太阳辐射量约为5955.80 MJ m2 a-1，年平均日照高峰时数为1718h

## Time period
文章发表

## Technical purpose
该过程包括使用切割机从多晶硅锭中切割硅晶圆。这些切片的SoG-Si晶圆通常用于太阳能转换的光伏（PV）系统。具体来说，它们是用于并网发电的10 MWp多晶体硅PV系统的一部分，适用于像中国宁夏中部这样的高太阳辐射区域。

## Reference product
- Multi-Si wafer,Multi-Si wafer,Multi-Si wafer: 1; measured
  SoG-Si wafer

## Inputs
All rows: measured
- Electricity: 2.304
- Multi-Si ingot: 0.0204
  SoG- Si ingot
- freshwater: 4.26
  Fresh water
- Steel Wire,Cable: 0.01314
  Steel wire
- Polyethylene glycol: 0.0231
- Silicon carbide,Silicon carbide: 0.02008
  Silicon carbide
- Glass: 0.00839
- Glue: 0.00012
- Lactic acid: 0.00093
- citric acid: 0.00062
  Citric acid
- Detergent: 0.00111

## Outputs
All rows: measured
- waste water - untreated: 0.48589
  Waste water
- Waste (solid): 0.09582
  Waste mortar
- Steel scrap (St): 0.01314
  Waste steel wire
- Glass for recovery (shards): 0.00839
  Waste glass
- organic waste (unspecified): 0.00012
  Glue (Organic waste)
- l-(+)-lactic acid: 0.00093
  Lactic acid (Hazardouswaste)
- citric acid: 0.00062
  Citric acid (Hazardouswaste)
- hydrogen chloride: 5e-7
  Hydrogen chloride
- Nitrogen oxides: 3e-6
- fluoride: 0.00044
  Fluoride
- chloride: 7e-5
  Chlorides
- chemical oxygen demand: 0.00312
  Chemical oxygendemand (COD)
- nitrogen, total (excluding N2): 3e-5
  Total Nitrogen (TN)
- Suspended solids, unspecified: 5e-5
  Suspended solids (SS)
- industrial waste (unspecified): 0.00034
  Solid waste

## Deviations from the LCI method approaches
对中国冶金路线多晶硅光伏并网发电系统进行了生命周期评估

## Data selection and combination
调查云南、宁夏工厂

## Use advice
生命周期评估数据的用户应考虑研究中代表的特定区域条件，如太阳辐射和高峰日照小时数。该数据是为寿命为10 MWp电站30年的并网多晶硅PV系统量身定做的。确保在模型中准确地表现出所给过程，通过考虑晶圆切片的技术方面、材料质量和能源消耗模式，以及宁夏当地气候条件。

## Review details
清单： 内部审查通过几个迭代步骤完成，涉及原始数据验证、原始数据记录、代表性、完整性、与 ISO 14040 和 14044 有关的建模的一致性。

## Data sources
- Yu, Z. et al. Life cycle assessment of grid-connected power generation from metallurgical route multi-crystalline silicon photovoltaic system in China. Applied Energy 185, 68–81 (2017).
