# 本地品牌纯牛奶生产 ; 包装处理

Dataset: ILCD process, Unit process, single operation
Geography: CD-SC-CN
Reference year: 2017
Classification: Unit processes / End-of-life treatment / Material recycling
Functional unit: The Tetra Pak 1litre pure liquid milk is selected to assess its lifecycle based carbon footprint.
Generated by: 杨瑞, 1632707028@qq.com
Owner: 天工LCI数据工作小组
Review: Dependent internal review by 天工LCI数据工作小组
Amounts: no units in this file; such an amount is in the reference unit of its flow, which a separate flow dataset defines
copyright: false
licenseType: Free of charge for all users and uses

## General comment
包装废弃物预处理选择回收利用。由于铝塑复合材料的分离技术通常具有较低的热值，因此这些容器不适合焚烧

## Geography
奶源基地位于中国四川省西南部洪崖县，距离省会成都市约147公里。乳品加工厂位于成都郊区郫县，距离奶源基地约175公里。品牌牛奶主要分布在距离乳制品加工厂约40公里的成都市中心。牛奶包装废弃物被运送到距离市中心约30公里的市政垃圾填埋场进行最终处理。

## Technology and included processes
本研究仅关注对纯牛奶生产有直接贡献的过程，即仅关注能源和材料投入以及碳排放的影响，如图1所示。从而简化了牛奶生命周期的系统边界，将其划分为原料奶生产、乳制品加工、产品运输和包装废弃物处理四个阶段。

## Technical purpose
本地牌纯牛奶生产和包装废弃物处理过程主要用于生产乳制品，特别是主要分布在成都市中心的纯液体牛奶。该过程包括原料奶生产、乳品加工、产品运输和包装废弃物处理等生命周期阶段，重点在于可持续性并最小化与每个阶段相关的碳足迹。包装材料由铝塑复合材料构成，由于热值低，这些材料不适合焚烧，而是选择回收和最终在垃圾填埋场处置。

## Reference product
- milk: 0.001; measured
  pure liquid milk

## Inputs
- hard coal: 0.00903; measured
  Raw coal
- Natural gas, at consumer EU-27: 4.63e-10; measured
- crude oil: 7.76e-6; measured
- Electricity: 0.04104; measured

## Outputs
- carbon dioxide (fossil),carbon dioxide (fossil): 0.0155, 0.0623738 (2 entries); measured
- methane (fossil): 8.43e-5; measured
- carbon dioxide (fossil),carbon dioxide (fossil): 0.012; measured
  Landfill disposal

## Deviations from the LCI method approaches
与传统的LCA相比，本研究简化了生命周期影响评估的过程，主要使用不同类别的指标来阐述生命周期清单的结果(Nigri et al.， 2014)。

## Data selection and combination
包装废弃物预处理选择回收利用。由于铝塑复合材料的分离技术通常具有较低的热值，这些容器不适合焚烧(Xie et al.， 2011)。因此，填埋处理是最终的选择(Meneses et al.， 2012)。填埋阶段的碳排放数据类似于Cherubini的卫生填埋处置清单(Cherubini et al.， 2009)，见表4。

## Use advice
LCA数据用户应仅关注直接贡献于纯牛奶生产的过程，具体考虑能源和材料投入以及相关的碳排放。分配的系统边界简化了生命周期为原料奶生产、乳制品加工、产品运输和包装废弃物处理。用户必须在包装废物预处理时进行回收，由于铝塑复合材料热值低，避免焚烧，并考虑填埋处置作为最后步骤，参考诸如Cherubini等人（2009年）建立的碳排放数据清单。在方法论上，本研究简化了生命周期影响评估过程，在解释LCA结果时应予以考虑。

## Review details
清单： 内部审查通过几个迭代步骤完成，涉及原始数据验证、原始数据记录、代表性、完整性、与 ISO 14040 和 14044 有关的建模的一致性。

## Data sources
- Zhao, R., Xu, Y., Wen, X., Zhang, N. & Cai, J. Carbon footprint assessment for a local branded pure milk product: a lifecycle based approach. Food Sci. Technol 38, 98–105 (2017).
