# 市政污泥处理与处置;干污泥;热干化焚烧

Dataset: ILCD process, Unit process, single operation
Geography: CN
Classification: Unit processes / End-of-life treatment / Waste water treatment
Functional unit: One ton of sludge on a dry basis (1 t-DS) is defined as the functional unit.
Generated by: 金思甜, 2331276@tongji.edu.cn
Owner: 天工LCI数据工作小组
Review: Dependent internal review by 天工LCI数据工作小组
Amounts: no units in this file; such an amount is in the reference unit of its flow, which a separate flow dataset defines
copyright: ['opt4ROkqig']
licenseType: Free of charge for all users and uses

## General comment
选择国内几个典型的污泥处理设施，分别为厌氧消化、堆肥、共燃、热干燥焚烧和水泥生产，进行调查。数据主要来自具体地点的测量，要么通过实地调查，要么通过操作报告。污泥特性基于所调查场地的平均值。

## Technology and included processes
污泥半干燥至40%后再焚烧。蒸发污泥中的水分可以节省大量的煤。采用热电联产(CHP)系统，总热效率为83%背压涡轮机排出的蒸汽用于抵消干燥所需的能量，剩余的用于区域供热。烘干机为盘式，干燥过程热利用效率为85%半干燥污泥可实现单次焚烧;然而，每吨干燥污泥额外添加9%的煤，以保持稳定燃烧并确保足够的发电量。

## Technical purpose
该数据集描述了通过热干化后继而焚烧的方式处理和处置市政污泥的过程。它适用于垃圾管理系统的设计和评估，特别是对于市政污水处理设施。该过程用于减少产生的污泥量，高效管理废弃物，并有可能通过焚烧过程回收能源。

## Reference product
- Sludge: 1000; input; estimated
  干基 （1 t-DS）

## Inputs
All rows: measured
- Electricity: 707.04
- Diesel: 0.3
- hard coal; 26.3 MJ/kg: 900
- hydrogen chloride gas: 6.1
- sodium hydroxide: 5.4
- Limestone: 70

## Outputs
- electricity from waste incineration: 3535.2; measured
- heat: 11800; measured
- mineral waste (ash): 600; measured

## Use advice
使用此数据集时，用户应考虑功能单位是一吨干基污泥（1 t-DS）。确保将数据应用于可比的场景，考虑市政污泥的组成和性质至关重要。用户在将其纳入生命周期评价模型时，应考虑热干化和焚烧中使用的具体技术及其效率。还应包括过程中可能的能源回收以及相关的排放。

## Review details
清单： 内部审查通过几个迭代步骤完成，涉及原始数据验证、原始数据记录、代表性、完整性、与 ISO 14040 和 14044 有关的建模的一致性。

## Data sources
- Dong, J., Chi, Y., Tang, Y., Wang, F. & Huang, Q. Combined Life Cycle Environmental and Exergetic Assessment of Four Typical Sewage Sludge Treatment Techniques in China. Energy Fuels 28, 2114–2122 (2014).
