# 深层天然气技术经济评价 ; 火山岩储层;TOPSIS法优选

Dataset: ILCD process, Unit process, single operation
Geography: HLJ-CN
Reference year: 2009
Classification: Unit processes / Energy carriers and technologies / Natural gas based fuels
LCI method principle: Attributional
LCI method approaches: Consequential
Generated by: Shikang Kang, 908798159@qq.com
Owner: 天工LCI数据工作小组
Review: Dependent internal review by 天工LCI数据工作小组
Amounts: no units in this file; such an amount is in the reference unit of its flow, which a separate flow dataset defines
copyright: false
licenseType: Free of charge for all users and uses

## General comment
按照气田开发方案设计的原理和程序提出了兴城火山岩储层开发方案的设计时在选择开发方式、划分开发层系和确定开发井网这三个方面应重点的考虑问题并采用改进后的TOPSIS法对开发方案进行了优选。

## Geography
松辽盆地兴城气田

## Time period
文献发表时间

## Technology and included processes
所谓气田开发 就是依据详探结果和必要的生产性开发试验 在综合研究的基础上对具 有工业价值的气田 按照国家对天然气生产的要求 从气田的实际情况和生产规律出发 制定出合理的开发方案 并对气田进行建设和投产

## Technical purpose
本工艺对深层天然气进行技术经济评价，特别是松辽盆地兴城火山岩储层气田的开发。涉及选择最优开发方式、划分开发层系、确定开发井网模式。采用改进后的TOPSIS方法进行决策，目标应用包括有工业价值的气田开发，并遵循天然气国家生产要求、技术、经济、质量和效率标准。特别适用于高地层压力、无反凝析及硫化氢腐蚀问题的气田开发项目，并符合健康、安全和环保标准。

## Reference product
- natural gas: 14229.6; input; normal; missing unimportant
  估价模式,数据为分布，量中填写的数据为取平均（取中值）的结果

## Outputs
- natural gas: 14229.6; normal; missing unimportant
  文献未提及，假设（1：1）

## Data selection and combination
徐深井区天然气以甲烷 含71.81%-80.23%为主、均不会出现反凝析现象。不会出现硫化氢腐蚀现象。地层压力高达 左右 弹性能量大。衰蝎开采比其它任何开发方式都经济和简便易行

## Data treatment and extrapolations
一个气田开发方案应该反映出技术、经济、质量、效益性能等方面的内容对于一个和国际接轨的气田 还要考虑健康、安全、环保等方面的因素。方案所设计的指标要符合国家和行业标准、规范。指标的选取要求覆盖面广而且各个指标间是相对独立的

## Use advice
在使用兴城火山岩储层气田开发的数据集时，用户应确保数据的应用与评估中确定的气田特性相一致。包括考虑天然气的具体成分组合、无反凝析和硫化氢腐蚀现象、以及蝎式开采方法的经济效率。用户在应用这些数据时，须遵守国家和行业标准，并确保独立选择范围广泛的指标进行综合评估，支持按照技术、经济、质量和效率考虑以及健康、安全和环保标准的决策。

## Review details
清单： 内部审查通过几个迭代步骤完成，涉及原始数据验证、原始数据记录、代表性、完整性、与 ISO 14040 和 14044 有关的建模的一致性。

## Data sources
- 巩艳芬. 松辽盆地兴城气田火山岩储层天然气开发技术经济评价[D].大庆石油学院,2010.
