# 基于玉米秸秆乙烯生产 ; 乙烯 ; 乙醇脱水 ; 玉米秸秆

Dataset: ILCD process, Unit process, single operation
Geography: AH-CN
Classification: Unit processes / Materials production / Organic chemicals
Functional unit: The functional unit is 1 tonne of ethylene production.
LCI method principle: Attributional
LCI method approaches: Allocation - mass
Generated by: 唐子睿, tangzirui123@gmail.com
Owner: 天工LCI数据工作小组
Review: Dependent internal review by 天工LCI数据工作小组
Amounts: no units in this file; such an amount is in the reference unit of its flow, which a separate flow dataset defines
copyright: false
licenseType: Free of charge for all users and uses

## General comment
本研究对两种替代乙醇生产方案（基于玉米秸秆和基于木薯）的乙烯生产进行了评估。

## Geography
相关生产数据（例如电力、蒸汽、水、化学品、原材料消耗和直接排放）来源于中国广西省玉米秸秆乙烯生产工厂。

## Technology and included processes
本研究包括的过程总结如下：1）玉米秸秆生产；2）乙醇和乙烯生产；3）原料干燥；4）公路运输；5）废物处理；6) 材料和煤炭能源生产；7）生产能源回收。

## Technical purpose
该数据集描述了使用玉米秸秆作为原料通过乙醇脱水生产乙烯的过程。此乙烯可用于各种工业应用，如聚乙烯塑料生产、用作其他化学品制造的中间体，以及作为某些水果的催熟剂。

## Reference product
- ethene (ethylene): 1000; measured

## Inputs
All rows: measured
- Ethanol,Ethanol: 1700
- water: 800
- Electricity: 1332
- process steam: 1800
- light fuel oil: 85

## Deviations from the LCI method approaches
进行了基于产品质量的联产品分配。

## Data selection and combination
相关生产数据（例如电力、蒸汽、水、化学品、原材料消耗和直接排放）来源于中国广西玉米秸秆乙烯生产工厂。2. 玉米秸秆生产、燃煤发电和公路运输过程的相关数据取自参考文献。3. 由于缺乏中国的信息，因此使用了欧洲的化学品生产数据和相关背景数据[26]。

## Use advice
在使用该生命周期评估数据集时，用户应考虑研究的地理范围，因为原始数据来自中国特定地区。应注意数据所代表的能源组合和技术水平可能与其他地区不同。基于产品质量的联产品分配的方法学选择应纳入比较评估中。用户应确保1吨乙烯的功能单位与他们的研究范围一致。对于国际比较或扩展，可能需要进行额外的数据调整，以反映不同的条件和做法。

## Review details
清单： 内部审查通过几个迭代步骤完成，涉及原始数据验证、原始数据记录、代表性、完整性、与 ISO 14040 和 14044 有关的建模的一致性。

## Data sources
- Hong, J., Zhang, Y., Xu, X. & Li, X. Life cycle assessment of corn- and cassava-based ethylene production. Biomass and Bioenergy 67, 304–311 (2014).
