# Lithiumprimarybatteries|Lithium,manganesedioxide,acetyleneblack,electrolyte,graphite|Button|All sizes / /|锂原电池|锂、二氧化锰、乙炔黑、电解液、石墨、|扣式|所有规模

Dataset: ILCD process, Partly terminated system
Geography: CN
Reference year: 2019
Classification: Materials production / Other mineralic materials
Generated by: The data was created by the Office of the Second National Pollution Source Census of the Ministry of Ecology and Environment, and the data was organized by the TianGong Plan team for ILCD format / 生态环境部第二次全国污染源普查工作办公室创建数据，天工计划团队常慧敏整理数据为ILCD格式
Amounts: no units in this file; such an amount is in the reference unit of its flow, which a separate flow dataset defines
copyright: false

## Technology and included processes
the treatment technology for the pollution of Lithium Ion Batterydidn't offered
污染物指标工业废水量的末端治理技术是－

## Reference product
- Lithium Ion Battery: 10000; calculated
  原文件中描述污染物类别为Product，污染物指标为锂原电池，此处对其进行了匹配工作，将其匹配到LCAflow库里面相最符合的流，污染物指标备注为工业废水量

## Outputs
All rows: calculated
- Waste water: 0.005
  原文件中描述污染物类别为废水，污染物指标为工业废水量，此处对其进行了匹配工作，将其匹配到LCAflow库里面相最符合的流，污染物指标备注为工业废水量
- chemical oxygen demand: 0.000225
  原文件中描述污染物类别为废水，污染物指标为化学需氧量，此处对其进行了匹配工作，将其匹配到LCAflow库里面相最符合的流，污染物指标备注为化学需氧量
- Exhaust gas: 201
  原文件中描述污染物类别为废气，污染物指标为工业废气量，此处对其进行了匹配工作，将其匹配到LCAflow库里面相最符合的流，污染物指标备注为工业废气量
- particles (PM2.5 - PM10): 0.0055
  原文件中描述污染物类别为废气，污染物指标为颗粒物，此处对其进行了匹配工作，将其匹配到LCAflow库里面相最符合的流，污染物指标备注为颗粒物
- Non-methane volatile organic compounds: 0.0036
  原文件中描述污染物类别为废气，污染物指标为非甲烷总烃，此处对其进行了匹配工作，将其匹配到LCAflow库里面相最符合的流，污染物指标备注为非甲烷总烃

## Data sources
- 第二次全国污染源普查产排污核算系数手册（试用版）,二级代码38,四级代码3849文件，在完整版文件中第3413页
