# 土壤修复;原位修复;植物提取修复;工程实施;土壤处理

Dataset: ILCD process, Unit process, single operation
Geography: IT
Classification: Other Services / Repair and maintenance
Generated by: 肖萌, xiaomeng@mail
Owner: 天工LCI数据工作小组
Review: Dependent internal review by 天工LCI数据工作小组
Amounts: no units in this file; such an amount is in the reference unit of its flow, which a separate flow dataset defines
licenseType: Free of charge for all users and uses

## General comment
对场地原有的沥青进行开挖

## Geography
The site taken as a reference for the remediation is an area of 712 m2 located in a disused industrial district of Tuscany (Italy), in the past subjected to various productive activities that led to contamination with various metals, some of which potentially toxic such as lead (Pb), arsenic (As) and thallium (Tl). As it is a “site of national interest”, its exact location is considered confidential and cannot be disclosed.

## Technical purpose
该数据集描述了一种土壤修复过程，包括原位植物提取修复，以治疗受污染的土地。该数据的主要应用对象是参与土地重开发的环境工程师和从业者，特别是在重金属污染（如铅（Pb）、砷（As）和铊（Tl））的案例中。该过程包括现有沥青的开挖和在712平方米的区域内实施植物提取技术。这种修复方法可以作为有需求进行土壤处理和稳定化的工业区类似项目的参考。

## Reference product
- Excavated asphalt: 142.4; measured
  场地处理过程开挖的沥青

## Inputs
- Diesel: 19.366; measured

## Use advice
在将此数据集应用于土壤修复项目时，用户应确保现场条件和污染概况与数据集中描述的紧密匹配。场地大小、污染物类型和浓度水平是必须考虑的关键参数。同时，对于被指定为“国家利益相关地点”的任何场所，保持其机密性是至关重要的，并且需遵守本地关于环境修复的法规。由于此数据涉及一个具有独特污染历史的特定位置，将结果推广到另一地点应谨慎进行，并可能需要与环境修复专家咨询。

## Review details
清单： 内部审查通过几个迭代步骤完成，涉及原始数据验证、原始数据记录、代表性、完整性、与 ISO 14040 和 14044 有关的建模的一致性。

## Data sources
- Vocciante, M., De Folly D’Auris, A., Franchi, E., Petruzzelli, G. & Ferro, S. CO2 footprint analysis of consolidated and innovative technologies in remediation activities. J Clean Prod 297, 126723 (2021).
