# 市政污泥处理与处置;干污泥;厌氧消化

Dataset: ILCD process, Unit process, single operation
Geography: CN
Classification: Unit processes / End-of-life treatment / Waste water treatment
Functional unit: One ton of sludge on a dry basis (1 t-DS) is defined as the functional unit.
Generated by: 金思甜, 2331276@tongji.edu.cn
Owner: 天工LCI数据工作小组
Review: Dependent internal review by 天工LCI数据工作小组
Amounts: no units in this file; such an amount is in the reference unit of its flow, which a separate flow dataset defines
copyright: ['opt4ROkqig']
licenseType: Free of charge for all users and uses

## General comment
选择国内几个典型的污泥处理设施，分别为厌氧消化、堆肥、共燃、热干燥焚烧和水泥生产，进行调查。数据主要来自具体地点的测量，要么通过实地调查，要么通过操作报告。污泥特性基于所调查场地的平均值。

## Technology and included processes
为了研究厌氧消化的效果，将每个系统进一步划分为两个亚单元:一个是基线情况，另一个是与厌氧消化结合的情况。厌氧消化在脱水之前进行。

## Technical purpose
该数据集适用于市政污泥处理与处置过程的环境影响评估，特别是涉及干污泥厌氧消化的部分。它与评估废物管理系统的环境足迹有关，并可用于评估污泥处理设施的可持续性。

## Reference product
- Sludge: 1000; input; estimated
  干基 （1 t-DS）

## Inputs
- Electricity: 323.64; measured
- Diesel: 7.5; measured

## Outputs
- electricity from landfill gas utilisation: 1258.2; measured

## Use advice
在使用此数据时，请确保系统边界包括污泥的厌氧消化以及与污泥生命周期相关的任何上游和下游处理阶段。对于功能单位，将一吨干基污泥作为比较和影响分析的参考量。在评估中应包括考虑消化污泥的最终处置和能量回收的可能性，例如生物气体的生产。

## Review details
清单： 内部审查通过几个迭代步骤完成，涉及原始数据验证、原始数据记录、代表性、完整性、与 ISO 14040 和 14044 有关的建模的一致性。

## Data sources
- Dong, J., Chi, Y., Tang, Y., Wang, F. & Huang, Q. Combined Life Cycle Environmental and Exergetic Assessment of Four Typical Sewage Sludge Treatment Techniques in China. Energy Fuels 28, 2114–2122 (2014).
