# 建筑垃圾处理工艺;处理后回收

Dataset: ILCD process
Geography: SH-CN
Classification: Unit processes / End-of-life treatment / Material recycling
Generated by: 陆嘉麒, wilsherelu@foxmail.com
Owner: 天工LCI数据工作小组
Review: Dependent internal review by 天工LCI数据工作小组
Amounts: no units in this file; such an amount is in the reference unit of its flow, which a separate flow dataset defines
copyright: true
licenseType: Free of charge for all users and uses

## General comment
该工业过程用于建筑垃圾的处理和回收。通常，如混凝土、砖块、木材、金属和石膏等材料经过处理去除污染物，然后回收用作新建筑项目的原材料，或用于道路基底、回填、园林绿化等传统使用原生材料的应用场合。

## Reference product
- Construction Waste Disposal: 1000; input; measured
  处理1t建筑垃圾

## Inputs
- Electricity: 99.828; measured
  电力
- Diesel: 0.69; measured
  柴油
- natural gas,natural gas: 0.0058; measured
  天然气

## Outputs
- Recycle Metals: 4.6; measured
  回收金属
- Recycle Bricks: 21010; measured
  回收砖块
- Recycled Aggregate: 1400; measured
  回收骨料

## Use advice
在使用此数据集进行生命周期评估时，用户必须考虑处理和回收过程中相关的能耗和排放。重要的是要包括将建筑垃圾运往处理设施的运输和与原生材料相比，回收材料可能的环境影响。用户应考虑地理相关性，因为该数据集是针对中国的，并且应考虑技术进步可能随时间改变回收过程效率的因素。

## Review details
清单： 内部审查通过几个迭代步骤完成，涉及原始数据验证、原始数据记录、代表性、完整性、与 ISO 14040 和 14044 有关的建模的一致性。

## Data sources
- 上海市市政固废调研结果
