# 稀土溶剂萃取沉淀;稀土;原位浸出;钕铁硼（NdFeB）磁铁

Dataset: ILCD process, Unit process, single operation
Geography: NMG-CN
Reference year: 2014
Classification: Unit processes / Materials production / Metals and semimetals
Functional unit: The functional unit is a 1 kg NdFeB magnet
LCI method principle: Attributional
LCI method approaches: Allocation - market value; Allocation - mass
Generated by: 汪涛, twang@iue.ac.cn
Owner: 天工LCI数据工作小组
Review: Dependent internal review by 天工LCI数据工作小组
Amounts: no units in this file; such an amount is in the reference unit of its flow, which a separate flow dataset defines
copyright: false
licenseType: Free of charge for all users and uses

## General comment
本数据集代表了中国白云鄂博地区稀土溶剂萃取沉淀和原位浸出生产钕铁硼（NdFeB）磁铁的过程。NdFeB磁铁是多种高科技应用的关键组件，包括混合动力和电动汽车的电动机、风力涡轮发电机以及硬盘驱动器。本数据集主要对涉及NdFeB磁铁生产或使用的利益相关者和产业有价值。Nd和Pr是这一过程中的关键元素，它们的提取和加工过程相似，但在最后的溶剂萃取步骤中被分离。

## Geography
Bayan Obo (China)

## Technology and included processes
所有三个矿床生产 Nd 和 Pr 的基本过程都是相同的。 Nd 和 Pr 是相同的，除了最后的溶剂萃取步骤 (SX5)，其中两者被分离。

## Reference product
- Neodymium oxalate: 2.49; calculated
  Neodymium oxalate. Bayan Obo: input for next process, Calcination

## Inputs
- Chemicals inorganic,Chemicals, inorganic: 0.13; calculated
  Chemicals, inorganic. Bayan Obo: annual demand of an industrial process is basis for the calculation
- Chemicals organic,Chemicals, organic: 1.63; calculated
  Chemicals, organic. Bayan Obo: annual demand of an industrial process is basis for the calculation
- Kerosene: 0.25; calculated
  Bayan Obo: annual demand of an industrial process is basis for the calculation
- hydrogen chloride: 22.02; calculated
  Bayan Obo: annual demand of an industrial process is basis for the calculation
- hexane: 0.045; calculated
  Bayan Obo: annual demand of an industrial process is basis for the calculation
- Magnesium oxide: 0.23; calculated
  Magnesium oxide. Bayan Obo: annual demand of an industrial process is basis for the calculation
- sodium hydroxide: 6.16; calculated
  Bayan Obo: annual demand of an industrial process is basis for the calculation
- sodium sulfate: 0.016; calculated
  Bayan Obo: annual demand of an industrial process is basis for the calculation
- phosphoric acid: 0.045; calculated
  Bayan Obo: annual demand of an industrial process is basis for the calculation
- Sodium carbonate: 2.95; calculated
  Sodium carbonate. Bayan Obo: annual demand of an industrial process is basis for the calculation
- transport in t*km,transport in t*km: 2.59; measured
  Bayan Obo: 20 km, 803 km for extraction and precipitation chemicals, lorry EURO3
- transport in t*km,transport in t*km: 0.26; measured
  Bayan Obo: 1046 km (Tianjin-Baotou), only for kerosene
- Electricity: 3.924; calculated
  Bayan Obo: estimation based on 200 solvent extraction cells and an energy consumption of 3 kW for each pump an 5 kW for each motor
- Water: 50.88
  Bayan Obo: predominantly calculated on base of molar dilution of the chemicals
- hydrated lime dry slaked: 10.18; calculated
  Bayan Obo: for wastewater treatment

## Outputs
- waste water - treated: 211; calculated
  Bayan Obo: calculation is based on water and chemicals input

## Deviations from the LCI method approaches
In this study, an allocation method based on the market prices of REOs28 is considered. To estimate uncertainties that refer to the allocation method, a mass-based allocation is undertaken as a sensitivity analysis

## Use advice
在生命周期评估中使用本数据集的用户必须考虑NdFeB磁铁生产过程的特殊性，特别是涉及分离钕（Nd）和镨（Pr）的溶剂萃取步骤。对于影响评估，根据稀土氧化物的市场价格进行分配方法至关重要，同时还需通过基于质量的分配方法进行敏感性分析，以估算与分配方法相关的不确定性。过程数据的功能是分析每生产1公斤NdFeB磁铁的环境影响。

## Review details
清单： 内部审查通过几个迭代步骤完成，涉及原始数据验证、原始数据记录、代表性、完整性、与 ISO 14040 和 14044 有关的建模的一致性。

## Data sources
- Marx, J., Schreiber, A., Zapp, P. & Walachowicz, F. Comparative Life Cycle Assessment of NdFeB Permanent Magnet Production from Different Rare Earth Deposits. ACS Sustainable Chem. Eng. 6, 5858–5867 (2018).
