# 锂电池匣体含镍钴回收利用技术

Dataset: ILCD process, Unit process, black box
Geography: CN
Reference year: 2018
Classification: Unit processes / End-of-life treatment / Material recycling
Functional unit: calculation basis is GEB2016 (12.0 × 1024 sej)
Generated by: 彭菲, pengfei24@email.ncu.edu.cn
Owner: 天工LCI数据工作小组
Review: Dependent internal review by 天工LCI数据工作小组
Amounts: no units in this file; such an amount is in the reference unit of its flow, which a separate flow dataset defines
copyright: false
licenseType: Free of charge for all users and uses

## General comment
利用回收的废旧匣钵，通过物理分离、还原浸出、串级分离、蒸发结晶、提纯等工艺，提取镍、钴、锰前驱体，以及碳酸锂等产品，生产明矾、硫酸钾等副产品。

## Technology and included processes
在物理分离过程中，回收的含有多种金属的废匣钵的内表面首先被机械研磨成粉末。然后，这种粉末从匣钵中分离出来，进入还原和浸出过程。保持。在还原和浸出过程中，金属元素，包括镍、钴、锂和锰浸在酸溶液中。酸溶液进入级联分离过程，得到重要元素的初级产物。产生的酸浸渣由有资质的机构作为固体废物进行进一步处理。酸浸出。溶液进入级联分离步骤，生成镍钴锰三元前驱体粗产物，进入纯化步骤，生成明矾、氢氧化铝、氢氧化镁供销售。剩余滤液进入结晶步骤进一步提纯，在结晶过程中，滤液蒸发结晶，生产粗产品碳酸锂，生产硫酸钾，粗产品碳酸锂进入提纯工序，硫酸钾直接销售。剩余的浓缩母液进行级联分离，进一步提取金属元素。在提纯过程中，将镍、钴、锰前体和碳酸锂提纯到电池质量，并作为主要产品销售。

## Technical purpose
所述镍钴匣体回收利用技术是指从回收的废旧匣钵材料中提取镍、钴、锰前驱体和碳酸锂等宝贵物资的过程。该技术旨在从废弃的锂电池匣体中回收这些关键材料。生成的副产品，包括明矾和硫酸钾，通常被用于各种工业应用中，如在明矾基产品和肥料的生产中使用。

## Reference product
- Ni-Co-containing saggars: 1000; input
  含镍铬的纱锭

## Inputs
- water,water: 149.2, 216, 85.6, 96.4 (4 entries)
- Electricity: 29.7, 17.82, 3.96, 59.4, 7.2 (5 entries)
- Sulfuric acid: 216
  硫酸
- waste water - untreated: 160
  浸渣洗涤水
- process steam: 10, 12, 10 (3 entries)
- potassium: 55.6
  氢氧化钾
- Concentrated Mother Liquor: 59.6
  浓缩母液
- potassium: 20
  硫酸钾
- Potassium carbonate: 66
  碳酸钾
- process steam: 198
  蒸汽
- Ni-Co-Mn precursor: 5.8
  Crude Ni-Co-Mn precursor
- Lithium carbonate: 35.2
  Crude lithium carbonate
- Sulfuric acid(98%): 10
  硫酸（98%）
- Carbon dioxide (fossil): 11
  原文未区分bio和fossil，根据专家判断此处为fossil
- water,water: 16
  纯净水
- ammonium: 9
  25%氨
- sodium hydroxide: 6
- Polishing Powder: 171.4
  抛光粉，含水量30%
- Acidic Leaching Liquor: 647
  酸性浸出液
- Methanol: 693.2
  含钾离子和锂离子滤液

## Outputs
- bauxite: 977.8
  陶瓷骨料
- Polishing Powder: 171.4
  抛光粉，含水量30%
- Acidic Leaching Liquor: 647
  酸性浸出液
- Production residues (unspecified): 128.4
  浸出渣
- Alum: 166.2
  铝
- Ni-Co-Mn precursor: 5.8, 5, 28.2 (3 entries)
  镍钴锰前体
- Methanol: 693.2
  含钾离子和锂离子滤液
- Magnesium hydroxide: 1.4
  氢氧化镁
- Aluminum hydroxide: 1.2
  氢氧化铝
- sulfate: 104
  硫酸钾
- Concentrated Mother Liquor: 59.6
  浓缩母液
- Process water: 656.8
  冷凝水
- Lithium carbonate: 35.2
  粗镍钴锰前驱体
- Slag: 1.8
  钙镁渣
- waste water - untreated: 58

## Data selection and combination
本文使用的数据主要来自中国科学院过程工程研究所与中国湖南省某公司进行的中试结果分析数据，包括物理分离、还原浸出、级联分离、结晶和提纯。各种原料的能耗值和排放量来自 Liu 和 Yang 所著《能耗分析理论与实践》的附录。

## Use advice
使用这个数据集的用户应该确保数据专门应用于涉及从锂电池匣体回收和恢复镍、钴和锰的场景。在建模生命周期评估时，重要的是要考虑回收材料的使用阶段行为，并相应地应用数据。提供的数据中给出的能值必须谨慎处理，将刘和杨的《能量分析理论与实践》纳入作为方法论参考。该数据集是基于1 kWh能量当量的功能单元，以GEB2016（12.0×1024 sej）作为计算依据。用户应确保他们的方法与该基础保持一致，当解释和集成数据时。

## Review details
清单： 内部审查通过几个迭代步骤完成，涉及原始数据验证、原始数据记录、代表性、完整性、与 ISO 14040 和 14044 有关的建模的一致性。

## Data sources
- Zhang, W. et al. Evaluation of the Ecological Benefits of Recycling Multiple Metals from Lithium Battery Saggars Based on Emergy Analysis. SUSTAINABILITY 13, (2021).
