# 电力生产 ; 火电 ; 新疆维吾尔自治区

Dataset: ILCD process, Unit process, single operation
Geography: XJ-CN
Reference year: 2019
Classification: Unit processes / Energy carriers and technologies / Electricity
Generated by: 熊若熙, xiongrx0126@163.com
Owner: 天工LCI数据工作小组
Review: Dependent internal review by 天工LCI数据工作小组
Amounts: no units in this file; such an amount is in the reference unit of its flow, which a separate flow dataset defines
copyright: false
licenseType: Free of charge for all users and uses

## General comment
火电发电包括原煤、洗煤、石油、天然气等十七种化石燃料。该过程只考虑直接发电过程，不考虑上游原材料开采加工和下游消费

## Time period
根据2019年能源统计年鉴数据计算

## Technical purpose
该数据代表了新疆维吾尔自治区的热电发电过程，主要使用包括原煤、洗煤、石油和天然气在内的十七种化石燃料。此过程专用于直接发电，并通常在能源行业中被用于为该地区的居民、商业和工业目的提供电力。

## Reference product
- electricity for thermal power: 3.6; calculated

## Inputs
All rows: calculated
- Raw coal: 0.466137
- Other Washed Coal: 7.07e-6
- Gangue, in ground: 0.00524956
- Coke oven gas: 0.005365
- blast furnace gas: 0.00614
- Converter gas: 0.001654
- Diesel: 1.06e-5
- fuel oil, unspecified: 2.12e-6
- natural gas: 0.001212

## Outputs
- carbon dioxide (fossil): 0.875763; calculated
- sulfur dioxide: 0.000151336; calculated
- Nitrogen oxides: 0.000238566; calculated
- particles (> PM10): 2.8896e-5; calculated

## Data treatment and extrapolations
核算方法参考《企业温室气体排放核算方法与报告指南 发电设施》。不同形式发电量及燃料用量来自于《中国能源统计年鉴 2020》中的第三章（能源生产） 和第六章（地区能源平衡表）。用于计算二氧化碳排放因子的低位发热量、单位热值含碳量等燃料参数来自于《2019 年度中国区域电网二氧化碳基准线排放因子 OM 计算说明》、《企业温室气体排放核算方法与报告指南 发电设施》

## Use advice
在使用此数据进行生命周期评估（LCA）时，用户应注意，只考虑直接电力发电过程。上游原材料开采加工和下游电力消费被排除在外。数据应在新疆维吾尔自治区特定于化石燃料能源生产的背景下进行解读。方法论考虑必须符合《企业温室气体排放核算方法与报告指南 发电设施》，并须考虑《中国能源统计年鉴 2020》和其他引用官方文件中的燃料参数。准确应用二氧化碳排放因子对于准确的环境影响评估至关重要。

## Review details
清单： 内部审查通过几个迭代步骤完成，涉及原始数据验证、原始数据记录、代表性、完整性、与 ISO 14040 和 14044 有关的建模的一致性。

## Data sources
- 熊若熙. 中国电力生产和消费二氧化碳与污染物排放因子核算. (清华大学, 2023).
