# 市政污泥处理与处置;湿污泥 含水率76.2%;堆肥

Dataset: ILCD process, Unit process, single operation
Geography: XA-SAX-CN
Classification: Unit processes / End-of-life treatment / Waste water treatment
Functional unit: The residual sludge sludge of Xi'an No. 3 Sewage Treatment Plant has a moisture content of 76.2% and a functional unit of 1t residual sludge.
Generated by: 金思甜, 2331276@tongji.edu.cn
Owner: 天工LCI数据工作小组
Review: Dependent internal review by 天工LCI数据工作小组
Amounts: no units in this file; such an amount is in the reference unit of its flow, which a separate flow dataset defines
copyright: ['opt4ROkqig']
licenseType: Free of charge for all users and uses

## General comment
堆肥工艺指的是高温好氧堆肥。

## Geography
西安第三污水处理厂

## Technology and included processes
在堆肥过程中，微生物在新陈代谢时，约有 2/3 的碳转化成为二氧化碳，有 13.16%的氮转化成氨。

## Technical purpose
西安市第三污水处理厂的剩余污泥用于堆肥目的。这个过程在废物管理和肥料生产领域发挥着至关重要的作用，将含水率为76.2%的湿污泥转化为可用作土壤改良剂的产品。

## Reference product
- Sludge: 1000; input; estimated
  1t含水率76.2%的剩余污泥

## Inputs
- Diesel: 0.00116; measured
- Electricity: 237.96; measured

## Outputs
All rows: calculated
- carbon dioxide (biogenic): 166.27
  原文未区分biogenic和fossil，根据专家判断此处为biogenic。
- ammonia: 1.738
- Nitrogen oxides: 0.002316
- hydrogen sulfide: 0.03215
- sulfur dioxide: 0.00438

## Use advice
在将此数据集纳入生命周期评估时，必须考虑堆肥过程的边界条件，确保核算污泥运输和堆肥使用等上下游影响。同时，评估与特定LCA研究的方法学兼容性也很重要，例如调整功能单位以匹配评估中处理设施的规模。

## Review details
清单： 内部审查通过几个迭代步骤完成，涉及原始数据验证、原始数据记录、代表性、完整性、与 ISO 14040 和 14044 有关的建模的一致性。

## Data sources
- 齐星昊. 基于生命周期评价的典型剩余污泥处理方法的环境影响比较研究[D].河南师范大学,2020.
