# 电去离子模块生产;螺旋缠绕

Dataset: ILCD process, Unit process, single operation
Geography: CN
Reference year: 2022
Classification: Materials production / Other materials
Functional unit: 1 item of EDI module
Generated by: 陆嘉麒, wilsherelu@foxmail.com
Owner: 天工LCI数据工作小组
Review: Dependent internal review by 天工LCI数据工作小组
Amounts: no units in this file; such an amount is in the reference unit of its flow, which a separate flow dataset defines
copyright: false
licenseType: Free of charge for all users and uses

## General comment
通过螺旋缠绕工艺生产的电去离子（EDI）模块主要用于水净化系统中，以去除水中的离子，使其高度纯化。该EDI模块可用于包括医疗、实验室、制药和工业应用在内的多种场合，其中需要高品质去矿物质的水。

## Reference product
- Electrodeionization components: 1; article inperiodical
  1 EDI module

## Inputs
All rows: article inperiodical
- electricity mix: 684
  工厂耗电
- Titanium Ruthenium Electrode: 1.2
  钛涂钌电极
- Steel hot rolled coil: 4.5
  Stainless steel cathode
- polyvinylchloride resin (E-PVC): 12.71
  PVC外壳
- acrylonitrile-butadiene-styrene granulate (ABS): 3.82
  ABS外壳
- Anion exchange resin: 3.35
  阴离子交换树脂
- Cation Exchange Resin: 2.75
  阳离子交换树脂
- polyethylene high density granulate (PE-HD): 1.55
  聚乙烯
- Anion exchange membrane: 3.36
  阴离子交换膜
- Ion Exchange Membranes: 4.38
  阳离子交换膜
- Epoxy resin: 0.71
  环氧树脂胶

## Outputs
- waste incineration of plastics (unspecified) fraction in municipal solid waste (MSW): 0.021; article inperiodical
  废弃阳离子交换膜
- waste incineration of plastics (unspecified) fraction in municipal solid waste (MSW): 0.018; article inperiodical
  废弃阴离子交换膜
- waste incineration of plastics (unspecified) fraction in municipal solid waste (MSW): 0.37; article inperiodical
  废弃阳离子交换树脂
- waste incineration of plastics (unspecified) fraction in municipal solid waste (MSW): 0.31; article inperiodical
  废弃阴离子交换树脂

## Use advice
在将EDI模块的数据集纳入生命周期评估时，必须确保系统边界包括模块从生产到处置的所有生命周期阶段。应根据应用的具体要求对模块在水净化中的使用进行建模，同时考虑到预期的寿命和维护需求。此外，如果EDI模块取代了其他水净化技术或与之协同工作，这些变化应该在系统分析中反映出来，以准确评估环境影响。

## Review details
清单： 内部审查通过几个迭代步骤完成，涉及原始数据验证、原始数据记录、代表性、完整性、与 ISO 14040 和 14044 有关的建模的一致性。

## Data sources
- Yuan, Y. et al. Deduction of carbon footprint for membrane desalination processes towards carbon neutrality: A case study on electrodeionization for ultrapure water preparation. Desalination 559, 116648 (2023).
