# 湿法制砂;砂石制砂;制砂机制砂

Dataset: ILCD process, Unit process, single operation
Geography: CS-HUN-CN
Reference year: 2020
Classification: Unit processes / Materials production / Other mineralic materials
Generated by: 崔航, Cuihang0716@163.com
Owner: 天工LCI数据工作小组
Review: Dependent internal review by 天工LCI数据工作小组
Amounts: no units in this file; such an amount is in the reference unit of its flow, which a separate flow dataset defines
copyright: false
licenseType: Free of charge for all users and uses

## General comment
皮带将粒径小于1cm的碎石输送至制砂机内，生产4~7mm的粗砂

## Technical purpose
所述工业过程用于利用湿法技术从粒径小于1cm的碎石生产4-7mm粗砂。这种加工后的砂可能用于建筑行业，用于生产混凝土、砂浆或作为地基、道路和铁路下的基层材料。

## Reference product
- sand: 133333; measured
  生产的4~7mm的粗砂

## Inputs
- gravel: 133333; measured
  皮带将粒径小于1cm的碎石输送至制砂机内，生产4~7mm的粗砂
- Electricity: 144; measured
  制砂机用电量

## Use advice
将此数据集整合到生命周期评估中时，必须考虑使用制砂机进行输送和加工的能源消耗和排放。还应考虑生命周期终端阶段，包括对生产的砂的潜在回收或作为二次材料的使用。确保考虑原材料采购和技术效率的区域差异。

## Review details
清单： 内部审查通过几个迭代步骤完成，涉及原始数据验证、原始数据记录、代表性、完整性、与 ISO 14040 和 14044 有关的建模的一致性。

## Data sources
- 年产 60 万吨机制砂建设项目环评报告
