# 开采阶段;原油;测井、钻井采油工程

Dataset: ILCD process, Unit process, single operation
Geography: DQ-HLJ-CN
Reference year: 2018
Classification: Unit processes / Energy carriers and technologies / Crude oil based fuels
LCI method principle: Attributional
LCI method approaches: Consequential
Generated by: 李梓萌, 1577978537@qq.com
Owner: 天工LCI数据工作小组
Review: Dependent internal review by 天工LCI数据工作小组
Amounts: no units in this file; such an amount is in the reference unit of its flow, which a separate flow dataset defines
copyright: false
licenseType: Free of charge for all users and uses

## General comment
开采环节

## Geography
该企业是全国最大的大 庆原油加工基地。

## Technology and included processes
测井是指利用测井仪器在钻井过程中或钻井完成后对井内岩石、地层等进行物理性质的测量、分析和记录，以获取地下岩石的性质和储层特征的过程。测井技术包括测井仪器的选择和使用、测井数据的获取和分析、测井曲线的解释等。常用的测井方法包括电测井、声波测井、核磁共振测井等。钻井技术涉及钻井设备的选择和操作、钻头和钻杆的设计和使用、钻井液的循环和管理等方面。常见的钻井方式包括旋挖钻井、循环钻井和非循环钻井等。油工程涉及油井的设计、建设和管理、采油设备的选择和操作、油藏压力的维护和调控等方面。常见的采油技术包括自然产油、人工提升、水驱、气驱、聚合物驱等。

## Technical purpose
该工业过程涉及原油的开采阶段，包括测井、钻井及采油工程。从中国最大的大庆原油加工基地提取的原油，旨在用于精炼以及作为生产各种石化产品、燃料的基础原料，也作为能源生产和工业应用的原料。

## Reference product
- LPG - liquefied petroleum gas: 1.171e9; uniform; missing unimportant
  生产汽油量

## Inputs
- LPG - liquefied petroleum gas: 5.837e9; uniform; missing unimportant
  输入端石油中碳输入总量。其中85%来源于大庆油田，占大庆油田 2015 年石油产量的 14%。该企业是全国最大的大庆原油加工基地。

## Outputs
- LPG - liquefied petroleum gas: 8.92e8; uniform; missing unimportant
  生产煤油量

## Use advice
在使用此数据集进行生命周期评估时，用户必须考虑包括测井、钻井和采油工程在内的开采过程的技术特性。应重点关注这些活动的环境影响，包括能源使用、排放以及潜在的生态系统干扰。在更广泛的LCA模型中准确集成此数据非常重要，确保与评估的目标和范围保持一致，特别是关注上游开采影响。关于原油的任何回收或产品寿命末期方面的考虑应在其后续处理和使用阶段的背景下检查。

## Review details
清单： 内部审查通过几个迭代步骤完成，涉及原始数据验证、原始数据记录、代表性、完整性、与 ISO 14040 和 14044 有关的建模的一致性。

## Data sources
- 吴明,姜国强,贾冯睿等.基于物质流和生命周期分析的石油行业碳排放[J].资源科学,2018,40(06):1287-1296.
