# 电力生产 ; 火电 ; 甘肃

Dataset: ILCD process, Unit process, single operation
Geography: GS-CN
Reference year: 2019
Classification: Unit processes / Energy carriers and technologies / Electricity
Generated by: 熊若熙, xiongrx0126@163.com
Owner: 天工LCI数据工作小组
Review: Dependent internal review by 天工LCI数据工作小组
Amounts: no units in this file; such an amount is in the reference unit of its flow, which a separate flow dataset defines
copyright: false
licenseType: Free of charge for all users and uses

## General comment
火电发电包括原煤、洗煤、石油、天然气等十七种化石燃料。该过程只考虑直接发电过程，不考虑上游原材料开采加工和下游消费

## Time period
根据2019年能源统计年鉴数据计算

## Technical purpose
该数据集涉及中国甘肃地区的火电发电过程。它包括使用原煤、洗煤、石油和天然气等十七种化石燃料进行发电。这一过程用于向区域网络内的工业、住宅和商业部门提供电力。需要指出的是，数据仅包括直接发电过程，不包括涉及原材料开采、加工或所产生电力的消费阶段。

## Reference product
- electricity for thermal power: 3.6; calculated

## Inputs
All rows: calculated
- Raw coal: 0.440306
- Gangue, in ground: 0.00467837
- Coke oven gas: 0.001065
- blast furnace gas: 0.016078
- Converter gas: 0.001561
- Diesel: 2.178e-5
- fuel oil, unspecified: 2.42e-6
- refinery gas: 8.348e-5
- natural gas: 0.001161

## Outputs
- carbon dioxide (fossil): 0.83301; calculated
- sulfur dioxide: 0.000143664; calculated
- Nitrogen oxides: 0.000226591; calculated
- particles (> PM10): 2.7597e-5; calculated

## Data treatment and extrapolations
核算方法参考《企业温室气体排放核算方法与报告指南 发电设施》。不同形式发电量及燃料用量来自于《中国能源统计年鉴 2020》中的第三章（能源生产） 和第六章（地区能源平衡表）。用于计算二氧化碳排放因子的低位发热量、单位热值含碳量等燃料参数来自于《2019 年度中国区域电网二氧化碳基准线排放因子 OM 计算说明》、《企业温室气体排放核算方法与报告指南 发电设施》

## Use advice
使用该数据集的用户应将其专门用于评估甘肃地区火力发电的直接排放，并计算二氧化碳排放因子。在分析数据时，必须遵循《企业温室气体排放核算方法与报告指南 发电设施》中提供的方法论框架。此外，计算应与2019年能源统计年鉴和《2019年中国区域电网二氧化碳基准线排放因子OM计算说明》中的参数和统计数据保持一致。用户在使用这些数据时，必须确保他们没有将上游或下游过程（例如，燃料提取或最终用户用电消费）纳入评估。

## Review details
清单： 内部审查通过几个迭代步骤完成，涉及原始数据验证、原始数据记录、代表性、完整性、与 ISO 14040 和 14044 有关的建模的一致性。

## Data sources
- 熊若熙. 中国电力生产和消费二氧化碳与污染物排放因子核算. (清华大学, 2023).
