# 注气井;土壤原位修复;生物通风;注汽井建设

Dataset: ILCD process, Unit process, single operation
Geography: CN
Reference year: 2022
Classification: Unit processes / Other Services / Repair and maintenance
Generated by: 王宁, wang_ning@caep.org.cn
Owner: 天工LCI数据工作小组
Review: Dependent internal review by 天工LCI数据工作小组
Amounts: no units in this file; such an amount is in the reference unit of its flow, which a separate flow dataset defines
copyright: false
licenseType: Free of charge for all users and uses

## General comment
空气注入井建设

## Geography
案例焦化厂位于我国北方中纬度地带

## Technology and included processes
使用柴油、水、PVC等建造空气注入井和抽提井

## Technical purpose
该数据集代表了用于土壤原位修复和土壤生物通风的注气井建设工艺。这种工业过程通常应用于环境工程中，用于修复受污染土地，特别是在传统挖掘不切实际的情况下。该工艺适用于旧工业设施、化学/石油泄漏和其他受土壤污染影响的地区。

## Reference product
- injection well: 1; measured

## Inputs
- Diesel oil,diesel oil: 0.506; measured
- Polyvinyl chloride: 1000; measured
- Tap Water: 785; measured
- Equipment and Materials Arriving on Site: 1; measured

## Use advice
使用此数据集时，用户应仔细考虑与土壤类型、污染水平和当地法规相关的技术适用性。数据特定于建设阶段，并可能不完全代表井的运营或终生阶段。确保所有包括的材料，如柴油、水和PVC，适用于特定的现场条件。方法论考虑还应包括建设过程的能源输入和与使用特定材料相关的潜在环境影响。

## Review details
清单： 内部审查通过几个迭代步骤完成，涉及原始数据验证、原始数据记录、代表性、完整性、与 ISO 14040 和 14044 有关的建模的一致性。

## Data sources
- 刘文晓等.基于修复效果的污染土壤修复工程环境足迹分析[J].环境科学研究 35,2367-2377（2022）.
