# 湿蒸法棉布染整加工;印染棉布;煮练氧漂

Dataset: ILCD process, Unit process, single operation
Geography: SZ-JS-CN
Reference year: 2012
Classification: Unit processes / Materials production / Organic chemicals
Generated by: 段颖凡, 1300925579@qq.com
Owner: 天工LCI数据工作小组
Review: Dependent internal review by 天工LCI数据工作小组
Amounts: no units in this file; such an amount is in the reference unit of its flow, which a separate flow dataset defines
copyright: false
licenseType: Free of charge for all users and uses

## General comment
煮练氧漂是印染过程中的一个重要环节，它旨在通过使用氧漂剂去除棉布上的不想要的色素或杂质。这个过程通常包括将棉布浸泡在含有氧漂剂的煮练槽中，以确保色素被有效地漂白。

## Geography
本研究选取江苏省某印染企业为重点调研对象，该企业位于长三角经济圈中的常熟。

## Technical purpose
本工业流程涉及湿蒸法棉布染整加工，包括棉布的印染以及煮练和氧漂。流程使用煤炭在蒸汽和导热油锅炉中分别产生蒸汽和较高的操作温度。这些蒸汽主要用于棉布处理的各个阶段，如煮练氧漂、丝光、磨毛、平幅水洗、培烘和轧染。蒸汽帮助在上述过程中对坯布进行烘干处理，在轧染步骤需要两次烘干，其他步骤通常涉及单次烘干。蒸汽的消耗根据这些阶段相应分配。

## Reference product
- Cotton Fabric: 167; measured

## Inputs
- Electricity: 523; measured
- Standard coal: 1960; measured
- Crude coal: 293; calculated
- Cleaned coal: 725; calculated
- Fuel Oil: 6.25; calculated
- heavy fuel oil: 1.88; calculated
- Diesel oil: 8.6; calculated
- Coke Oven Gas: 11.5; calculated
- natural gas: 0.147; calculated
- process steam: 6.3e7; measured
- Hydrogen peroxide: 25; measured
- Stabilizer: 26.7; measured
- Penetrant: 40; measured
- Chelating Agent: 20; measured
- sodium hydroxide: 183; measured
- river water: 34500; measured
- freshwater: 4600; measured

## Outputs
- carbon dioxide (fossil): 5520; calculated
- carbon monoxide (fossil): 0.279; calculated
- sulfur dioxide: 4.15; calculated
- methane (fossil): 27.2; calculated
- Nitrogen oxides: 0.585; calculated
- nitrous oxide: 0.0862; measured
- particles (> PM10): 0.867; calculated
- ammonia: 1.53e-5; measured
- non-methane volatile organic compounds: 0.00825; measured
- waste water - untreated: 31800; measured
- chemical oxygen demand: 36.2; calculated
- Suspended solids, unspecified,Suspended solids, unspecified: 3.93; calculated
- lead: 6.39e-6; calculated
- mercury: 1.34e-7; calculated
- fluorine: 1.21e-6; calculated
- cadmium: 2.37e-7; calculated
- arsenic: 5.47e-6; calculated

## Use advice
使用此数据集时，必须考虑棉布染整过程中蒸汽消耗的具体比例。在进行生命周期评估时，应将煮练氧漂、丝光、磨毛、平幅水洗、培烘和轧染各个工序的蒸汽消耗比例反映为2:1:1:1:1:2。用户应确保在蒸汽和导热油锅炉中使用的来自煤炭的能量输入得到准确核算，两种锅炉的消耗比例为17:1。此数据集适用于位于长三角经济圈中的常熟某印染企业，用户在评估技术适用性和环境影响时应考虑这一地区背景。

## Review details
清单： 内部审查通过几个迭代步骤完成，涉及原始数据验证、原始数据记录、代表性、完整性、与 ISO 14040 和 14044 有关的建模的一致性。

## Data sources
- 朱亚楠. 棉布连续轧染工艺生命周期环境影响评价. (南京大学, 2012).
