# 稀土铣削;稀土;原位浸出;钕铁硼（NdFeB）磁铁

Dataset: ILCD process, Unit process, single operation
Geography: NMG-CN
Reference year: 2014
Classification: Materials production / Metals and semimetals
Functional unit: The functional unit is a 1 kg NdFeB magnet
LCI method principle: Attributional
LCI method approaches: Allocation - market value; Allocation - mass
Generated by: 汪涛, twang@iue.ac.cn
Owner: 天工LCI数据工作小组
Review: Dependent internal review by 天工LCI数据工作小组
Amounts: no units in this file; such an amount is in the reference unit of its flow, which a separate flow dataset defines
copyright: false
licenseType: Free of charge for all users and uses

## General comment
所述工业过程涉及生产钕铁硼（NdFeB）磁铁。这些磁铁是由稀土元素合金制成的强大永磁体。 NdFeB 磁铁广泛应用于包括计算机硬盘驱动器、风力发电机、核磁共振扫描仪、无绳工具电机和电动汽车电机在内的各种应用中。

## Geography
Bayan Obo (China)

## Technology and included processes
所有三个矿床生产 Nd 和 Pr 的基本过程都是相同的。 Nd 和 Pr 是相同的，除了最后的溶剂萃取步骤 (SX5)，其中两者被分离。

## Reference product
- Steel: 0.375; input; article inperiodical
  Steel. Bayan Obo: calculation is based on Abrasion inde

## Inputs
- Electricity: 15.12; article inperiodical
  Bayan Obo: calculation with Bond index formula
- Water: 365.8; article inperiodical
  Bayan Obo: production of ore pulp with 40 % milled ore
- transport in t*km,transport in t*km: 0.027; article inperiodical
  Bayan Obo: same distances as in Fehler! Verweisquelle konnte nicht gefunden werden
- transport in t*km,transport in t*km: 180.612; article inperiodical
  Bayan Obo: 150 km for the crushed ore

## Deviations from the LCI method approaches
In this study, an allocation method based on the market prices of REOs28 is considered. To estimate uncertainties that refer to the allocation method, a mass-based allocation is undertaken as a sensitivity analysis

## Use advice
在使用 NdFeB 磁铁生产的 LCA 数据时，必须考虑基于稀土氧化物 （REOs）市场价格的分配方法，如数据集所述。为了了解分配方法对结果的潜在影响，数据用户还应考虑使用基于质量分配的敏感性分析的结果。提供的数据是在中国白云鄂博地点生产 1 公斤 NdFeB 磁铁的单元过程。确保使用相同的功能单位进行过程或产品的任何比较，以保持一致性。

## Review details
清单： 内部审查通过几个迭代步骤完成，涉及原始数据验证、原始数据记录、代表性、完整性、与 ISO 14040 和 14044 有关的建模的一致性。

## Data sources
- Marx, J., Schreiber, A., Zapp, P. & Walachowicz, F. Comparative Life Cycle Assessment of NdFeB Permanent Magnet Production from Different Rare Earth Deposits. ACS Sustainable Chem. Eng. 6, 5858–5867 (2018).
