# 草甘膦生产 ; 亚氨基二乙腈法

Dataset: ILCD process, Unit process, black box
Geography: CN
Reference year: 2009
Classification: Materials production / Organic chemicals
Functional unit: producing 10000 tons glyphosate
Generated by: 玲俐, calinly@163.com
Owner: 天工LCI数据工作小组
Review: Dependent internal review by 天工LCI数据工作小组
Amounts: no units in this file; such an amount is in the reference unit of its flow, which a separate flow dataset defines
copyright: false
licenseType: Free of charge for all users and uses

## General comment
无流程图

## Technical purpose
该数据集代表了使用亚氨基二乙腈法生产草甘膦。通过这个过程生产的草甘膦作为非选择性除草剂，在各种农业实践中用于控制杂草。它对广泛的杂草物种有效，并且用于农田、果园和非耕地区。

## Reference product
- glyphosate: 1e7; measured
  草甘膦

## Inputs
- Road Transport: 6.7e6
  汽车/船运（硫酸铵）
- Road Transport: 9.08e6
  汽车/船运（草甘膦）
- Road Transport: 1e7
  汽车（硫酸）
- Road Transport: 70000
  汽车（催化剂）
- Road Transport: 880000
  汽车（助剂）
- Road Transport: 2e6
  汽车（液氨）
- Road Transport: 2.6e6
  汽车（异丙胺）
- Pipeline transport: 1.64e7
  管道（三氯化磷）
- Pipeline transport: 3.87e7
  管道（液碱）
- Pipeline transport: 6.7e6
  管道（盐酸）
- Road Transport: 1.2e7
  汽车（甲醇）
- Road Transport: 1.06e7
  汽车/船运（亚氨基二乙腈）
- Auxiliary: 878000; measured
  助剂，规格0.45%
- catalyst: 67000; measured
  催化剂
- Iminodiacetonitrile: 1.0152e7; measured
  亚氨基二乙腈，规格93.5%
- sodium hydroxide: 3.8686e7; measured
  液碱，规格30%
- phosphorus trichloride: 1.6408e7; measured
  三氯化磷，规格98%
- methanal: 1.2e7; measured
  甲醛，规格36.5%
- Hydrochloric Acid: 6.667e6; measured
  盐酸，规格30%
- isopropamide: 2.622e6; measured
  异丙胺，规格0.98%
- Aqueous ammonia: 2e6; measured
  液氨，规格0.997%
- Sulfuric acid(98%): 1e7; measured
  硫酸，规格98%
- Water for industrial use: 2e9; measured
  水
- process water: 1.5e10; measured
  循环水
- electricity mix: 6.84e7; measured
  电
- process steam: 1.1e8; measured
  蒸汽，Mpa
- compressed air: 4.7e6; measured
  压缩空气，0.5MPa

## Use advice
在使用这个数据集进行生命周期评估时，用户应注意数据包括了使用亚氨基二乙腈法生产草甘膦的生产阶段，没有详细的流程图。它包括生产10000吨草甘膦并包含部分运输信息。数据可能需要根据地区特定的实践和物流进行调整，而省略的细节，比如能源消耗或废物产生，必要时应使用替代数据或额外研究来建模。

## Review details
清单： 内部审查通过几个迭代步骤完成，涉及原始数据验证、原始数据记录、代表性、完整性、与 ISO 14040 和 14044 有关的建模的一致性。

## Data sources
- 孙丽云. 龙达公司草甘膦扩建项目可行性研究. (中国海洋大学, 2009).
