# Electricity/electricalenergy+heatenergy|Coalgangue/oilshale|Circulating fluidized bed boiler|All sizes / \|电能/电能+热能|煤矸石/油页岩|循环流化床锅炉|所有规模

Dataset: ILCD process, Partly terminated system
Geography: CN
Reference year: 2019
Classification: Materials production / Other mineralic materials
Generated by: The data was created by the Office of the Second National Pollution Source Census of the Ministry of Ecology and Environment, and the data was organized by the TianGong Plan team for ILCD format / 生态环境部第二次全国污染源普查工作办公室创建数据，天工计划团队常慧敏整理数据为ILCD格式
Amounts: no units in this file; such an amount is in the reference unit of its flow, which a separate flow dataset defines
copyright: false

## Technology and included processes
the Technical of end-of-pipe management technology for pollution Coal GangueisOthers (direct discharge)
污染物指标工业废水量的末端治理技术是其他（直排）

## Reference product
- Coal Gangue: 1000; input; calculated
  原文件中描述污染物类别为Product，污染物指标为煤矸石/油页岩，此处对其进行了匹配工作，将其匹配到LCAflow库里面相最符合的流，污染物指标备注为工业废水量

## Outputs
All rows: calculated
- Waste water: 540, 540, 540 (3 entries)
  原文件中描述污染物类别为废水，污染物指标为工业废水量，此处对其进行了匹配工作，将其匹配到LCAflow库里面相最符合的流，污染物指标备注为工业废水量
- chemical oxygen demand: 0.0233023
  原文件中描述污染物类别为废水，污染物指标为化学需氧量，此处对其进行了匹配工作，将其匹配到LCAflow库里面相最符合的流，污染物指标备注为化学需氧量
- Ammonia Nitrogen: 0.0024818
  原文件中描述污染物类别为废水，污染物指标为氨氮，此处对其进行了匹配工作，将其匹配到LCAflow库里面相最符合的流，污染物指标备注为氨氮
- Exhaust gas: 4806
  原文件中描述污染物类别为废气，污染物指标为工业废气量，此处对其进行了匹配工作，将其匹配到LCAflow库里面相最符合的流，污染物指标备注为工业废气量
- particles (PM2.5 - PM10): 0.21474, 0.21474, 0.21474, 0.07158, 0.07158, 0.07158, 0.02386, 0.02386, 0.02386, 0.02386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 (24 entries)
  原文件中描述污染物类别为废气，污染物指标为颗粒物（无炉内脱硫），此处对其进行了匹配工作，将其匹配到LCAflow库里面相最符合的流，污染物指标备注为颗粒物（无炉内脱硫）
- particles (PM2.5 - PM10): nan, nan, nan, nan, nan, nan, nan, nan, nan, nan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 (24 entries)
  原文件中描述污染物类别为废气，污染物指标为颗粒物（炉内脱硫），此处对其进行了匹配工作，将其匹配到LCAflow库里面相最符合的流，污染物指标备注为颗粒物（炉内脱硫）
- sulfur dioxide: 0.16099, 0.16099, 0.16099, 0.16099, 0.16099, 0.16099, 0.16099, 0.16099, 0.16099, 0.45456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 (18 entries)
  原文件中描述污染物类别为废气，污染物指标为二氧化硫（无炉内脱硫），此处对其进行了匹配工作，将其匹配到LCAflow库里面相最符合的流，污染物指标备注为二氧化硫（无炉内脱硫）
- sulfur dioxide: 0.1562, 0.1562, 0.1562, 0.1562, 0.1562, 0.1562, 0.1562, 0.1562, 0.1562, 0.44588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 (18 entries)
  原文件中描述污染物类别为废气，污染物指标为二氧化硫（炉内脱硫），此处对其进行了匹配工作，将其匹配到LCAflow库里面相最符合的流，污染物指标备注为二氧化硫（炉内脱硫）
- Nitrogen oxides: 0.95, 0.2375, 0.3325 (3 entries)
  原文件中描述污染物类别为废气，污染物指标为氮氧化物，此处对其进行了匹配工作，将其匹配到LCAflow库里面相最符合的流，污染物指标备注为氮氧化物
- Nitrogen oxides: 0.48, 0.168, 0.24 (3 entries)
  原文件中描述污染物类别为废气，污染物指标为氮氧化物（SNCR），此处对其进行了匹配工作，将其匹配到LCAflow库里面相最符合的流，污染物指标备注为氮氧化物（SNCR）
- mercury: nan
  原文件中描述污染物类别为废气，污染物指标为汞及其化合物，此处对其进行了匹配工作，将其匹配到LCAflow库里面相最符合的流，污染物指标备注为汞及其化合物
- volatile organic compound: nan
  原文件中描述污染物类别为废气，污染物指标为挥发性有机物，此处对其进行了匹配工作，将其匹配到LCAflow库里面相最符合的流，污染物指标备注为挥发性有机物

## Data sources
- 第二次全国污染源普查产排污核算系数手册（试用版）,四级代码4411、4412文件，在完整版文件中第5333页
