# 碳酸锂生产 ; 电池级碳酸锂 ; 硫酸法 ; 澳大利亚出口锂辉石精矿

Dataset: ILCD process, Unit process, single operation
Geography: SZ-JS-CN
Reference year: 2014
Classification: Unit processes / Materials production / Inorganic chemicals
Generated by: 孙鑫, xs389@cornell.edu
Owner: 天工LCI数据工作小组
Review: Dependent internal review by 天工LCI数据工作小组
Amounts: no units in this file; such an amount is in the reference unit of its flow, which a separate flow dataset defines
licenseType: Free of charge for all users and uses

## General comment
功能单位的定义是 1 千克电池级碳酸锂（Li2CO3），纯度为 99.9%。硬岩提锂生产的系统边界包括岩石开采、运输和现场生产过程。为了将这一过程扩展到自然资源开采，还考虑了生产原材料的上游过程，包括锂辉石、天然气、电力和添加材料。然而，与其他生命周期评估类似，由于建筑物和基础设施的数据缺乏，建筑物和基础设施没有考虑在内。

## Technology and included processes
硬岩提锂的现场制备过程包括八个主要步骤，包括煅烧、焙烧、浸出、提纯、碳化、干燥、空气压缩和辅助系统。在煅烧步骤中，以管道天然气为动力，在温度为1070-1100 ℃ 的回转窑中将α-钠石生成β-钠石，随后冷却至100 ℃以下，并研磨成粉末。在硫化焙烧步骤中，粉末状的β-spodumene 会与浓硫酸（98.3%）在另一个回转窑中充分混合，并以管道天然气为动力在 250 ℃ 的温度下进行焙烧。然后，在 60 ℃ 的温度下进行母液浸出，将 Li2SO4 提取到溶液中，并在 pH 值为 12 时加入 NaOH 进一步处理，以去除铁、铝、镁等杂质和残留的硫酸。为去除 Ca，加入 Na2CO3 与 CaSO4 反应，在 pH 值为 10 时沉淀出 CaCO3。然后，使用 HCl（6%）进行离子交换，净化浸出液。然后加入 Na2CO3 对富锂溶液进行碳化，沉淀出碳酸锂。固体 Li2CO3 随后溶解在水中，并与 CO2 反应生成溶解的 LiHCO3，然后用蒸汽处理，得到纯化的 Li2CO3.在此过程中，使用蒸汽将温度保持在 85 ℃，并进行过滤以去除残留物。最后，使用天然气作为能源，获得干燥的电池级 Li2CO3（99.9%）作为主产品，以及硫酸钠（Na2SO4）作为副产品。最后，利用天然气对湿产品进行干燥，生成最终产品（纯度为 99.9% 的 Li2CO3）。空气压缩步骤提供压缩空气作为动力源。辅助步骤包括循环水、除尘和废物处理系统。不同步骤产生的空气污染物通过旋风除尘器、静电除尘器和布袋除尘器等设备进行处理，但部分污染物，如二氧化硫、粉尘和硫酸雾，仍会排放到大气中。废水经收集和中和后，泵送至集中污水处理厂进一步处理，最后排入长江。固体废物外售，作为建筑材料再利用。

## Technical purpose
本数据集描述的电池级碳酸锂生产过程涉及硫酸法。通过该过程生产的碳酸锂用于锂离子电池的制造。这种高纯度化学品在电动汽车、便携式电子设备和能源储存系统的生产中起着至关重要的作用。

## Reference product
- Lithium carbonate,Lithium carbonate: 1; measured

## Inputs
All rows: measured
- Spodumene concentrate (6% Li2O): 8.67
- Electricity: 13.788
- process steam: 7.77
- Natural gas, at consumer EU-27: 1.36
- water: 49.46
- Sulfuric acid: 3.02
- sodium carbonate: 2.26
- sodium hydroxide: 0.55
- diatomite: 0.06
- hydrogen chloride: 0.18
- Hydrogen peroxide (30%): 0.12
- hydrated lime dry slaked: 0.65
- carbon dioxide (fossil): 0.05

## Outputs
All rows: measured
- municipal solid waste deposition: 13.04
- sodium sulfate: 2.27
- Water: 38.8
- chemical oxygen demand: 0.55
- Suspended solids, unspecified: 0.74
- ammonia: 0.03
- sulphuric acid: 5e-5
- phosphate: 0.003
- sulfur dioxide: 9e-5
- nitrogen dioxide: 0.00131
- particles (PM2.5 - PM10): 0.00053

## Use advice
在使用此数据集进行生命周期评估时，请确保范围包括从澳大利亚出口锂辉石精矿以及使用硫酸法生产碳酸锂的过程。核算锂辉石精矿的运输影响和提取方法非常重要。由于此数据集聚焦于电池级碳酸锂的初次生产，应当排除回收过程。

## Review details
清单： 内部审查通过几个迭代步骤完成，涉及原始数据验证、原始数据记录、代表性、完整性、与 ISO 14040 和 14044 有关的建模的一致性。

## Data sources
- Jiang, S. et al. Environmental impacts of lithium production showing the importance of primary data of upstream process in life-cycle assessment. Journal of Environmental Management 262, 110253 (2020).
