# 电力生产 ; 火电 ; 贵州

Dataset: ILCD process, Unit process, single operation
Geography: GZ-CN
Reference year: 2019
Classification: Unit processes / Energy carriers and technologies / Electricity
Generated by: 熊若熙, xiongrx0126@163.com
Owner: 天工LCI数据工作小组
Review: Dependent internal review by 天工LCI数据工作小组
Amounts: no units in this file; such an amount is in the reference unit of its flow, which a separate flow dataset defines
copyright: false
licenseType: Free of charge for all users and uses

## General comment
火电发电包括原煤、洗煤、石油、天然气等十七种化石燃料。该过程只考虑直接发电过程，不考虑上游原材料开采加工和下游消费

## Time period
根据2019年能源统计年鉴数据计算

## Technical purpose
贵州的火电发电工业过程利用原煤、洗煤、石油和天然气等多种化石燃料进行电力生产。作为能源部门的一部分，它为住宅、商业和工业用途提供电力来源。该数据集仅代表直接发电方面，即它特别适用于评估电力发电对环境影响的直接影响，而不考虑上游原材料的开采加工或下游终端用户的电力消费。

## Reference product
- electricity for thermal power: 3.6; calculated

## Inputs
All rows: calculated
- Raw coal: 0.329966
- Other Washed Coal: 0.162252
- Gangue, in ground: 0.00747476
- Coke oven gas: 0.001468
- blast furnace gas: 0.01345
- Converter gas: 0.001166
- Diesel: 0.00019214
- natural gas: 0.002511

## Outputs
- carbon dioxide (fossil): 0.752153; calculated
- sulfur dioxide: 0.00016113; calculated
- Nitrogen oxides: 0.000253818; calculated
- particles (> PM10): 3.0899e-5; calculated

## Data treatment and extrapolations
核算方法参考《企业温室气体排放核算方法与报告指南 发电设施》。不同形式发电量及燃料用量来自于《中国能源统计年鉴 2020》中的第三章（能源生产） 和第六章（地区能源平衡表）。用于计算二氧化碳排放因子的低位发热量、单位热值含碳量等燃料参数来自于《2019 年度中国区域电网二氧化碳基准线排放因子 OM 计算说明》、《企业温室气体排放核算方法与报告指南 发电设施》

## Use advice
在使用这个数据集进行生命周期评估（LCA）时，必须注意所包括流程的边界。此数据集不应用于计算与原材料的提取和加工或电力的下游使用相关的影响。它专为模拟仅与火力发电有关的直接排放和资源使用而量身定制。为了方法论上的一致性，用户应参照《企业温室气体排放核算方法与报告指南-发电设施》中指定的核算方法。确保所应用的能源统计和排放因子与《2019年能源统计年鉴》和其他参考的中国指南相符。为了保持准确和最新的LCA结果，应考虑对方法论指南和能源统计的未来更新。

## Review details
清单： 内部审查通过几个迭代步骤完成，涉及原始数据验证、原始数据记录、代表性、完整性、与 ISO 14040 和 14044 有关的建模的一致性。

## Data sources
- 熊若熙. 中国电力生产和消费二氧化碳与污染物排放因子核算. (清华大学, 2023).
